# calcium borates production

Dataset: EcoSpold 2, unit process
Geography: TR
Time period: 2000-01-01 to 2021-12-31
Technology level: current
Classification: ISIC rev.4 ecoinvent: 0891:Mining of chemical and fertilizer minerals
Classification: EcoSpold01Categories: chemicals/inorganics
Tags: ConvertedDataset
Scenario: Business-as-Usual
System model: Allocation, cut-off by classification
Generated by: Roland Hischier
Published in: Althaus H.-J. 2007
Database: ecoinvent
isCopyrightProtected: true
accessRestrictedTo: 1

## General comment
The functional unit represent 1 kg of calcium borate. Large uncertainty of the process data due to weak data on the production process.
[This dataset was already contained in the ecoinvent database version 2. It was not individually updated during the transfer to ecoinvent version 3. Life Cycle Impact Assessment results may still have changed, as they are affected by changes in the supply chain, i.e. in other datasets. This dataset was generated following the ecoinvent quality guidelines for version 2. It may have been subject to central changes described in the ecoinvent version 3 change report (http://www.ecoinvent.org/database/ecoinvent-version-3/reports-of-changes/), and the results of the central updates were reviewed extensively. The changes added e.g. consistent water flows and other information throughout the database. The documentation of this dataset can be found in the ecoinvent reports of version 2, which are still available via the ecoinvent website. The change report linked above covers all central changes that were made during the conversion process.]

## Included activities end
Raw materials, machineries and energy consumption for production, estimated emissions to air from production and infrastructure of the site (approximation). No water emissions.

## Geography
Data used represent conditions in Turkey.

## Technology
Data approximated with data from iron mining as well as lime crushing and milling. Land-use data based on conditions for sodium borates.

## Time period
date of published literature

## Parameters
- fraction, process water, to air: 0.205 dimensionless; name fraction_PW_to_air; lognormal variance with pedigree 0.092025, pedigree (4,4,3,2,4)
  Literature value (Statistics Canada, 2007 & Shaffer, K.H., 2008, Consumptive water use in the Great Lakes Basin, USGS) (Vionnet, S., Quantis Water Database - Technical Report, 2012).

## Reference product
- calcium borates: 1 kg; CPC 346: Fertilizers and pesticides; By-product classification allocatable product; CAS 12007-56-6
  EcoSpold01Location=TR
  production volume 1.15e10 kg
    The production volumes of calcium borates in 2005 were estimated out of the production of boron minerals (The 2007 Mineral Yearbook, USGS; table 6, quantities expressed in B2O3 eq). It has been assumed that all boron minerals produced in Turkey were the calcium borate colemanite, Ca2B6O11-5H2O (after ecoinvent report v2 8- part 16).
  property price 0.44 EUR2005
    Calculated value based on data from United Nations Commodity Trade Statistics Database (comtrade.un.org). UN comtrade category: 281000 Oxides of boron, boric acids. Year 2005. Using exchange rate of 1EURO = 1.209 USD. Average of price of import into 5 main markets (EU, US, JP, IN and CN).
  property carbon content 0
    carbon content on a dry matter basis (reserved; not for manual entry)
  properties: water content 0, carbon content, fossil 0, carbon content, non-fossil 0, dry mass 1 kg, water in wet mass 0 kg, wet mass 1 kg, carbon allocation 0 kg

## Inputs from technosphere
- diesel, burned in building machine: 0.0255 MJ; lognormal variance with pedigree 0.2687, pedigree (4,3,5,3,5)
  EcoSpold01Location=GLO
  Approximation with data from iron mining & lime treatment
  Uncertainty: approximation with data from iron mining & lime treatment
  properties: heating value, net 1 MJ
- blasting: 0.000271 kg; lognormal variance with pedigree 0.2687, pedigree (4,3,5,3,5)
  EcoSpold01Location=RER
  Approximation with data from iron mining & lime treatment
  Uncertainty: approximation with data from iron mining & lime treatment
- industrial machine, heavy, unspecified: 0.000231 kg; lognormal variance with pedigree 0.5787, pedigree (4,3,5,3,5)
  (same comment as for blasting)
- heat, central or small-scale, other than natural gas: 0.00282 MJ; lognormal variance with pedigree 0.2687, pedigree (4,3,5,3,5)
  Approximation with data from iron mining & lime treatment
  EcoSpold01Location=CH
  Uncertainty: approximation with data from iron mining & lime treatment
  properties: heating value, net 1 MJ
- electricity, medium voltage: 0.0339 kWh; lognormal variance with pedigree 0.2687, pedigree (4,3,5,3,5)
  Approximation with data from iron mining & lime treatment
  EcoSpold01Location=UCTE
  Uncertainty: approximation with data from iron mining & lime treatment
- recultivation, iron mine: 9.42e-5 m2; lognormal variance with pedigree 0.5787, pedigree (4,3,5,3,5)
  Approximation with data from iron mining & lime treatment
  EcoSpold01Location=GLO
  Uncertainty: approximation with data from iron mining & lime treatment
- mine infrastructure, iron: 8.33e-13 unit; lognormal variance with pedigree 0.5787, pedigree (4,3,5,3,5)
  (same comment as for recultivation, iron mine)
- heat, district or industrial, other than natural gas: 0.0898 MJ; lognormal variance with pedigree 0.2687, pedigree (4,3,5,3,5)
  (same comment as for blasting)
  properties: heating value, net 1 MJ
- conveyor belt: 2.78e-8 m; lognormal variance with pedigree 0.5787, pedigree (4,3,5,3,5)
  Approximation with data from iron mining & lime treatment
  EcoSpold01Location=RER
  Uncertainty: approximation with data from iron mining & lime treatment

## Inputs from nature
- Colemanite, in ground [natural resource, in ground]: 1.25 kg; lognormal variance with pedigree 0.2687, pedigree (4,3,5,3,5)
  Estimated overall yield of 80%
  Uncertainty: estimated overall yield of 80%
- Water, well, in ground [natural resource, in water]: 2.93e-5 m3; name water_well_in_ground_input; lognormal variance with pedigree 0.2687, pedigree (4,3,5,3,5)
  Approximation with data from iron mining & lime treatment
  Uncertainty: approximation with data from iron mining & lime treatment
- Occupation, mineral extraction site [natural resource, land]: 0.00706 m2*year; lognormal variance with pedigree 0.3087, pedigree (4,3,5,3,5)
  (same comment as for Water, well, in ground)
- Transformation, to mineral extraction site [natural resource, land]: 9.42e-5 m2; lognormal variance with pedigree 0.3987, pedigree (4,3,5,3,5)
  (same comment as for Water, well, in ground)
- Transformation, from forest, unspecified [natural resource, land]: 9.42e-5 m2; lognormal variance with pedigree 0.3987, pedigree (4,3,5,3,5)
  (same comment as for Water, well, in ground)

## Emissions to nature
- Water [air, unspecified]: 6.0065e-6 m3; name water_to_air_unspecified; = (water_well_in_ground_input*fraction_PW_to_air); lognormal variance with pedigree 0.0807, pedigree (2,2,5,1,1)
  Calculated value based on literature values and expert opinion. See comments in the parametres' comment field.
  property fraction, origin: salt water 0; name fraction_origin_salt_water
  property fraction, origin: fresh water 1; name fraction_origin_fresh_water
  property fraction, origin: unspecified 0; name fraction_origin_unspecified
- Particulates, > 2.5 um, and < 10um [air, urban air close to ground]: 0.00131 kg; lognormal variance with pedigree 0.3987, pedigree (4,3,5,3,5)
  (same comment as for Water, well, in ground)
- Particulates, < 2.5 um [air, urban air close to ground]: 0.000145 kg; lognormal variance with pedigree 0.5787, pedigree (4,3,5,3,5)
  (same comment as for Water, well, in ground)
- Water [water, unspecified]: 2.32935e-5 m3; name water_to_water_unspecified; = water_well_in_ground_input*(1-fraction_PW_to_air); lognormal variance with pedigree 0.0807, pedigree (2,2,5,1,1)
  (same comment as for Water)
  property fraction, origin: unspecified 0; name fraction_origin_unspecified_Ww
  property wet mass 1000 kg; name WM
  property dry mass 0 kg; name DM
  property carbon content, non-fossil 0; name C_content_non_fossil
  property carbon content, fossil 0; name C_content_fossil
  property water in wet mass 1000 kg; name WWM
  property fraction, origin: fresh water 1; name fraction_origin_fresh_water_Ww
  property fraction, origin: salt water 0; name fraction_origin_salt_water_Ww
- Particulates, > 10 um [air, urban air close to ground]: 0.00145 kg; lognormal variance with pedigree 0.3087, pedigree (4,3,5,3,5)
  (same comment as for Water, well, in ground)

## Extrapolations
This dataset has been extrapolated from year 2000 to the year of the calculation (2021). The uncertainty has been adjusted accordingly.

## Review by Heiko Kunst 2007-11-09
Passed.
