# suction, shavings, softwood

Dataset: EcoSpold 2, unit process
Geography: CA-QC
Time period: 2011-01-01 to 2021-12-31
Technology level: current
Classification: ISIC rev.4 ecoinvent: 1610:Sawmilling and planing of wood
Tags: recontextualization
Scenario: Business-as-Usual
System model: Allocation, cut-off by classification
Generated by: Hugues Imbeault-Tétreault
Database: ecoinvent
isCopyrightProtected: true
accessRestrictedTo: 1

## General comment
This data represents the service of collecting shavings from the planing of softwood, expressed per kg dry mass and transporting it to its silo via aspiration.

## Included activities start
The activity starts with the shavings at the planing machine.

## Included activities end
This activity ends with the shavings collected at a silo at the sawmill site. The dataset does not include direct wood dust emissions. The infrasturcture for the pipes and pumps as well as for the silo are assumed be part of the infrastructure DS for the sawmill.

## Geography
The exchanges of this child dataset are identical to the GLO dataset. This dataset was created to enable linking to regional markets (e.g. for electricity). Data quality indicators were adjusted accordingly

## Reference product
- shavings, softwood, loose, measured as dry mass: 0 kg; source BFS 2013; CPC 39283: Non-agglomerated wood waste and scrap; By-product classification allocatable product
  extrapolated from Swiss data via FAO statistics on the production of sawnwood
  production volume 0 kg; name p_shavings; = (1550600+334340+1455000+2699100+1956700+3629900)/1079420*1.1134E+07
    Sum of all production volumes of all planing processes for the Swiss geographical reference, quantified within the planing datasets, and extrapolated to Quebec volume.
  property price 0.113 EUR2005
    Calculated based on data from FAOSTAT (accessed 20140429). The price is calculated by using data on total world import quantity (m3) and import value (1000 USD), year 2005. 40461924 m3 of Chips and Particles was imported in the world in 2005. The import value was 3022227000 USD. The calculated price is thus (3022227000/40461924=74.7*0.8=) 62.2 Euro/m3. It is estimated, that the chips and particles are half hardwood (of density 650 kg/m3) and half softwood (of density 450 kg/m3), thus the remaining mixture has a density of 550 kg/m3. The recalculated price is (1/550*62.2=) 0.11 Euro/kg. Using the same approach the calculated price for 2010 was 0.123 Euro/kg.
  property heating value, net 12.61 MJ
    LHV is calculated based on the Carbon content of the product. More details can be found on the respective documentation.
  property carbon content 0.494
    carbon content on a dry matter basis (reserved; not for manual entry)
  properties: carbon content, non-fossil 0.494, dry mass 1 kg, water in wet mass 0.1 kg, water content 0.1, carbon content, fossil 0, wet mass 1.1 kg, carbon allocation 0.494 kg
- shavings, softwood, measured as dry mass: 1 kg; source BFS 2013; CPC 39283: Non-agglomerated wood waste and scrap; By-product classification allocatable product; pedigree (1,1,1,1,1)
  shavings recollected from the planing process where they are generated as loose shavings.
  production volume 1.19916e8 kg
  properties: carbon content, fossil 0, carbon content, non-fossil 0.494, wet mass 1.1 kg, price 0.113 EUR2005, dry mass 1 kg, water content 0.1, water in wet mass 0.1 kg, heating value, net 13.38 MJ, carbon content 0.494, carbon allocation 0.494 kg

## By-products
- shavings, softwood, measured as dry mass: 0 kg; source BFS 2013; CPC 39283: Non-agglomerated wood waste and scrap; By-product classification allocatable product; pedigree (1,1,1,1,1)
  shavings recollected from the planing process where they are generated as loose shavings.
  production volume 0 kg
    Calculated from production volume of reference product using the relative outputs.
  property price 0.113 EUR2005
    (same comment as for shavings, softwood, loose, measured as dry mass)
  property heating value, net 13.38 MJ
    (same comment as for shavings, softwood, loose, measured as dry mass)
  property carbon content 0.494
    carbon content on a dry matter basis (reserved; not for manual entry)
  properties: carbon content, fossil 0, carbon content, non-fossil 0.494, wet mass 1.1 kg, dry mass 1 kg, water content 0.1, water in wet mass 0.1 kg, carbon allocation 0.494 kg

## Inputs from technosphere
- electricity, medium voltage: 0.0645 kWh; source BFS 2013; lognormal variance with pedigree 0.216, pedigree (5,5,5,5,5)
  electricity needed for the suction of shavings from the planing process and their transport to a bunker/silo.
- shavings, softwood, loose, measured as dry mass: 1 kg; source BFS 2013
  extrapolated from Swiss data via FAO statistics on the production of sawnwood
  production volume 1.19916e8 kg
  properties: price 0.113 EUR2005, carbon content, non-fossil 0.494, dry mass 1 kg, water content 0.1, heating value, net 12.61 MJ, wet mass 1.1 kg

## Sampling procedure
complementary literature and sampling from sawmills

## Extrapolations
This dataset has been extrapolated from year 2013 to the year of the calculation (2021). The uncertainty has been adjusted accordingly.
