# lean concrete production, with cement CEM II/B

Dataset: EcoSpold 2, unit process
Geography: CH
Time period: 2013-01-01 to 2021-12-31
Technology level: current
Classification: EcoSpold01Categories: construction materials/concrete
Classification: ISIC rev.4 ecoinvent: 2395:Manufacture of articles of concrete, cement and plaster
Synonyms: béton maigre; ready-mixed concrete; Transportbeton; Magerbeton
Scenario: Business-as-Usual
System model: Allocation, cut-off by classification
Generated by: Frank Werner
Published in: Werner F. 2014
Database: ecoinvent
isCopyrightProtected: true
accessRestrictedTo: 1

## General comment
This datasets contains the production of lean concrete with cement CEM II/B from primary aggregates (no input of recycled gravel or sand).
Density: 2250 kg/m3, content of cement: 150 kg/m3
Exposition class according to EN 206-1: no normative requirements
Examples fo this exposition class are blinding layers below foundations.

## Included activities start
The activity starts with the ingredients for the concrete at the factory gate.

## Included activities end
Includes the whole manufacturing processes to produce ready-mixed concrete, internal processes (transport, etc.) and infrastructure. No administration is included.

## Geography
For some exchanges RER-modules have been used as proxy

## Technology
Typical technology for average Swiss production

## Parameters
- fraction, tap water, to air: 0.15 dimensionless; name fraction_TW_to_air; = fraction_PW_to_air; lognormal variance with pedigree 0.092025, pedigree (4,4,3,2,4)
  Calculated value. See comment in the other parametres present in this dataset. Tap water is considered to be always used as process water, thus process water fractions to air are applied to all tap water input flows to calculate the amount of water consumed in the processes.
- fraction, water, completely softened, to air: 0.15 dimensionless; name fraction_WCS_to_air; = fraction_PW_to_air; lognormal variance with pedigree 0.092025, pedigree (4,4,3,2,4)
  Calculated value. See comment in the other parametres present in this dataset. Water, completely softened is considered to be always used as process water, thus process water fractions to air are applied to all water, completely softened input flows to calculate the amount of water consumed in the processes.
- fraction, process water, to air: 0.15 dimensionless; name fraction_PW_to_air; lognormal variance with pedigree 0.092025, pedigree (4,4,3,2,4)
  Literature value. In case when no industry/process specific data are available, default evaporation fraction value is used. This value is 15% and is based on literature (Statistics Canada, 2007 & Shaffer, K.H., 2008, Consumptive water use in the Great Lakes Basin, USGS & Shiklomanov, 2003, World Water Resources at the Beginning of the 21st Century) and has been approved by an expert.

## Reference product
- lean concrete: 1 m3; name m_concrete; By-product classification allocatable product; CPC 37540: Tiles, flagstones, bricks and similar articles, of cement, concrete or artificial stone
  production volume 1.575e6 m3; name p_concrete; = 14000000*0.1125
    Annual production of ready-mixed concrete in Switzerland times percentage of inventoried concrete of total ready mixed concrete (estimates by Cemsuisse 12/2014)
  property price 185 EUR2005; name m_concrete_price_EUR2005
    Data are not easily available. Therefore, an average price of products supplied by the activities in the same ISIC 3 code has been applied.This price is obtained as '_49 Concrete, asphalt and other mineral products, EU27 virgin, EU27' in the 'EU & DK Input Output Database' (available in SimaPro). The price is assumed to be valid for both RER2003, RER 2004, world 2003 and world 2004. Multiplied by density.
  property carbon content 0
    carbon content on a dry matter basis (reserved; not for manual entry)
  properties: dry mass 2080 kg, water content 0.0528846, carbon content, fossil 0, wet mass 2190 kg, carbon content, non-fossil 0, water in wet mass 110 kg, carbon allocation 0 kg

## Inputs from technosphere
All rows: source Werner F. 2014
- tap water: 110 kg; name tap_water_input; lognormal variance with pedigree 0.052625, pedigree (3,3,5,2,1)
  EcoSpold01Location=CH
  properties: wet mass 1 kg, water content 2962.17, carbon content, fossil 0.00178991, dry mass 0.000337476 kg
  note on carbon content, fossil: Bicarbonate content is 2.93 mol/m3. CO2 content is 0.1 mol/m3 (ecoinvent v2.2 report 8, Tab 93.1).
- heat, district or industrial, natural gas: 2.6 MJ; lognormal variance with pedigree 0.032025, pedigree (3,4,4,2,1)
  EcoSpold01Location=RER
  properties: heating value, net 1 MJ
- sand: 715 kg; lognormal variance with pedigree 0.054, pedigree (4,1,5,1,1)
  properties: dry mass 1 kg, wet mass 1 kg
- concrete mixing factory: 4.17e-7 unit; lognormal variance with pedigree 0.3286, pedigree (2,1,4,1,1)
  EcoSpold01Location=CH
  activityLink introduced to establish a direct link to the corresponding regional supply of this product
- diesel, burned in building machine: 0.2 MJ; lognormal variance with pedigree 0.018625, pedigree (2,1,4,2,1)
  EcoSpold01Location=GLO
  properties: heating value, net 1 MJ
- waste concrete: -5.29 kg; name w_concrete; lognormal variance with pedigree 0.0186, pedigree (2,1,4,1,1)
  EcoSpold01Location=CH
  production volume 8.33175e6 kg; = w_concrete/m_concrete*p_concrete
    Calculated from the production volume of concrete, high exacting requirements in proportion to the respective output amounts.
  property price 0 EUR2005; name w_concrete_price_EUR2005
  properties: wet mass 1 kg, dry mass 0.5 kg, water content 1
- cement, alternative constituents 21-35%: 150 kg; lognormal variance with pedigree 0.054, pedigree (4,1,5,1,1)
  properties: wet mass 1 kg, dry mass 1 kg
- municipal solid waste: -0.05 kg; name w_solid_waste; lognormal variance with pedigree 0.0186, pedigree (2,1,4,1,1)
  EcoSpold01Location=CH
  production volume 78750 kg; = w_solid_waste/m_concrete*p_concrete
    (same comment as for waste concrete)
  properties: heating value, net 11.74 MJ, carbon content, non-fossil 0.261655, wet mass 1 kg, dry mass 0.771 kg, carbon content, fossil 0.171549, water content 0.297017
  note on heating value, net: Value taken from the general comment of the treatment dataset.
  note on carbon content, non-fossil: MSW composition in tab 4.1, ecoinvent v2.2 report 13_I. C content referred to 1 kg DM
- heat, district or industrial, other than natural gas: 2.4 MJ; lognormal variance with pedigree 0.032025, pedigree (3,4,4,2,1)
  activity link specifies fuel accoring to survey
  EcoSpold01Location=CH
  properties: heating value, net 1 MJ
- gravel, round: 1275 kg; lognormal variance with pedigree 0.0261, pedigree (4,2,4,1,1)
  EcoSpold01Location=CH
  properties: wet mass 1 kg, dry mass 1 kg
- lubricating oil: 0.02 kg; lognormal variance with pedigree 0.018625, pedigree (2,1,4,2,1)
  EcoSpold01Location=RER
  properties: dry mass 1 kg, carbon content, fossil 0.75, wet mass 1 kg, heating value, net 40.2 MJ
  note on carbon content, fossil: Lubricating oil is produced from diesel. C-content/dry mass of fats and oils considered 75%, from: ecoinvent v2.2 report, n 15a, pg 40
  note on heating value, net: Literature value, Source: IPCC 2006, 2006 IPCC Guidelines for National Greenhouse Gas Inventories, Prepared by the National Greenhouse Gas Inventories Programme, Eggleston H.S., Buendia L., Miwa K., Ngara T. and Tanabe K. (eds). Published: IGES, Japan
- synthetic rubber: 0.12 kg; lognormal variance with pedigree 0.018625, pedigree (2,1,4,2,1)
  EcoSpold01Location=RER
  properties: heating value, net 26.42 MJ, dry mass 1 kg, carbon content, fossil 0.871949, wet mass 1 kg
  note on carbon content, fossil: EPDM (Ethylene-propene-diene terpolymer) rubber is a terpolymer of ethylene, propene, and a diene with the residual unsaturated portion of the diene in the side chain (ecoinvent v2.2 report 7-part XX & Ullmann). Chemical formula (deduced from Evidences of Solvent-Induced Miscibility in Polychloroprene-co-Ethylene-Propene Diene Terpolymer Blends, Dubey et al., Journal of Applied Polymer Science, 2009, 111:1884–1891): C20H35
- electricity, medium voltage: 5.4 kWh; lognormal variance with pedigree 0.0186, pedigree (2,1,4,1,1)
  EcoSpold01Location=CH

## Sampling procedure
Measured data of several Swiss plants, intended to be representative for the Swiss production volume

## Extrapolations
This dataset has been extrapolated from year 2013 to the year of the calculation (2021). The uncertainty has been adjusted accordingly.
