# hardwood forestry, eucalyptus ssp., sustainable forest management

Dataset: EcoSpold 2, unit process
Geography: TH
Time period: 2000-01-01 to 2021-12-31
Technology level: current
Classification: ISIC rev.4 ecoinvent: 0220:Logging
Synonyms: Eucalyptus camaldulensis
Tags: Swiss brush-up completed
Scenario: Business-as-Usual
System model: Allocation, cut-off by classification
Generated by: Frank Werner
Published in: Althaus H.J. 2007
Database: ecoinvent
isCopyrightProtected: true
accessRestrictedTo: 1

## General comment
This dataset represents the plantation establishment, management and harvesting of one m3 eucalyptus wood.
The dataset is assumed to cover (close to) sustainable plantation management in Thailand. The dataset represents a short-rotation plantation of eucalyptus ssp. for pulp and paper production.
Due to lack of data from Thailand complimentary data has been used; raw material use and air emissions are assumed similar to logging in Denmark, Dutch data on forestry processes are used.
Branchings are assumed to be burned on site and non-site-specific literature values for the amount of branchings and emissions from biomass burning is used.
Wood density and land use can vary considerably within a species and depending on how intensive the forest is used. Since the data used are valid for one specific company and region the uncertainty is rather high.
This dataset represents the natural growth of one m3 eucalyptus trees in forest plantation.
The dataset is assumed to represent the production of the most widely used eucalypgus species, E. camaldulensis, in Thailand by (close to) sustainable forest management (SFM). Data refers to wood 'under bark'. The CO2-assimilation of the biomass is calculated from a carbon content of 49.4% including bark (10%). The energy content embodied in the biomass equals its gross calorific value including bark.
The solar energy uptake is calculated as the upper heating value (26.81 MJ/kg at u=50% ) based on a lower heating value of 18.83 MJ/kg. The assumed wood density is 825 kg/m3 (u=0%).
Wood density and land use data can vary considerably within a species and depending on how intensive the forest is used. Since the data used are valid for one specific company and region the uncertainty is rather high.
Complementary European literature values were used when site-specific data was unavailable. The representativeness of the dataset is considered low because European data was used for almost all relevant processes due to a lack of data from Thailand.

## Included activities start
Plantation establishment process starting from eucalyptus tree planting. Natural growth process starting from standing eucalyptus trees at plantation.

## Included activities end
This activity ends with harvested eucalyptus tree logs, at forest road. The dataset includes plantation establishment, management, harvesting, hauling operations and biomass burning of branchings. The dataset does not include branchings left to rot on the ground, fuel consumption and the use of gravel and land for forest roads. This activity ends with standing eucalyptus trees before harvesting. The dataset includes the CO2 absorption from air and the land use for the trees to grow (including 10% bark). The dataset does not include the land use of forest road area.

## Geography
source assumes Dutch process data, due to the lack of specific data

## Technology
The technological representativity of this dataset for forestry conditions in Thailand is considered to be low.
During plantation and growing some fertilizers are used; however, applied quantities are unknown. Trees are harvested mechanically around year 3 at a dbh of 20 centimeters and an average height of 3 meters; 17.5% of tree is loss from delimbing. The production of 228.75 kilograms of log or 3.6 trees needs land of 4.16 m2 per year.
The production practise equals natural growth in sustainable forestry. Natural growth relates to the forest area and CO2 from the atmosphere needed to produce eucalyptus trees.

## Reference product
- sawlog and veneer log, eucalyptus ssp., measured as solid wood under bark: 1 m3; CPC 031: Wood in the rough; By-product classification allocatable product
  Reference product. Eucalyptus timber output from the plantation establishment, management and harvesting via (close to) sustainable plantation management in Thailand. The plantation is a short-rotation plantation of eucalyptus ssp. for pulp and paper production.
  production volume 1.94773e6 m3
    Unknown
    Total pulp production of Thailand at 440 kg/m3
  property price 103.86 EUR2005
    Reference: FAOSTAT (accessed 20140112). The price is calculated by using data on total world import quantity (m3) and import value (1000 USD), year 2005. 49144218 m3 of Industrial Roundwood(NC) + (Total) was imported in the world in 2005. The import value was 6171720000 USD. The calculated price is thus (6171720000/49144218*0.8)=103.857842238938 Euro.
  property carbon content, non-fossil 0.494
    C content of dry mass is 0.494 kgC/kg dry wood (ecoinvent v2.2 report 21).
  property heating value, net 11336.5 MJ
    LHV is calculated based on the Carbon content of the product. More details can be found on the respective documentation.The property is based on a value of 9.16MJ/kg
  property carbon content 0.494
    carbon content on a dry matter basis (reserved; not for manual entry)
  properties: water content 0.5, wet mass 1455.88 kg, dry mass 970.588 kg, carbon content, fossil 0, water in wet mass 485.294 kg, carbon allocation 479.471 kg

## Inputs from technosphere
- diesel, burned in building machine: 64.8 MJ; source Ongmongkolkul, A.  2001; lognormal variance with pedigree 0.0691, pedigree (3,4,5,3,1)
  Literature Value.
  properties: UVEK_link_1 734, UVEK_relative_amount_1 1, heating value, net 1 MJ
  note on UVEK_link_1: to be used only in special submissions in coordination with ecoinvent and the Swiss FOEN
- lubricating oil: 0.3 kg; source Ongmongkolkul, A.  2001; lognormal variance with pedigree 0.0691, pedigree (3,4,5,3,1)
  Estimation. Assuming Dutch processes.
  properties: carbon content, fossil 0.75, dry mass 1 kg, UVEK_link_1 2866, heating value, net 40.2 MJ, UVEK_relative_amount_1 1, wet mass 1 kg
  note on carbon content, fossil: Lubricating oil is produced from diesel. C-content/dry mass of fats and oils considered 75%, from: ecoinvent v2.2 report, n 15a, pg 40
  note on heating value, net: Literature value, Source: IPCC 2006, 2006 IPCC Guidelines for National Greenhouse Gas Inventories, Prepared by the National Greenhouse Gas Inventories Programme, Eggleston H.S., Buendia L., Miwa K., Ngara T. and Tanabe K. (eds). Published: IGES, Japan
- power sawing, without catalytic converter: 0.25 hour; source Ongmongkolkul, A.  2001; lognormal variance with pedigree 0.0691, pedigree (3,4,5,3,1)
  Estimation. Assuming Dutch processes.

## Inputs from nature
- Wood, hard, standing [natural resource, biotic]: 1.2 m3; lognormal variance with pedigree 0.0691, pedigree (3,4,5,3,1)
  Calculated Value. Resource correction for branchings.
- Carbon dioxide, in air [natural resource, in air]: 1968 kg; lognormal variance with pedigree 0.0691, pedigree (3,4,5,3,1)
  Calculated Value. Dried matter = 825 kg/m3, carbon content of dried matter = 49.4 %; including bark
- Occupation, forest, intensive [natural resource, land]: 360 m2*year; source Ongmongkolkul, A.  2001; lognormal variance with pedigree 0.41, pedigree (5,5,5,5,5)
  Estimation. Geographically not representable.
- Transformation, to forest, intensive [natural resource, land]: 18 m2; lognormal variance with pedigree 0.56, pedigree (5,5,5,5,5)
  Estimation. Assumed rotation length = 20 years. Geographically not representable.
- Energy, gross calorific value, in biomass [natural resource, biotic]: 29160 MJ; lognormal variance with pedigree 0.0691, pedigree (3,4,5,3,1)
  Energy content of wood
- Transformation, from forest, intensive [natural resource, land]: 18 m2; lognormal variance with pedigree 0.56, pedigree (5,5,5,5,5)
  Estimation, Assumed rotation lenght = 20 years.

## Emissions to nature
- Particulates, < 2.5 um [air, non-urban air or from high stacks]: 0.99 kg; source EPA 1995; lognormal variance with pedigree 0.5941, pedigree (3,4,5,3,1)
  Estimation. 5 g /kg. Estimated from the given reference.
- Particulates, > 2.5 um, and < 10um [air, non-urban air or from high stacks]: 0.825 kg; source EPA 1995; lognormal variance with pedigree 0.3941, pedigree (3,4,5,3,1)
  Estimation. 4 g /kg. Estimated from the given reference.
- Dinitrogen monoxide [air, non-urban air or from high stacks]: 0.0019725 kg; source IPCC 2003; lognormal variance with pedigree 0.2441, pedigree (3,4,5,3,1)
  Estimation. Volume under bark. Calculation based on data in reference.
- Carbon dioxide, non-fossil [air, unspecified]: 328.16 kg; source Ongmongkolkul, A.  2001; lognormal variance with pedigree 0.0691, pedigree (3,4,5,3,1)
  Estimation. Volume under bark. Calculation based on data in reference.
- Particulates, > 10 um [air, non-urban air or from high stacks]: 0.66 kg; source EPA 1995; lognormal variance with pedigree 0.2441, pedigree (3,4,5,3,1)
  Estimation. 6 g /kg. Estimated from the given reference.
- Methane, non-fossil [air, non-urban air or from high stacks]: 0.28692 kg; source IPCC 2003; lognormal variance with pedigree 0.2441, pedigree (3,4,5,3,1)
  Estimation. Volume under bark. Calculation based on data in reference.

## Sampling procedure
literature

## Extrapolations
This dataset has been extrapolated from year 2005 to the year of the calculation (2021). The uncertainty has been adjusted accordingly.
