# consumer electronics production, mobile device, tablet

Dataset: EcoSpold 2, unit process
Geography: GLO
Time period: 2014-01-01 to 2021-12-31
Technology level: current
Classification: ISIC rev.4 ecoinvent: 2640:Manufacture of consumer electronics
Synonyms: tablet computer
Scenario: Business-as-Usual
System model: Allocation, cut-off by classification
Generated by: Johannes Müller
Database: ecoinvent
isCopyrightProtected: true
accessRestrictedTo: 1

## General comment
This activity represents the production of one unit of a tablet (approx. 10-inch). It is based on an LCA of a smartphone[1] and scaled to fit the composition and proportions of a tablet. The scaling was done with a average composition of tablets([3], [4], [5], [6], [7], [8], [9]) The battery, display, mainboard, earpiece + speaker, internal cables and connector are included through separate datasets. An external charging device as well as a data cable [2]. Tap water and electricity data was taken from [4].
Sources:
- [1] Güvendik, M. (2014) From Smartphone to Futurephone: Assessing the environmental impacts of different circular economy scenarios of a smartphone using LCA.
- [2] Monier, V. et al. (2007) Preparatory Studies for Eco-design Requirements of EuPs, Battery chargers and external power supplies, Final report.
- [3] Hischier, R. et al. (2015) ‘Grey Energy and Environmental Impacts of ICT Hardware’, in ICT Innovations for Sustainability. Springer, pp. 171–189. doi: 10.1007/978-3-319-09228-7.
- [4] Hischier, R., Achachlouei, M. A. and Hilty, L. M. (2014) ‘Evaluating the sustainability of electronic media: Strategies for life cycle inventory data collection and their implications for LCA results’, Environmental Modelling and Software, 56(Lci), pp. 27–36. doi: 10.1016/j.envsoft.2014.01.001.
- [5] Apple Inc. (2019) iPad Environmental report. Available at: http://www.apple.com/environment/reports/.
- [6] Apple Inc. (2017) 12.9-inch iPad Pro Environmental Report. Available at: http://www.apple.com/environment/reports/.
- [7] Apple Inc. (2014) 9.7-inch iPad Pro Environmental Report. Available at: http://www.apple.com/environment/reports/.
- [8] Apple Inc. (2017) iPad Environmental Report. Available at: http://www.apple.com/environment/reports/.
- [9] Apple Inc. (2017) 10.5-inch iPad Pro Environmental Report. Available at: http://www.apple.com/environment/reports/.

## Included activities start
From reception of materials and auxiliares at the factory gate.

## Included activities end
The activity includes the materials, processes and energy use for the production of a tablet computer. The dataset includes the exchange "used tablet" to take into account the disposal. Data on factory and packaging are not included.

## Geography
Geography GLO was chosen because the dataset aims to represent the production of an average electronic device.

## Technology
Data for composition are from 2011-2019 but represent current technology.

## Parameters
- fraction, tap water, to air: 0.061 dimensionless; name fraction_TW_to_air; lognormal variance with pedigree 0.092025, pedigree (4,4,3,2,4)
  Calculated value. See comment in the other parametres present in this dataset. Tap water is considered to be always used as process water, thus process water fractions to air are applied to all tap water input flows to calculate the amount of water consumed in the processes.

## Reference product
- consumer electronics, mobile device, tablet: 1 unit; name RP; By-product classification allocatable product; CPC 45220: Portable automatic data processing machines weighing not more than 10 kg, such as laptops, notebooks and sub-n[…]
  production volume 1.441e8 unit; name PV_RP
    Source: IDC Worldwide Quarterly PCD Tracker (2020, January 30). Worldwide Tablet Shipments Continue to Decline in Q4 2019, According to IDC [Press Release]. Retrieved from https://www.idc.com/getdoc.jsp?containerId=prUS45959420
  property lifetime 4 year; name lifetime
    Estimated Value. Based on: Leapfrog Services (2017) How Long Will Your Tech Devices Last Before You Have To Replace Them? Available at: https://leapfrogservices.com/how-long-will-your-tech-devices-last-before-you-have-to-replace-them/.
  property lifetime capacity [h] 2920 hour; = lifetime*365*2
    Literature Value. Source: Hischier, R. et al. (2015) ‘Grey Energy and Environmental Impacts of ICT Hardware’, in ICT Innovations for Sustainability. Springer, pp. 171–189. doi: 10.1007/978-3-319-09228-7.
  property weight 0.51995 kg; = (BP_used_tablet*-1)
  property price 119.739 EUR2005
    Calculated based on inputs: The price of the product has been calculated as a sum of the values of the material and energy inputs for this product. This value is therefore a rough estimation. It may underestimate the real price since there are additional expenses when producing any product. These expences can include for example labour costs, treatment of waste materials and profit for the producer. Please consider carefully whether this level of data quality is acceptable for your application.

## Inputs from technosphere
- flat glass, coated: 0 kg; name glass; pedigree (1,1,1,1,1)
  Weighted average. From several sources as described in general comment.
  properties: dry mass 1 kg, wet mass 1 kg
- electricity, medium voltage: 0.312 kWh; lognormal variance with pedigree 0.0212, pedigree (2,4,4,5,3)
  Literature Value. Source: Hischier, R., Achachlouei, M. A., & Hilty, L. M. (2014). Evaluating the sustainability of electronic media: Strategies for life cycle inventory data collection and their implications for LCA results. Environmental Modelling & Software, 56, 27-36.
- printed wiring board, mounted mainboard, mobile device, double-sided, Pb free: 0.00676991 m2; name pwb; lognormal variance with pedigree 0.2106, pedigree (5,5,5,5,5)
  Measured value. Size of PWB of an iPad Pro 11''
  property dry mass 4.336 kg; name pwb_DM
  properties: wet mass 4.336 kg, carbon content, fossil 0.102905
- cable, connector for computer, without plugs: 0.153231 m; name datacable; = (0.0075+0.00186+0.0006)/0.065; lognormal variance with pedigree 0.0212, pedigree (2,4,4,5,3)
  Literature Value. Represents the charing cable without plugs. Copper wire (0.0075kg) + Isolation (0.00186kg) + Nylon (0.0006kg) divided by dry mass of "cable, connector for computer, without plugs" (0.065kg/unit).
  Source: V. Monier, S. Mudgal, L. Turunen, K. Schischke, C. Ciaglia, and N. F. Nissen, “Preparatory Studies for Eco-design Requirements of EuPs, Battery chargers and external power supplies, Final report,” 2007.
  properties: dry mass 0.065 kg, wet mass 0.065 kg, carbon content, fossil 0.359823
- sheet rolling, aluminium: 0.104143 kg; = alu; lognormal variance with pedigree 0.0212, pedigree (2,4,4,5,3)
  Weighted average. From several sources as described in general comment.
- plug, inlet and outlet, for computer cable: 0.0547009 unit; name plugs; = 2*0.0016/0.0585; lognormal variance with pedigree 0.0212, pedigree (2,4,4,5,3)
  Literature Value. Represents the plugs of the charing cable. Two plugs (2*0.0016kg), dry mass of 1 Unit: 0.0585kg/unit.
  Source: V. Monier, S. Mudgal, L. Turunen, K. Schischke, C. Ciaglia, and N. F. Nissen, “Preparatory Studies for Eco-design Requirements of EuPs, Battery chargers and external power supplies, Final report,” 2007.
  properties: carbon content, fossil 0.3397, dry mass 0.0585 kg, wet mass 0.0585 kg
- metal working, average for copper product manufacturing: 0.00783489 kg; = co; lognormal variance with pedigree 0.0212, pedigree (2,4,4,5,3)
  Calculated Value. Service representing the processing of copper. Scaled as described in general comment.
- glass fibre reinforced plastic, polyester resin, hand lay-up: 0.00145457 kg; name gl_fibre; lognormal variance with pedigree 0.0212, pedigree (2,4,4,5,3)
  Calculated Value. Scaled as described in general comment.
  properties: carbon content, fossil 0.246639, wet mass 1 kg, dry mass 1 kg
- liquid crystal display, unmounted, mobile device: 0.123143 kg; name lcd; lognormal variance with pedigree 0.0212, pedigree (2,4,4,5,3)
  Weighted average. From several sources as described in general comment.
- electric connector, peripheral type buss: 0.00356641 kg; name el_conn; lognormal variance with pedigree 0.0212, pedigree (2,4,4,5,3)
  Calculated Value. Represents data connector. Scaled as described in general comment.
  properties: carbon content, fossil 0.160512, dry mass 1 kg, wet mass 1 kg
- used tablet: -0.51995 kg; name BP_used_tablet; = (steel+pc+alu+co+gl_fibre+brass+int_cable+polyeth+ferrite+el_comp+ind+el_speaker+el_conn+batt+lcd+glass+pwb*pwb_DM)*-1; lognormal variance with pedigree 0.0212, pedigree (2,4,4,5,3)
  Calculated Value. Sum of all the material inputs to the dataset.
  production volume 7.49247e7 kg; = PV_RP * (BP_used_tablet/abs(RP))
    Calculated Value.
  property price 0 EUR2005; name BP_used_tablet_price_EUR2005
  properties: dry mass 1 kg, carbon content, non-fossil 7.60429e-5, wet mass 1 kg, carbon content, fossil 0.178256
- brass: 0 kg; pedigree (1,1,1,1,1)
  Calculated Value. Reprents Brass screws. Scaled as described in general comment.
  properties: dry mass 1 kg, wet mass 1 kg
- steel, chromium steel 18/8: 0.00616667 kg; name steel; lognormal variance with pedigree 0.0212, pedigree (2,4,4,5,3)
  Weighted average. From several sources as described in general comment.
  properties: carbon content, fossil 0.0008, wet mass 1 kg, dry mass 1 kg
- battery, Li-ion, NCA, rechargeable, prismatic: 0.140714 kg; name batt; lognormal variance with pedigree 0.0212, pedigree (2,4,4,5,3)
  Weighted average. From several sources as described in general comment.
  properties: copper content 0.0264099, carbon content, fossil 0.0607203, dry mass 0.976178 kg, water content 0.0244033, carbon content, non-fossil 0.00128402, wet mass 1 kg
- sheet rolling, chromium steel: 0.00616667 kg; = steel; lognormal variance with pedigree 0.0212, pedigree (2,4,4,5,3)
  Weighted average. Service representing the processing of steel.
- casting, brass: 0.000268881 kg; = brass; lognormal variance with pedigree 0.0212, pedigree (2,4,4,5,3)
  Calculated Value. Service representing the processing brass. Scaled as described in general comment.
- cable, ribbon cable, 20-pin, with plugs: 0.000345437 kg; name int_cable; lognormal variance with pedigree 0.0212, pedigree (2,4,4,5,3)
  Calculated Value. Represents internal cables. Scaled as described in general comment.
  properties: dry mass 1 kg, carbon content, fossil 0.648653, wet mass 1 kg
- electronic component, passive, mobile, earpiece and speaker: 0.00343975 kg; name el_speaker; lognormal variance with pedigree 0.0212, pedigree (2,4,4,5,3)
  Calculated Value. Scaled as described in general comment.
- power adapter, for smartphone: 1 unit; lognormal variance with pedigree 0.0212, pedigree (2,4,4,5,3)
  Represents the charger for the tablet.
  properties: price 3 EUR2005, carbon content, fossil 0.492079, wet mass 0.0597 kg, dry mass 0.0597 kg, carbon content, non-fossil 0.000409144
- copper, cathode: 0.00783489 kg; name co; lognormal variance with pedigree 0.0212, pedigree (2,4,4,5,3)
  Calculated Value. Scaled as described in general comment.
  properties: wet mass 1 kg, dry mass 1 kg
- polycarbonate: 0.0167143 kg; name pc; lognormal variance with pedigree 0.0212, pedigree (2,4,4,5,3)
  Weighted average. From several sources as described in general comment.
  properties: heating value, net 29.57 MJ, wet mass 1 kg, carbon content, fossil 0.755906, dry mass 1 kg
- polyethylene terephthalate, granulate, amorphous: 0.00102698 kg; name polyeth; lognormal variance with pedigree 0.0212, pedigree (2,4,4,5,3)
  Calculated Value. Scaled as described in general comment.
  properties: carbon content, fossil 0.625, dry mass 1 kg, wet mass 1 kg, heating value, net 22.95 MJ
- aluminium, wrought alloy: 0.104143 kg; name alu; lognormal variance with pedigree 0.0212, pedigree (2,4,4,5,3)
  Weighted average. Represents backside. From several sources as described in general comment.
- used cable: -0.01316 kg; name BP_used_cable; = ((datacable*0.065)+(plugs*0.0585))*-1; lognormal variance with pedigree 0.0212, pedigree (2,4,4,5,3)
  Calculated Value. Equal to sum of cable and plugs. 0.065kg: 1 unit of cable, 0.0585kg: 1 unit of plugs
  production volume 1.89636e6 kg; = PV_RP * (BP_used_cable/abs(RP))
    Calculated Value.
  property price 0 EUR2005; name BP_used_cable_price_EUR2005
  properties: carbon content, fossil 0.35493, dry mass 1 kg, wet mass 1 kg
- electronic component, passive, unspecified: 0.00406122 kg; name el_comp; lognormal variance with pedigree 0.0212, pedigree (2,4,4,5,3)
  Calculated Value. Scaled as described in general comment.
  properties: dry mass 1 kg, carbon content, fossil 0.317311, wet mass 1 kg, carbon content, non-fossil 0.0045566
- injection moulding: 0.0167143 kg; = pc; lognormal variance with pedigree 0.0212, pedigree (2,4,4,5,3)
  Weighted average. Service representing the processing of plastic. From several sources as described in general comment.
- ferrite: 3.17429e-5 kg; lognormal variance with pedigree 0.0212, pedigree (2,4,4,5,3)
  Calculated Value. Represents magnetic beads. Scaled as described in general comment.
  properties: dry mass 1 kg, wet mass 1 kg
- tap water: 303 kg; name tap_water_input; lognormal variance with pedigree 0.0212, pedigree (2,4,4,5,3)
  (same comment as for electricity, medium voltage)
  properties: dry mass 0.000337476 kg, carbon content, fossil 0.00178991, water content 2962.17, wet mass 1 kg
- inductor, miniature radio frequency chip: 0.000112967 kg; name ind; lognormal variance with pedigree 0.0212, pedigree (2,4,4,5,3)
  Calculated Value. Scaled as described in general comment.
  properties: dry mass 1 kg, wet mass 1 kg, carbon content, fossil 0.0535842
- wastewater, unpolluted: 0 m3; name BP_wastewater; pedigree (1,1,1,1,1)
  Calculated value based on literature values and expert opinion. See comments in the parametres' comment field.
  production volume 0 m3
    Calculated Value.
  property price 0 EUR2005; name BP_wastewater_price_EUR2005
  properties: water content 2962.17, carbon content, fossil 0.00178991, dry mass 0.337476 kg, carbon content, non-fossil 0.00178991, wet mass 1000 kg
  note on carbon content, fossil: Assumed to be like in tap water. Bicarbonate content is 2.93 mol/m3. CO2 content is 0.1 mol/m3 (ecoinvent v2.2 report 8, Tab 93.1).
- flat glass, coated: 0.0256445, 0.0519269 kg (2 entries); lognormal variance with pedigree 0.0212, pedigree (2,4,4,5,3)
  Weighted average. From several sources as described in general comment.
- brass: 1.34441e-6, 0.000267537 kg (2 entries); lognormal variance with pedigree 0.0212, pedigree (2,4,4,5,3)
  Calculated Value. Reprents Brass screws. Scaled as described in general comment.
- wastewater, unpolluted: -0.00227614, -0.282241 m3 (2 entries); lognormal variance with pedigree 0.0212, pedigree (2,4,4,5,3)
  (same comment as for wastewater, unpolluted)
  production volume 4.09989e7 m3

## Emissions to nature
- Water [air, unspecified]: 0.018483 m3; = (tap_water_input/1000*fraction_TW_to_air); lognormal variance with pedigree 0.0212, pedigree (2,4,4,5,3)
  (same comment as for wastewater, unpolluted)

## Extrapolations
This dataset has been extrapolated from year 2020 to the year of the calculation (2021). The uncertainty has been adjusted accordingly.
