# treatment of waste vapour barrier, flame-retarded, municipal incineration

Dataset: EcoSpold 2, unit process
Geography: CH
Time period: 1994-01-01 to 2021-12-31
Technology level: outdated
Classification: EcoSpold01Categories: waste management/municipal incineration
Classification: ISIC rev.4 ecoinvent: 3821:Treatment and disposal of non-hazardous waste
Synonyms: PE
Tags: ConvertedDataset; Treatment
Scenario: Business-as-Usual
System model: Allocation, cut-off by classification
Generated by: Gabor Doka (obsolete)
Published in: Doka G. 2007
Database: ecoinvent
isCopyrightProtected: true
accessRestrictedTo: 1

## General comment
Inventoried waste contains 100% Vapour barrier, flame-retarded; .
waste composition (wet, in ppm): upper heating value 40.38 MJ/kg; lower heating value 40.05 MJ/kg; H2O 3732; O 35860; H 114290; C 766980; S 398.3; N 1210.3; P n.a.; B n.a.; Cl 1363.6; Br 67000; F 13.421; I n.a.; Ag n.a.; As 1.7; Ba 223.68; Cd 31.672; Co 1.5658; Cr 11.631; Cu 38.596; Hg 0.044736; Mn 28.034; Mo n.a.; Ni 0.89472; Pb 21.082; Sb 9.3945; Se 1.8789; Sn 3.5585; V 2057.8; Zn 319.09; Be 0.44736; Sc n.a.; Sr 79.182; Ti 894.72; Tl 0.35789; W n.a.; Si n.a.; Fe 1431.5; Ca 2415.7; Al 178.94; K n.a.; Mg 89.472; Na 1311.2;
Share of carbon in waste that is biogenic 0%.
Share of iron in waste that is metallic/recyclable 0%.
Net energy produced in MSWI: 4.69MJ/kg waste electric energy and 9.4MJ/kg waste thermal energy
Allocation of energy production: no substitution or expansion. Total burden allocated to waste disposal function of MSWI.
One kg of this waste produces 0.02525 kg of slag and 0.06493 kg of residues, which are landfilled. Additional solidification with 0.02597 kg of cement.
[This dataset was already contained in the ecoinvent database version 2. It was not individually updated during the transfer to ecoinvent version 3. Life Cycle Impact Assessment results may still have changed, as they are affected by changes in the supply chain, i.e. in other datasets. This dataset was generated following the ecoinvent quality guidelines for version 2. It may have been subject to central changes described in the ecoinvent version 3 change report (http://www.ecoinvent.org/database/ecoinvent-version-3/reports-of-changes/), and the results of the central updates were reviewed extensively. The changes added e.g. consistent water flows and other information throughout the database. The documentation of this dataset can be found in the ecoinvent reports of version 2, which are still available via the ecoinvent website. The change report linked above covers all central changes that were made during the conversion process.]

## Included activities end
waste-specific air and water emisions from incineration, auxiliary material consumption for flue gas cleaning. Short-term emissions to river water and long-term emisisons to ground water from slag compartment (from bottom slag) and residual material landfill (from solidified fly ashes and scrubber slugde). Process energy demands for MSWI.

## Geography
Specific to the technology mix encountered in Switzerland in 2000. Well applicable to modern incineration practices in Europe, North America or Japan.

## Technology
replaced by newer incineration technology with fly ash extraction. Average Swiss MSWI plants in 2000 with electrostatic precipitator for fly ash (ESP), wet flue gas scrubber and 29.4% SNCR , 32.2% SCR-high dust , 24.6% SCR-low dust -DeNOx facilities and 13.8% without Denox (by burnt waste, according to Swiss average). Share of waste incinerated in plants with magnetic scrap separation from slag : 50%. Gross electric efficiency technology mix 12.997% and Gross thermal efficiency technology mix 25.57%

## Time period
Waste composition as given in literature reference, theoretical data or other source. Transfer coefficients for modern Swiss MSWI. Emission speciation based on early 90ies data.

## Reference product
- waste vapour barrier, flame-retarded: -1 kg; name RP_amount_1; By-product classification Waste; CPC 39217: Worn clothing and other worn textile articles; CAS 9002-88-4
  EcoSpold01Location=CH
  production volume 0 kg; name RP_PV_1
    outdated. Replaced by newer incineration technology with fly ash extraction.
  property price 0 EUR2005; name RP_amount_1_price_EUR2005
    Waste products are assigned a price of zero as they are assumed to require further treatment.
  property carbon content, fossil 0.803141
    C content in 1 kg DM was calculated using data in Tab A.5, ecoinvent v2.2 report 13_I
  property heating value, net 23.13 MJ
    LHV is calculated based on the Carbon content of the product. More details can be found on the respective documentation.
  property carbon content 0.803141
    carbon content on a dry matter basis (reserved; not for manual entry)
  properties: water content 0.0471204, carbon content, non-fossil 0, wet mass 1 kg, water in wet mass 0.045 kg, dry mass 0.955 kg, carbon allocation 0.767 kg

## Inputs from technosphere
- process-specific burdens, residual material landfill: 0.0649 kg; lognormal variance with pedigree 0.17, pedigree (1,1,5,1,1)
  uncertainty is calculated from uncertainties in waste composition and transfer coefficients in incinerator;activityLink introduced to establish a direct link to the corresponding regional supply of this product
  EcoSpold01Location=CH
- residual material landfill: 1.35e-10 unit; lognormal variance with pedigree 0.17, pedigree (1,1,5,1,1)
  EcoSpold01Location=CH
  uncertainty is calculated from uncertainties in waste composition and transfer coefficients in incinerator
- heat, district or industrial, natural gas: 0.005355 MJ; lognormal variance with pedigree 1.59, pedigree (1,1,5,1,1)
  EcoSpold01Location=RER
  uncertainty calculated from uncertainty in average DeNOx input, uncertainty in the share of thermal NOx, uncertainty of nitrogen content in average municipal waste and the unertainty in nitrogen content in *this* waste.
  properties: heating value, net 1 MJ
- titanium dioxide: 1.75e-6 kg; lognormal variance with pedigree 2.3, pedigree (1,1,5,1,1)
  uncertainty calculated from uncertainty in average DeNOx input, uncertainty in the share of thermal NOx, uncertainty of nitrogen content in average municipal waste and the unertainty in nitrogen content in *this* waste.
  EcoSpold01Location=RER
  properties: wet mass 1 kg, dry mass 1 kg
- sodium hydroxide, without water, in 50% solution state: 0.00151 kg; lognormal variance with pedigree 0.56, pedigree (1,1,5,1,1)
  uncertainty calculated from uncertainty in average auxiliary material input, and the unertainty of the waste composition of this waste
  EcoSpold01Location=RER
  properties: heating value, net 3.03 MJ, dry mass 1 kg, wet mass 1 kg
- quicklime, milled, packed: 0.000242 kg; lognormal variance with pedigree 0.64, pedigree (1,1,5,1,1)
  EcoSpold01Location=CH
  uncertainty calculated from uncertainty in average auxiliary material input, and the unertainty of the waste composition of this waste
  properties: water content 0.010101, wet mass 1 kg, dry mass 0.99 kg
- chemical, inorganic: 4.89e-6 kg; lognormal variance with pedigree 0.5, pedigree (1,1,5,1,1)
  EcoSpold01Location=GLO
  Proxy for Polyelectrolyte. uncertainty calculated from uncertainty in average auxiliary material input, and the unertainty of the waste composition of this waste
  properties: dry mass 1 kg, carbon content, fossil 0.003, wet mass 1 kg
  note on carbon content, fossil: This dataset is an unweighted average of 20 inorganic substances (listed in Tab 88.1, ecoinvent v2.2 report 8, part II), being part of the top100 chemicals included in this database. The C-content has also been calculated as an unweighted average of the C content of the substances composing this dataset.
- hydrochloric acid, without water, in 30% solution state: 2.94e-6 kg; lognormal variance with pedigree 0.5, pedigree (1,1,5,1,1)
  EcoSpold01Location=RER
  uncertainty calculated from uncertainty in average auxiliary material input, and the unertainty of the waste composition of this waste
  properties: heating value, net 3.32 MJ, dry mass 1 kg, wet mass 1 kg
- cement, unspecified: 0.026 kg; lognormal variance with pedigree 0.18, pedigree (1,1,5,1,1)
  Cement for solidification of landfilled residual material. Uncertainty calculated from unertainty of the waste composition of this waste, of transfer coefficients in the incinerator and of the solidification recipe.
  EcoSpold01Location=CH
  properties: dry mass 1 kg, wet mass 1 kg
- process-specific burdens, slag landfill: 0.0253 kg; lognormal variance with pedigree 0.08, pedigree (1,1,5,1,1)
  (same comment as for process-specific burdens, residual material landfill)
- municipal waste incineration facility: 2.5e-10 unit; lognormal variance with pedigree 0.04, pedigree (1,1,5,1,1)
  demands per kilogram waste. uncertainty is heeded in the module
  EcoSpold01Location=CH
- slag landfill: 4.49e-11 unit; lognormal variance with pedigree 0.08, pedigree (1,1,5,1,1)
  (same comment as for residual material landfill)
- process-specific burdens, municipal waste incineration: 1 kg; lognormal variance with pedigree 0.04, pedigree (1,1,5,1,1)
  EcoSpold01Location=CH
  demands per kilogram waste. uncertainty is heeded in the module;activityLink introduced to establish a direct link to the corresponding regional supply of this product
- iron (III) chloride, without water, in 40% solution state: 5.98e-5 kg; lognormal variance with pedigree 0.45, pedigree (1,1,5,1,1)
  uncertainty calculated from uncertainty in average auxiliary material input, and the unertainty of the waste composition of this waste
  EcoSpold01Location=CH
  properties: wet mass 1 kg, dry mass 1 kg
- ammonia, anhydrous, liquid: 6.11e-5 kg; lognormal variance with pedigree 1.59, pedigree (1,1,5,1,1)
  uncertainty calculated from uncertainty in average DeNOx input, uncertainty in the share of thermal NOx, uncertainty of nitrogen content in average municipal waste and the unertainty in nitrogen content in *this* waste.
  EcoSpold01Location=CH
  properties: wet mass 1 kg, dry mass 1 kg
- chemical, organic: 0.000126 kg; lognormal variance with pedigree 1.16, pedigree (1,1,5,1,1)
  Proxy for TMT15. uncertainty calculated from uncertainty in average auxiliary material input, and the unertainty of the waste composition of this waste
  EcoSpold01Location=GLO
  properties: heating value, net 19.03 MJ, carbon content, fossil 0.628, wet mass 1 kg, dry mass 1 kg
  note on carbon content, fossil: This dataset is an unweighted average of 20 organic substances (listed in Tab 88.1, ecoinvent v2.2 report 8, part II), being part of the top100 chemicals included in this database. The C-content has also been calculated as an unweighted average of the C content of the substances composing this dataset.
- waste cement, hydrated: -0.0649 kg; name BP_amount_1; lognormal variance with pedigree 0.18, pedigree (1,1,5,1,1)
  Hydrated cement for solidification of landfilled residual material. Uncertainty calculated from unertainty of the waste composition of this waste and transfer coefficients in the incinerator and of the solidification recipe.
  EcoSpold01Location=CH
  production volume 0 kg; = ABS(BP_amount_1/ RP_amount_1* RP_PV_1)
    Calculated from the production volume of waste vapour barrier, flame-retarded, 4.5% water in proportion to the respective output amounts.
  property price 0 EUR2005; name BP_amount_1_price_EUR2005
  properties: dry mass 1 kg, wet mass 1 kg
- chromium oxide, flakes: 3.57e-8 kg; lognormal variance with pedigree 2.3, pedigree (1,1,5,1,1)
  EcoSpold01Location=RER
  Proxy for vanadium pentoxide V2O5 in SCR catalyst, uncertainty calculated from uncertainty in average DeNOx input, uncertainty in the share of thermal NOx, uncertainty of nitrogen content in average municipal waste and the unertainty in nitrogen content in *this* waste.
  properties: wet mass 1 kg, dry mass 1 kg

## Emissions to nature
- Fluoride [water, ground-, long-term]: 1.2e-5 kg; lognormal variance with pedigree 0.88, pedigree (1,1,5,1,1)
  Long-term emissions from landfilling of incineration residues. uncertainty is calculated from uncertainties in waste composition and transfer coefficients in incinerator and landfills.
- Chromium [air, urban air close to ground]: 8.6e-13 kg; lognormal variance with pedigree 1.39, pedigree (1,1,5,1,1)
  uncertainty is calculated from uncertainties in waste composition and transfer coefficients in incinerator
- Magnesium [water, surface water]: 3.13e-7 kg; lognormal variance with pedigree 1.49, pedigree (1,1,5,1,1)
  uncertainty is calculated from uncertainties in waste composition and transfer coefficients in incinerator and landfills
- COD, Chemical Oxygen Demand [water, surface water]: 5.13e-5 kg; lognormal variance with pedigree 0.28, pedigree (1,1,5,1,1)
  (same comment as for Magnesium)
- Magnesium [air, urban air close to ground]: 1.23e-7 kg; lognormal variance with pedigree 1.03, pedigree (1,1,5,1,1)
  (same comment as for Chromium)
- Strontium [water, surface water]: 4.99e-8 kg; lognormal variance with pedigree 1.74, pedigree (1,1,5,1,1)
  (same comment as for Magnesium)
- Chloride [water, surface water]: 0.00133 kg; lognormal variance with pedigree 0.6, pedigree (1,1,5,1,1)
  (same comment as for Magnesium)
- Selenium [water, surface water]: 6.12e-7 kg; lognormal variance with pedigree 1.22, pedigree (1,1,5,1,1)
  (same comment as for Magnesium)
- Hydrogen chloride [air, urban air close to ground]: 1.51e-8 kg; lognormal variance with pedigree 0.71, pedigree (1,1,5,1,1)
  (same comment as for Chromium)
- Iron, ion [water, ground-, long-term]: 0.000671 kg; lognormal variance with pedigree 1.41, pedigree (1,1,5,1,1)
  (same comment as for Fluoride)
- Strontium [air, urban air close to ground]: 7.92e-9 kg; lognormal variance with pedigree 1.07, pedigree (1,1,5,1,1)
  (same comment as for Chromium)
- Mercury [water, ground-, long-term]: 2.33e-9 kg; lognormal variance with pedigree 3.69, pedigree (1,1,5,1,1)
  (same comment as for Fluoride)
- Sulfate [water, surface water]: 0.000193 kg; lognormal variance with pedigree 0.41, pedigree (1,1,5,1,1)
  (same comment as for Magnesium)
- Cobalt [water, surface water]: 2.68e-10 kg; lognormal variance with pedigree 1.98, pedigree (1,1,5,1,1)
  (same comment as for Magnesium)
- Manganese [water, ground-, long-term]: 2.41e-5 kg; lognormal variance with pedigree 1.26, pedigree (1,1,5,1,1)
  (same comment as for Fluoride)
- Barium [water, surface water]: 3.08e-8 kg; lognormal variance with pedigree 1.77, pedigree (1,1,5,1,1)
  (same comment as for Magnesium)
- Dinitrogen monoxide [air, urban air close to ground]: 5.11e-6 kg; lognormal variance with pedigree 1.7, pedigree (1,1,5,1,1)
  uncertainty calculated from uncertainty in average N-emissions, uncertainty in the share of thermal NOx, uncertainty of nitrogen content in average municipal waste and the unertainty in nitrogen content in *this* waste.
- Tin, ion [water, ground-, long-term]: 1.79e-6 kg; lognormal variance with pedigree 1.78, pedigree (1,1,5,1,1)
  (same comment as for Fluoride)
- Nickel, ion [water, surface water]: 5.61e-10 kg; lognormal variance with pedigree 2.2, pedigree (1,1,5,1,1)
  (same comment as for Magnesium)
- Selenium [air, urban air close to ground]: 9.45e-15 kg; lognormal variance with pedigree 1.65, pedigree (1,1,5,1,1)
  (same comment as for Chromium)
- DOC, Dissolved Organic Carbon [water, surface water]: 2.1e-5 kg; lognormal variance with pedigree 0.27, pedigree (1,1,5,1,1)
  (same comment as for Magnesium)
- Zinc, ion [water, surface water]: 5.87e-8 kg; lognormal variance with pedigree 0.76, pedigree (1,1,5,1,1)
  (same comment as for Magnesium)
- Aluminium [air, urban air close to ground]: 2.8e-7 kg; lognormal variance with pedigree 0.95, pedigree (1,1,5,1,1)
  (same comment as for Chromium)
- Thallium [air, urban air close to ground]: 3.58e-10 kg; lognormal variance with pedigree 1.76, pedigree (1,1,5,1,1)
  (same comment as for Chromium)
- Aluminium [water, surface water]: 1.49e-8 kg; lognormal variance with pedigree 1.21, pedigree (1,1,5,1,1)
  (same comment as for Magnesium)
- Carbon monoxide, fossil [air, urban air close to ground]: 0.000223 kg; lognormal variance with pedigree 0.690625, pedigree (1,3,5,2,1)
  Literature data from switzerland and germany adapted to plant age distribution in switzerland
  Uncertainty: & basic uncertainty of 5; literature data from switzerland and germany adapted to plant age distribution in switzerland
- Nickel [air, urban air close to ground]: 3.86e-14 kg; lognormal variance with pedigree 1.72, pedigree (1,1,5,1,1)
  (same comment as for Chromium)
- Antimony [water, surface water]: 3.26e-6 kg; lognormal variance with pedigree 1.12, pedigree (1,1,5,1,1)
  (same comment as for Magnesium)
- Antimony [water, ground-, long-term]: 6e-6 kg; lognormal variance with pedigree 1.09, pedigree (1,1,5,1,1)
  (same comment as for Fluoride)
- Vanadium, ion [water, ground-, long-term]: 0.000353 kg; lognormal variance with pedigree 1.36, pedigree (1,1,5,1,1)
  (same comment as for Fluoride)
- Cadmium, ion [water, surface water]: 1.44e-8 kg; lognormal variance with pedigree 1.12, pedigree (1,1,5,1,1)
  (same comment as for Magnesium)
- Methane, fossil [air, urban air close to ground]: 6.38e-6 kg; lognormal variance with pedigree 0.091225, pedigree (2,3,5,2,1)
  Confidential data from 5 plants in Switzerland and Germany
  Uncertainty: & basic uncertainty of 1.5; confidential data from 5 plants in Switzerland and Germany
- Iron, ion [water, surface water]: 4.9e-7 kg; lognormal variance with pedigree 0.64, pedigree (1,1,5,1,1)
  (same comment as for Magnesium)
- Sodium, ion [water, surface water]: 0.000283 kg; lognormal variance with pedigree 0.36, pedigree (1,1,5,1,1)
  (same comment as for Magnesium)
- Barium [air, urban air close to ground]: 2.24e-7 kg; lognormal variance with pedigree 0.92, pedigree (1,1,5,1,1)
  (same comment as for Chromium)
- Manganese [air, urban air close to ground]: 1.53e-13 kg; lognormal variance with pedigree 1.29, pedigree (1,1,5,1,1)
  (same comment as for Chromium)
- Nitrate [water, ground-, long-term]: 4.35e-5 kg; lognormal variance with pedigree 0.68, pedigree (1,1,5,1,1)
  (same comment as for Fluoride)
- DOC, Dissolved Organic Carbon [water, ground-, long-term]: 0.00749 kg; lognormal variance with pedigree 0.05, pedigree (1,1,5,1,1)
  (same comment as for Fluoride)
- Chloride [water, ground-, long-term]: 3.22e-5 kg; lognormal variance with pedigree 0.32, pedigree (1,1,5,1,1)
  (same comment as for Fluoride)
- Tin, ion [water, surface water]: 1.32e-10 kg; lognormal variance with pedigree 1.5, pedigree (1,1,5,1,1)
  (same comment as for Magnesium)
- Lead [water, ground-, long-term]: 1.5e-6 kg; lognormal variance with pedigree 7.25, pedigree (1,1,5,1,1)
  (same comment as for Fluoride)
- Cadmium, ion [water, ground-, long-term]: 3.18e-7 kg; lognormal variance with pedigree 6.96, pedigree (1,1,5,1,1)
  (same comment as for Fluoride)
- Arsenic, ion [water, ground-, long-term]: 9.34e-7 kg; lognormal variance with pedigree 1.54, pedigree (1,1,5,1,1)
  (same comment as for Fluoride)
- Chromium VI [water, ground-, long-term]: 1.23e-6 kg; lognormal variance with pedigree 1.5, pedigree (1,1,5,1,1)
  (same comment as for Fluoride)
- Vanadium [air, urban air close to ground]: 2.06e-7 kg; lognormal variance with pedigree 0.64, pedigree (1,1,5,1,1)
  (same comment as for Chromium)
- Lead [air, urban air close to ground]: 7.83e-10 kg; lognormal variance with pedigree 1.25, pedigree (1,1,5,1,1)
  (same comment as for Chromium)
- Manganese [water, surface water]: 1.57e-9 kg; lognormal variance with pedigree 1.94, pedigree (1,1,5,1,1)
  (same comment as for Magnesium)
- Beryllium [water, ground-, long-term]: 3.6e-7 kg; lognormal variance with pedigree 1.49, pedigree (1,1,5,1,1)
  (same comment as for Fluoride)
- Nitrate [water, surface water]: 1.55e-5 kg; lognormal variance with pedigree 0.48, pedigree (1,1,5,1,1)
  (same comment as for Magnesium)
- Nickel, ion [water, ground-, long-term]: 8.38e-7 kg; lognormal variance with pedigree 1.57, pedigree (1,1,5,1,1)
  (same comment as for Fluoride)
- Carbon dioxide, fossil [air, urban air close to ground]: 2.78 kg; lognormal variance with pedigree 0.04, pedigree (1,1,5,1,1)
  (same comment as for Chromium)
- Calcium [air, urban air close to ground]: 4.03e-6 kg; lognormal variance with pedigree 0.6, pedigree (1,1,5,1,1)
  (same comment as for Chromium)
- Zinc [air, urban air close to ground]: 5.21e-9 kg; lognormal variance with pedigree 0.89, pedigree (1,1,5,1,1)
  (same comment as for Chromium)
- Magnesium [water, ground-, long-term]: 8.26e-5 kg; lognormal variance with pedigree 1, pedigree (1,1,5,1,1)
  (same comment as for Fluoride)
- Ammonia [air, urban air close to ground]: 9.59e-7 kg; lognormal variance with pedigree 1.7, pedigree (1,1,5,1,1)
  (same comment as for Dinitrogen monoxide)
- BOD5, Biological Oxygen Demand [water, surface water]: 2.87e-5 kg; lognormal variance with pedigree 0.16, pedigree (1,1,5,1,1)
  (same comment as for Magnesium)
- Cyanide [air, urban air close to ground]: 1.09e-6 kg; lognormal variance with pedigree 1.7, pedigree (1,1,5,1,1)
  (same comment as for Dinitrogen monoxide)
- Lead [water, surface water]: 5.87e-10 kg; lognormal variance with pedigree 1.21, pedigree (1,1,5,1,1)
  (same comment as for Magnesium)
- Chromium, ion [water, surface water]: 3.71e-8 kg; lognormal variance with pedigree 1.3, pedigree (1,1,5,1,1)
  (same comment as for Magnesium)
- Chromium VI [water, surface water]: 3.79e-7 kg; lognormal variance with pedigree 1.21, pedigree (1,1,5,1,1)
  (same comment as for Magnesium)
- Copper, ion [water, ground-, long-term]: 3.12e-5 kg; lognormal variance with pedigree 1.1, pedigree (1,1,5,1,1)
  (same comment as for Fluoride)
- Copper [air, urban air close to ground]: 2.85e-10 kg; lognormal variance with pedigree 1.18, pedigree (1,1,5,1,1)
  (same comment as for Chromium)
- Titanium, ion [water, surface water]: 4.31e-9 kg; lognormal variance with pedigree 2.07, pedigree (1,1,5,1,1)
  (same comment as for Magnesium)
- Bromine [air, urban air close to ground]: 0.000201 kg; lognormal variance with pedigree 0.22, pedigree (1,1,5,1,1)
  (same comment as for Chromium)
- TOC, Total Organic Carbon [water, surface water]: 2.1e-5 kg; lognormal variance with pedigree 0.27, pedigree (1,1,5,1,1)
  (same comment as for Magnesium)
- Mercury [air, urban air close to ground]: 1.55e-15 kg; lognormal variance with pedigree 2.06, pedigree (1,1,5,1,1)
  (same comment as for Chromium)
- Titanium, ion [water, ground-, long-term]: 0.000268 kg; lognormal variance with pedigree 1.08, pedigree (1,1,5,1,1)
  (same comment as for Fluoride)
- Fluoride [water, surface water]: 1.03e-6 kg; lognormal variance with pedigree 0.92, pedigree (1,1,5,1,1)
  (same comment as for Magnesium)
- Vanadium, ion [water, surface water]: 1.39e-6 kg; lognormal variance with pedigree 0.87, pedigree (1,1,5,1,1)
  (same comment as for Magnesium)
- Calcium, ion [water, surface water]: 9.13e-6 kg; lognormal variance with pedigree 1.04, pedigree (1,1,5,1,1)
  (same comment as for Magnesium)
- Hydrogen fluoride [air, urban air close to ground]: 7.06e-9 kg; lognormal variance with pedigree 1.29, pedigree (1,1,5,1,1)
  (same comment as for Chromium)
- Selenium [water, ground-, long-term]: 1.26e-6 kg; lognormal variance with pedigree 1.04, pedigree (1,1,5,1,1)
  (same comment as for Fluoride)
- Bromine [water, ground-, long-term]: 0.0117 kg; lognormal variance with pedigree 0.21, pedigree (1,1,5,1,1)
  (same comment as for Fluoride)
- Beryllium [water, surface water]: 2.78e-10 kg; lognormal variance with pedigree 1.95, pedigree (1,1,5,1,1)
  (same comment as for Magnesium)
- Bromine [water, surface water]: 0.0552 kg; lognormal variance with pedigree 0.16, pedigree (1,1,5,1,1)
  (same comment as for Magnesium)
- Sodium [air, urban air close to ground]: 1.23e-5 kg; lognormal variance with pedigree 0.67, pedigree (1,1,5,1,1)
  (same comment as for Chromium)
- Copper, ion [water, surface water]: 1.57e-9 kg; lognormal variance with pedigree 1.74, pedigree (1,1,5,1,1)
  (same comment as for Magnesium)
- Beryllium [air, urban air close to ground]: 4.47e-10 kg; lognormal variance with pedigree 1.73, pedigree (1,1,5,1,1)
  (same comment as for Chromium)
- Cobalt [air, urban air close to ground]: 4.97e-14 kg; lognormal variance with pedigree 1.65, pedigree (1,1,5,1,1)
  (same comment as for Chromium)
- TOC, Total Organic Carbon [water, ground-, long-term]: 0.00749 kg; lognormal variance with pedigree 0.05, pedigree (1,1,5,1,1)
  (same comment as for Fluoride)
- COD, Chemical Oxygen Demand [water, ground-, long-term]: 0.0189 kg; lognormal variance with pedigree 0.05, pedigree (1,1,5,1,1)
  (same comment as for Fluoride)
- Mercury [water, surface water]: 4.78e-10 kg; lognormal variance with pedigree 1.93, pedigree (1,1,5,1,1)
  (same comment as for Magnesium)
- Arsenic [air, urban air close to ground]: 1.73e-14 kg; lognormal variance with pedigree 1.65, pedigree (1,1,5,1,1)
  (same comment as for Chromium)
- Sulfate [water, ground-, long-term]: 0.000999 kg; lognormal variance with pedigree 0.49, pedigree (1,1,5,1,1)
  (same comment as for Fluoride)
- Calcium, ion [water, ground-, long-term]: 0.0021 kg; lognormal variance with pedigree 0.56, pedigree (1,1,5,1,1)
  (same comment as for Fluoride)
- Iron [air, urban air close to ground]: 4.78e-8 kg; lognormal variance with pedigree 0.69, pedigree (1,1,5,1,1)
  (same comment as for Chromium)
- Thallium [water, ground-, long-term]: 2.09e-7 kg; lognormal variance with pedigree 1.32, pedigree (1,1,5,1,1)
  (same comment as for Fluoride)
- Sulfur dioxide [air, urban air close to ground]: 1.7e-6 kg; lognormal variance with pedigree 0.84, pedigree (1,1,5,1,1)
  (same comment as for Chromium)
- Thallium [water, surface water]: 2.19e-10 kg; lognormal variance with pedigree 1.92, pedigree (1,1,5,1,1)
  (same comment as for Magnesium)
- Cadmium [air, urban air close to ground]: 1.74e-9 kg; lognormal variance with pedigree 1.2, pedigree (1,1,5,1,1)
  (same comment as for Chromium)
- Cobalt [water, ground-, long-term]: 1.37e-6 kg; lognormal variance with pedigree 1.5, pedigree (1,1,5,1,1)
  (same comment as for Fluoride)
- Sodium, ion [water, ground-, long-term]: 0.00102 kg; lognormal variance with pedigree 0.44, pedigree (1,1,5,1,1)
  (same comment as for Fluoride)
- Nitrogen oxides [air, urban air close to ground]: 3.85e-5 kg; lognormal variance with pedigree 1.7, pedigree (1,1,5,1,1)
  (same comment as for Dinitrogen monoxide)
- BOD5, Biological Oxygen Demand [water, ground-, long-term]: 0.00619 kg; lognormal variance with pedigree 0.05, pedigree (1,1,5,1,1)
  (same comment as for Fluoride)
- Aluminium [water, ground-, long-term]: 0.000132 kg; lognormal variance with pedigree 0.86, pedigree (1,1,5,1,1)
  (same comment as for Fluoride)
- Arsenic, ion [water, surface water]: 7.66e-7 kg; lognormal variance with pedigree 1.3, pedigree (1,1,5,1,1)
  (same comment as for Magnesium)
- Titanium [air, urban air close to ground]: 8.95e-7 kg; lognormal variance with pedigree 0.73, pedigree (1,1,5,1,1)
  (same comment as for Chromium)
- Zinc, ion [water, ground-, long-term]: 4.95e-6 kg; lognormal variance with pedigree 5.45, pedigree (1,1,5,1,1)
  (same comment as for Fluoride)
- Strontium [water, ground-, long-term]: 7.91e-5 kg; lognormal variance with pedigree 1.03, pedigree (1,1,5,1,1)
  (same comment as for Fluoride)
- Tin [air, urban air close to ground]: 4.72e-9 kg; lognormal variance with pedigree 1.47, pedigree (1,1,5,1,1)
  (same comment as for Chromium)
- Antimony [air, urban air close to ground]: 3.65e-14 kg; lognormal variance with pedigree 1.44, pedigree (1,1,5,1,1)
  (same comment as for Chromium)
- Barium [water, ground-, long-term]: 0.000199 kg; lognormal variance with pedigree 0.94, pedigree (1,1,5,1,1)
  (same comment as for Fluoride)

## Sampling procedure
waste-specific calculation based on literature data

## Extrapolations
This dataset has been extrapolated from year 2000 to the year of the calculation (2021). The uncertainty has been adjusted accordingly.

## Review by Niels Jungbluth 2003-07-15
Passed. Calculation for standard deviation 95 of, i.e., infrastructure,
land occupation, transport services or other services can differ from
standard Pedigree approach used in this project and figures obtained by
this procedure.
