# solar collector system installation, Cu flat plate collector, one-family house, combined system

Dataset: EcoSpold 2, unit process
Geography: RoW
Time period: 2002-01-01 to 2021-12-31
Technology level: current
Classification: EcoSpold01Categories: solar collector systems/systems
Classification: ISIC rev.4 ecoinvent: 4322:Plumbing, heat and air-conditioning installation
Tags: ConvertedDataset
Scenario: Business-as-Usual
System model: Allocation, cut-off by classification
Generated by: Niels Jungbluth
Published in: Jungbluth, N. 2007
Database: ecoinvent
isCopyrightProtected: true
accessRestrictedTo: 1

## General comment
Solar system with a flat plate collector on a one family house with a combined system for hot water and heating
[This dataset was already contained in the ecoinvent database version 2. It was not individually updated during the transfer to ecoinvent version 3. Life Cycle Impact Assessment results may still have changed, as they are affected by changes in the supply chain, i.e. in other datasets. This dataset was generated following the ecoinvent quality guidelines for version 2. It may have been subject to central changes described in the ecoinvent version 3 change report (http://www.ecoinvent.org/database/ecoinvent-version-3/reports-of-changes/), and the results of the central updates were reviewed extensively. The changes added e.g. consistent water flows and other information throughout the database. The documentation of this dataset can be found in the ecoinvent reports of version 2, which are still available via the ecoinvent website. The change report linked above covers all central changes that were made during the conversion process.]

## Included activities end
Production and disposal of a complete solar system (excluding auxiliary heating). Including different components, heat exchange fluid, installation copper pipes, transports of parts to CH, delivery with a van and montage on the roof.

## Geography
Solar collector system operated in CH.

## Technology
Solar collector system for room heating and hot water installed on the roof of a house.

## Time period
Material data have been investigated for a collector produced in 2002. Data for energy uses during production have been investigated for 2001.

## Parameters
- fraction, process water, to air: 0.15 dimensionless; name fraction_PW_to_air; lognormal variance with pedigree 0.092025, pedigree (4,4,3,2,4)
- fraction, water, completely softened, to air: 0.15 dimensionless; name fraction_WCS_to_air; lognormal variance with pedigree 0.092025, pedigree (4,4,3,2,4)

## Reference product
- solar collector system, Cu flat plate collector, one-family house, combined system: 1 unit; CPC 54631: Heating equipment installation services; By-product classification allocatable product
  EcoSpold01Location=CH
  production volume 3.96633 unit
    This is a placeholder value that does not reflect real-world production volumes. This dataset does not currently require a real-world production volume to work in the database framework, and no actual data were collected yet. This has no negative effect on the results of the ecoinvent database.
  property price 42692 EUR2005
    Calculate from purchaser prices of main material consumption (heat storage 0.87 p, pump 40 W 3.12 p and flat plat collector 12.3 m2; prices are within this file). The costs of materials are assumed to be 75% of total prices.

## Inputs from technosphere
- water, completely softened: 0 kg; name water_softened_input; pedigree (1,1,1,1,1)
  Plant data, exchange after 10a life time
  EcoSpold01Location=RER
  Uncertainty: Plant data, exchange after 10a life time
  properties: wet mass 1 kg
- flat plate solar collector, Cu absorber: 12.3 m2; lognormal variance with pedigree 0.062, pedigree (3,5,5,5,1)
  EcoSpold01Location=CH
  Estimation
  Uncertainty: Estimation
- pump, 40W: 3.12 unit; lognormal variance with pedigree 0.062, pedigree (3,5,5,5,1)
  Estimation, extrapolation for life time of 10a
  EcoSpold01Location=CH
  Uncertainty: Estimation, extrapolation for life time of 10a
- tube insulation, elastomere: 5.2 kg; lognormal variance with pedigree 0.062, pedigree (3,5,5,5,1)
  Plant data
  EcoSpold01Location=DE
  Uncertainty: Plant data
  properties: carbon content, fossil 0.837817, wet mass 1 kg, heating value, net 25.39 MJ, dry mass 1 kg
  note on carbon content, fossil: The main raw material (93%) is synthetic rubber (Ethylene propylene diene monomer (EPDM)), that is used together with PVC (ecoinvent v2.2 report 7_XV), C2H3Cl
- expansion vessel, 25l: 1 unit; lognormal variance with pedigree 0.062, pedigree (3,5,5,5,1)
  Estimation
  EcoSpold01Location=CH
  Uncertainty: Estimation
- drawing of pipe, steel: 16 kg; lognormal variance with pedigree 0.07, pedigree (3,5,5,5,3)
  Estimation for copper pipes
  EcoSpold01Location=RER
  Uncertainty: Estimation for copper pipes
- heat storage, 2000l: 0.87 unit; lognormal variance with pedigree 0.062, pedigree (3,5,5,5,1)
  Extrapolated by weight
  EcoSpold01Location=CH
  Uncertainty: Extrapolated by weight
- heat carrier liquid, 40% C3H8O2: -0.104 m3; lognormal variance with pedigree 0.062, pedigree (3,5,5,5,1)
  Estimation
  EcoSpold01Location=CH
  Uncertainty: Estimation
  production volume 0.312 m3
    Calculated from the production volume of solar collector system, flat plate collector, one-family house, combined system in proportion to the respective output amounts.
  properties: dry mass 6.31366 kg, wet mass 1000 kg, price 1.08656 EUR2005, water content 157.387, carbon content, fossil 3
  note on carbon content, fossil: The composition of the product was used to estimate its carbon content: 40% (w/v) C3H8O2.
- copper, cathode: 16 kg; lognormal variance with pedigree 0.062, pedigree (3,5,5,5,1)
  EcoSpold01Location=RER
  Plant data, warm water pipes
  Uncertainty: Plant data, warm water pipes
  properties: dry mass 1 kg, wet mass 1 kg
- propylene glycol, liquid: 43.6 kg; lognormal variance with pedigree 0.062, pedigree (3,5,5,5,1)
  (same comment as for water, completely softened)
  properties: dry mass 1 kg, wet mass 1 kg, heating value, net 27.09 MJ, carbon content, fossil 0.473684
- water, completely softened: 25.6859, 34.3141 kg (2 entries); lognormal variance with pedigree 0.062, pedigree (3,5,5,5,1)
  (same comment as for water, completely softened)

## Emissions to nature
- Water [air, unspecified]: 0.009 m3; name water_to_air_unspecified; lognormal variance with pedigree 0.0827, pedigree (2,2,5,5,1)
  Calculated value based on literature values and expert opinion. See comments in the parametres' comment field.
  property fraction, origin: unspecified 0; name fraction_origin_unspecified
  property fraction, origin: salt water 0; name fraction_origin_salt_water
  property fraction, origin: fresh water 1; name fraction_origin_fresh_water
- Water [water, unspecified]: 0.051 m3; name water_to_water_unspecified; lognormal variance with pedigree 0.0827, pedigree (2,2,5,5,1)
  (same comment as for Water)
  property carbon content, non-fossil 0; name C_content_non_fossil
  property carbon content, fossil 0; name C_content_fossil
  property dry mass 0 kg; name DM
  property water in wet mass 1000 kg; name WWM
  property wet mass 1000 kg; name WM
  property fraction, origin: unspecified 0; name fraction_origin_unspecified_Ww
  property fraction, origin: fresh water 1; name fraction_origin_fresh_water_Ww
  property fraction, origin: salt water 0; name fraction_origin_salt_water_Ww

## Sampling procedure
Own simulation.

## Extrapolations
none This dataset has been copied from an original dataset covering the geography CH. The uncertainty has been adjusted accordingly.

## Review by Sebastiano Meier 2003-06-16
Passed.
