# tomato production, fresh grade, open field

Dataset: EcoSpold 2, unit process
Geography: MX
Time period: 2009-01-01 to 2021-12-31
Technology level: current
Classification: ISIC rev.4 ecoinvent: 0113:Growing of vegetables and melons, roots and tubers
Tags: WFLDB
Scenario: Business-as-Usual
System model: Allocation, cut-off by classification
Generated by: Violaine Magaud
Published in: Nemecek T. 2015
Database: ecoinvent
isCopyrightProtected: true
accessRestrictedTo: 1

## General comment
This dataset represents the production of 1 kg of tomato for fresh consumption. The reference flow is the average yield per ha and year, from 2009 - 2012: yield (30.4 t/ha) obtained under irrigated conditions (total amount of water 4535 m3/ha). The data are representative for fresh tomatoes for fresh consumption, produced in Mexico for the export market. Mineral NPK fertiliser input is 52-0-61 kg/ha. No organic fertilisers are applied. Total active ingredients (a.i.) applied as pesticides amount to 39.7 kg a.i./ha.
The dataset was modelled within the project 'World Food LCA database (WFLDB)'. The aim of this project was to provide inventories of a broad variety of agricultural products and processes and to cover for each product at least 50% of the global export market. The export share of fresh grade tomatoes produced in Mexico amounts to 21.3 % of the global export (tonnage exported in 2010). The production system regarded in this dataset aimed at representing fresh grade tomatoes produced in Mexico for the export market.
PEF-Quality: data quality rating (DQR) = 2.2 (i.e. good quality). This dataset refers to an average situation; for specific situations exchanges might differ substantially due to site specific parameters

## Included activities start
This activity starts with soil cultivation after the harvest of the previous crop.

## Included activities end
This activity ends with harvest and transport to the farm gate. Storage is not included.
The dataset includes all activities during a cycle, i.e. all machine operations, corresponding infrastructure, fuel use and sheds. Machine operations include: soil cultivation, fertilisation, pesticide application, harvesting, and on-farm transport. Further, direct field emissions and land use change are included. Irrigation is included. The inputs of seedlings, fertilisers and pesticides as well as packaging of fertilisers and pesticides are considered. The dataset doesn't include emissions from manure storage because these are within the system boundary of animal production. Heavy metal uptake by the crop is considered.

## Technology
Conventional production

## Parameters
- LUC_crop_specific: 1 dimensionless
  This parameter allows to switch between a 'crop specific' and a 'country specific' approach when calculating the LUC of a crop. By default, the chosen approach is 'crop specific', so the value of the parameter is 1. If you want to apply a 'country specific' approach, turn the parameter to 0.
- heavyMetalUptakeSwitch: 1 dimensionless

## Reference product
- tomato, fresh grade: 1 kg; CPC 01234: Tomatoes; By-product classification allocatable product
  Yield = 30437.0 kg/haOutput of tomato, fresh grade, produced for direct human consumption.
  production volume 2.8896e9 kg
    Source: FAOSTAT. Average, 2009-2012. Assumption: all NL fresh grade tomatoes are produced in heated greenhouses, all ES fresh grade tomatoes in non heated greenhouses and all MX fresh grade tomatoes on open field
  property price 1.09 EUR2005
    Calculated from the trade statistics for the year 2005 published by the UN (COMTRADE database, accessed 20151105) as an average of 5 biggest importers of tomato in the world; USA, DE, UK, FR and NL. Comtrade cathegory: 702: Tomatoes, fresh or chilled.
  property carbon content, non-fossil 0.383276
    calculation: C-content of components according to ecoinvent report No. 15a. Source of composition: Souci, S.W., Fachmann, W., Kraut, H. (Hg.: Bundesminsiterium fur Ernahrung, Landwirtschaft und Forsten, Bonn) 'Die Zusammensetzung der Lebensmittel - Nahrwerttabellen', medpharm Scientific Publishers Stuttgart, CRC Press; 2000.
  property carbon content 0.383276
    carbon content on a dry matter basis (reserved; not for manual entry)
  properties: water in wet mass 0.485067 kg, water content 0.942, carbon content, fossil 0, dry mass 0.514933 kg, wet mass 1 kg, carbon allocation 0.197361 kg

## Inputs from technosphere
- inorganic nitrogen fertiliser, as N: 0, 6.0663e-5 kg (2 entries)
  Calculated based on literature values: The nutrient content of the crop multiplied by the country-share of the fertiliser type (IFA 2014). See supporting documentation 'WFLDB-Documentation.pdf' chapter 'Fertiliser application' for L1 data and appendix for the source of nutrient content (https://ecoquery.ecoinvent.org/File/Reports).
  Corresponds to 0.482 kg/ha
  properties: wet mass 1 kg, dry mass 1 kg
- solid manure loading and spreading, by hydraulic loader and spreader: 0.0550744 kg; lognormal variance with pedigree 0.124177, pedigree (2,1,4,1,1)
  This amount corresponds the input of solid manure.
- transport, tractor and trailer, agricultural: 0.00278204 metric ton*km; lognormal variance with pedigree 0.162439, pedigree (4,1,4,1,1)
  On-farm transport: Yield (in tonnes) multiplied by the average distance from field to farm. The distance was obtained by extrapolation (modified MEXALCA approach). See supporting documentation 'WFLDB-Documentation.pdf' chapter 'Machinery processes' (https://ecoquery.ecoinvent.org/File/Reports).
- sowing: 3.28547e-5 ha; lognormal variance with pedigree 0.124177, pedigree (2,1,4,1,1)
  Expert estimation. One crop cycle per year.
- packaging, for pesticides: 0.00261064 kg; lognormal variance with pedigree 0.0592, pedigree (4,3,4,5,4)
  Total amount of active substance/s of pesticides needed for the production of tomato, fresh grade is calculated to be circa 1.31E-03 kg. Pesticide/s used in this dataset is/are: 'pesticide, unspecified'. The total amount of active substance/s is doubled in order to account for the packaging of the dilluted product of pesticide/s that is/are applied. Therefore, 2.61E-03 kg of packaging for pesticides is justified with this exchange.
  properties: heating value, net 25.97 MJ, dry mass 1 kg, wet mass 1 kg, price 0.0642 EUR2005, carbon content, fossil 0.85714
- mulching: 4.00927e-5 ha; lognormal variance with pedigree 0.124177, pedigree (2,1,4,1,1)
  Proxy: Extrapolated using a modified MEXALCA-approach (Roches et al. 2010; Nemecek et al. 2012). See supporting documentation 'WFLDB-Documentation.pdf' chapter 'Machinery processes' for L1 data (https://ecoquery.ecoinvent.org/File/Reports).
- transport, freight train: 0.000344437 metric ton*km
  This represent the transport of fertilizers that are directly linked to their supplying activities, to better represent the fertilizer mix of the activity. Transport distance based on US BTS Commodity Flow Surveys 1993, 1997, 2002, 2007, US Dep. Of Transportation, Bureau of Transportation Statistics.
- transport, freight, lorry, unspecified: 0.000185591 metric ton*km
  This represent the transport of fertilizers that are directly linked to their supplying activities, to better represent the fertilizer mix of the activity. Transport distance based on US BTS Commodity Flow Surveys 1993, 1997, 2002, 2007, US Dep. Of Transportation, Bureau of Transportation Statistics. Of the total road transport, 6% is assumed to be by delivery van for goods with a large share of retail sale, and 3% for goods that are mainly sold via wholesale.
- pesticide, unspecified: 0.00130532 kg; lognormal variance with pedigree 0.0138498, pedigree (2,2,4,1,1)
  Proxy: Extrapolated using a modified MEXALCA-approach (Roches et al. 2010; Nemecek et al. 2012). See supporting documentation 'WFLDB-Documentation.pdf' chapter 'Pesticide application' for L1 data (https://ecoquery.ecoinvent.org/File/Reports).
  Corresponds to 39.7 kg/ha
  properties: wet mass 1 kg, carbon content, fossil 0.486978, dry mass 1 kg
- transport, freight, sea, container ship: 0.00105093 metric ton*km
  This represent the transport of fertilizers that are directly linked to their supplying activities, to better represent the fertilizer mix of the activity. The total marine transport volume differentiated into major commodity groups based on data from FearnResearch (2001): Fearnley's Annual Review 2000. Oslo: Fearnley/AS, p. 1-78. The category 'Other cargo' accounts for 38% of total maritime transport volume and has been distributed on commodity groups based on the proportions of transport by rail and inland waterways.
  The total marine transport volume differentiated into major commodity groups based on data from FearnResearch (2001): Fearnley's Annual Review 2000. Oslo: Fearnley/AS, p. 1-78. The category 'Other cargo' accounts for 38% of total maritime transport volume and has been distributed on commodity groups based on the proportions in the marine import and export of the US in 2001-2010.
- inorganic nitrogen fertiliser, as N: 0 kg; pedigree (1,1,1,1,1)
  (same comment as for inorganic nitrogen fertiliser, as N)
- tomato seedling, for planting: 0.755659 unit; source Martínez-Blanco J. 2011; lognormal variance with pedigree 0.124177, pedigree (2,1,4,1,1)
  Literature value or expert estimation (Martínez-Blanco et al. 2011). 2.5 plants per m2 is considered.
  properties: carbon content, non-fossil 0.439481, water content 0.73, wet mass 1 kg, dry mass 0.578035 kg
  note on carbon content, non-fossil: calculation: C-content of components according to ecoinvent report No. 15a. Source of composition: https://ndb.nal.usda.gov/ndb/search/. Unspecific seedling used as proxy.
- fertilising, by broadcaster: 2.67303e-5 ha; lognormal variance with pedigree 0.124177, pedigree (2,1,4,1,1)
  (same comment as for mulching)
- inorganic potassium fertiliser, as K2O: 0 kg; pedigree (1,1,1,1,1)
  Calculated based on literature values: The nutrient content of the crop multiplied by the country-share of the fertiliser type (IFA 2014). See supporting documentation 'WFLDB-Documentation.pdf' chapter 'Fertiliser application' for L1 data and appendix for the source of nutrient content (https://ecoquery.ecoinvent.org/File/Reports).
  Corresponds to 16.9 kg/ha
  properties: wet mass 1 kg, dry mass 1 kg
- irrigation: 0.149013 m3; lognormal variance with pedigree 0.124177, pedigree (2,1,4,1,1)
  Calculated value: The total amount of water used for irrigation (calculated from evapotranspiration, Pfister et al. 2011) multiplied by the country-share of irrigation technique (WFLDB-Guidelines.pdf, Appendix 6.1). See supporting documentation 'WFLDB-Documentation.pdf' chapter 'Water use for irrigation' for L2 data (https://ecoquery.ecoinvent.org/File/Reports).
  properties: wet mass 1000 kg, water content 9089.91, dry mass 0.11 kg
- poultry manure, fresh: 0.00271509 kg; lognormal variance with pedigree 0.124177, pedigree (2,1,4,1,1)
  Calculated based on literature values: The total amount of manure multiplied by the country-share of manure per animal category (FAOSTAT 2015). See supporting documentation 'WFLDB-Documentation.pdf' chapter 'Fertiliser application' (https://ecoquery.ecoinvent.org/File/Reports).
  Corresponds to 0.165 m3/ha
  properties: wet mass 1 kg, water content 1.63158, dry mass 0.38 kg, carbon content, non-fossil 0.33389
- ammonia, anhydrous, liquid: 0.000132927 kg; lognormal variance with pedigree 0.124177, pedigree (2,1,4,1,1)
  Calculated based on literature values: The nutrient content of the crop multiplied by the country-share of the fertiliser type (IFA 2014). See supporting documentation 'WFLDB-Documentation.pdf' chapter 'Fertiliser application' for L1 data and appendix for the source of nutrient content (https://ecoquery.ecoinvent.org/File/Reports).
  Corresponds to 4.05 kg/ha
  properties: dry mass 1 kg, wet mass 1 kg
- manure, solid, cattle: 0.0245517 kg; lognormal variance with pedigree 0.124177, pedigree (2,1,4,1,1)
  Calculated based on literature values: The total amount of manure multiplied by the country-share of manure per animal category (FAOSTAT 2015). See supporting documentation 'WFLDB-Documentation.pdf' chapter 'Fertiliser application' (https://ecoquery.ecoinvent.org/File/Reports).
  Corresponds to 747.0 kg/ha
  properties: dry mass 0.22 kg, wet mass 1 kg, carbon content, non-fossil 0.441, water content 3.5454
- ammonium nitrate: 2.29603e-5 kg; lognormal variance with pedigree 0.124177, pedigree (2,1,4,1,1)
  The exchange has been updated from 'ammonium nitrate, as N' into 'ammonium nitrate' and therefore its amount has been scaled (multiplied) from 0 kg by 2.8573 kg of 'ammonium nitrate' per kg of 'ammonium nitrate, as N'. Original comment of the exchange is: Calculated based on literature values: The nutrient content of the crop multiplied by the country-share of the fertiliser type (IFA 2014). See supporting documentation 'WFLDB-Documentation.pdf' chapter 'Fertiliser application' for L1 data and appendix for the source of nutrient content (https://ecoquery.ecoinvent.org/File/Reports).
  Corresponds to 0.245 kg/ha
  properties: dry mass 1 kg, wet mass 1 kg
- poultry manure, dried: 0.0305227 kg; lognormal variance with pedigree 0.124177, pedigree (2,1,4,1,1)
  Calculated based on literature values: The total amount of manure multiplied by the country-share of manure per animal category (FAOSTAT 2015). See supporting documentation 'WFLDB-Documentation.pdf' chapter 'Fertiliser application' (https://ecoquery.ecoinvent.org/File/Reports).
  Corresponds to 929.0 kg/ha
  properties: wet mass 1 kg, dry mass 0.865 kg, nitrogen content 0.532, zinc content 0.000349, phosphorus content 0.0167, copper content 4.38e-5, nickel content 4e-5, mercury content 2e-7, potassium content 0.024, lead content 2.92e-6, water content 0.156069, cadmium content 2.92e-7, carbon content, non-fossil 0.33389
- ammonium sulfate: 0.000402076 kg; lognormal variance with pedigree 0.124177, pedigree (2,1,4,1,1)
  Calculated based on literature values: The nutrient content of the crop multiplied by the country-share of the fertiliser type (IFA 2014). See supporting documentation 'WFLDB-Documentation.pdf' chapter 'Fertiliser application' for L1 data and appendix for the source of nutrient content (https://ecoquery.ecoinvent.org/File/Reports).
  Corresponds to 12.2 kg/ha
  properties: dry mass 1 kg, wet mass 1 kg
- tillage, harrowing, by spring tine harrow: 0.000325173 ha; lognormal variance with pedigree 0.124177, pedigree (2,1,4,1,1)
  (same comment as for mulching)
- urea: 0.00103362 kg; lognormal variance with pedigree 0.124177, pedigree (2,1,4,1,1)
  The exchange has been updated from 'urea, as N' into 'urea' and therefore its amount has been scaled (multiplied) from 0.0005 kg by 2.1438 kg of 'urea' per kg of 'urea, as N'. Original comment of the exchange is: Calculated based on literature values: The nutrient content of the crop multiplied by the country-share of the fertiliser type (IFA 2014). See supporting documentation 'WFLDB-Documentation.pdf' chapter 'Fertiliser application' for L1 data and appendix for the source of nutrient content (https://ecoquery.ecoinvent.org/File/Reports).
  Corresponds to 14.7 kg/ha
  properties: wet mass 1 kg, carbon content, fossil 0.2, dry mass 1 kg
- transport, freight, inland waterways, barge: 5.82393e-5 metric ton*km
  (same comment as for transport, freight train)
- tillage, cultivating, chiselling: 0.000175096 ha; lognormal variance with pedigree 0.124177, pedigree (2,1,4,1,1)
  (same comment as for mulching)
- potassium chloride: 0.0018694 kg; lognormal variance with pedigree 0.124177, pedigree (2,1,4,1,1)
  The exchange has been updated from 'potassium chloride, as K2O' into 'potassium chloride' and therefore its amount has been scaled (multiplied) from 0.0012 kg by 1.5829 kg of 'potassium chloride' per kg of 'potassium chloride, as K2O'. Original comment of the exchange is: Calculated based on literature values: The nutrient content of the crop multiplied by the country-share of the fertiliser type (IFA 2014). See supporting documentation 'WFLDB-Documentation.pdf' chapter 'Fertiliser application' for L1 data and appendix for the source of nutrient content (https://ecoquery.ecoinvent.org/File/Reports).
  Corresponds to 35.9 kg/ha
  properties: wet mass 1 kg, dry mass 1 kg
- tillage, currying, by weeder: 7.50402e-5 ha; lognormal variance with pedigree 0.124177, pedigree (2,1,4,1,1)
  (same comment as for mulching)
- manure, liquid, cattle: 0.0403716 kg; lognormal variance with pedigree 0.124177, pedigree (2,1,4,1,1)
  Calculated based on literature values: The total amount of manure multiplied by the country-share of manure per animal category (FAOSTAT 2015). See supporting documentation 'WFLDB-Documentation.pdf' chapter 'Fertiliser application' (https://ecoquery.ecoinvent.org/File/Reports).
  Corresponds to 1.23 m3/ha
  properties: wet mass 1 kg, water content 12.333, carbon content, non-fossil 0.68, dry mass 0.075 kg
- tillage, rolling: 0.000125068 ha; lognormal variance with pedigree 0.124177, pedigree (2,1,4,1,1)
  (same comment as for mulching)
- potassium sulfate: 0.000490301 kg; lognormal variance with pedigree 0.124177, pedigree (2,1,4,1,1)
  The exchange has been updated from 'potassium sulfate, as K2O' into 'potassium sulfate' and therefore its amount has been scaled (multiplied) from 0.0003 kg by 1.85 kg of 'potassium sulfate' per kg of 'potassium sulfate, as K2O'. Original comment of the exchange is: Calculated based on literature values: The nutrient content of the crop multiplied by the country-share of the fertiliser type (IFA 2014). See supporting documentation 'WFLDB-Documentation.pdf' chapter 'Fertiliser application' for L1 data and appendix for the source of nutrient content (https://ecoquery.ecoinvent.org/File/Reports).
  Corresponds to 8.07 kg/ha
  properties: dry mass 1 kg, wet mass 1 kg
- tillage, rotary cultivator: 0.000200105 ha; lognormal variance with pedigree 0.124177, pedigree (2,1,4,1,1)
  (same comment as for mulching)
- manure, liquid, swine: 0.0401922 kg; lognormal variance with pedigree 0.124177, pedigree (2,1,4,1,1)
  Calculated based on literature values: The total amount of manure multiplied by the country-share of manure per animal category (FAOSTAT 2015). See supporting documentation 'WFLDB-Documentation.pdf' chapter 'Fertiliser application' (https://ecoquery.ecoinvent.org/File/Reports).
  Corresponds to 1.22 m3/ha
  properties: wet mass 1 kg, dry mass 0.05 kg, water content 19, carbon content, non-fossil 0.64
- liquid manure spreading, by vacuum tanker: 8.5994e-5 m3; lognormal variance with pedigree 0.124177, pedigree (2,1,4,1,1)
  This amount corresponds to the input of liquid manure.
- inorganic nitrogen fertiliser, as N: 0, 0, 1.58281e-5, 6.0663e-5 kg (4 entries)
  (same comment as for inorganic nitrogen fertiliser, as N)
  properties: dry mass 1 kg, wet mass 1 kg
- urea ammonium nitrate mix: 0.00160714 kg
  The exchange has been updated from 'inorganic nitrogen fertiliser, as N' into 'urea ammonium nitrate' and therefore its amount has been scaled (multiplied) from 0.0005 kg by 3.3333 kg of 'urea ammonium nitrate' per kg of 'inorganic nitrogen fertiliser, as N'. Original comment of the exchange is: Calculated based on literature values: The nutrient content of the crop multiplied by the country-share of the fertiliser type (IFA 2014). See supporting documentation 'WFLDB-Documentation.pdf' chapter 'Fertiliser application' for L1 data and appendix for the source of nutrient content (https://ecoquery.ecoinvent.org/File/Reports).
  Corresponds to 0.482 kg/ha
  properties: hydrogen content 0.095042, dry mass 0.75 kg, oxygen content 0.749063, carbon content, fossil 0.0879977, wet mass 1 kg, nitrogen content 0.401231, water content 0.333333
  note on hydrogen content: Hydrogen content (on a dry matter basis) of urea ammonium nitrate mix is calculated from the molecular formula of the substance (CH6N4O4).
  note on oxygen content: Oxygen content (on a dry matter basis) of urea ammonium nitrate mix is calculated from the molecular formula of the substance (CH6N4O4).
  note on carbon content, fossil: Carbon content, fossil is calculated based on the chemical formula of the substance.
  note on nitrogen content: Nitrogen content (on a dry matter basis) of urea ammonium nitrate mix is calculated from the molecular formula of the substance (CH6N4O4).
- packaging, for fertilisers: 0.00744196 kg; lognormal variance with pedigree 0.0592, pedigree (4,3,4,5,4)
  Total amount of active substance/s of fertilisers needed for the production of 'tomato, fresh grade' is calculated to be circa 3.72E-03 kg. Fertiliser/s used in this dataset is/are: 'ammonia, liquid', 'ammonium nitrate, as N', 'ammonium sulfate, as N', 'nitrogen fertiliser, as N', 'nitrogen fertiliser, as N', 'nitrogen fertiliser, as N', 'nitrogen fertiliser, as N', 'nitrogen fertiliser, as N', 'potassium chloride, as K2O', 'potassium fertiliser, as K2O', 'potassium sulfate, as K2O', 'urea, as N'. The total amount of active substance/s is doubled in order to account for the packaging of the dilluted product of fertiliser/s that is/are applied. Therefore, 7.44E-03 kg of packaging for fertilisers is justified with this exchange.
  properties: wet mass 1 kg, dry mass 1 kg, price 0.0642 EUR2005, carbon content, fossil 0.825301, heating value, net 25.01 MJ
  note on carbon content, fossil: Considering a chemical formula (C2H4)n for polyethylene, carbon content-fossil is calculated to be 0.856286 kg of Carbon per kg of dry mass.
- application of plant protection product, by field sprayer: 0.000120281 ha; lognormal variance with pedigree 0.124664, pedigree (2,2,4,1,1)
  (same comment as for mulching)
- inorganic nitrogen fertiliser, as N: 7.6706e-5 kg; lognormal variance with pedigree 0.124177, pedigree (2,1,4,1,1)
  (same comment as for inorganic nitrogen fertiliser, as N)
- inorganic potassium fertiliser, as K2O: 0.000553767 kg; lognormal variance with pedigree 0.124177, pedigree (2,1,4,1,1)
  (same comment as for inorganic potassium fertiliser, as K2O)

## Inputs from nature
- Transformation, from arable land, unspecified use [natural resource, land]: 0.328547 m2; lognormal variance with pedigree 0.0442144, pedigree (2,1,4,1,1)
  Land transformation: 1 ha divided by yield
- Occupation, annual crop [natural resource, land]: 0.329435 m2*year; lognormal variance with pedigree 0.0200616, pedigree (2,1,4,1,1)
  Related to the duration from harvest date of previous crop to harvest date of main crop.
- Carbon dioxide, in air [natural resource, in air]: 0.100526 kg; lognormal variance with pedigree 0.0138498, pedigree (2,2,4,1,1)
  CO2 uptake by biomass
- Transformation, to arable land, unspecified use [natural resource, land]: 0.328547 m2; lognormal variance with pedigree 0.0442144, pedigree (2,1,4,1,1)
  Land transformation: 1 ha divided by yield
- Energy, gross calorific value, in biomass [natural resource, biotic]: 0.90367 MJ; lognormal variance with pedigree 0.0138498, pedigree (2,2,4,1,1)

## Emissions to nature
- Carbon dioxide, fossil [air, non-urban air or from high stacks]: 0.00113546 kg; lognormal variance with pedigree 0.0138498, pedigree (2,2,4,1,1)
  Calculated value - CO2 emissions from urea and lime. See 'WFLDB-Guidelines.pdf', available at https://ecoquery.ecoinvent.org/File/Reports.
- Copper, ion [water, ground-]: 1.11493e-7 kg; source Freiermuth R.  2006; lognormal variance with pedigree 0.356938, pedigree (2,2,4,1,1)
  Calculated value - Freiermuth (2006). See 'WFLDB-Guidelines.pdf', available at https://ecoquery.ecoinvent.org/File/Reports.
- Ammonia [air, non-urban air or from high stacks]: 0.000543286 kg; source EEA 2013; lognormal variance with pedigree 0.0447216, pedigree (2,2,4,1,1)
  Calculated value - EMEP/EEA (2013). See 'WFLDB-Guidelines.pdf', available at https://ecoquery.ecoinvent.org/File/Reports.
- Lead [water, ground-]: 2.26182e-9 kg; source Freiermuth R.  2006; lognormal variance with pedigree 0.356938, pedigree (2,2,4,1,1)
  (same comment as for Copper, ion)
- Nitrogen oxides [air, non-urban air or from high stacks]: 7.65023e-5 kg; source EEA 2013; lognormal variance with pedigree 0.124664, pedigree (2,2,4,1,1)
  Calculated value - EEA/EMEP (2013). See 'WFLDB-Guidelines.pdf', available at https://ecoquery.ecoinvent.org/File/Reports.
- Mercury [water, ground-]: 3.6771e-11 kg; source Freiermuth R.  2006; lognormal variance with pedigree 0.356938, pedigree (2,2,4,1,1)
  (same comment as for Copper, ion)
- Dinitrogen monoxide [air, non-urban air or from high stacks]: 6.98233e-5 kg; source IPCC 2006; lognormal variance with pedigree 0.124664, pedigree (2,2,4,1,1)
  Calculated value - IPCC (2006). See 'WFLDB-Guidelines.pdf', available at https://ecoquery.ecoinvent.org/File/Reports.
- Zinc, ion [water, ground-]: 8.06716e-7 kg; source Freiermuth R.  2006; lognormal variance with pedigree 0.356938, pedigree (2,2,4,1,1)
  (same comment as for Copper, ion)
- Water [air, non-urban air or from high stacks]: 0.122574 m3; lognormal variance with pedigree 0.124177, pedigree (2,1,4,1,1)
  Calculated value - Emission calculated from water balance. See 'WFLDB-Guidelines.pdf', available at https://ecoquery.ecoinvent.org/File/Reports.
- Water [water, surface water]: 0.0211499 m3; lognormal variance with pedigree 0.124177, pedigree (2,1,4,1,1)
  (same comment as for Water)
- Phosphate [water, surface water]: 1.81785e-5 kg; source Prasuhn V.  2006; lognormal variance with pedigree 0.217266, pedigree (3,2,4,1,4)
  Calculated value - Prasuhn (2006). See 'WFLDB-Guidelines.pdf', available at https://ecoquery.ecoinvent.org/File/Reports.
- Water [water, ground-]: 0.00528764 m3; lognormal variance with pedigree 0.124177, pedigree (2,1,4,1,1)
  (same comment as for Water)
- Phosphorus [water, surface water]: 1.64537e-5 kg; source Prasuhn V.  2006; lognormal variance with pedigree 0.175866, pedigree (2,2,4,1,1)
  Calculated value - Prasuhn (2006) and SQCB-Erosion. See 'WFLDB-Guidelines.pdf', available at https://ecoquery.ecoinvent.org/File/Reports.
- Cadmium [soil, agricultural]: 3.03943e-9 kg; = 8.60400170845e-09 + ( - 5.56456681013e-09)*heavyMetalUptakeSwitch; source Freiermuth R.  2006
  Comment on mathematicalRelation:
  8.60400170845e-09 from Calculated value - Freiermuth (2006). See 'WFLDB-Guidelines.pdf', available at https://ecoquery.ecoinvent.org/File/Reports.
  -5.56456681013e-09 from Crop, default, heavy metals uptake model
  Heavy metal uptake can be excluded by setting the parameter heavyMetalUptakeSwitch to zero.
- Chromium [soil, agricultural]: -6.83644e-7 kg; = -6.53776653415e-07 + ( - 2.98669382659e-08)*heavyMetalUptakeSwitch; source Freiermuth R.  2006
  Comment on mathematicalRelation:
  -6.53776653415e-07 from Calculated value - Freiermuth (2006). See 'WFLDB-Guidelines.pdf', available at https://ecoquery.ecoinvent.org/File/Reports.
  -2.98669382659e-08 from Crop, default, heavy metals uptake model
  Heavy metal uptake can be excluded by setting the parameter heavyMetalUptakeSwitch to zero.
- Nitrate [water, ground-]: 0.00922968 kg; source Faist Emmenegger M. 2009; lognormal variance with pedigree 0.175866, pedigree (2,2,4,1,1)
- Lead [soil, agricultural]: -2.08629e-8 kg; = 8.77221802412e-09 + ( - 2.96351269836e-08)*heavyMetalUptakeSwitch; source Freiermuth R.  2006
  Comment on mathematicalRelation:
  8.77221802412e-09 from Calculated value - Freiermuth (2006). See 'WFLDB-Guidelines.pdf', available at https://ecoquery.ecoinvent.org/File/Reports.
  -2.96351269836e-08 from Crop, default, heavy metals uptake model
  Heavy metal uptake can be excluded by setting the parameter heavyMetalUptakeSwitch to zero.
- Mercury [soil, agricultural]: 6.12914e-9 kg; = 8.35167723494e-09 + ( - 2.22253862076e-09)*heavyMetalUptakeSwitch; source Freiermuth R.  2006
  Comment on mathematicalRelation:
  8.35167723494e-09 from Calculated value - Freiermuth (2006). See 'WFLDB-Guidelines.pdf', available at https://ecoquery.ecoinvent.org/File/Reports.
  -2.22253862076e-09 from Crop, default, heavy metals uptake model
  Heavy metal uptake can be excluded by setting the parameter heavyMetalUptakeSwitch to zero.
- Phosphate [water, ground-]: 7.094e-6 kg; source Prasuhn V.  2006; lognormal variance with pedigree 0.175866, pedigree (2,2,4,1,1)
  (same comment as for Phosphate)
- Zinc [soil, agricultural]: 4.73423e-6 kg; = 6.4891415054e-06 + ( - 1.75491553044e-06)*heavyMetalUptakeSwitch; source Freiermuth R.  2006
  Comment on mathematicalRelation:
  6.4891415054e-06 from Calculated value - Freiermuth (2006). See 'WFLDB-Guidelines.pdf', available at https://ecoquery.ecoinvent.org/File/Reports.
  -1.75491553044e-06 from Crop, default, heavy metals uptake model
  Heavy metal uptake can be excluded by setting the parameter heavyMetalUptakeSwitch to zero.
- Nickel [soil, agricultural]: -1.43118e-7 kg; = -8.58724578638e-08 + ( - 5.72458783717e-08)*heavyMetalUptakeSwitch; source Freiermuth R.  2006
  Comment on mathematicalRelation:
  -8.58724578638e-08 from Calculated value - Freiermuth (2006). See 'WFLDB-Guidelines.pdf', available at https://ecoquery.ecoinvent.org/File/Reports.
  -5.72458783717e-08 from Crop, default, heavy metals uptake model
  Heavy metal uptake can be excluded by setting the parameter heavyMetalUptakeSwitch to zero.
- Pesticides, unspecified [soil, agricultural]: 0.00130532 kg; lognormal variance with pedigree 0.0447216, pedigree (2,2,4,1,1)
  Calculated value - 100% emission in soil. See 'WFLDB-Guidelines.pdf', available at https://ecoquery.ecoinvent.org/File/Reports.
- Chromium, ion [water, surface water]: 4.23695e-7 kg; source Freiermuth R.  2006; lognormal variance with pedigree 0.356938, pedigree (2,2,4,1,1)
  (same comment as for Copper, ion)
- Copper, ion [water, surface water]: 8.84023e-7 kg; source Freiermuth R.  2006; lognormal variance with pedigree 0.356938, pedigree (2,2,4,1,1)
  (same comment as for Copper, ion)
- Cadmium, ion [water, surface water]: 2.47357e-9 kg; source Freiermuth R.  2006; lognormal variance with pedigree 0.356938, pedigree (2,2,4,1,1)
  (same comment as for Copper, ion)
- Lead [water, surface water]: 6.8351e-8 kg; source Freiermuth R.  2006; lognormal variance with pedigree 0.356938, pedigree (2,2,4,1,1)
  (same comment as for Copper, ion)
- Mercury [water, surface water]: 1.586e-9 kg; source Freiermuth R.  2006; lognormal variance with pedigree 0.356938, pedigree (2,2,4,1,1)
  (same comment as for Copper, ion)
- Nickel, ion [water, surface water]: 3.5838e-7 kg; source Freiermuth R.  2006; lognormal variance with pedigree 0.356938, pedigree (2,2,4,1,1)
  (same comment as for Copper, ion)
- Zinc, ion [water, surface water]: 1.24786e-6 kg; source Freiermuth R.  2006; lognormal variance with pedigree 0.356938, pedigree (2,2,4,1,1)
  (same comment as for Copper, ion)
- Cadmium, ion [water, ground-]: 5.53241e-10 kg; source Freiermuth R.  2006; lognormal variance with pedigree 0.356938, pedigree (2,2,4,1,1)
  (same comment as for Copper, ion)
- Chromium, ion [water, ground-]: 4.56878e-7 kg; source Freiermuth R.  2006; lognormal variance with pedigree 0.356938, pedigree (2,2,4,1,1)
  (same comment as for Copper, ion)
- Copper [soil, agricultural]: -1.21696e-7 kg; = 2.41469264382e-07 + ( - 3.63165528797e-07)*heavyMetalUptakeSwitch; source Freiermuth R.  2006
  Comment on mathematicalRelation:
  2.41469264382e-07 from Calculated value - Freiermuth (2006). See 'WFLDB-Guidelines.pdf', available at https://ecoquery.ecoinvent.org/File/Reports.
  Heavy metal uptake can be excluded by setting the parameter heavyMetalUptakeSwitch to zero.

## Sampling procedure
WFLDB Methodological Guidelines for the Life Cycle Inventory of Agricultural Products in the latest version, available at: https://ecoquery.ecoinvent.org/File/Reports. Data sources: Data were categorised from level 0 (L0) to level (L4) as follows: L0 = estimate, proxy; L1 = statistical data (e.g. FAOSTAT); L2 = L1 adapted to crop and country; L3 = literature data or L1 resp. L2 data approved by experts; medium detailing (i.e. kg of total N-fertiliser); L4 = L3 data of high detailing (i.e. portion N-fertiliser types).In this dataset data were obtained for yield: L3; Fertilisers: L4; Pesticides: L1; Machinery: L0; Irrigation: L2. For information regarding the calculation of individual exchanges see supporting documentation WFLDB-Documentation.pdf

## Extrapolations
This dataset has been extrapolated from year 2012 to the year of the calculation (2021). The uncertainty has been adjusted accordingly.

## Review by Assumpció ANTON 2016-05-30
Be aware that the use of statistics in input calculations could provide some specific inputs not common for specific crops, this should be corrected if better information is available and better reflexed in DQR . Currently, I would dissent for some of good marks provided, being a revision of criteria applied advisable.

Pesticides will need to be amended periodically checking for update of pesticides' ban.
