# beam, softwood, raw, kiln drying to u=20%

Dataset: EcoSpold 2, unit process
Geography: RoW
Time period: 2011-01-01 to 2021-12-31
Technology level: current
Classification: ISIC rev.4 ecoinvent: 1610:Sawmilling and planing of wood
Scenario: Business-as-Usual
System model: Allocation, cut-off by classification
Generated by: [System]
Published in: Bauer, C. 2007
Database: ecoinvent
isCopyrightProtected: true
accessRestrictedTo: 1

## General comment
This dataset represents the service of kiln drying of one m3 sawn softwood beam. The wood chip used in the process is considered to be supplied internally which are generated from slabs and sidings when sawing. Characteristics of the of wood chips to be burned: Dry wood density 440 kg/m3; the low heating value 3007 MJ/m3, humidity when burned is estimated to be around 50%, which is achieved after some weeks of drying in the storage. Air emission factors as well as the boiler efficiency represent average annual operation including start and stop (warm-up and shut-down). The boiler used is considered to be 300 kW and emission profile refers to the facility. Shrinkage ratio of between the moisture content of u=30% - 0% is 0.004 %/%..
The data was provided by and approved by the Swiss forest industry.
Within ecoinvent, three products - boards, beams and laths - are distinguished:
After being sawn, the resulting products can either be air dried down to a moisture content of u=20% (mass of water per dry mass), kiln dried down to u=20% or kiln dried down to u=10%. The activity name indicates the respective product, drying technology and target moisture.

## Included activities start
Kiln drying process starting from sawn softwood, at the sawmill site, assumed to lose some water before the start of the kiln drying process.

## Included activities end
This activity ends with kiln dried softwood beam, at sawmill. The dataset includes kiln drying of wet wood assumed as u=60% down to u=20%, shrinkage and emissions associated with wood chip incineration. The dataset does not include air emissions released from the wood, as these emissions are assumed to be similar to natural emissions from decomposition/rotting of wood.

## Parameters
- emission of sodium: 1.73333e-6 kg/MJ; name sodium
  updated emission profile (amount of emission in kg/MJ heat) based on personal communication, PSI, 2014
- emission of calcium: 7.8e-6 kg/MJ; name calcium
  (same comment as for emission of sodium)
- emission of benzo(a)pyrene: 6.66667e-10 kg/MJ; name benzo
  (same comment as for emission of sodium)
- emission of ammonia: 2.30667e-6 kg/MJ; name ammonia
  (same comment as for emission of sodium)
- emission of chlorine: 2.4e-7 kg/MJ; name ch
  (same comment as for emission of sodium)
- wood density, basic: 404.8 kg/m3; name basic_wood_d
  kg oven-dry matter/wet volume
- moisture content wood chip: 50 dimensionless; name moisture_woodchip
  moisture content of wood chip
- emission of Phosphorus: 4e-7 kg/MJ; name Phosphorus
  (same comment as for emission of sodium)
- scaling factor: 1.33333 dimensionless; name scaling_factor; lognormal variance with pedigree 0.0016, pedigree (2,1,1,1,1)
  The scaling factor corresponds to the inverse of the average annual efficiency of the heating system, including start/stop (warm up and cool down). Therefore, this efficiency will be lower than figures provided by manufacturers. The estimated value was provided by T.Nussbaumer, Verenum, and represents the average installed boiler in this size category in Switzerland.
- emission of carbon monoxide, non-fossil: 0.0004 kg/MJ; name co
  (same comment as for emission of sodium)
- emission of Particulates >10: 6.66667e-6 kg/MJ; name Particulates_higher_10
  (same comment as for emission of sodium)
- emission of dioxin measured as 2,3,7,8-tetrachlorodibenzo-p-dioxin: 4.13333e-14 kg/MJ; name tetrachloro
  (same comment as for emission of sodium)
- emission of sulfur dioxide: 3.33333e-6 kg/MJ; name SO2
  (same comment as for emission of sodium)
- emission of chromium: 5.28e-9 kg/MJ; name chromium
  (same comment as for emission of sodium)
- emission of Phenol, pentachloro-: 1.08e-11 kg/MJ; name Phenol_pentachloro
  (same comment as for emission of sodium)
- emission of Particulates 2.5: 0.00012 kg/MJ; name Particulate2_5
  (same comment as for emission of sodium)
- emission of Hydrocarbons, aliphatic, alkanes, unspecified: 1.21333e-6 kg/MJ; name Hydrocarbons_aliphatic_alkanes
  (same comment as for emission of sodium)
- emission of non-methane volatile organic compounds, unspecified origin: 1.4e-5 kg/MJ; name NMVOC
  (same comment as for emission of sodium)
- emission of arsenic: 1.33333e-9 kg/MJ; name arsenic
  (same comment as for emission of sodium)
- emission of chromium 4: 5.33333e-11 kg/MJ; name chroIV
  (same comment as for emission of sodium)
- emission of benzene, hexachloro: 9.6e-15 kg/MJ; name ben_hexa
  (same comment as for emission of sodium)
- moisture content beam: 20 dimensionless; name moisture_beam
  moisture content of beam
- emission of bromine: 8e-8 kg/MJ; name bro
  (same comment as for emission of sodium)
- emission of cadmium: 9.33333e-10 kg/MJ; name cadmium
  (same comment as for emission of sodium)
- emission of Potassium: 3.12e-5 kg/MJ; name Potassium
  (same comment as for emission of sodium)
- emission of Magnesium: 4.8e-7 kg/MJ; name Magnesium
  (same comment as for emission of sodium)
- total heat: 571 MJ; name heat_woodchip
  total thermal energy required for the drying process per m3 of output
- emission of Mercury: 4e-10 kg/MJ; name Mercury
  (same comment as for emission of sodium)
- emission of Hydrocarbons, aliphatic, unsaturated: 4.13333e-6 kg/MJ; name Hydrocarbons_aliphatic
  (same comment as for emission of sodium)
- emission of Methane, non-fossil: 5.33333e-7 kg/MJ; name Methane_nonfossil
  (same comment as for emission of sodium)
- wood density, dry: 440 kg/m3; name dry_wood_d
  kg oven-dry matter/oven-dry volume
- emission of Nitrogen oxides: 0.00024 kg/MJ; name no2
  (same comment as for emission of sodium)
- wood ash: 0.000634667 kg/MJ; name woodash
  generation of wood ash per MJ
- emission of benzene: 1.21333e-6 kg/MJ; name benzene
  (same comment as for emission of sodium)
- emission of dinitrogen monoxide: 3.06667e-6 kg/MJ; name N2O
  (same comment as for emission of sodium)
- emission of Particulates >2.5 to <10: 6.66667e-6 kg/MJ; name Particulates2_5_to_10
  (same comment as for emission of sodium)
- emission of Nickel: 8e-9 kg/MJ; name Nickel
  (same comment as for emission of sodium)
- emission of toluene: 4e-7 kg/MJ; name toluene
  (same comment as for emission of sodium)
- emission of copper: 2.93333e-8 kg/MJ; name copper
  (same comment as for emission of sodium)
- furnace, wood chip: 2.31481e-8 unit/MJ; name furnace_energy
  inventory of furnace per MJ of heating demand
- emission of m-Xylene: 1.6e-7 kg/MJ; name mXylene
  (same comment as for emission of sodium)
- emission of lead: 3.33333e-8 kg/MJ; name lead
  (same comment as for emission of sodium)
- emission of acetaldehyde: 8.13333e-8 kg/MJ; name acet
  (same comment as for emission of sodium)
- emission of Manganese: 2.26667e-7 kg/MJ; name Manganese
  (same comment as for emission of sodium)
- emission of zinc: 4e-7 kg/MJ; name zinc
  (same comment as for emission of sodium)
- shrinkage ratio (u=30% - 0%): 0.004 dimensionless; name shrinkage_ratio
  shrinkage ratio between u=30% to 0%
- emission of Formaldehyde: 1.73333e-7 kg/MJ; name Formaldehyde
  (same comment as for emission of sodium)
- emission of Fluorine: 6.66667e-8 kg/MJ; name Fluorine
  (same comment as for emission of sodium)
- emission of benzene, ethyl: 4e-8 kg/MJ; name ben_ethyl
  (same comment as for emission of sodium)
- emission of polycyclic aromatic hydrocarbons: 1.48e-8 kg/MJ; name PAH
  (same comment as for emission of sodium)

## Reference product
- sawnwood, beam, softwood, raw, dried (u=20%): 1 m3; name beam_raw_kiln; CPC 31101: Wood, sawn or chipped lengthwise, sliced or peeled, of a thickness exceeding 6 mm, of coniferous wood; By-product classification allocatable product
  production volume 1.06775e7 m3; name p_sawnwood_dried; = 57510/1079420*296662059
    Annual production of sawn softwood (sawnwood C = coniferous from FAOStat for Switzerland), extrapolatedion to global production volume via the production volumes of sawnwood (C = coniferous) in Switzerland and globally according to FAOStat
  property dry mass 404.8 kg; = basic_wood_d
  property price 160 EUR2005; name beam_raw_kiln_price_EUR2005
    Expert judgement (Urs Luginbühl, Swiss Sawmilling industry, personal communication in June 2014). Cross-reference; FAOSTAT (accessed 20140428). The price is calculated by using data on total world import quantity (m3) and import value (1000 USD), year 2005. 109432798 m3 of Sawnwood (C) - coniferous was imported in the world in 2005. The import value was 22249842000 USD. The calculated price is thus (22249842000/109432798=203*0.8=) 164 Euro.
  property water content 0.2; name water_content
  property wet mass 485.76 kg; = basic_wood_d*(1+ water_content)
  property water in wet mass 80.96 kg; name WWM_dried; = basic_wood_d* water_content
  property heating value, net 5860.46 MJ
    LHV is calculated based on the Carbon content of the product. More details can be found on the respective documentation.The property is based on a value of 12.06MJ/kg
  property carbon content 0.494
    carbon content on a dry matter basis (reserved; not for manual entry)
  properties: carbon content, non-fossil 0.494, carbon content, fossil 0, carbon allocation 199.971 kg

## Inputs from technosphere
- technical wood drying facility: 3.66e-6 unit; name wooddrying; lognormal variance with pedigree 0.4406, pedigree (2,1,4,5,1)
  infrastructure, data from ecoinvent 2.2
- sawnwood, softwood, raw: 1.04167 m3; name m_sawnwood; source Rudi Wagenführ 2000; lognormal variance with pedigree 0.0106, pedigree (2,1,4,5,1)
  Processed internally within the sawmill
  property water in wet mass 271.04 kg; name WWM_sawnwood
  properties: dry mass 387.2 kg, water content 0.7, carbon content, non-fossil 0.494, wet mass 658.24 kg, heating value, net 5130.57 MJ
- wood ash mixture, pure: -0.362395 kg; name wood_ash; lognormal variance with pedigree 0.0112, pedigree (2,1,4,5,1)
  calculated from the amount of wood ash per MJ heat produced times the amount of heat needed for drying; according to updated emission profiles by PSI and heat requirements from industry.
  production volume 3.86947e6 kg; = wood_ash*p_sawnwood_dried/beam_raw_kiln
    Calculated from production volume of reference product using the relative outputs.
  property price 0 EUR2005; name wood_ash_price_EUR2005
  properties: wet mass 1 kg, dry mass 1 kg, carbon content, non-fossil 0.012
- furnace, wood chips, with silo, 300kW: 1.32176e-5 unit; name furnace; lognormal variance with pedigree 0.4406, pedigree (2,1,4,5,1)
  infrastructure for the production of heat from wood chips
- electricity, medium voltage: 0 kWh; name elec_midvol; pedigree (1,1,1,1,1)
  used to run the kiln; industry data
- wood chips, wet, measured as dry mass: 40.8879 kg; name woodchip_soft; lognormal variance with pedigree 0.0106, pedigree (2,1,4,5,1)
  used as a fuel to produce heat for the drying process
  property water content 0.5; name woodchip_soft_water_content
  property carbon content, non-fossil 0.494; name woodchip_soft_C_content_non_fossil
  property carbon content, fossil 0; name woodchip_soft_C_content_fossil
  property heating value, net 12.4133 MJ; name woodchip_soft_Net_Heat_Value
  property wet mass 1.5 kg; name woodchip_soft_WM
  property water in wet mass 0.5 kg; name woodchip_soft_WWM
  property heating value, gross 20.4 MJ; name woodchip_soft_Gross_Heat_Value
  property dry mass 1 kg; name woodchip_soft_DM
  note on heating value, net: net (lower) heating (calorific) value; calculated according to ecoinvent guidelines 2.2
  note on heating value, gross: gross (upper) heating (calorific) value according to ecoinvent guidelines 2.2
- electricity, medium voltage: 0.212857, 0.0408169, 0.332728, 0.68523, 9.96606, 1.40472, 4.05759 kWh (7 entries); lognormal variance with pedigree 0.0106, pedigree (2,1,4,5,1)
  used to run the kiln; industry data

## Emissions to nature
- Nickel [air, urban air close to ground]: 4.568e-6 kg; lognormal variance with pedigree 0.0112, pedigree (2,1,4,5,1)
  calculated from the emission profile per MJ heat produced times the amount of heat needed for drying; according to updated emission profiles by PSI and heat requirements from industry.
- Benzene [air, urban air close to ground]: 0.000692813 kg; lognormal variance with pedigree 0.0112, pedigree (2,1,4,5,1)
  (same comment as for Nickel)
- Potassium [air, urban air close to ground]: 0.0178152 kg; lognormal variance with pedigree 0.0112, pedigree (2,1,4,5,1)
  (same comment as for Nickel)
- Cadmium [air, urban air close to ground]: 5.32933e-7 kg; lognormal variance with pedigree 0.0112, pedigree (2,1,4,5,1)
  (same comment as for Nickel)
- Particulates, > 2.5 um, and < 10um [air, unspecified]: 0.00380667 kg; lognormal variance with pedigree 0.0166, pedigree (2,1,4,5,1)
  (same comment as for Nickel)
- Particulates, < 2.5 um [air, urban air close to ground]: 0.06852 kg; lognormal variance with pedigree 0.0112, pedigree (2,1,4,5,1)
  (same comment as for Nickel)
- Lead [air, urban air close to ground]: 1.90333e-5 kg; lognormal variance with pedigree 0.0112, pedigree (2,1,4,5,1)
  (same comment as for Nickel)
- Zinc [air, urban air close to ground]: 0.0002284 kg; lognormal variance with pedigree 0.0112, pedigree (2,1,4,5,1)
  (same comment as for Nickel)
- Formaldehyde [air, urban air close to ground]: 9.89733e-5 kg; lognormal variance with pedigree 0.0112, pedigree (2,1,4,5,1)
  (same comment as for Nickel)
- Phosphorus [air, urban air close to ground]: 0.0002284 kg; lognormal variance with pedigree 0.0112, pedigree (2,1,4,5,1)
  (same comment as for Nickel)
- Methane, non-fossil [air, urban air close to ground]: 0.000304533 kg; lognormal variance with pedigree 0.0112, pedigree (2,1,4,5,1)
  (same comment as for Nickel)
- Phenol, pentachloro- [air, urban air close to ground]: 6.1668e-9 kg; lognormal variance with pedigree 0.0112, pedigree (2,1,4,5,1)
  (same comment as for Nickel)
- Manganese [air, urban air close to ground]: 0.000129427 kg; lognormal variance with pedigree 0.0112, pedigree (2,1,4,5,1)
  (same comment as for Nickel)
- Nitrogen oxides [air, urban air close to ground]: 0.13704 kg; lognormal variance with pedigree 0.0112, pedigree (2,1,4,5,1)
  (same comment as for Nickel)
- Chlorine [air, urban air close to ground]: 0.00013704 kg; lognormal variance with pedigree 0.0112, pedigree (2,1,4,5,1)
  (same comment as for Nickel)
- Hydrocarbons, aliphatic, alkanes, unspecified [air, urban air close to ground]: 0.000692813 kg; lognormal variance with pedigree 0.0112, pedigree (2,1,4,5,1)
  (same comment as for Nickel)
- Carbon dioxide, non-fossil [air, urban air close to ground]: 74.0617 kg; lognormal variance with pedigree 0.0112, pedigree (2,1,4,5,1)
  (same comment as for Nickel)
- Calcium [air, urban air close to ground]: 0.0044538 kg; lognormal variance with pedigree 0.0112, pedigree (2,1,4,5,1)
  (same comment as for Nickel)
- Carbon monoxide, non-fossil [air, urban air close to ground]: 0.2284 kg; lognormal variance with pedigree 0.0112, pedigree (2,1,4,5,1)
  (same comment as for Nickel)
- m-Xylene [air, urban air close to ground]: 9.136e-5 kg; lognormal variance with pedigree 0.0112, pedigree (2,1,4,5,1)
  (same comment as for Nickel)
- Dinitrogen monoxide [air, urban air close to ground]: 0.00175107 kg; lognormal variance with pedigree 0.0112, pedigree (2,1,4,5,1)
  (same comment as for Nickel)
- Ammonia [air, urban air close to ground]: 0.00131711 kg; lognormal variance with pedigree 0.0112, pedigree (2,1,4,5,1)
  (same comment as for Nickel)
- Bromine [air, urban air close to ground]: 4.568e-5 kg; lognormal variance with pedigree 0.0112, pedigree (2,1,4,5,1)
  (same comment as for Nickel)
- Magnesium [air, urban air close to ground]: 0.00027408 kg; lognormal variance with pedigree 0.0112, pedigree (2,1,4,5,1)
  (same comment as for Nickel)
- Mercury [air, urban air close to ground]: 2.284e-7 kg; lognormal variance with pedigree 0.0112, pedigree (2,1,4,5,1)
  (same comment as for Nickel)
- Copper [air, urban air close to ground]: 1.67493e-5 kg; lognormal variance with pedigree 0.0112, pedigree (2,1,4,5,1)
  (same comment as for Nickel)
- Benzene, hexachloro- [air, urban air close to ground]: 5.4816e-12 kg; lognormal variance with pedigree 0.0112, pedigree (2,1,4,5,1)
  (same comment as for Nickel)
- Dioxins, measured as 2,3,7,8-tetrachlorodibenzo-p-dioxin [air, urban air close to ground]: 2.36013e-11 kg; lognormal variance with pedigree 0.0112, pedigree (2,1,4,5,1)
  (same comment as for Nickel)
- Water [air, unspecified]: 0.201373 m3; = (m_sawnwood*WWM_sawnwood-beam_raw_kiln*WWM_dried)/1000; lognormal variance with pedigree 0.014, pedigree (1,1,4,1,1)
  difference in water contained in the sawnwood before and after drying, converted from kg to m3
- Chromium [air, urban air close to ground]: 3.01488e-6 kg; lognormal variance with pedigree 0.0112, pedigree (2,1,4,5,1)
  (same comment as for Nickel)
- Benzene, ethyl- [air, urban air close to ground]: 2.284e-5 kg; lognormal variance with pedigree 0.0112, pedigree (2,1,4,5,1)
  (same comment as for Nickel)
- PAH, polycyclic aromatic hydrocarbons [air, urban air close to ground]: 8.4508e-6 kg; lognormal variance with pedigree 0.0112, pedigree (2,1,4,5,1)
  (same comment as for Nickel)
- Sodium [air, urban air close to ground]: 0.000989733 kg; lognormal variance with pedigree 0.0112, pedigree (2,1,4,5,1)
  (same comment as for Nickel)
- Chromium VI [air, urban air close to ground]: 3.04533e-8 kg; lognormal variance with pedigree 0.0112, pedigree (2,1,4,5,1)
  (same comment as for Nickel)
- Acetaldehyde [air, urban air close to ground]: 4.64413e-5 kg; lognormal variance with pedigree 0.0112, pedigree (2,1,4,5,1)
  (same comment as for Nickel)
- NMVOC, non-methane volatile organic compounds, unspecified origin [air, urban air close to ground]: 0.007994 kg; lognormal variance with pedigree 0.0112, pedigree (2,1,4,5,1)
  (same comment as for Nickel)
- Benzo(a)pyrene [air, urban air close to ground]: 3.80667e-7 kg; lognormal variance with pedigree 0.0112, pedigree (2,1,4,5,1)
  (same comment as for Nickel)
- Arsenic [air, urban air close to ground]: 7.61333e-7 kg; lognormal variance with pedigree 0.0112, pedigree (2,1,4,5,1)
  (same comment as for Nickel)
- Sulfur dioxide [air, urban air close to ground]: 0.00190333 kg; lognormal variance with pedigree 0.0112, pedigree (2,1,4,5,1)
  (same comment as for Nickel)
- Hydrocarbons, aliphatic, unsaturated [air, urban air close to ground]: 0.00236013 kg; lognormal variance with pedigree 0.0112, pedigree (2,1,4,5,1)
  (same comment as for Nickel)
- Fluorine [air, urban air close to ground]: 3.80667e-5 kg; lognormal variance with pedigree 0.0112, pedigree (2,1,4,5,1)
  (same comment as for Nickel)
- Toluene [air, urban air close to ground]: 0.0002284 kg; lognormal variance with pedigree 0.0112, pedigree (2,1,4,5,1)
  (same comment as for Nickel)

## Sampling procedure
complementary literature and sampling from sawmills

## Extrapolations
extrapolated from CH data, uncertainty modeled accordingly.

## Review by Emilia Moreno Ruiz 2015-11-02
AL added
