# treatment of wastewater from glass production, capacity 1.1E10l/year

Dataset: EcoSpold 2, unit process
Geography: RoW
Time period: 1994-01-01 to 2021-12-31
Technology level: current
Classification: EcoSpold01Categories: waste management/wastewater treatment
Classification: ISIC rev.4 ecoinvent: 3700:Sewerage
Tags: ConvertedDataset; Treatment
Scenario: Business-as-Usual
System model: Allocation, cut-off by classification
Generated by: Gabor Doka (obsolete)
Published in: Doka G. 2008
Database: ecoinvent
isCopyrightProtected: true
accessRestrictedTo: 1

## General comment
Wastewater purified in a moderatly large municipal wastewater treatment plant (capacity class 2), with an average capacity size of 71100 per-captia-equivalents PCE.
Wastewater contains (in kg/m3): COD: 0.115 (GSD=123.5%); SO4-S: 0.333 (GSD=123.5%); NH4-N: 0.009 (GSD=123.5%); B: 0.0005243 (GSD=224.1%); F: 0.03 (GSD=224.1%); As: 0.0003 (GSD=224.1%); Ba: 0.003 (GSD=224.1%); Cd: 0.00005 (GSD=224.1%); Cr: 0.0005 (GSD=224.1%); Cu: 0.0005 (GSD=224.1%); Ni: 0.0005 (GSD=224.1%); Pb: 0.0005 (GSD=224.1%); Sb: 0.0003 (GSD=224.1%); Sn: 0.0005 (GSD=224.1%); Zn: 0.0005 (GSD=224.1%);
[This dataset was already contained in the ecoinvent database version 2. It was not individually updated during the transfer to ecoinvent version 3. Life Cycle Impact Assessment results may still have changed, as they are affected by changes in the supply chain, i.e. in other datasets. This dataset was generated following the ecoinvent quality guidelines for version 2. It may have been subject to central changes described in the ecoinvent version 3 change report (http://www.ecoinvent.org/database/ecoinvent-version-3/reports-of-changes/), and the results of the central updates were reviewed extensively. The changes added e.g. consistent water flows and other information throughout the database. The documentation of this dataset can be found in the ecoinvent reports of version 2, which are still available via the ecoinvent website. The change report linked above covers all central changes that were made during the conversion process.]

## Included activities end
Infrastructure materials for municipal wastewater treatment plant, transports, dismantling. Land use burdens.

## Geography
Specific to the technology mix encountered in Switzerland in 2000. Well applicable to modern treatment practices in Europe, North America or Japan.

## Technology
Three stage wastewater treatment (mechanical, biological, chemical) including sludge digestion (fermentation) according to the average technology in Switzerland

## Parameters
- fraction, process water, to air: 0.1 dimensionless; name fraction_PW_to_air; lognormal variance with pedigree 0.092025, pedigree (4,4,3,2,4)

## Reference product
- wastewater from glass production: -1 m3; CPC 39920: Sewage sludge; By-product classification Waste
  EcoSpold01Location=CH
  production volume 3.96633 m3
    This is a placeholder value that does not reflect real-world production volumes. This dataset does not currently require a real-world production volume to work in the database framework, and no actual data were collected yet. This has no negative effect on the results of the ecoinvent database.
  property price 0 EUR2005
    Waste products are assigned a price of zero as they are assumed to require further treatment.
  property carbon content, fossil 0.0455242
    COD= 0.115 kg/m3 (Tab A.18, ecoinvent v2.2 report 13_I). COD was converted to TOC, using conversion factors in Tab 4.10 (ecoinvent v2.2 report 13_IV). TOC was considered as Total Carbon.
  property carbon content 0.0455242
    carbon content on a dry matter basis (reserved; not for manual entry)
  properties: wet mass 1000 kg, dry mass 1.09356 kg, water in wet mass 998.906 kg, carbon content, non-fossil 0, water content 913.443, carbon allocation 0.0497835 kg

## Inputs from technosphere
- titanium dioxide: 4.7819e-7 kg; lognormal variance with pedigree 0.582, pedigree (1,1,5,5,1)
  EcoSpold01Location=RER
  burden from sludge incineration. Uncertainty calculated from wastewater composition and treatment model
  properties: dry mass 1 kg, wet mass 1 kg
- heat, district or industrial, other than natural gas: 0 MJ; pedigree (1,1,1,1,1)
  EcoSpold01Location=CH
  burden from sludge incineration. Uncertainty calculated from wastewater composition and treatment model
  properties: heating value, net 1 MJ
- wastewater treatment facility, capacity 1.1E10l/year: 1.9883e-9 unit; lognormal variance with pedigree 0.042, pedigree (1,1,5,5,1)
  EcoSpold01Location=CH
  uncertainty heeded in exchanges of the module
- chemical, organic: 4.6881e-5 kg; lognormal variance with pedigree 0.722, pedigree (1,1,5,5,1)
  EcoSpold01Location=GLO
  burden from sludge incineration. Uncertainty calculated from wastewater composition and treatment model
  properties: wet mass 1 kg, carbon content, fossil 0.628, dry mass 1 kg, heating value, net 19.03 MJ
  note on carbon content, fossil: This dataset is an unweighted average of 20 organic substances (listed in Tab 88.1, ecoinvent v2.2 report 8, part II), being part of the top100 chemicals included in this database. The C-content has also been calculated as an unweighted average of the C content of the substances composing this dataset.
- process-specific burdens, slag landfill: 0 kg; pedigree (1,1,1,1,1)
  burden from sludge incineration. Uncertainty calculated from wastewater composition and treatment model
  EcoSpold01Location=CH
- municipal waste incineration facility: 1.3054e-11 unit; lognormal variance with pedigree 0.052, pedigree (1,1,5,5,1)
  (same comment as for process-specific burdens, slag landfill)
- electricity, high voltage: 0 kWh; pedigree (1,1,1,1,1)
  (same comment as for process-specific burdens, slag landfill)
- chemical, inorganic: 5.0023e-7 kg; lognormal variance with pedigree 0.192, pedigree (1,1,5,5,1)
  burden from sludge incineration. Uncertainty calculated from wastewater composition and treatment model
  EcoSpold01Location=GLO
  properties: carbon content, fossil 0.003, dry mass 1 kg, wet mass 1 kg
  note on carbon content, fossil: This dataset is an unweighted average of 20 inorganic substances (listed in Tab 88.1, ecoinvent v2.2 report 8, part II), being part of the top100 chemicals included in this database. The C-content has also been calculated as an unweighted average of the C content of the substances composing this dataset.
- heat, district or industrial, natural gas: 0 MJ; pedigree (1,1,1,1,1)
  (same comment as for titanium dioxide)
  properties: heating value, net 1 MJ
- quicklime, milled, packed: 1.505e-7 kg; lognormal variance with pedigree 0.152, pedigree (1,1,5,5,1)
  (same comment as for heat, district or industrial, other than natural gas)
  properties: water content 0.010101, dry mass 0.99 kg, wet mass 1 kg
- waste cement, hydrated: 0 kg; pedigree (1,1,1,1,1)
  (same comment as for heat, district or industrial, other than natural gas)
  production volume 0 kg
    Calculated from the production volume of wastewater from glass production in proportion to the respective output amounts.
  properties: dry mass 1 kg, wet mass 1 kg
- process-specific burdens, residual material landfill: 0 kg; pedigree (1,1,1,1,1)
  (same comment as for process-specific burdens, slag landfill)
- waste graphical paper: -0.0155 kg; lognormal variance with pedigree 0.042, pedigree (1,1,5,5,1)
  EcoSpold01Location=CH
  direct wastewater treatment plant burden. Uncertainty calculated from wastewater composition and treatment model
  production volume 0.062 kg
    (same comment as for waste cement, hydrated)
  properties: water content 0.126126, carbon content, non-fossil 0.454955, dry mass 0.888 kg, wet mass 1 kg, heating value, net 14.12 MJ
  note on heating value, net: Value taken from the general comment of the treatment dataset.
- sodium hydroxide, without water, in 50% solution state: 8.3011e-7 kg; lognormal variance with pedigree 0.142, pedigree (1,1,5,5,1)
  (same comment as for titanium dioxide)
  properties: wet mass 1 kg, heating value, net 3.03 MJ, dry mass 1 kg
- chromium oxide, flakes: 9.7591e-9 kg; lognormal variance with pedigree 0.582, pedigree (1,1,5,5,1)
  (same comment as for titanium dioxide)
  properties: wet mass 1 kg, dry mass 1 kg
- process-specific burdens, municipal waste incineration: 0 kg; pedigree (1,1,1,1,1)
  (same comment as for heat, district or industrial, other than natural gas)
- iron (III) chloride, without water, in 40% solution state: 6.0661e-5 kg; lognormal variance with pedigree 0.242, pedigree (1,1,5,5,1)
  EcoSpold01Location=CH
  direct wastewater treatment plant burden plus burden from sludge incineration. Uncertainty calculated from wastewater composition and treatment model
  properties: wet mass 1 kg, dry mass 1 kg
- electricity, low voltage: 0 kWh; pedigree (1,1,1,1,1)
  (same comment as for waste graphical paper)
- sewer grid, 1.1E10l/year, 242 km: 1.6832e-7 km; lognormal variance with pedigree 0.042, pedigree (1,1,5,5,1)
  uncertainty heeded in exchanges of the module
  EcoSpold01Location=CH
- cement, unspecified: 0 kg; pedigree (1,1,1,1,1)
  (same comment as for heat, district or industrial, other than natural gas)
  properties: wet mass 1 kg, dry mass 1 kg
- ammonia, anhydrous, liquid: 0 kg; pedigree (1,1,1,1,1)
  (same comment as for heat, district or industrial, other than natural gas)
  properties: wet mass 1 kg, dry mass 1 kg
- residual material landfill: 2.9382e-12 unit; lognormal variance with pedigree 0.072, pedigree (1,1,5,5,1)
  (same comment as for process-specific burdens, slag landfill)
- waste plastic, mixture: 0 kg; pedigree (1,1,1,1,1)
  direct wastewater treatment plant burden. Uncertainty calculated from wastewater composition and treatment model
  EcoSpold01Location=CH
  production volume 0 kg
    (same comment as for waste cement, hydrated)
  properties: wet mass 1 kg, heating value, net 30.79 MJ, water content 0.180638, carbon content, fossil 0.747344, dry mass 0.847 kg
  note on carbon content, fossil: C content in 1 kg DM was calculated using data in Tab A.2, ecoinvent v2.2 report 13_I
- slag landfill: 4.6004e-12 unit; lognormal variance with pedigree 0.072, pedigree (1,1,5,5,1)
  (same comment as for heat, district or industrial, other than natural gas)
- hydrochloric acid, without water, in 30% solution state: 3.0014e-7 kg; lognormal variance with pedigree 0.192, pedigree (1,1,5,5,1)
  burden from sludge incineration. Uncertainty calculated from wastewater composition and treatment model
  EcoSpold01Location=RER
  properties: heating value, net 3.32 MJ, dry mass 1 kg, wet mass 1 kg
- liquid manure spreading, by vacuum tanker: 0.0001548 m3; lognormal variance with pedigree 0.042, pedigree (1,1,5,5,1)
  EcoSpold01Location=CH
  burden from sludge spreading. Uncertainty calculated from wastewater composition and treatment model
- heat, district or industrial, other than natural gas: 1.73276e-5, 0.00104632, 0.0427304 MJ (3 entries); lognormal variance with pedigree 0.052, pedigree (1,1,5,5,1)
  (same comment as for heat, district or industrial, other than natural gas)
- process-specific burdens, slag landfill: 0.000731994, 0.00185571 kg (2 entries); lognormal variance with pedigree 0.072, pedigree (1,1,5,5,1)
  (same comment as for process-specific burdens, slag landfill)
- electricity, high voltage: 7.58648e-5, 1.4544e-5, 0.000335001, 0.00109786, 0.000246594, 0.00355085, 0.000563133, 0.00162335 kWh (8 entries); lognormal variance with pedigree 0.492, pedigree (1,1,5,5,1)
  (same comment as for process-specific burdens, slag landfill)
- heat, district or industrial, natural gas: 1.63199e-5, 0.000391057, 0.0010589 MJ (3 entries); lognormal variance with pedigree 0.262, pedigree (1,1,5,5,1)
  (same comment as for titanium dioxide)
- waste cement, hydrated: -0.000398938, -0.00101136 kg (2 entries); lognormal variance with pedigree 0.082, pedigree (1,1,5,5,1)
  (same comment as for heat, district or industrial, other than natural gas)
  production volume 0.00559372 kg
- process-specific burdens, residual material landfill: 0.000398938, 0.00101136 kg (2 entries); lognormal variance with pedigree 0.072, pedigree (1,1,5,5,1)
  (same comment as for process-specific burdens, slag landfill)
- process-specific burdens, municipal waste incineration: 0.0147709, 0.0374461 kg (2 entries); lognormal variance with pedigree 0.052, pedigree (1,1,5,5,1)
  (same comment as for heat, district or industrial, other than natural gas)
- electricity, low voltage: 0.00111172, 0.000202424, 0.00456947, 0.0159647, 0.00325928, 0.0500403, 0.00809564, 0.0232465 kWh (8 entries); lognormal variance with pedigree 0.062, pedigree (1,1,5,5,1)
  (same comment as for waste graphical paper)
- cement, unspecified: 8.1458e-5, 1.6949e-5, 1.2414e-6, 3.53839e-6, 8.00218e-5, 2.35527e-6, 2.58679e-5, 3.12973e-6, 0.000349569 kg (9 entries); lognormal variance with pedigree 0.082, pedigree (1,1,5,5,1)
  (same comment as for heat, district or industrial, other than natural gas)
- ammonia, anhydrous, liquid: 3.5018e-6, 3.01021e-7, 4.68312e-7, 9.27891e-7, 9.09088e-7, 9.52823e-8, 4.25947e-7, 1.00767e-5 kg (8 entries); lognormal variance with pedigree 0.262, pedigree (1,1,5,5,1)
  (same comment as for heat, district or industrial, other than natural gas)
- waste plastic, mixture: -0.00172425, -0.000115208, -8.71297e-6, -4.75849e-5, -1.92238e-5, -4.51863e-5, -0.00146914, -0.0120707 kg (8 entries); lognormal variance with pedigree 0.042, pedigree (1,1,5,5,1)
  (same comment as for waste plastic, mixture)
  production volume 0.0614782 kg

## Emissions to nature
- Antimony [soil, agricultural]: 5.7135e-5 kg; lognormal variance with pedigree 0.712, pedigree (1,1,5,5,1)
  emission from sludge spreading. Uncertainty calculated from wastewater composition and treatment model
- Nitrate [water, surface water]: 0.016818 kg; lognormal variance with pedigree 0.092, pedigree (1,1,5,5,1)
  sewer overload discharge plus direct wastewater treatment plant emission plus emission from sludge incineration. Uncertainty calculated from wastewater composition and treatment model
- Water [air, unspecified]: 0.1 m3; name water_to_air_unspecified; lognormal variance with pedigree 0.0827, pedigree (2,2,5,5,1)
  Calculated value based on water balance.
  property fraction, origin: fresh water 0; name fraction_origin_fresh_water
  property fraction, origin: unspecified 1; name fraction_origin_unspecified
  property fraction, origin: salt water 0; name fraction_origin_salt_water
- Cadmium [air, urban air close to ground]: 8.4265e-10 kg; lognormal variance with pedigree 0.742, pedigree (1,1,5,5,1)
  direct digester gas emission plus emission from sludge incineration. Uncertainty calculated from wastewater composition and treatment model
- Water [water, unspecified]: 0.9 m3; name water_to_water_unspecified; lognormal variance with pedigree 0.0827, pedigree (2,2,5,5,1)
  Calculated value based on water balance.
  property fraction, origin: fresh water 1; name fraction_origin_fresh_water_Ww
  property fraction, origin: unspecified 0; name fraction_origin_unspecified_Ww
  property fraction, origin: salt water 0; name fraction_origin_salt_water_Ww
  property wet mass 1000 kg; name WM
  property water in wet mass 1000 kg; name WWM
  property carbon content, fossil 0; name C_content_fossil
  property dry mass 0 kg; name DM
  property carbon content, non-fossil 0; name C_content_non_fossil
- Nitrate [water, ground-, long-term]: 1.1895e-5 kg; lognormal variance with pedigree 0.122, pedigree (1,1,5,5,1)
  emission from sludge incineration. Uncertainty calculated from wastewater composition and treatment model
- Tin [soil, agricultural]: 0.00011248 kg; lognormal variance with pedigree 0.712, pedigree (1,1,5,5,1)
  (same comment as for Antimony)
- Cyanide [air, urban air close to ground]: 2.9802e-7 kg; lognormal variance with pedigree 0.282, pedigree (1,1,5,5,1)
  (same comment as for Nitrate)
- Boron [water, ground-, long-term]: 0.00010437 kg; lognormal variance with pedigree 0.712, pedigree (1,1,5,5,1)
  (same comment as for Nitrate)
- Cadmium [soil, agricultural]: 9.5235e-6 kg; lognormal variance with pedigree 0.712, pedigree (1,1,5,5,1)
  (same comment as for Antimony)
- Lead [air, urban air close to ground]: 1.0147e-8 kg; lognormal variance with pedigree 0.752, pedigree (1,1,5,5,1)
  (same comment as for Cadmium)
- Chromium VI [water, ground-, long-term]: 1.5986e-5 kg; lognormal variance with pedigree 1.092, pedigree (1,1,5,5,1)
  (same comment as for Nitrate)
- Carbon [soil, agricultural]: 0.0050503 kg; lognormal variance with pedigree 0.112, pedigree (1,1,5,5,1)
  (same comment as for Antimony)
- Fluoride [water, surface water]: 0.03 kg; lognormal variance with pedigree 0.672, pedigree (1,1,5,5,1)
  (same comment as for Nitrate)
- NMVOC, non-methane volatile organic compounds, unspecified origin [air, urban air close to ground]: 1.7228e-6 kg; lognormal variance with pedigree 0.262, pedigree (1,1,5,5,1)
  direct digester gas emission. Uncertainty calculated from wastewater composition and treatment model
- COD, Chemical Oxygen Demand [water, ground-, long-term]: 0.00019762 kg; lognormal variance with pedigree 0.122, pedigree (1,1,5,5,1)
  (same comment as for Nitrate)
- Antimony [air, urban air close to ground]: 1.4775e-8 kg; lognormal variance with pedigree 1.342, pedigree (1,1,5,5,1)
  (same comment as for Cadmium)
- Barium [water, ground-, long-term]: 0.0015354 kg; lognormal variance with pedigree 0.812, pedigree (1,1,5,5,1)
  (same comment as for Nitrate)
- Carbon monoxide, fossil [air, urban air close to ground]: 0.00012273 kg; lognormal variance with pedigree 0.162, pedigree (1,1,5,5,1)
  (same comment as for Nitrate)
- Methane, fossil [air, urban air close to ground]: 0.00037923 kg; lognormal variance with pedigree 0.142, pedigree (1,1,5,5,1)
  (same comment as for Nitrate)
- Antimony [water, surface water]: 0.0001837 kg; lognormal variance with pedigree 0.522, pedigree (1,1,5,5,1)
  (same comment as for Nitrate)
- Barium [air, urban air close to ground]: 1.7294e-6 kg; lognormal variance with pedigree 0.732, pedigree (1,1,5,5,1)
  (same comment as for Cadmium)
- Arsenic, ion [water, surface water]: 0.00025307 kg; lognormal variance with pedigree 0.612, pedigree (1,1,5,5,1)
  (same comment as for Nitrate)
- Copper, ion [water, surface water]: 0.0001297 kg; lognormal variance with pedigree 0.652, pedigree (1,1,5,5,1)
  (same comment as for Nitrate)
- Barium [water, surface water]: 0.00018016 kg; lognormal variance with pedigree 0.572, pedigree (1,1,5,5,1)
  (same comment as for Nitrate)
- Tin, ion [water, surface water]: 0.00020917 kg; lognormal variance with pedigree 0.662, pedigree (1,1,5,5,1)
  (same comment as for Nitrate)
- Nickel, ion [water, surface water]: 0.00030328 kg; lognormal variance with pedigree 0.672, pedigree (1,1,5,5,1)
  (same comment as for Nitrate)
- BOD5, Biological Oxygen Demand [water, ground-, long-term]: 6.4642e-5 kg; lognormal variance with pedigree 0.122, pedigree (1,1,5,5,1)
  (same comment as for Nitrate)
- Arsenic [air, urban air close to ground]: 8.4456e-8 kg; lognormal variance with pedigree 0.732, pedigree (1,1,5,5,1)
  (same comment as for Cadmium)
- Arsenic [soil, agricultural]: 2.5038e-5 kg; lognormal variance with pedigree 0.712, pedigree (1,1,5,5,1)
  (same comment as for Antimony)
- Sulfate [water, surface water]: 1.0173 kg; lognormal variance with pedigree 0.082, pedigree (1,1,5,5,1)
  (same comment as for Nitrate)
- Ammonia [air, urban air close to ground]: 8.2564e-5 kg; lognormal variance with pedigree 0.312, pedigree (1,1,5,5,1)
  direct digester gas emission plus emission from sludge incineration plus emission from sludge spreading. Uncertainty calculated from wastewater composition and treatment model
- Chromium [soil, agricultural]: 9.5235e-5 kg; lognormal variance with pedigree 0.712, pedigree (1,1,5,5,1)
  (same comment as for Antimony)
- Boron [air, urban air close to ground]: 1.9001e-5 kg; lognormal variance with pedigree 0.712, pedigree (1,1,5,5,1)
  (same comment as for Cadmium)
- Zinc, ion [water, surface water]: 0.00015459 kg; lognormal variance with pedigree 0.652, pedigree (1,1,5,5,1)
  (same comment as for Nitrate)
- TOC, Total Organic Carbon [water, surface water]: 0.0059707 kg; lognormal variance with pedigree 0.042, pedigree (1,1,5,5,1)
  (same comment as for Nitrate)
- Copper [soil, agricultural]: 0.00014322 kg; lognormal variance with pedigree 0.712, pedigree (1,1,5,5,1)
  (same comment as for Antimony)
- Boron [water, surface water]: 0.00029083 kg; lognormal variance with pedigree 0.592, pedigree (1,1,5,5,1)
  (same comment as for Nitrate)
- Chromium VI [water, surface water]: 0.00025867 kg; lognormal variance with pedigree 0.652, pedigree (1,1,5,5,1)
  (same comment as for Nitrate)
- Lead [water, surface water]: 5.4958e-5 kg; lognormal variance with pedigree 0.612, pedigree (1,1,5,5,1)
  (same comment as for Nitrate)
- Dinitrogen monoxide [air, urban air close to ground]: 2.7795e-5 kg; lognormal variance with pedigree 0.082, pedigree (1,1,5,5,1)
  direct wastewater treatment plant emission plus direct digester gas emission plus emission from sludge incineration plus emission from sludge spreading. Uncertainty calculated from wastewater composition and treatment model
- Zinc [air, urban air close to ground]: 3.4609e-9 kg; lognormal variance with pedigree 0.762, pedigree (1,1,5,5,1)
  (same comment as for Cadmium)
- DOC, Dissolved Organic Carbon [water, ground-, long-term]: 7.82e-5 kg; lognormal variance with pedigree 0.122, pedigree (1,1,5,5,1)
  (same comment as for Nitrate)
- BOD5, Biological Oxygen Demand [water, surface water]: 0.0073186 kg; lognormal variance with pedigree 0.052, pedigree (1,1,5,5,1)
  (same comment as for Nitrate)
- Barium [soil, agricultural]: 0.0010906 kg; lognormal variance with pedigree 0.712, pedigree (1,1,5,5,1)
  (same comment as for Antimony)
- Tin, ion [water, ground-, long-term]: 8.9659e-5 kg; lognormal variance with pedigree 1.262, pedigree (1,1,5,5,1)
  (same comment as for Nitrate)
- Chromium [air, urban air close to ground]: 1.1166e-11 kg; lognormal variance with pedigree 0.802, pedigree (1,1,5,5,1)
  (same comment as for Cadmium)
- Zinc [soil, agricultural]: 0.0001336 kg; lognormal variance with pedigree 0.712, pedigree (1,1,5,5,1)
  (same comment as for Antimony)
- Carbon dioxide, fossil [air, urban air close to ground]: 0.14204 kg; lognormal variance with pedigree 0.062, pedigree (1,1,5,5,1)
  (same comment as for Nitrate)
- Nitrogen [water, surface water]: 0.0002543 kg; lognormal variance with pedigree 0.102, pedigree (1,1,5,5,1)
  direct wastewater treatment plant emission. Uncertainty calculated from wastewater composition and treatment model
- Lead [soil, agricultural]: 0.00017212 kg; lognormal variance with pedigree 0.712, pedigree (1,1,5,5,1)
  (same comment as for Antimony)
- Nickel [air, urban air close to ground]: 5.2088e-12 kg; lognormal variance with pedigree 0.812, pedigree (1,1,5,5,1)
  (same comment as for Cadmium)
- COD, Chemical Oxygen Demand [water, surface water]: 0.022285 kg; lognormal variance with pedigree 0.082, pedigree (1,1,5,5,1)
  (same comment as for Nitrate)
- Boron [soil, agricultural]: 9.9858e-5 kg; lognormal variance with pedigree 0.712, pedigree (1,1,5,5,1)
  (same comment as for Antimony)
- TOC, Total Organic Carbon [water, ground-, long-term]: 7.82e-5 kg; lognormal variance with pedigree 0.122, pedigree (1,1,5,5,1)
  (same comment as for Nitrate)
- Cadmium, ion [water, surface water]: 2.5382e-5 kg; lognormal variance with pedigree 0.662, pedigree (1,1,5,5,1)
  (same comment as for Nitrate)
- Zinc, ion [water, ground-, long-term]: 3.2845e-6 kg; lognormal variance with pedigree 5.512, pedigree (1,1,5,5,1)
  (same comment as for Nitrate)
- Nitrogen oxides [air, urban air close to ground]: 0.00016227 kg; lognormal variance with pedigree 0.122, pedigree (1,1,5,5,1)
  (same comment as for Cadmium)
- Tin [air, urban air close to ground]: 2.3665e-7 kg; lognormal variance with pedigree 0.732, pedigree (1,1,5,5,1)
  (same comment as for Cadmium)
- Nickel [soil, agricultural]: 7.6111e-5 kg; lognormal variance with pedigree 0.712, pedigree (1,1,5,5,1)
  (same comment as for Antimony)
- Lead [water, ground-, long-term]: 1.9445e-5 kg; lognormal variance with pedigree 6.922, pedigree (1,1,5,5,1)
  (same comment as for Nitrate)
- Cadmium, ion [water, ground-, long-term]: 1.5153e-7 kg; lognormal variance with pedigree 6.902, pedigree (1,1,5,5,1)
  (same comment as for Nitrate)
- Copper, ion [water, ground-, long-term]: 0.00018357 kg; lognormal variance with pedigree 0.732, pedigree (1,1,5,5,1)
  (same comment as for Nitrate)
- Copper [air, urban air close to ground]: 1.6764e-9 kg; lognormal variance with pedigree 0.762, pedigree (1,1,5,5,1)
  (same comment as for Cadmium)
- Antimony [water, ground-, long-term]: 5.7903e-5 kg; lognormal variance with pedigree 0.722, pedigree (1,1,5,5,1)
  (same comment as for Nitrate)
- DOC, Dissolved Organic Carbon [water, surface water]: 0.0055771 kg; lognormal variance with pedigree 0.082, pedigree (1,1,5,5,1)
  (same comment as for Nitrate)
- Arsenic, ion [water, ground-, long-term]: 2.1804e-5 kg; lognormal variance with pedigree 0.712, pedigree (1,1,5,5,1)
  (same comment as for Nitrate)
- Nickel, ion [water, ground-, long-term]: 0.000113 kg; lognormal variance with pedigree 0.712, pedigree (1,1,5,5,1)
  (same comment as for Nitrate)
- Ammonium, ion [water, surface water]: 0.0037047 kg; lognormal variance with pedigree 0.092, pedigree (1,1,5,5,1)
  (same comment as for Nitrogen)
- Chromium, ion [water, surface water]: 4.813e-7 kg; lognormal variance with pedigree 0.722, pedigree (1,1,5,5,1)
  (same comment as for Nitrate)

## Extrapolations
wastewater compositions from literature and/or estimates This dataset has been copied from an original dataset covering the geography CH. The uncertainty has been adjusted accordingly.

## Review by Niels Jungbluth 2009-01-22
passed.
