# kenaf production, irrigated

Dataset: EcoSpold 2, unit process
Geography: IN
Time period: 2016-03-15 to 2021-03-14
Technology level: current
Classification: EcoSpold01Categories: agricultural production/plant production
Classification: ISIC rev.4 ecoinvent: 0116:Growing of fibre crops
Scenario: Business-as-Usual
System model: Allocation, cut-off by classification
Generated by: Madhuri Nigam
Published in: Faist Emmenegger, M. 2018
Database: ecoinvent
isCopyrightProtected: true
accessRestrictedTo: 1

## General comment
The inventory covers field activity for production of 1 kg kenaf plant. The farm has a yield of 30,000 kg fresh green matter per ha for this crop cycle. Mineral NPK fertilizer input is 80-40-40 kg/ha.
Kenaf (commonly known as mesta) is an annual or biennial herbaceous plant. The fibres in kenaf are found in the bast (bark) and core (wood). The bast constitutes 40% and core constitutes 60% of the plant. The bast fibres are long (2 to 6 mm) and slender while core has thick (ø 38 µm) but short (0.5 mm) and thin walled (3µm) fibres. Unlike jute, kenaf requires less care in its cultivation and takes a longer time to mature. The plant is harvested for retting when in full flower stage.

## Included activities start
This activity starts right after the harvest of the previous crop. The soil is prepared for the kenaf cultivation.

## Included activities end
The activity ends at the harvesting of the mature kenaf plant.

## Technology
Cultivation of kenaf from conventional production standards

## Time period
Sowing date for main crop-15 March 2016; harvesting date of main crop:-15 September 2016. Total harvesting time from the date of sowing is around 150 days. Data is for one crop cycle. Cycle of one year considered for entry in ecoeditor

## Reference product
- kenaf plant, harvested: 1 kg; name RP_amount_1; By-product classification allocatable product
  production volume 140000 kg; name RP_PV_1; = 140*1000
    Data for year 2010; Source: http://jute.org/IJSG%20Publications/Jute%20&%20kenaf%20Stat%20at%20a%20glance_ijsg.pdf
  property price 0.0144747 EUR2005; name RP_amount_1_price_EUR2005
    Calculated based on inputs: The price of the product has been calculated as a sum of the values of the material and energy inputs for this product. This value is therefore a rough estimation. It may underestimate the real price since there are additional expenses when producing any product. These expences can include for example labour costs, treatment of waste materials and profit for the producer. Please consider carefully whether this level of data quality is acceptable for your application.
  property carbon content, non-fossil 0.475
    Biogenic carbon content of vegetation on a dry mass basis (47.5% DM) derived from FAOSTAT.
    Reference: http://www.fao.org/forestry/17111/en
  property carbon content 0.475
    carbon content on a dry matter basis (reserved; not for manual entry)
  properties: water in wet mass 0.822353 kg, wet mass 1 kg, dry mass 0.177647 kg, water content 4.62914, carbon content, fossil 0, carbon allocation 0.0843824 kg

## Inputs from technosphere
- ammonia, anhydrous, liquid: 2.2876e-7 kg; lognormal variance with pedigree 0.0126, pedigree (4,4,3,1,1)
  Calculated Value. This value has been calculated by using the Ecoinvent LCI calculation tool for crop production.
  properties: dry mass 1 kg, wet mass 1 kg
- tillage, harrowing, by rotary harrow: 5.17391e-5 ha; lognormal variance with pedigree 0.0126, pedigree (4,4,3,1,1)
  The data was collected for a hectare area through interview. The tillage activity was scaled based on the diesel used for tillage in the ecoinvent dataset and the diesel consumption data collected in the project
- packaging, for pesticides: 0.000133333 kg; lognormal variance with pedigree 0.0532, pedigree (4,3,3,5,4)
  Total amount of active substance/s of pesticides needed for the production of kenaf plant, harvested is calculated to be circa 6.67E-05 kg. Pesticide/s used in this dataset is/are: 'pesticide, unspecified'. The total amount of active substance/s is doubled in order to account for the packaging of the dilluted product of pesticide/s that is/are applied. Therefore, 1.33E-04 kg of packaging for pesticides is justified with this exchange.
  properties: heating value, net 25.97 MJ, carbon content, fossil 0.85714, wet mass 1 kg, price 0.0642 EUR2005, dry mass 1 kg
- inorganic phosphorus fertiliser, as P2O5: 0.00133212 kg; lognormal variance with pedigree 0.0046, pedigree (1,4,3,1,1)
  This exchange is an aggregation of amounts:
  5.92281387178312E-6. Comment:
  1.0884954469483347E-4. Comment:
  4.888900782089441E-4. Comment:
  4.888900782089441E-4. Comment:
  2.39572171843368E-4. Comment:
  properties: wet mass 1 kg, dry mass 1 kg
- manure, liquid, cattle: 0.167667 kg; lognormal variance with pedigree 0.0046, pedigree (1,4,3,1,1)
  (same comment as for ammonia, anhydrous, liquid)
  properties: dry mass 0.075 kg, wet mass 1 kg, carbon content, non-fossil 0.68, water content 12.333
- packaging, for fertilisers: 0.0106667 kg; lognormal variance with pedigree 0.0532, pedigree (4,3,3,5,4)
  Total amount of active substance/s of fertilisers needed for the production of 'kenaf plant, harvested' is calculated to be circa 5.33E-03 kg. Fertiliser/s used in this dataset is/are: 'ammonia, liquid', 'ammonium nitrate, as N', 'ammonium sulfate, as N', 'nitrogen fertiliser, as N', 'phosphate fertiliser, as P2O5', 'phosphate rock, as P2O5, beneficiated, dry', 'potassium chloride, as K2O', 'potassium fertiliser, as K2O', 'potassium sulfate, as K2O', 'urea, as N'. The total amount of active substance/s is doubled in order to account for the packaging of the dilluted product of fertiliser/s that is/are applied. Therefore, 1.07E-02 kg of packaging for fertilisers is justified with this exchange.
  properties: heating value, net 25.01 MJ, price 0.0642 EUR2005, carbon content, fossil 0.825301, wet mass 1 kg, dry mass 1 kg
  note on carbon content, fossil: Considering a chemical formula (C2H4)n for polyethylene, carbon content-fossil is calculated to be 0.856286 kg of Carbon per kg of dry mass.
- urea: 0.00226958 kg; lognormal variance with pedigree 0.0126, pedigree (4,4,3,1,1)
  The exchange has been updated from 'urea, as N' into 'urea' and therefore its amount has been scaled (multiplied) from 0.0011 kg by 2.1438 kg of 'urea' per kg of 'urea, as N'. Original comment of the exchange is: The data was collected for a hectare area through interview
  properties: wet mass 1 kg, dry mass 1 kg, carbon content, fossil 0.2
- inorganic potassium fertiliser, as K2O: 0.000389613 kg; lognormal variance with pedigree 0.0126, pedigree (4,4,3,1,1)
  (same comment as for ammonia, anhydrous, liquid)
  properties: dry mass 1 kg, wet mass 1 kg
- inorganic nitrogen fertiliser, as N: 0.00159001 kg; lognormal variance with pedigree 0.0046, pedigree (1,4,3,1,1)
  This exchange is an aggregation of amounts:
  0.001058669890248312. Comment:
  1.6192964160794746E-4. Comment:
  1.6192964160794746E-4. Comment:
  1.642034538805976E-4. Comment:
  4.197497699777306E-6. Comment:
  3.907536329433147E-5. Comment:
  properties: dry mass 1 kg, wet mass 1 kg
- phosphate rock, beneficiated: 3.77702e-6 kg; lognormal variance with pedigree 0.0126, pedigree (4,4,3,1,1)
  The exchange has been updated from 'phosphate rock, as P2O5, beneficiated, dry' into 'phosphate rock, beneficiated' and therefore its amount has been scaled (multiplied) from 0 kg by 3.125 kg of 'phosphate rock, beneficiated' per kg of 'phosphate rock, as P2O5, beneficiated, dry'. Original comment of the exchange is: Calculated Value. This value has been calculated by using the Ecoinvent LCI calculation tool for crop production.
  properties: dry mass 1 kg, wet mass 1 kg
- linseed seed, at farm: 0.0005 kg; lognormal variance with pedigree 0.0046, pedigree (1,4,3,1,1)
  data for kenaf seeds
  properties: dry mass 1 kg, carbon content, non-fossil 1, wet mass 1 kg
- potassium sulfate: 1.1994e-5 kg; lognormal variance with pedigree 0.0126, pedigree (4,4,3,1,1)
  The exchange has been updated from 'potassium sulfate, as K2O' into 'potassium sulfate' and therefore its amount has been scaled (multiplied) from 0 kg by 1.85 kg of 'potassium sulfate' per kg of 'potassium sulfate, as K2O'. Original comment of the exchange is: Calculated Value. This value has been calculated by using the Ecoinvent LCI calculation tool for crop production.
  properties: dry mass 1 kg, wet mass 1 kg
- waste wood, untreated: -0.267867 kg; name BP_amount_1; lognormal variance with pedigree 0.0046, pedigree (1,4,3,1,1)
  This exchange is an aggregation of amounts:
  0.2312. Comment: Byproduct- sticks
  0.03666666666666667. Comment: Byproduct-seeds
  production volume 37501.3 kg; = RP_PV_1 * (BP_amount_1 / RP_amount_1)
    Calculated from production volume of reference product using the relative outputs.
  property price 0 EUR2005; name BP_amount_1_price_EUR2005
  properties: heating value, net 13.99 MJ
  note on heating value, net: Value taken from the general comment of the treatment dataset.
- potassium chloride: 0.00148355 kg; lognormal variance with pedigree 0.0046, pedigree (1,4,3,1,1)
  The exchange has been updated from 'potassium chloride, as K2O' into 'potassium chloride' and therefore its amount has been scaled (multiplied) from 0.0009 kg by 1.5829 kg of 'potassium chloride' per kg of 'potassium chloride, as K2O'. Original comment of the exchange is: Calculated Value. This value has been calculated by using the Ecoinvent LCI calculation tool for crop production.
  properties: wet mass 1 kg, dry mass 1 kg
- pesticide, unspecified: 6.66667e-5 kg; lognormal variance with pedigree 0.0046, pedigree (1,4,3,1,1)
  Florochloraline used as herbicide
  properties: carbon content, fossil 0.486978, wet mass 1 kg, dry mass 1 kg
- ammonium nitrate: 5.37584e-7 kg; lognormal variance with pedigree 0.0126, pedigree (4,4,3,1,1)
  The exchange has been updated from 'ammonium nitrate, as N' into 'ammonium nitrate' and therefore its amount has been scaled (multiplied) from 0 kg by 2.8573 kg of 'ammonium nitrate' per kg of 'ammonium nitrate, as N'. Original comment of the exchange is: Calculated Value. This value has been calculated by using the Ecoinvent LCI calculation tool for crop production.
  properties: wet mass 1 kg, dry mass 1 kg
- ammonium sulfate: 1.7615e-5 kg; lognormal variance with pedigree 0.0126, pedigree (4,4,3,1,1)
  (same comment as for ammonia, anhydrous, liquid)
  properties: wet mass 1 kg, dry mass 1 kg
- land use change, annual crop: 1.28326e-6 ha; lognormal variance with pedigree 0.0126, pedigree (4,4,3,1,1)
  (same comment as for ammonia, anhydrous, liquid)
- irrigation: 0.0663 m3; lognormal variance with pedigree 0.0046, pedigree (1,4,3,1,1)
  The data was collected for a hectare area through interview.
  properties: water content 9089.91, wet mass 1000 kg, dry mass 0.11 kg

## Inputs from nature
- Transformation, to annual crop, irrigated [natural resource, land]: 0.333333 m2; lognormal variance with pedigree 0.02, pedigree (4,4,3,1,1)
  (same comment as for ammonia, anhydrous, liquid)
- Occupation, annual crop, irrigated [natural resource, land]: 0.166667 m2*year; lognormal variance with pedigree 0.014, pedigree (4,4,3,1,1)
  Calculated Value. This value has been calculated by using the ecoinvent LCI calculation tool for crop production.
- Energy, gross calorific value, in biomass [natural resource, biotic]: 11.25 MJ; lognormal variance with pedigree 0.0126, pedigree (4,4,3,1,1)
  (same comment as for ammonia, anhydrous, liquid)
- Carbon dioxide, in air [natural resource, in air]: 0.967346 kg; lognormal variance with pedigree 0.0126, pedigree (4,4,3,1,1)
  (same comment as for ammonia, anhydrous, liquid)
- Transformation, from annual crop, irrigated [natural resource, land]: 0.333333 m2; lognormal variance with pedigree 0.02, pedigree (4,4,3,1,1)
  (same comment as for ammonia, anhydrous, liquid)

## Emissions to nature
- Chromium [soil, agricultural]: -5.49622e-7 kg
  (same comment as for ammonia, anhydrous, liquid)
- Lead [water, surface water]: 1.77429e-7 kg; lognormal variance with pedigree 0.102, pedigree (4,4,3,1,1)
  (same comment as for ammonia, anhydrous, liquid)
- Lead [soil, agricultural]: -4.59931e-7 kg
  (same comment as for ammonia, anhydrous, liquid)
- Mercury [soil, agricultural]: -2.45012e-8 kg
  (same comment as for ammonia, anhydrous, liquid)
- Chromium, ion [water, surface water]: 6.47751e-7 kg; lognormal variance with pedigree 0.102, pedigree (4,4,3,1,1)
  (same comment as for ammonia, anhydrous, liquid)
- Nickel [soil, agricultural]: -9.48059e-7 kg
  (same comment as for ammonia, anhydrous, liquid)
- Copper [soil, agricultural]: -4.33735e-6 kg
  (same comment as for ammonia, anhydrous, liquid)
- Chromium, ion [water, ground-]: 3.28661e-7 kg; lognormal variance with pedigree 0.102, pedigree (4,4,3,1,1)
  (same comment as for ammonia, anhydrous, liquid)
- Cadmium, ion [water, ground-]: 7.13505e-10 kg; lognormal variance with pedigree 0.102, pedigree (4,4,3,1,1)
  (same comment as for ammonia, anhydrous, liquid)
- Cadmium [soil, agricultural]: -8.09632e-9 kg
  (same comment as for ammonia, anhydrous, liquid)
- Carbon dioxide, fossil [air, non-urban air or from high stacks]: 0.00249477 kg; lognormal variance with pedigree 0.0126, pedigree (4,4,3,1,1)
  (same comment as for ammonia, anhydrous, liquid)
- Phosphate [water, ground-]: 3.61076e-6 kg; lognormal variance with pedigree 0.052, pedigree (4,4,3,1,1)
  (same comment as for ammonia, anhydrous, liquid)
- Dinitrogen monoxide [air, non-urban air or from high stacks]: 6.72455e-5 kg; lognormal variance with pedigree 0.042, pedigree (4,4,3,1,1)
  (same comment as for ammonia, anhydrous, liquid)
- Cadmium, ion [water, surface water]: 5.93768e-9 kg; lognormal variance with pedigree 0.102, pedigree (4,4,3,1,1)
  (same comment as for ammonia, anhydrous, liquid)
- Water [air, non-urban air or from high stacks]: 0.033813 m3; lognormal variance with pedigree 0.0126, pedigree (4,4,3,1,1)
  (same comment as for ammonia, anhydrous, liquid)
- Nitrogen oxides [air, non-urban air or from high stacks]: 0.000187051 kg; lognormal variance with pedigree 0.052, pedigree (4,4,3,1,1)
  (same comment as for ammonia, anhydrous, liquid)
- Phosphate [water, surface water]: 1.01308e-5 kg; lognormal variance with pedigree 0.052, pedigree (4,4,3,1,1)
  (same comment as for ammonia, anhydrous, liquid)
- Ammonia [air, non-urban air or from high stacks]: 0.000545309 kg; lognormal variance with pedigree 0.02, pedigree (4,4,3,1,1)
  (same comment as for ammonia, anhydrous, liquid)
- Phosphorus [water, surface water]: 5.93698e-5 kg; lognormal variance with pedigree 0.052, pedigree (4,4,3,1,1)
  (same comment as for ammonia, anhydrous, liquid)
- Water [water, ground-]: 0.025857 m3; lognormal variance with pedigree 0.0126, pedigree (4,4,3,1,1)
  (same comment as for ammonia, anhydrous, liquid)
- Nitrate [water, ground-]: 0.00427706 kg; lognormal variance with pedigree 0.052, pedigree (4,4,3,1,1)
  (same comment as for ammonia, anhydrous, liquid)
- Water [water, surface water]: 0.00663 m3; lognormal variance with pedigree 0.0126, pedigree (4,4,3,1,1)
  (same comment as for ammonia, anhydrous, liquid)
- Zinc, ion [water, ground-]: 2.647e-7 kg; lognormal variance with pedigree 0.102, pedigree (4,4,3,1,1)
  (same comment as for ammonia, anhydrous, liquid)
- Nickel, ion [water, surface water]: 4.22885e-7 kg; lognormal variance with pedigree 0.102, pedigree (4,4,3,1,1)
  (same comment as for ammonia, anhydrous, liquid)
- Zinc, ion [water, surface water]: 6.89763e-7 kg; lognormal variance with pedigree 0.102, pedigree (4,4,3,1,1)
  (same comment as for ammonia, anhydrous, liquid)
- Zinc [soil, agricultural]: -1.94955e-5 kg
  (same comment as for ammonia, anhydrous, liquid)
- Mercury [water, surface water]: 1.46379e-9 kg; lognormal variance with pedigree 0.102, pedigree (4,4,3,1,1)
  (same comment as for ammonia, anhydrous, liquid)
- Lead [water, ground-]: 3.14892e-9 kg; lognormal variance with pedigree 0.102, pedigree (4,4,3,1,1)
  (same comment as for ammonia, anhydrous, liquid)
- Mercury [water, ground-]: 1.50355e-11 kg; lognormal variance with pedigree 0.102, pedigree (4,4,3,1,1)
  (same comment as for ammonia, anhydrous, liquid)
- Copper, ion [water, ground-]: 5.04443e-8 kg; lognormal variance with pedigree 0.102, pedigree (4,4,3,1,1)
  (same comment as for ammonia, anhydrous, liquid)
- Copper, ion [water, surface water]: 4.88297e-7 kg; lognormal variance with pedigree 0.102, pedigree (4,4,3,1,1)
  (same comment as for ammonia, anhydrous, liquid)

## Sampling procedure
Focus group discussion, expert interviews, literature data and assumptions. Standardized questionnaires were developed and adapted to jute-specific cultivation and post-harvest situation. The secondary data from literature and the primary data from surveys were compared and matched to obtain highest data quality.

## Extrapolations
This dataset has been extrapolated from year 2017 to the year of the calculation (2021). The uncertainty has been adjusted accordingly.
