# treatment of residue from mechanical treatment, desktop computer, municipal waste incineration

Dataset: EcoSpold 2, unit process
Geography: CH
Time period: 1994-01-01 to 2021-12-31
Technology level: outdated
Classification: EcoSpold01Categories: waste management/municipal incineration
Classification: ISIC rev.4 ecoinvent: 3821:Treatment and disposal of non-hazardous waste
Tags: Treatment; ConvertedDataset
Scenario: Business-as-Usual
System model: Allocation, cut-off by classification
Generated by: Roland Hischier
Published in: Hischier R. 2007
Database: ecoinvent
isCopyrightProtected: true
accessRestrictedTo: 1

## General comment
Inventoried waste contains 1.48% rubber; 36.3% Plastics from electronic consumer goods; 36.3% Plastics from electronic industrial goods; 12.4% MSWI iron scrap; 7.26% Alu in MSW; 2.99% Glass; 2.98% wiring copper; 0.22% Pb in ASR inert; 0.03% silver; .
waste composition (wet, in ppm): upper heating value 26.78 MJ/kg; lower heating value 25.67 MJ/kg; H2O 7260.7; O 66881; H 55341; C 604370; S 403.29; N 9662.1; P 462.36; B n.a.; Cl 5358.7; Br 3995.6; F 181.62; I n.a.; Ag 300; As 5.4486; Ba 128.59; Cd 110.04; Co 21.415; Cr 195.9; Cu 33803; Hg 0.61752; Mn 302.37; Mo 2.1794; Ni 494.06; Pb 2357.2; Sb 3509.6; Se 1.4236; Sn 230.49; V 31.52; Zn 584.48; Be 0.33895; Sc n.a.; Sr 59.994; Ti 3252.4; Tl 0.27116; W n.a.; Si 16725; Fe 102170; Ca 4438; Al 75252; K 84.997; Mg n.a.; Na 2029;
Share of carbon in waste that is biogenic 0%.
Share of iron in waste that is metallic/recyclable 98.9%.
Net energy produced in MSWI: 2.81MJ/kg waste electric energy and 5.72MJ/kg waste thermal energy
Allocation of energy production: no substitution or expansion. Total burden allocated to waste disposal function of MSWI.
One kg of this waste produces 0.2751 kg of slag and 0.01351 kg of residues, which are landfilled. Additional solidification with 0.005402 kg of cement.
[This dataset was already contained in the ecoinvent database version 2. It was not individually updated during the transfer to ecoinvent version 3. Life Cycle Impact Assessment results may still have changed, as they are affected by changes in the supply chain, i.e. in other datasets. This dataset was generated following the ecoinvent quality guidelines for version 2. It may have been subject to central changes described in the ecoinvent version 3 change report (http://www.ecoinvent.org/database/ecoinvent-version-3/reports-of-changes/), and the results of the central updates were reviewed extensively. The changes added e.g. consistent water flows and other information throughout the database. The documentation of this dataset can be found in the ecoinvent reports of version 2, which are still available via the ecoinvent website. The change report linked above covers all central changes that were made during the conversion process.]

## Included activities end
waste-specific air and water emisions from incineration, auxiliary material consumption for flue gas cleaning. Short-term emissions to river water and long-term emisisons to ground water from slag compartment (from bottom slag) and residual material landfill (from solidified fly ashes and scrubber slugde). Process energy demands for MSWI.

## Geography
Specific to the technology mix encountered in Switzerland in 2000. Well applicable to modern incineration practices in Europe, North America or Japan.

## Technology
replaced by newer incineration technology with fly ash extraction. Average Swiss MSWI plants in 2000 (grate incinerators) with electrostatic precipitator for fly ash (ESP), wet flue gas scrubber and 29.4% SNCR , 32.2% SCR-high dust , 24.6% SCR-low dust -DeNOx facilities and 13.8% without Denox (by burnt waste, according to Swiss average). Share of waste incinerated in plants with magnetic scrap separation from slag : 50%. Gross electric efficiency technology mix 12.997% and Gross thermal efficiency technology mix 25.57%

## Time period
Waste composition as given in literature reference, theoretical data or other source. Transfer coefficients for modern Swiss MSWI. Emission speciation based on early 90ies data.

## Reference product
- residue from mechanical treatment, desktop computer: -1 kg; CPC 39: Wastes or scraps; By-product classification Waste
  EcoSpold01Location=CH
  production volume 0 kg; name RP_PV_1
    outdated. Replaced by newer incineration technology with fly ash extraction.
  property price 0 EUR2005
    Waste products are assigned a price of zero as they are assumed to require further treatment.
  property carbon content, fossil 0.616224
    Tab 4.14, ecoinvent v2.2 report 18_V, for details in fraction composition. Carbon content in plastic was calculated using data in Tab A.2, ecoinvent v2.2 report 13_I. Others was also considered plastic, and calculated the same way (from pg 70, ecoinvent v2.2 report 18_V). Ferro was assumed to have a C content of 0.012 kg C/ kg (C content of steel, calculated out of emission factors published in Commission Decision of 18 July 2007 establishing guidelines for the monitoring and reporting of greenhouse gas emissions pursuant to Directive 2003/87/EC of the European Parliament and of the Council (notified under document number C(2007) 3416)). The other component of the fraction were considered to content no C.
  property heating value, net 25.69 MJ
    Value taken from the general comment of the treatment dataset.
  property carbon content 0.616224
    carbon content on a dry matter basis (reserved; not for manual entry)
  properties: wet mass 1 kg, carbon content, non-fossil 0, water in wet mass 0 kg, water content 0, dry mass 1 kg, carbon allocation 0.616224 kg

## Inputs from technosphere
- municipal waste incineration facility: 2.5e-10 unit; lognormal variance with pedigree 0.04, pedigree (1,1,5,1,1)
  demands per kilogram waste. uncertainty is heeded in the module
  EcoSpold01Location=CH
- iron (III) chloride, without water, in 40% solution state: 0.00041906 kg; lognormal variance with pedigree 0.34, pedigree (1,1,5,1,1)
  uncertainty calculated from uncertainty in average auxiliary material input, and the unertainty of the waste composition of this waste
  EcoSpold01Location=CH
  properties: dry mass 1 kg, wet mass 1 kg
- chemical, organic: 0.0004367 kg; lognormal variance with pedigree 0.99, pedigree (1,1,5,1,1)
  Proxy for TMT15. uncertainty calculated from uncertainty in average auxiliary material input, and the unertainty of the waste composition of this waste
  EcoSpold01Location=GLO
  properties: carbon content, fossil 0.628, heating value, net 19.03 MJ, wet mass 1 kg, dry mass 1 kg
  note on carbon content, fossil: This dataset is an unweighted average of 20 organic substances (listed in Tab 88.1, ecoinvent v2.2 report 8, part II), being part of the top100 chemicals included in this database. The C-content has also been calculated as an unweighted average of the C content of the substances composing this dataset.
- quicklime, milled, packed: 0.00085651 kg; lognormal variance with pedigree 0.48, pedigree (1,1,5,1,1)
  EcoSpold01Location=CH
  uncertainty calculated from uncertainty in average auxiliary material input, and the unertainty of the waste composition of this waste
  properties: water content 0.010101, wet mass 1 kg, dry mass 0.99 kg
- sodium hydroxide, without water, in 50% solution state: 0.0049468 kg; lognormal variance with pedigree 0.46, pedigree (1,1,5,1,1)
  EcoSpold01Location=RER
  uncertainty calculated from uncertainty in average auxiliary material input, and the unertainty of the waste composition of this waste
  properties: dry mass 1 kg, wet mass 1 kg, heating value, net 3.03 MJ
- residual material landfill: 2.8137e-11 unit; lognormal variance with pedigree 0.12, pedigree (1,1,5,1,1)
  EcoSpold01Location=CH
  uncertainty is calculated from uncertainties in waste composition and transfer coefficients in incinerator
- process-specific burdens, slag landfill: 0.27512 kg; lognormal variance with pedigree 0.07, pedigree (1,1,5,1,1)
  EcoSpold01Location=CH
  uncertainty is calculated from uncertainties in waste composition and transfer coefficients in incinerator;activityLink introduced to establish a direct link to the corresponding regional supply of this product
- ammonia, anhydrous, liquid: 0.00048745 kg; lognormal variance with pedigree 1.33, pedigree (1,1,5,1,1)
  EcoSpold01Location=CH
  uncertainty calculated from uncertainty in average DeNOx input, uncertainty in the share of thermal NOx, uncertainty of nitrogen content in average municipal waste and the unertainty in nitrogen content in *this* waste.
  properties: wet mass 1 kg, dry mass 1 kg
- slag landfill: 4.891e-10 unit; lognormal variance with pedigree 0.07, pedigree (1,1,5,1,1)
  uncertainty is calculated from uncertainties in waste composition and transfer coefficients in incinerator
  EcoSpold01Location=CH
- process-specific burdens, municipal waste incineration: 1 kg; lognormal variance with pedigree 0.04, pedigree (1,1,5,1,1)
  demands per kilogram waste. uncertainty is heeded in the module;activityLink introduced to establish a direct link to the corresponding regional supply of this product
  EcoSpold01Location=CH
- waste cement, hydrated: -0.013506 kg; name BP_amount_1; lognormal variance with pedigree 0.13, pedigree (1,1,5,1,1)
  EcoSpold01Location=CH
  Hydrated cement for solidification of landfilled residual material. Uncertainty calculated from unertainty of the waste composition of this waste and transfer coefficients in the incinerator and of the solidification recipe.
  production volume 0 kg; = RP_PV_1* BP_amount_1
    Calculated from the production volume of residue from mechanical treatment, desktop computer in proportion to the respective output amounts.
  property price 0 EUR2005; name BP_amount_1_price_EUR2005
  properties: wet mass 1 kg, dry mass 1 kg
- hydrochloric acid, without water, in 30% solution state: 1.0191e-5 kg; lognormal variance with pedigree 0.38, pedigree (1,1,5,1,1)
  (same comment as for sodium hydroxide, without water, in 50% solution state)
  properties: heating value, net 3.32 MJ, wet mass 1 kg, dry mass 1 kg
- chemical, inorganic: 1.6985e-5 kg; lognormal variance with pedigree 0.38, pedigree (1,1,5,1,1)
  Proxy for Polyelectrolyte. uncertainty calculated from uncertainty in average auxiliary material input, and the unertainty of the waste composition of this waste
  EcoSpold01Location=GLO
  properties: carbon content, fossil 0.003, dry mass 1 kg, wet mass 1 kg
  note on carbon content, fossil: This dataset is an unweighted average of 20 inorganic substances (listed in Tab 88.1, ecoinvent v2.2 report 8, part II), being part of the top100 chemicals included in this database. The C-content has also been calculated as an unweighted average of the C content of the substances composing this dataset.
- process-specific burdens, residual material landfill: 0.013506 kg; lognormal variance with pedigree 0.12, pedigree (1,1,5,1,1)
  (same comment as for process-specific burdens, slag landfill)
- titanium dioxide: 1.3953e-5 kg; lognormal variance with pedigree 2.04, pedigree (1,1,5,1,1)
  uncertainty calculated from uncertainty in average DeNOx input, uncertainty in the share of thermal NOx, uncertainty of nitrogen content in average municipal waste and the unertainty in nitrogen content in *this* waste.
  EcoSpold01Location=RER
  properties: dry mass 1 kg, wet mass 1 kg
- cement, unspecified: 0.0054024 kg; lognormal variance with pedigree 0.13, pedigree (1,1,5,1,1)
  Cement for solidification of landfilled residual material. Uncertainty calculated from unertainty of the waste composition of this waste, of transfer coefficients in the incinerator and of the solidification recipe.
  EcoSpold01Location=CH
  properties: wet mass 1 kg, dry mass 1 kg
- chromium oxide, flakes: 2.8476e-7 kg; lognormal variance with pedigree 2.04, pedigree (1,1,5,1,1)
  EcoSpold01Location=RER
  Proxy for vanadium pentoxide V2O5 in SCR catalyst, uncertainty calculated from uncertainty in average DeNOx input, uncertainty in the share of thermal NOx, uncertainty of nitrogen content in average municipal waste and the unertainty in nitrogen content in *this* waste.
  properties: wet mass 1 kg, dry mass 1 kg
- heat, district or industrial, natural gas: 0.0427842 MJ; lognormal variance with pedigree 1.33, pedigree (1,1,5,1,1)
  (same comment as for titanium dioxide)
  properties: heating value, net 1 MJ

## Emissions to nature
- BOD5, Biological Oxygen Demand [water, surface water]: 2.2617e-5 kg; lognormal variance with pedigree 0.16, pedigree (1,1,5,1,1)
  uncertainty is calculated from uncertainties in waste composition and transfer coefficients in incinerator and landfills
- Lead [water, ground-, long-term]: 0.0022577 kg; lognormal variance with pedigree 0.63, pedigree (1,1,5,1,1)
  Long-term emissions from landfilling of incineration residues. uncertainty is calculated from uncertainties in waste composition and transfer coefficients in incinerator and landfills.
- Bromine [water, ground-, long-term]: 0.00069869 kg; lognormal variance with pedigree 0.53, pedigree (1,1,5,1,1)
  (same comment as for Lead)
- Selenium [air, urban air close to ground]: 7.1593e-15 kg; lognormal variance with pedigree 1.69, pedigree (1,1,5,1,1)
  uncertainty is calculated from uncertainties in waste composition and transfer coefficients in incinerator
- Chromium VI [water, surface water]: 1.2472e-6 kg; lognormal variance with pedigree 0.88, pedigree (1,1,5,1,1)
  (same comment as for BOD5, Biological Oxygen Demand)
- Titanium, ion [water, ground-, long-term]: 0.00097453 kg; lognormal variance with pedigree 0.91, pedigree (1,1,5,1,1)
  (same comment as for Lead)
- DOC, Dissolved Organic Carbon [water, surface water]: 1.6568e-5 kg; lognormal variance with pedigree 0.28, pedigree (1,1,5,1,1)
  (same comment as for BOD5, Biological Oxygen Demand)
- Thallium [water, ground-, long-term]: 1.5823e-7 kg; lognormal variance with pedigree 1.35, pedigree (1,1,5,1,1)
  (same comment as for Lead)
- Barium [air, urban air close to ground]: 1.2859e-7 kg; lognormal variance with pedigree 0.99, pedigree (1,1,5,1,1)
  (same comment as for Selenium)
- Iron, ion [water, surface water]: 8.1541e-7 kg; lognormal variance with pedigree 0.92, pedigree (1,1,5,1,1)
  (same comment as for BOD5, Biological Oxygen Demand)
- Molybdenum [water, surface water]: 3.7223e-7 kg; lognormal variance with pedigree 1, pedigree (1,1,5,1,1)
  (same comment as for BOD5, Biological Oxygen Demand)
- Manganese [water, ground-, long-term]: 0.00030166 kg; lognormal variance with pedigree 0.85, pedigree (1,1,5,1,1)
  (same comment as for Lead)
- Vanadium, ion [water, surface water]: 1.4109e-8 kg; lognormal variance with pedigree 1.9, pedigree (1,1,5,1,1)
  (same comment as for BOD5, Biological Oxygen Demand)
- Silver, ion [water, ground-, long-term]: 0.00029999 kg; lognormal variance with pedigree 0.86, pedigree (1,1,5,1,1)
  (same comment as for Lead)
- Nitrogen oxides [air, urban air close to ground]: 0.00030741 kg; lognormal variance with pedigree 1.44, pedigree (1,1,5,1,1)
  uncertainty calculated from uncertainty in average N-emissions, uncertainty in the share of thermal NOx, uncertainty of nitrogen content in average municipal waste and the unertainty in nitrogen content in *this* waste.
- Chloride [water, ground-, long-term]: 0.00017701 kg; lognormal variance with pedigree 0.29, pedigree (1,1,5,1,1)
  (same comment as for Lead)
- Titanium, ion [water, surface water]: 1.5675e-8 kg; lognormal variance with pedigree 1.9, pedigree (1,1,5,1,1)
  (same comment as for BOD5, Biological Oxygen Demand)
- Tin, ion [water, surface water]: 6.7994e-9 kg; lognormal variance with pedigree 1.16, pedigree (1,1,5,1,1)
  (same comment as for BOD5, Biological Oxygen Demand)
- Cobalt [air, urban air close to ground]: 6.7992e-13 kg; lognormal variance with pedigree 1.31, pedigree (1,1,5,1,1)
  (same comment as for Selenium)
- Molybdenum [water, ground-, long-term]: 1.8028e-6 kg; lognormal variance with pedigree 1.51, pedigree (1,1,5,1,1)
  (same comment as for Lead)
- Zinc, ion [water, ground-, long-term]: 3.5889e-5 kg; lognormal variance with pedigree 4.76, pedigree (1,1,5,1,1)
  (same comment as for Lead)
- Mercury [air, urban air close to ground]: 2.1327e-14 kg; lognormal variance with pedigree 1.77, pedigree (1,1,5,1,1)
  (same comment as for Selenium)
- Strontium [water, ground-, long-term]: 5.9915e-5 kg; lognormal variance with pedigree 1.07, pedigree (1,1,5,1,1)
  (same comment as for Lead)
- Copper, ion [water, surface water]: 1.1873e-6 kg; lognormal variance with pedigree 1.33, pedigree (1,1,5,1,1)
  (same comment as for BOD5, Biological Oxygen Demand)
- Molybdenum [air, urban air close to ground]: 4.3588e-9 kg; lognormal variance with pedigree 1.52, pedigree (1,1,5,1,1)
  (same comment as for Selenium)
- Beryllium [air, urban air close to ground]: 3.3895e-10 kg; lognormal variance with pedigree 1.77, pedigree (1,1,5,1,1)
  (same comment as for Selenium)
- Selenium [water, surface water]: 4.6367e-7 kg; lognormal variance with pedigree 1.25, pedigree (1,1,5,1,1)
  (same comment as for BOD5, Biological Oxygen Demand)
- Barium [water, surface water]: 1.7681e-8 kg; lognormal variance with pedigree 1.85, pedigree (1,1,5,1,1)
  (same comment as for BOD5, Biological Oxygen Demand)
- TOC, Total Organic Carbon [water, ground-, long-term]: 0.0059016 kg; lognormal variance with pedigree 0.05, pedigree (1,1,5,1,1)
  (same comment as for Lead)
- Arsenic, ion [water, surface water]: 2.4564e-6 kg; lognormal variance with pedigree 1.16, pedigree (1,1,5,1,1)
  (same comment as for BOD5, Biological Oxygen Demand)
- Chromium VI [water, ground-, long-term]: 5.0698e-6 kg; lognormal variance with pedigree 3.33, pedigree (1,1,5,1,1)
  (same comment as for Lead)
- Chromium, ion [water, surface water]: 1.2156e-7 kg; lognormal variance with pedigree 0.94, pedigree (1,1,5,1,1)
  (same comment as for BOD5, Biological Oxygen Demand)
- Sodium, ion [water, surface water]: 0.00025716 kg; lognormal variance with pedigree 0.66, pedigree (1,1,5,1,1)
  (same comment as for BOD5, Biological Oxygen Demand)
- Carbon dioxide, fossil [air, urban air close to ground]: 2.1913 kg; lognormal variance with pedigree 0.05, pedigree (1,1,5,1,1)
  (same comment as for Selenium)
- Cadmium [air, urban air close to ground]: 6.0273e-9 kg; lognormal variance with pedigree 1.03, pedigree (1,1,5,1,1)
  (same comment as for Selenium)
- Thallium [water, surface water]: 1.6611e-10 kg; lognormal variance with pedigree 1.95, pedigree (1,1,5,1,1)
  (same comment as for BOD5, Biological Oxygen Demand)
- Potassium, ion [water, ground-, long-term]: 7.0002e-5 kg; lognormal variance with pedigree 0.73, pedigree (1,1,5,1,1)
  (same comment as for Lead)
- Copper [air, urban air close to ground]: 1.7129e-8 kg; lognormal variance with pedigree 0.35, pedigree (1,1,5,1,1)
  (same comment as for Selenium)
- Bromine [air, urban air close to ground]: 1.1987e-5 kg; lognormal variance with pedigree 0.53, pedigree (1,1,5,1,1)
  (same comment as for Selenium)
- COD, Chemical Oxygen Demand [water, ground-, long-term]: 0.014914 kg; lognormal variance with pedigree 0.05, pedigree (1,1,5,1,1)
  (same comment as for Lead)
- Barium [water, ground-, long-term]: 0.00011416 kg; lognormal variance with pedigree 1.02, pedigree (1,1,5,1,1)
  (same comment as for Lead)
- Arsenic, ion [water, ground-, long-term]: 2.9922e-6 kg; lognormal variance with pedigree 1.39, pedigree (1,1,5,1,1)
  (same comment as for Lead)
- Zinc [air, urban air close to ground]: 9.1032e-9 kg; lognormal variance with pedigree 0.81, pedigree (1,1,5,1,1)
  (same comment as for Selenium)
- Sodium, ion [water, ground-, long-term]: 0.0017709 kg; lognormal variance with pedigree 0.6, pedigree (1,1,5,1,1)
  (same comment as for Lead)
- Beryllium [water, surface water]: 2.1063e-10 kg; lognormal variance with pedigree 1.99, pedigree (1,1,5,1,1)
  (same comment as for BOD5, Biological Oxygen Demand)
- Silicon [water, ground-, long-term]: 0.00031172 kg; lognormal variance with pedigree 5.89, pedigree (1,1,5,1,1)
  (same comment as for Lead)
- Carbon monoxide, fossil [air, urban air close to ground]: 0.0002229 kg; lognormal variance with pedigree 0.690625, pedigree (1,3,5,2,1)
  Literature data from switzerland and germany adapted to plant age distribution in switzerland
  Uncertainty: & basic uncertainty of 5; literature data from switzerland and germany adapted to plant age distribution in switzerland
- Fluoride [water, surface water]: 1.3961e-5 kg; lognormal variance with pedigree 0.64, pedigree (1,1,5,1,1)
  (same comment as for BOD5, Biological Oxygen Demand)
- Phosphorus [air, urban air close to ground]: 3.6324e-7 kg; lognormal variance with pedigree 0.82, pedigree (1,1,5,1,1)
  (same comment as for Selenium)
- Cobalt [water, ground-, long-term]: 1.8749e-5 kg; lognormal variance with pedigree 1.16, pedigree (1,1,5,1,1)
  (same comment as for Lead)
- Mercury [water, surface water]: 6.6036e-9 kg; lognormal variance with pedigree 1.64, pedigree (1,1,5,1,1)
  (same comment as for BOD5, Biological Oxygen Demand)
- Manganese [water, surface water]: 1.55e-8 kg; lognormal variance with pedigree 1.89, pedigree (1,1,5,1,1)
  (same comment as for BOD5, Biological Oxygen Demand)
- Mercury [water, ground-, long-term]: 3.2129e-8 kg; lognormal variance with pedigree 3.44, pedigree (1,1,5,1,1)
  (same comment as for Lead)
- Lead [air, urban air close to ground]: 3.9755e-9 kg; lognormal variance with pedigree 0.66, pedigree (1,1,5,1,1)
  (same comment as for Selenium)
- Sulfate [water, surface water]: 0.00017586 kg; lognormal variance with pedigree 0.43, pedigree (1,1,5,1,1)
  (same comment as for BOD5, Biological Oxygen Demand)
- Aluminium [air, urban air close to ground]: 2.7198e-6 kg; lognormal variance with pedigree 0.23, pedigree (1,1,5,1,1)
  (same comment as for Selenium)
- Nitrate [water, surface water]: 0.00012359 kg; lognormal variance with pedigree 0.31, pedigree (1,1,5,1,1)
  (same comment as for BOD5, Biological Oxygen Demand)
- Silver, ion [water, surface water]: 1.0416e-8 kg; lognormal variance with pedigree 1.95, pedigree (1,1,5,1,1)
  (same comment as for BOD5, Biological Oxygen Demand)
- Manganese [air, urban air close to ground]: 2.7294e-14 kg; lognormal variance with pedigree 1.03, pedigree (1,1,5,1,1)
  (same comment as for Selenium)
- Potassium, ion [water, surface water]: 1.4739e-5 kg; lognormal variance with pedigree 0.64, pedigree (1,1,5,1,1)
  (same comment as for BOD5, Biological Oxygen Demand)
- Copper, ion [water, ground-, long-term]: 0.033357 kg; lognormal variance with pedigree 0.27, pedigree (1,1,5,1,1)
  (same comment as for Lead)
- BOD5, Biological Oxygen Demand [water, ground-, long-term]: 0.0048784 kg; lognormal variance with pedigree 0.05, pedigree (1,1,5,1,1)
  (same comment as for Lead)
- Fluoride [water, ground-, long-term]: 0.00016201 kg; lognormal variance with pedigree 0.61, pedigree (1,1,5,1,1)
  (same comment as for Lead)
- Selenium [water, ground-, long-term]: 9.5717e-7 kg; lognormal variance with pedigree 1.07, pedigree (1,1,5,1,1)
  (same comment as for Lead)
- Aluminium [water, surface water]: 1.1107e-6 kg; lognormal variance with pedigree 1.28, pedigree (1,1,5,1,1)
  (same comment as for BOD5, Biological Oxygen Demand)
- Calcium [air, urban air close to ground]: 3.7688e-6 kg; lognormal variance with pedigree 0.53, pedigree (1,1,5,1,1)
  (same comment as for Selenium)
- Hydrogen chloride [air, urban air close to ground]: 5.4511e-8 kg; lognormal variance with pedigree 0.53, pedigree (1,1,5,1,1)
  (same comment as for Selenium)
- Bromine [water, surface water]: 0.0032929 kg; lognormal variance with pedigree 0.42, pedigree (1,1,5,1,1)
  (same comment as for BOD5, Biological Oxygen Demand)
- Nickel, ion [water, ground-, long-term]: 0.00047078 kg; lognormal variance with pedigree 0.76, pedigree (1,1,5,1,1)
  (same comment as for Lead)
- Calcium, ion [water, surface water]: 1.8046e-5 kg; lognormal variance with pedigree 0.97, pedigree (1,1,5,1,1)
  (same comment as for BOD5, Biological Oxygen Demand)
- Cadmium, ion [water, surface water]: 4.9942e-8 kg; lognormal variance with pedigree 0.95, pedigree (1,1,5,1,1)
  (same comment as for BOD5, Biological Oxygen Demand)
- Nickel, ion [water, surface water]: 3.102e-7 kg; lognormal variance with pedigree 1.41, pedigree (1,1,5,1,1)
  (same comment as for BOD5, Biological Oxygen Demand)
- Chromium [air, urban air close to ground]: 2.8201e-12 kg; lognormal variance with pedigree 1.03, pedigree (1,1,5,1,1)
  (same comment as for Selenium)
- Calcium, ion [water, ground-, long-term]: 0.0041352 kg; lognormal variance with pedigree 0.5, pedigree (1,1,5,1,1)
  (same comment as for Lead)
- Phosphate [water, ground-, long-term]: 4.655e-5 kg; lognormal variance with pedigree 5.12, pedigree (1,1,5,1,1)
  (same comment as for Lead)
- Strontium [water, surface water]: 3.7774e-8 kg; lognormal variance with pedigree 1.78, pedigree (1,1,5,1,1)
  (same comment as for BOD5, Biological Oxygen Demand)
- Antimony [air, urban air close to ground]: 1.3551e-11 kg; lognormal variance with pedigree 0.66, pedigree (1,1,5,1,1)
  (same comment as for Selenium)
- Beryllium [water, ground-, long-term]: 2.7298e-7 kg; lognormal variance with pedigree 1.52, pedigree (1,1,5,1,1)
  (same comment as for Lead)
- Ammonia [air, urban air close to ground]: 7.6559e-6 kg; lognormal variance with pedigree 1.44, pedigree (1,1,5,1,1)
  (same comment as for Nitrogen oxides)
- Strontium [air, urban air close to ground]: 5.9994e-9 kg; lognormal variance with pedigree 1.11, pedigree (1,1,5,1,1)
  (same comment as for Selenium)
- DOC, Dissolved Organic Carbon [water, ground-, long-term]: 0.0059016 kg; lognormal variance with pedigree 0.05, pedigree (1,1,5,1,1)
  (same comment as for Lead)
- Cobalt [water, surface water]: 3.6633e-9 kg; lognormal variance with pedigree 1.65, pedigree (1,1,5,1,1)
  (same comment as for BOD5, Biological Oxygen Demand)
- Chloride [water, surface water]: 0.0051816 kg; lognormal variance with pedigree 0.39, pedigree (1,1,5,1,1)
  (same comment as for BOD5, Biological Oxygen Demand)
- Lead [water, surface water]: 4.4056e-8 kg; lognormal variance with pedigree 1.69, pedigree (1,1,5,1,1)
  (same comment as for BOD5, Biological Oxygen Demand)
- Tin [air, urban air close to ground]: 1.9563e-7 kg; lognormal variance with pedigree 0.91, pedigree (1,1,5,1,1)
  (same comment as for Selenium)
- Sodium [air, urban air close to ground]: 9.5351e-7 kg; lognormal variance with pedigree 0.63, pedigree (1,1,5,1,1)
  (same comment as for Selenium)
- Cadmium, ion [water, ground-, long-term]: 1.6874e-6 kg; lognormal variance with pedigree 6.75, pedigree (1,1,5,1,1)
  (same comment as for Lead)
- Silicon [air, urban air close to ground]: 5.0146e-6 kg; lognormal variance with pedigree 0.37, pedigree (1,1,5,1,1)
  (same comment as for Selenium)
- Silicon [water, surface water]: 9.9409e-7 kg; lognormal variance with pedigree 0.97, pedigree (1,1,5,1,1)
  (same comment as for BOD5, Biological Oxygen Demand)
- COD, Chemical Oxygen Demand [water, surface water]: 4.0394e-5 kg; lognormal variance with pedigree 0.29, pedigree (1,1,5,1,1)
  (same comment as for BOD5, Biological Oxygen Demand)
- Vanadium [air, urban air close to ground]: 5.4486e-11 kg; lognormal variance with pedigree 1.22, pedigree (1,1,5,1,1)
  (same comment as for Selenium)
- Nitrate [water, ground-, long-term]: 0.00034709 kg; lognormal variance with pedigree 0.42, pedigree (1,1,5,1,1)
  (same comment as for Lead)
- Thallium [air, urban air close to ground]: 2.7116e-10 kg; lognormal variance with pedigree 1.79, pedigree (1,1,5,1,1)
  (same comment as for Selenium)
- Zinc, ion [water, surface water]: 1.0326e-7 kg; lognormal variance with pedigree 0.68, pedigree (1,1,5,1,1)
  (same comment as for BOD5, Biological Oxygen Demand)
- Methane, fossil [air, urban air close to ground]: 6.3821e-6 kg; lognormal variance with pedigree 0.091225, pedigree (2,3,5,2,1)
  Confidential data from 5 plants in Switzerland and Germany
  Uncertainty: & basic uncertainty of 1.5; confidential data from 5 plants in Switzerland and Germany
- Nickel [air, urban air close to ground]: 1.5708e-11 kg; lognormal variance with pedigree 0.89, pedigree (1,1,5,1,1)
  (same comment as for Selenium)
- Potassium [air, urban air close to ground]: 2.5626e-7 kg; lognormal variance with pedigree 1.04, pedigree (1,1,5,1,1)
  (same comment as for Selenium)
- Antimony [water, surface water]: 0.0012092 kg; lognormal variance with pedigree 0.45, pedigree (1,1,5,1,1)
  (same comment as for BOD5, Biological Oxygen Demand)
- Iron [air, urban air close to ground]: 3.8271e-8 kg; lognormal variance with pedigree 0.24, pedigree (1,1,5,1,1)
  (same comment as for Selenium)
- Sulfur dioxide [air, urban air close to ground]: 1.3169e-6 kg; lognormal variance with pedigree 0.83, pedigree (1,1,5,1,1)
  (same comment as for Selenium)
- Phosphate [water, surface water]: 7.7713e-8 kg; lognormal variance with pedigree 1.14, pedigree (1,1,5,1,1)
  (same comment as for BOD5, Biological Oxygen Demand)
- Vanadium, ion [water, ground-, long-term]: 3.1209e-6 kg; lognormal variance with pedigree 2.5, pedigree (1,1,5,1,1)
  (same comment as for Lead)
- Aluminium [water, ground-, long-term]: 0.061337 kg; lognormal variance with pedigree 0.2, pedigree (1,1,5,1,1)
  (same comment as for Lead)
- Antimony [water, ground-, long-term]: 0.0022302 kg; lognormal variance with pedigree 0.42, pedigree (1,1,5,1,1)
  (same comment as for Lead)
- Titanium [air, urban air close to ground]: 3.2524e-6 kg; lognormal variance with pedigree 0.57, pedigree (1,1,5,1,1)
  (same comment as for Selenium)
- Dinitrogen monoxide [air, urban air close to ground]: 4.0801e-5 kg; lognormal variance with pedigree 1.44, pedigree (1,1,5,1,1)
  (same comment as for Nitrogen oxides)
- Sulfate [water, ground-, long-term]: 0.001032 kg; lognormal variance with pedigree 0.55, pedigree (1,1,5,1,1)
  (same comment as for Lead)
- Tin, ion [water, ground-, long-term]: 0.00015668 kg; lognormal variance with pedigree 0.97, pedigree (1,1,5,1,1)
  (same comment as for Lead)
- Arsenic [air, urban air close to ground]: 5.5575e-14 kg; lognormal variance with pedigree 1.5, pedigree (1,1,5,1,1)
  (same comment as for Selenium)
- TOC, Total Organic Carbon [water, surface water]: 1.6568e-5 kg; lognormal variance with pedigree 0.28, pedigree (1,1,5,1,1)
  (same comment as for BOD5, Biological Oxygen Demand)
- Iron, ion [water, ground-, long-term]: 0.026841 kg; lognormal variance with pedigree 0.27, pedigree (1,1,5,1,1)
  (same comment as for Lead)
- Hydrogen fluoride [air, urban air close to ground]: 9.5589e-8 kg; lognormal variance with pedigree 0.95, pedigree (1,1,5,1,1)
  (same comment as for Selenium)
- Cyanide [air, urban air close to ground]: 8.6959e-6 kg; lognormal variance with pedigree 1.44, pedigree (1,1,5,1,1)
  (same comment as for Nitrogen oxides)

## Sampling procedure
waste-specific calculation based on literature data

## Extrapolations
This dataset has been extrapolated from year 2000 to the year of the calculation (2021). The uncertainty has been adjusted accordingly.

## Review by Jürgen Sutter 2007-08-31
passed.
