# maintenance, lorry 28 metric ton

Dataset: EcoSpold 2, unit process
Geography: CH
Time period: 1990-01-01 to 2021-12-31
Technology level: current
Classification: EcoSpold01Categories: transport systems/road
Classification: ISIC rev.4 ecoinvent: 4520:Maintenance and repair of motor vehicles
Tags: ConvertedDataset
Scenario: Business-as-Usual
System model: Allocation, cut-off by classification
Generated by: Michael Spielmann (obsolete)
Published in: Spielmann M. 2007
Database: ecoinvent
isCopyrightProtected: true
accessRestrictedTo: 1

## General comment
The dataset represents the maintenance of one lorry 28t.
[This dataset was already contained in the ecoinvent database version 2. It was not individually updated during the transfer to ecoinvent version 3. Life Cycle Impact Assessment results may still have changed, as they are affected by changes in the supply chain, i.e. in other datasets. This dataset was generated following the ecoinvent quality guidelines for version 2. It may have been subject to central changes described in the ecoinvent version 3 change report (http://www.ecoinvent.org/database/ecoinvent-version-3/reports-of-changes/), and the results of the central updates were reviewed extensively. The changes added e.g. consistent water flows and other information throughout the database. The documentation of this dataset can be found in the ecoinvent reports of version 2, which are still available via the ecoinvent website. The change report linked above covers all central changes that were made during the conversion process.]

## Included activities start
The activity starts with the consumption of the components and materials for the maintenance.

## Included activities end
The dataset ends with the maintenance of one lorry 28t. The dataset includes the consumption of the components and materials for the maintenance, the consumption of lead (battery) and until and including the energy consumption (electricity and light fuel oil).

## Geography
Data represent Swiss conditions

## Technology
no technologies are specified

## Time period
The foundations for the calculations are “Selbstkosten des Gütertransportes” ASTAG (1991) and personal information from a lorry manufacturer (IVECO). The determined data are representative for non-urban use of the vehicles and a yearly traffic performance of 70000 vkm/a (van 30000 km/a). The kilometric performance of the tyres depends on the number of axes and the number of starts and stops. The input value for lead (battery) has been calculated assuming two batteries – with a total weight of 108 kg – per truck. Based on Dietrich (1999) we assume a share of lead, H2SO4 and plastic of 68.2% 25.8% and 6%, respectively. For the energy consumption due to maintenance activities, data from Maibach et al. (1999) have been employed. Is included energy expenditures of heating and lighting of service garages as well as energy expenditures for washing bays.
References:
ASTAG (1991) Die Selbstkosten des Gütertransports mit Nutzfahrzeugen. Schweizer Nutzfahrzeugverband, Bern.
Maibach M., Peter D. and Seiler B. (1999) Ökoinventar Transporte: Grundlagen für den ökologischen Vergleich von Transportsystemen und den Einbezug von Transportsystemen in Ökobilanzen. Technischer Schlussbericht. In: Schweizerischer Nationalfonds zur Förderung der wissenschaftlichen Forschung (ed. SPP Umwelt M.). 2nd Edition. INFRAS, Zürich

## Reference product
- maintenance, lorry 28 metric ton: 1 unit; CPC 87141: Maintenance and repair services of motor vehicles; By-product classification allocatable product
  EcoSpold01Location=CH
  production volume 0.0336675 unit
    This is a placeholder value that does not reflect real-world production volumes. This dataset does not currently require a real-world production volume to work in the database framework, and no actual data were collected yet. This has no negative effect on the results of the ecoinvent database. The placeholder value of this activity was scaled according to the nominal GDP of 2005 (source: United Nations, http://data.un.org/Glossary.aspx?q=GDP+%28current+US%24%29, accessed 20130726) to reflect an appropriate share of the global production volume, which is also a placeholder value.
  property price 7585.59 EUR2005
    Calculated based on inputs: The price of the product has been calculated as a sum of the values of the material and energy inputs for this product. This value is therefore a rough estimation. It may underestimate the real price since there are additional expenses when producing any product. These expences can include for example labour costs, treatment of waste materials and profit for the producer. Please consider carefully whether this level of data quality is acceptable for your application.

## Inputs from technosphere
All rows: lognormal variance with pedigree 0.16, pedigree (1,1,5,1,1)
- lead: 210 kg
  EcoSpold01Location=RER
  Calculated value. The input value for lead (battery) has been calculated assuming two batteries - with a total weight of 108 kg - per truck. Based on Dietrich (1999) is assumed a share of lead, H2SO4 and plastic of 68.2% 25.8% and 6%, respectively.
  properties: dry mass 1 kg, wet mass 1 kg
- polyethylene, high density, granulate: 142 kg
  (same comment as for lead)
  properties: wet mass 1 kg, carbon content, fossil 0.857143, dry mass 1 kg, heating value, net 42.47 MJ
  note on carbon content, fossil: Polyethylene is formed out of a huge amount of ethylene monomers (C2H4) (ecoinvent v2.2 report 11_II). MW=28 g/mol
- reinforcing steel: 1060 kg; source Frischknecht R. 1996
  EcoSpold01Location=RER
  Literature value. Is used 100% fo steel for the break block and 90 g of steel for the oil filter. For the determination of maintenance expenditures figures as reported in Frischknecht et al. (1996) are employed. The foundations for the calculations are “Selbstkosten des Gütertransportes” ASTAG (1991) and personal information from a lorry manufacturer (IVECO).
  Further References:
  ASTAG (1991) Die Selbstkosten des Gütertransports mit Nutzfahrzeugen. Schweizer Nutzfahrzeugverband, Bern.
  properties: wet mass 1 kg, dry mass 1 kg, carbon content, fossil 0.004
- paper, woodfree, uncoated: 35 kg; source Frischknecht R. 1996
  Literature value. Is used 100 g of paper for the oil filter and 1 kg of paper for the air filter. For the determination of maintenance expenditures figures as reported in Frischknecht et al. (1996) are employed. The foundations for the calculations are “Selbstkosten des Gütertransportes” ASTAG (1991) and personal information from a lorry manufacturer (IVECO).
  Further References:
  ASTAG (1991) Die Selbstkosten des Gütertransports mit Nutzfahrzeugen. Schweizer Nutzfahrzeugverband, Bern.
  EcoSpold01Location=RER
  properties: wet mass 1 kg, dry mass 0.945 kg, heating value, net 14.11 MJ, carbon content, non-fossil 0.281215, water content 0.0582011, carbon content, fossil 0.0251406
  note on carbon content, non-fossil: Biogenic C content was calculated after biogenic C contents of chemicals used in the production of the paper (in Tab 8.54 & 8.55 ecoinvent v2.2 report 11_III, part 8). The cellulose content in 1 kg of paper (on a wet mas basis) was estimated as (1-chemical content), C content of cellulose was considered 0.44 kgC/kg dry mass (ecoinvent v2.2 report, n 15a, pg 40)
  note on carbon content, fossil: Fossil C content was calculated after fossil C contents of chemicals used in the production of the paper (in Tab 8.54 & 8.55 ecoinvent v2.2 report 11_III, part 8).
- synthetic rubber: 2110 kg; source Frischknecht R. 1996
  EcoSpold01Location=RER
  Literature value. Is used for the tyres. The kilometric performance of the tyres depends on the number of axes and the number of starts and stops. For the determination of maintenance expenditures figures as reported in Frischknecht et al. (1996) are employed. The foundations for the calculations are “Selbstkosten des Gütertransportes” ASTAG (1991) and personal information from a lorry manufacturer (IVECO).
  Further References:
  ASTAG (1991) Die Selbstkosten des Gütertransports mit Nutzfahrzeugen. Schweizer Nutzfahrzeugverband, Bern.
  properties: heating value, net 26.42 MJ, dry mass 1 kg, wet mass 1 kg, carbon content, fossil 0.871949
  note on carbon content, fossil: EPDM (Ethylene-propene-diene terpolymer) rubber is a terpolymer of ethylene, propene, and a diene with the residual unsaturated portion of the diene in the side chain (ecoinvent v2.2 report 7-part XX & Ullmann). Chemical formula (deduced from Evidences of Solvent-Induced Miscibility in Polychloroprene-co-Ethylene-Propene Diene Terpolymer Blends, Dubey et al., Journal of Applied Polymer Science, 2009, 111:1884–1891): C20H35
- electricity, low voltage: 4430 kWh; source Maibach M. 1999
  EcoSpold01Location=CH
  Literature value. For the energy consumption due to maintenance activities, data from Maibach et al. (1999) have been employed. Is included energy expenditures of heating and lighting of service garages as well as energy expenditures for washing bays.
- sulfuric acid: 79.71 kg
  Calculated value. The input value for lead (battery) has been calculated assuming two batteries - with a total weight of 108 kg - per truck. Based on Dietrich (1999) is assumed a share of lead, H2SO4 and plastic of 68.2% 25.8% and 6%, respectively.
  EcoSpold01Location=RER
  properties: dry mass 1 kg, wet mass 1 kg
- lubricating oil: 832 kg; source Frischknecht R. 1996
  EcoSpold01Location=RER
  Literature value. For the determination of maintenance expenditures figures as reported in Frischknecht et al. (1996) are employed. The foundations for the calculations are “Selbstkosten des Gütertransportes” ASTAG (1991) and personal information from a lorry manufacturer (IVECO).
  Further References:
  ASTAG (1991) Die Selbstkosten des Gütertransports mit Nutzfahrzeugen. Schweizer Nutzfahrzeugverband, Bern.
  properties: heating value, net 40.2 MJ, wet mass 1 kg, dry mass 1 kg, carbon content, fossil 0.75
  note on heating value, net: Literature value, Source: IPCC 2006, 2006 IPCC Guidelines for National Greenhouse Gas Inventories, Prepared by the National Greenhouse Gas Inventories Programme, Eggleston H.S., Buendia L., Miwa K., Ngara T. and Tanabe K. (eds). Published: IGES, Japan
  note on carbon content, fossil: Lubricating oil is produced from diesel. C-content/dry mass of fats and oils considered 75%, from: ecoinvent v2.2 report, n 15a, pg 40
- heat, district or industrial, other than natural gas: 53865 MJ
  EcoSpold01Location=RER
  Literature studies. Original data is derived from expert estimates.
  properties: heating value, net 1 MJ

## Sampling procedure
data based on expert estimate and further assumption to determine the material consumption.

## Extrapolations
This dataset has been extrapolated from year 1995 to the year of the calculation (2021). The uncertainty has been adjusted accordingly.

## Review by Niels Jungbluth 2006-09-27
passed.

## Review by Emilia Moreno Ruiz 2012-03-15
trainee DS, OK, Liliane Klemann
