# dehydrogenation of butan-1,4-diol

Dataset: EcoSpold 2, unit process
Geography: RoW
Time period: 2000-01-01 to 2021-12-31
Technology level: current
Classification: ISIC rev.4 ecoinvent: 2011:Manufacture of basic chemicals
Classification: EcoSpold01Categories: chemicals/inorganics
Tags: ConvertedDataset
Scenario: Business-as-Usual
System model: Allocation, cut-off by classification
Share of production covered: 100 %
Generated by: Jürgen Sutter
Published in: Sutter, J. 2007
Database: ecoinvent
isCopyrightProtected: true
accessRestrictedTo: 1

## General comment
This data represents the multioutput-process "butane-1,4-diol dehydrogenation." This process delivers the co-products butyrolactone and hydrogen. The raw materials, auxilliaries and energy consumption are modelled with stoichiometric calculations. The emissions are estimated. Infrastructure is included with a default value.
[This dataset was already contained in the ecoinvent database version 2. It was not individually updated during the transfer to ecoinvent version 3. Life Cycle Impact Assessment results may still have changed, as they are affected by changes in the supply chain, i.e. in other datasets. This dataset was generated following the ecoinvent quality guidelines for version 2. It may have been subject to central changes described in the ecoinvent version 3 change report (http://www.ecoinvent.org/database/ecoinvent-version-3/reports-of-changes/), and the results of the central updates were reviewed extensively. The changes added e.g. consistent water flows and other information throughout the database. The documentation of this dataset can be found in the ecoinvent reports of version 2, which are still available via the ecoinvent website. The change report linked above covers all central changes that were made during the conversion process.]

## Included activities start
From the reception of butane-1,4-diol at the factory gate.

## Included activities end
This activity ends with the production of butyrolacetone and hydrogen via the dehydrogenation of 1 kg of butane-1,4-diol. This dataset includes the input materials, energy uses, infrastructure and emissions.

## Geography
The inventory is modelled for the world..

## Technology
The Reppe process is the most important process to produce butyrolactone. It involves the endothermic dehydrogenation of 1,4-butanediol in the gas phase. This process is used by BASF, ISP, and Lyondell.
Preheated 1,4-butanediol vapor is introduced into a hot stream of circulating hydrogen and passed at atmospheric pressure through a bed of copper catalyst at temperatures between 180 and 240°C. The yield of butyrolactone is approximately 95 %. The reaction takes place via γ-hydroxybutyraldehyde.
The byproduct hydrogen off-gas requires only simple purification before reuse (e.g., catalytic methanization of carbon monoxide impurities). The crude butyrolactone separated from the recycle gas stream contains small amounts of byproducts, including 1,4-butanediol, butyric acid, and high boilers, from which butyrolactone is separated by distillation.

## Time period
Time of publications.

## Parameters
- fraction, cooling water, recirculating system, to air: 0.771 dimensionless; name fraction_CW_R_to_air; lognormal variance with pedigree 0.0413, pedigree (2,3,1,3,1)
  Calculated based on literature value (Scown, C.D., 2011, Water Footprint of U.S. Transportation Fuels and supplying information of the article) (Vionnet, S., Quantis Water Database - Technical Report, 2012).
- fraction, cooling water, cooling pond system, to air: 0.032 dimensionless; name fraction_CW_CP_to_air; lognormal variance with pedigree 0.0413, pedigree (2,3,1,3,1)
  (same comment as for fraction, cooling water, recirculating system, to air)
- fraction, cooling water, to air: 0.3875 dimensionless; name fraction_CW_to_air; = (0.5*fraction_CW_OT_to_air)+(0.5*fraction_CW_R_to_air); lognormal variance with pedigree 0.092025, pedigree (4,4,3,2,4)
  Calculated value based on literature value (see comments of the other parametres present in this dataset) and expert opinion. In the case when no industry/literature data are available about the type of cooling or directly fraction, cooling water, to air specific for the process a default assumption is applied. It is assumed that the once-through cooling system is used in 50% of all cases and recirculating system is used in another 50% of all cases.
- molecular weight, H2: 2.01588 g/mol; name H2_MW
- butan-1,4-diol, molecular weight: 90.121 g/mol; name butandiol_MW
- yield of dehydrogenation of butan-1,4-diol: 0.952 dimensionless; name butyrolactone_yield
- butyrolactone_MW: 86.0892 g/mol
- fraction, cooling water, once-through system, to air: 0.004 dimensionless; name fraction_CW_OT_to_air; lognormal variance with pedigree 0.0413, pedigree (2,3,1,3,1)
  (same comment as for fraction, cooling water, recirculating system, to air)

## Reference product
- butyrolactone: 0 kg; name butyrolactone_amount; CPC 341: Basic organic chemicals; By-product classification allocatable product; CAS 96-48-0
  Butyrolactone is a colorless, slightly hygroscopic liquid having a faint odor. Butyrolactone is miscible in all proportions with water, alcohols, esters, ethers, ketones, and aromatic hydrocarbons. It has limited miscibility with linear and cyclic aliphatic hydrocarbons. It is an excellent solvent for numerous polymers and a selective solvent for lower hydrocarbons.
  Standard-grade butyrolactone is about 99.7 % pure. The main impurities in the Reppe-based process are 1,4-butanediol, butyric acid, and water; in the maleic ester based processes, dimethyl succinate, 4-hydroxybutyl butyl ether, and water. Electronic-grade butyrolactone is about 99.9 % pure and is subject to stringent restrictions regarding the content of specific ions such as Fe ions, Na+, Cl-, NO3-.
  The main use of butyrolactone is as an intermediate in the synthesis of N-methylpyrrolidone (NMP), pyrrolidone, herbicides, growth regulators, and the rubber additive thiodibutyric acid. Butyrolactone is used as a solvent for polymers and as a polymerization catalyst; in hairwave compositions and sun lotions; and in pharmaceuticals. It is also used in printing inks, e.g., for ink-jet printing, as an extractant in the petroleum industry, as a stabilizer for chlorohydrocarbons and phosphorus-based pesticides, and as a nematocide. More recent applications are in the electronics field as a cosolvent for capacitor electrolytes and as a cosolvent for photoresists.
  EcoSpold01Location=GLO
  production volume 7.434e7 kg; name RP_PV_1
    Na
    1999 data for developed economies only. Source: Klaus Weissermel, Hans-Jürgen Arpe (2003): Industrial organic chemistry. Wiley.
  property heating value, net 25.35 MJ
    LHV is calculated based on the elemental composition of the substance. Based on the CAS number of the substance (000096-48-0), the chemical formula of the substance is found to be: C4H6O2, (PubChem 2020).
    Reference: Kim, S., Chen, J., Cheng, T., Gindulyte, A., He, J., He, S., Li, Q., Shoemaker, B. A., Thiessen, P. A., Yu, B., Zaslavsky, L., Zhang, J., & Bolton, E. E. (2019). PubChem 2019 update: improved access to chemical data. Nucleic acids research, 47(D1), D1102–D1109. https://doi.org/10.1093/nar/gky1033
  property price 18 EUR2005
    Temporary price data. Calculated as 90% of purchasers price based on: ecoinvent v2 report 'Bioenergy', chapter 'Biogas', page 188
  property carbon content 0.55814
    carbon content on a dry matter basis (reserved; not for manual entry)
  property true value 18; name butyrolactone_amount_true_value
    allocation property applied in "true value" allocation // value calculated from revenue
  properties: water in wet mass 0 kg, carbon content, non-fossil 0, wet mass 1 kg, carbon content, fossil 0.55814, dry mass 1 kg, water content 0, carbon allocation 0.55814 kg
- hydrogen, liquid: 1 kg; name hydrogen_amount; = butyrolactone_amount/ butyrolactone_MW*2* H2_MW; CPC 34210: Hydrogen, nitrogen, oxygen, carbon dioxide and rare gases; inorganic oxygen compounds of non-metals n.e.c.; By-product classification allocatable product; CAS 1333-74-0
  EcoSpold01Location=GLO
  Stoechiometric calculation
  production volume 3.48152e6 kg; = RP_PV_1/ butyrolactone_MW*2* H2_MW
    Calculated from output of butyrolactone
  property heating value, net 120.21 MJ
    LHV is calculated based on the elemental composition of the substance. Based on the CAS number of the substance (001333-74-0), the chemical formula of the substance is found to be: H2, (PubChem 2020).
    Reference: Kim, S., Chen, J., Cheng, T., Gindulyte, A., He, J., He, S., Li, Q., Shoemaker, B. A., Thiessen, P. A., Yu, B., Zaslavsky, L., Zhang, J., & Bolton, E. E. (2019). PubChem 2019 update: improved access to chemical data. Nucleic acids research, 47(D1), D1102–D1109. https://doi.org/10.1093/nar/gky1033
  property price 2.68 EUR2005
    Calculated value based on data from United Nations Commodity Trade Statistics Database (comtrade.un.org). UN comtrade category: 280410 Hydrogen. Year 2005. Using exchange rate of 1EURO = 1.209 USD. Average of price of import into 5 main markets (EU, US, JP, IN and CN). Cross reference; Literature (http://www.ttcorp.com/pdf/marketReport.pdf). The price of hydrogen, liquid is 5-10 USD/kg.
  property carbon content 0
    carbon content on a dry matter basis (reserved; not for manual entry)
  property true value 0.125511; name hydrogen_amount_true_value
    allocation property applied in "true value" allocation // value calculated from revenue
  properties: wet mass 1 kg, water content 0, carbon content, non-fossil 0, water in wet mass 0 kg, carbon content, fossil 0, dry mass 1 kg, carbon allocation 0 kg

## Inputs from technosphere
- heat, district or industrial, natural gas: 0 MJ; source Gendorf 2000; pedigree (1,1,1,1,1)
  EcoSpold01Location=RER
  Estimation. Data from a chemical plant site in Germany production 2.05 Mt a-1 (intermediates included) of different chemicals.
  3.2 MJ per kg produced. 62% assumed to come from natural gas.
  Uncertainty: Estimation
  properties: heating value, net 1 MJ
- electricity, medium voltage: 0 kWh; source Gendorf 2000; pedigree (1,1,1,1,1)
  Estimation. Data from a chemical plant site in Germany production 2.05 Mt a-1 (intermediates included) of different chemicals.
  3.2 MJ per kg produced. 62% assumed to come from natural gas, rest from electricity
  EcoSpold01Location=UCTE
  Uncertainty: Estimation
- butane-1,4-diol: 0.162587 kg; name butanediol_input; = butyrolactone_amount/ butyrolactone_MW* butandiol_MW/ butyrolactone_yield; source Frischknecht R. 2007; lognormal variance with pedigree 0.076, pedigree (4,5,5,1,1)
  EcoSpold01Location=RER
  Stoichiometric calculation. Calculated with an assumed yield of 95 %
  Uncertainty: Stoechiometric calculation
  properties: carbon content, fossil 0.533333, wet mass 1 kg, dry mass 1 kg, heating value, net 29.6 MJ
- chemical factory, organics: 5.91432e-11 unit; lognormal variance with pedigree 0.448, pedigree (4,5,5,5,5)
  EcoSpold01Location=RER
  Estimation. This module assumes a built area of about 4.2 ha, an average output of 50'000 t/a, and plant life of fifty years.
  Uncertainty: Estimation
- heat, district or industrial, natural gas: 0.00466104, 0.302427 MJ (2 entries); source Gendorf 2000; lognormal variance with pedigree 0.1786, pedigree (4,5,5,5,5)
  (same comment as for heat, district or industrial, natural gas)
- electricity, medium voltage: 0.000659025, 0.000126373, 0.00212153, 0.0308558, 0.00434914, 0.0141702 kWh (6 entries); source Gendorf 2000; lognormal variance with pedigree 0.1786, pedigree (4,5,5,5,5)
  (same comment as for electricity, medium voltage)

## Inputs from nature
- Water, cooling, unspecified natural origin [natural resource, in water]: 0.00371478 m3; name water_cooling_UNO_input; = .024*( butyrolactone_amount+ hydrogen_amount); source Gendorf 2000; lognormal variance with pedigree 0.1786, pedigree (4,5,5,5,5)
  Estimation. Data from a chemical plant site in Germany production 2.05 Mt a-1 (intermediates included) of different chemicals. 24 kg per kg of product.
  Uncertainty: Estimation

## Emissions to nature
- Water [water, unspecified]: 0.0022753 m3; name water_to_water_unspecified; = water_cooling_UNO_input*(1-fraction_CW_to_air); lognormal variance with pedigree 0.0807, pedigree (2,2,5,1,1)
  Calculated value based on literature values and expert opinion. See comments in the parametres' comment field.
  property carbon content, fossil 0; name C_content_fossil
  property water in wet mass 1000 kg; name WWM
  property carbon content, non-fossil 0; name C_content_non_fossil
  property wet mass 1000 kg; name WM
  property dry mass 0 kg; name DM
- 1,4-Butanediol [water, surface water]: 0.000747899 kg; name butanediol_output_water; = ( butanediol_input- butyrolactone_amount/ butyrolactone_MW* butandiol_MW- butanediol_output_air)*.1; lognormal variance with pedigree 0.218, pedigree (4,5,5,5,5)
  Calculation: what has not left the process through fugitive emissions is assumed to leave through waste water. 90% is assumed to be removed by the treatment.
  It is assumed that the manufacturing plants are located in an urban/industrial area and consequently the emissions are categorised as emanating in a high population density area.
  The emissions into water are assumed to be emitted into rivers.
  Uncertainty: Estimation
- Carbon dioxide, fossil [air, unspecified]: 0.00328634 kg; = butanediol_output_water*9/ butandiol_MW*(12+16*2)
  Calculation based on assumptions. What has not left the process is transformed in CO2 by the waste water treatment.
- BOD5, Biological Oxygen Demand [water, surface water]: 0.00140169 kg
  Calculation. Calculated from the amount butanediol in the treated waste water assuming a carbon conversion of 96% for COD. The worst case scenario BOD=COD was used.
  It is assumed that the manufacturing plants are located in an urban/industrial area and consequently the emissions are categorised as emanating in a high population density area.
  Water emissions are assumed to be emitted into rivers
- DOC, Dissolved Organic Carbon [water, surface water]: 0.000399216 kg
  Calculation. Calculated from the amount butanediol in the treated waste water assuming a carbon conversion of 96% for COD. The worst case scenario BOD=COD was used.
  It is assumed that the manufacturing plants are located in an urban/industrial area and consequently the emissions are categorised as emanating in a high population density area.
  Water emissions are assumed to be emitted into rivers.
- TOC, Total Organic Carbon [water, surface water]: 0.000399216 kg
  Calculation. This data was calculated from the amount of butanediol in the treated waste water assuming a carbon conversion of 96% for COD. The worst case scenario TOC=DOC was used.
  It is assumed that the manufacturing plants are located in an urban/industrial area and consequently the emissions are categorised as emanating in a high population density area.
  Water emissions are assumed to be emitted into rivers.
- Water [air, unspecified]: 0.00143948 m3; name water_to_air_unspecified; = (water_cooling_UNO_input*fraction_CW_to_air); lognormal variance with pedigree 0.0807, pedigree (2,2,5,1,1)
  (same comment as for Water)
- 1,4-Butanediol [air, urban air close to ground]: 0.000325173 kg; name butanediol_output_air; = .002* butanediol_input; lognormal variance with pedigree 0.218, pedigree (4,5,5,5,5)
  Estimation. Air emissions occurring from the purge vent, the distillation vent and fugitive emission sources were estimated to 0.2% of the raw material input.
  It is assumed that the manufacturing plants are located in an urban/industrial area and consequently the emissions are categorised as emanating in a high population density area.
  Uncertainty: Estimation
- COD, Chemical Oxygen Demand [water, surface water]: 0.00140169 kg
  Calculation. This data was calculated from the amount of butanediol in the treated waste water assuming a carbon conversion of 96% for COD. The worst case scenario BOD=COD was used.
  It is assumed that the manufacturing plants are located in an urban/industrial area and consequently the emissions are categorised as emanating in a high population density area.
  Water emissions are assumed to be emitted into rivers.

## Sampling procedure
Literature data

## Review by Roland Hischier 2011-09-22
Transfer of documentation done.

## Review by Roland Hischier 2007-09-01
passed.
