# diammonium phosphate production

Dataset: EcoSpold 2, unit process
Geography: RoW
Time period: 2011-01-01 to 2021-12-31
Technology level: current
Classification: ISIC rev.4 ecoinvent: 2012:Manufacture of fertilizers and nitrogen compounds
Synonyms: DAP, Diammonium hydrogen phosphate
Scenario: Business-as-Usual
System model: Allocation, cut-off by classification
Generated by: Anna Kounina
Database: ecoinvent
isCopyrightProtected: true
accessRestrictedTo: 1

## General comment
This dataset is a weighted average from the respective regional datasets.
This dataset represents the production of 1 kg of diammonium phosphate (DAP) with 18% N and 46% P2O5. Diammonium phosphate is a compound fertiliser used to enrich the soil in nitrogen (N) and phosphorous (P), two of the main macronutrients needed to support plant growth.
Diammonium phosphate is produced through the neutralisation of phosphoric acid by gaseous ammonia. The production process has gone through a series of development phases, from atmospheric neutralisation in tanks with agitators, to pressure neutralisation and more recently to pipe reactors in the granulator and/or the dryer. The latter is the most energy efficient and is considered state of the art today. Phosphoric acid and ammonia are used in a granulation unit with a pipe reactor to produce the diammonium phosphate.
Diammonium phosphate has other applications besides its use as fertiliser. DAP can be used as a fire retardant, as a yeast nutrient in winemaking and mead-making, in purifying sugar, and as a flux for soldering tin, copper, zinc and brass.
The main data sources for this dataset are Fertilizers Europe (2000, 2016). Additional data sources are listed as follows.
References:
Fertilizers Europe (2000): Best Available Techniques for Pollution Prevention and Control in the European Fertilizer Industry. Booklet No. 1 of 8: Production of Ammonia. Fertilizers Europe, Brussels.
Kongshaug G. (1998): Energy Consumption and Greenhouse Gas Emissions in Fertilizer Production. IFA 20th July 1998
Davies J., Haglund C. (1999): Life Cycle Inventory of Fertiliser Production. SIK-Report No 654 1999. Chalmers University of Technology, Sweden.
Fertilizers Europe (2016): Carbon Footprint Calculator for Fertilizer Production. Specification. Version 2.1
Fertilizers Europe (2016): Average Emissions Year 2014. Fertilizers Europe Environmental report (internal). Used for updated energy and GHG emission in Carbon Footprint Calculator
Fertilizers Europe (2000): Best Available Techniques for Pollution Prevention and Control in the European Fertilizer Industry. Booklet No. 3 of 8: Production of Sulphuric Acid. Fertilizers Europe, Brussels.
Fertilizers Europe (2000): Best Available Techniques for Pollution Prevention and Control in the European Fertilizer Industry. Booklet No. 4 of 8: Production of Phosphoric Acid. Fertilizers Europe, Brussels.
Althaus H.-J., Chudacoff M., Hischier R., Jungbluth N., Osses M. and Primas A. (2007) Life Cycle Inventories of Chemicals. ecoinvent report No. 8, v2.0. EMPA Dübendorf, Swiss Centre for Life Cycle Inventories, Dübendorf, CH.

## Included activities start
The activity includes all the raw and processed materials necessary to produce this product. Liquid ammonia, phosphoric acid, heat (as natural gas), steam and electricity are included. Direct emissions include ammonia and particulate matter to air and phosphorous to water.

## Included activities end
The activity ends with the final product being ready for transportation at the production site.

## Geography
This dataset is a weighted average built from the following geographies: CN, RNA, RER.

## Technology
Average techlogy from the regional counterparts as given in the geography comment.

## Time period
Primary data were collected on fertiliser production for the year 2011. These data were based on annual average data for the year 2011.

## Reference product
- diammonium phosphate: 1 kg; By-product classification allocatable product; CPC 34642: Diammonium hydrogenorthophosphate (diammonium phosphate); CAS 7783-28-0
  production volume 1.19279e10 kg
    Value in kg/y. International Fertilizers Association (2014).
  property price 0.588815 EUR2005
    Calculated based on inputs: The price of the product has been calculated as a sum of the values of the material and energy inputs for this product. This value is therefore a rough estimation. It may underestimate the real price since there are additional expenses when producing any product. These expences can include for example labour costs, treatment of waste materials and profit for the producer. Please consider carefully whether this level of data quality is acceptable for your application.
  property phosphorus content 0.200754
    Phosphorus content (on a dry matter basis) of diammonium phosphate is calculated from the molecular formula of the nutrient present in the substance.
  property carbon content, fossil 0
    Carbon content, fossil is calculated based on the chemical formula of the substance.
  property nitrogen content 0.18
    Nitrogen content (on a dry matter basis) of diammonium phosphate is calculated from the molecular formula of the nutrient present in the substance.
  property carbon content 0
    carbon content on a dry matter basis (reserved; not for manual entry)
  properties: carbon content, non-fossil 0, wet mass 1 kg, water in wet mass 0 kg, water content 0, dry mass 1 kg, carbon allocation 0 kg

## Inputs from technosphere
- electricity, low voltage: 0 kWh; pedigree (1,1,1,1,1)
  This flow is weighted averages using the exchanges in the corresponding regional data.
- phosphoric acid, fertiliser grade, without water, in 70% solution state: 0.852 kg; lognormal variance with pedigree 0.0466, pedigree (3,4,5,5,1)
  This flow is weighted averages using the exchanges in the corresponding regional data.
  properties: wet mass 1 kg, dry mass 1 kg, phosphorus content 0.235667, oxygen content 0.304333
  note on phosphorus content: Phosphorus content (on a dry matter basis) of phosphoric acid, fertiliser grade, without water, in 70% solution state is calculated from the molecular formula of the substance (H3PO4).
  note on oxygen content: Oxygen content (on a dry matter basis) of phosphoric acid, fertiliser grade, without water, in 70% solution state is calculated from the molecular formula of the substance (H3PO4).
- steam, in chemical industry: 0.0727273 kg; lognormal variance with pedigree 0.0466, pedigree (3,4,5,5,1)
  This flow is weighted averages using the exchanges in the corresponding regional data.
  properties: wet mass 1 kg, dry mass 1 kg
- chemical factory, organics: 5.65612e-10 unit; lognormal variance with pedigree 0.346, pedigree (3,4,5,5,1)
  This flow is weighted averages using the exchanges in the corresponding regional data.
- heat, central or small-scale, natural gas: 0.4 MJ; lognormal variance with pedigree 0.0466, pedigree (3,4,5,5,1)
  This flow is weighted averages using the exchanges in the corresponding regional data.
  properties: heating value, net 1 MJ
- ammonia, anhydrous, liquid: 0 kg; pedigree (1,1,1,1,1)
  This flow is weighted averages using the exchanges in the corresponding regional data.
  properties: wet mass 1 kg, dry mass 1 kg, nitrogen content 0.822453, hydrogen content 0.177547
  note on nitrogen content: Nitrogen content (on a dry matter basis) of ammonia, anhydrous, liquid is calculated from the molecular formula of the substance (H3N).
  note on hydrogen content: Hydrogen content (on a dry matter basis) of ammonia, anhydrous, liquid is calculated from the molecular formula of the substance (H3N).
- electricity, low voltage: 0.00487506, 0.000887656, 0.0142924, 0.0355005 kWh (4 entries); lognormal variance with pedigree 0.0466, pedigree (3,4,5,5,1)
  This flow is weighted averages using the exchanges in the corresponding regional data.
- ammonia, anhydrous, liquid: 0.00536999, 0.00835432, 0.0162174, 0.00169976, 0.00759857, 0.17976 kg (6 entries); lognormal variance with pedigree 0.0466, pedigree (3,4,5,5,1)
  This flow is weighted averages using the exchanges in the corresponding regional data.

## Emissions to nature
- Water [air, unspecified]: 0.000135 m3; lognormal variance with pedigree 0.086, pedigree (3,4,5,5,1)
  This flow is weighted averages using the exchanges in the corresponding regional data.
- Ammonia [air, urban air close to ground]: 0.000216 kg; lognormal variance with pedigree 0.086, pedigree (3,4,5,5,1)
  This flow is weighted averages using the exchanges in the corresponding regional data.
- Particulates, > 2.5 um, and < 10um [air, urban air close to ground]: 0.0005 kg; lognormal variance with pedigree 0.166, pedigree (3,4,5,5,1)
  This flow is weighted averages using the exchanges in the corresponding regional data.
- Phosphorus [water, surface water]: 8e-6 kg; lognormal variance with pedigree 0.086, pedigree (3,4,5,5,1)
  This flow is weighted averages using the exchanges in the corresponding regional data.

## Extrapolations
This dataset was built as a weighted average of regional datasets of the same activityName. Weights are based on production volumes.
CN: production volume = 1.54e+10 kg/year, weight = 0.7373
RNA: production volume = 4.53e+09 kg/year, weight = 0.2162
RER: production volume = 9.73e+08 kg/year, weight = 0.04647
