# capacitor production, for surface-mounting

Dataset: EcoSpold 2, unit process
Geography: GLO
Time period: 1994-01-01 to 2021-12-31
Technology level: current
Classification: EcoSpold01Categories: electronics/component
Classification: ISIC rev.4 ecoinvent: 2610:Manufacture of electronic components and boards
Synonyms: SMD condenser
Scenario: Business-as-Usual
System model: Allocation, cut-off by classification
Generated by: Roland Hischier
Published in: Hischier R. 2007
Database: ecoinvent
isCopyrightProtected: true
accessRestrictedTo: 1

## General comment
This dataset represents the production of 1 kg of SMD type capacitors for the surface mounting technology. It is based on the assumption that a typical SMD type capacitor in electronic modules has an average weight of 0.086 g.The data represent a typical SMD type capacitor for surface mounting, used in the information and communication technology. Material data are taken from datasheets of producers of such capacitors and from the literature. Infrastructure and production efforts are based on own assumptions. The production efforts represent not a specific capacitor type and have thus, accordingly higher uncertainties.

## Included activities start
From reception of metals and plastics at the factory gate.

## Included activities end
This dataset includes raw material input and production efforts for the production of currently used SMD capacitors for surface mounting technology.

## Geography
Data represent a global valuable composition of SMD type capacitors.

## Technology
average production composed of: formulation; build-up process; cutting; bisquing; Pre-Firing; Firing; Tumbling; Termination (SMT) resp. metallization; slitting; winding; metal spray; heat treatment; sawing; lead welding; epoxy filling (THT)

## Reference product
- capacitor, for surface-mounting: 1 kg; source EPCOS 2006; By-product classification allocatable product; CPC 47110: Electrical capacitors
  SMD type capacitors offer maximum capacitance within the smallest space, and hence, can be found in many areas of advanced microelectronics for instance information, entertainment, automotive, and industrial electronics.
  EcoSpold01Location=GLO
  production volume 1 kg
    Dummy value to be replaced by measured, estimated or calculated value
  property carbon content, fossil 0
    Calculated as the addition of C contents in the product composition, and referred to 1 kg capacitors, and then to 1 kg DM
  property carbon content, non-fossil 0
    (same comment as for capacitor, for surface-mounting)
  property price 77.9754 EUR2005
    Calculated based on inputs: The price of the product has been calculated as a sum of the values of the material and energy inputs for this product. This value is therefore a rough estimation. It may underestimate the real price since there are additional expenses when producing any product. These expences can include for example labour costs, treatment of waste materials and profit for the producer. Please consider carefully whether this level of data quality is acceptable for your application.
  property carbon content 0
    carbon content on a dry matter basis (reserved; not for manual entry)
  properties: wet mass 1 kg, dry mass 1 kg, water in wet mass 0 kg, water content 0, carbon allocation 0 kg

## Inputs from technosphere
- titanium dioxide: 0 kg; source Behrendt S 1998; pedigree (1,1,1,1,1)
  Calculated Value. The production of 1 kg of capacitors lead to a waste amount of 0.48 kg unused raw materials. Hence, this dataset here has an input of 1.48 kg of raw materials per kg of capacitor. The split to the different raw materials (metals, plastics, etc.) is based on the reported material specifications.
  Further references
  ZVEI (2006) Umbrella Specs. Download of December 21 from <http://www.zvei.org/index.php?id=1158>.
  Venkel (2006) Material Composition - MLCCs. Download of December 12 from <http://www.venkel.com/FinalPDFs/Matl_composition.pdf>.
  EcoSpold01Location=RER
  Uncertainty: average from literature & company information
  properties: wet mass 1 kg, dry mass 1 kg
- tin: 0.02442 kg; source Behrendt S 1998; lognormal variance with pedigree 0.042, pedigree (1,4,5,1,1)
  (same comment as for titanium dioxide)
  properties: dry mass 1 kg, wet mass 1 kg
- copper, cathode: 0.01406 kg; source Behrendt S 1998; lognormal variance with pedigree 0.042, pedigree (1,4,5,1,1)
  (same comment as for titanium dioxide)
  properties: dry mass 1 kg, wet mass 1 kg
- silver: 0.03922 kg; source Behrendt S 1998; lognormal variance with pedigree 0.042, pedigree (1,4,5,1,1)
  EcoSpold01Location=RER
  Calculated Value. The production of 1 kg of capacitors lead to a waste amount of 0.48 kg unused raw materials. Hence, this dataset here has an input of 1.48 kg of raw materials per kg of capacitor. The split to the different raw materials (metals, plastics, etc.) is based on the reported material specifications.
  Further references
  ZVEI (2006) Umbrella Specs. Download of December 21 from <http://www.zvei.org/index.php?id=1158>.
  Venkel (2006) Material Composition - MLCCs. Download of December 12 from <http://www.venkel.com/FinalPDFs/Matl_composition.pdf>.
  Uncertainty: average from literature & company information
  properties: dry mass 1 kg, wet mass 1 kg
- nickel, class 1: 0.20084 kg; source Behrendt S 1998; lognormal variance with pedigree 0.042, pedigree (1,4,5,1,1)
  EcoSpold01Location=GLO
  Calculated Value. The production of 1 kg of capacitors lead to a waste amount of 0.48 kg unused raw materials. Hence, this dataset here has an input of 1.48 kg of raw materials per kg of capacitor. The split to the different raw materials (metals, plastics, etc.) is based on the reported material specifications.
  Further references
  ZVEI (2006) Umbrella Specs. Download of December 21 from <http://www.zvei.org/index.php?id=1158>.
  Venkel (2006) Material Composition - MLCCs. Download of December 12 from <http://www.venkel.com/FinalPDFs/Matl_composition.pdf>.
  Uncertainty: average from literature & company information
  properties: wet mass 1 kg, dry mass 1 kg
- barite: 0.79062 kg; source Behrendt S 1998; lognormal variance with pedigree 0.042, pedigree (1,4,5,1,1)
  (same comment as for titanium dioxide)
  properties: wet mass 1 kg, dry mass 1 kg
- flat glass, uncoated: 0 kg; source Behrendt S 1998; pedigree (1,1,1,1,1)
  (same comment as for titanium dioxide)
  properties: wet mass 1 kg, dry mass 1 kg
- palladium: 0.001332 kg; source Behrendt S 1998; lognormal variance with pedigree 0.042, pedigree (1,4,5,1,1)
  (same comment as for silver)
  properties: wet mass 1 kg, dry mass 1 kg
- capacitor, auxilliaries and energy use: 1 kg; lognormal variance with pedigree 0.134, pedigree (3,4,5,1,4)
  Estimation - details see this other activity dataset
  EcoSpold01Location=GLO
  Uncertainty: rough estimation
- titanium dioxide: 0.135763, 0.271527 kg (2 entries); source Behrendt S 1998; lognormal variance with pedigree 0.042, pedigree (1,4,5,1,1)
  (same comment as for titanium dioxide)
- flat glass, uncoated: 0.000379091, 0.00184091 kg (2 entries); source Behrendt S 1998; lognormal variance with pedigree 0.042, pedigree (1,4,5,1,1)
  (same comment as for titanium dioxide)

## Sampling procedure
literature

## Extrapolations
This dataset has been extrapolated from year 2007 to the year of the calculation (2021). The uncertainty has been adjusted accordingly.

## Review by Rolf Frischknecht 2007-09-20
passed.
