# bleaching and dyeing, yarn

Dataset: EcoSpold 2, unit process
Geography: IN
Time period: 2016-04-01 to 2021-03-31
Technology level: current
Classification: EcoSpold01Categories: textiles/processing
Classification: ISIC rev.4 ecoinvent: 1313:Finishing of textiles
Scenario: Business-as-Usual
System model: Allocation, cut-off by classification
Generated by: Mireille Faist Emmenegger
Published in: Faist Emmenegger, M. 2018
Database: ecoinvent
isCopyrightProtected: true
accessRestrictedTo: 1

## General comment
This dataset represents the process of dyeing of 1 kg of cotton yarn.
This activity is modelled as a service, so no inputs of yarn are considered. Electricity consumption and chemicals used (hydrogen peroxide, sodium hydroxide, dye chemicals water and electricity) are considered as inputs. The dyeing process consists of following sequence.
1. Pre-treatment- demineralisation of water, scouring and bleaching of fabric, drain, rinse drain, neutralisation with acid, Hot wash with peroxide killer, drain
2. Dyeing- treatment with levelling agent and salt, color dosing, dyeing, colour migration, cooling, level check, soda dosing, dyeing run, sample check, if ok, drain
3. After treatment- rinse, neutralisation, drain, soap wash, drain, rinse, adding finishing chemical, drain
The result of this activity is 1 kg dyed cotton yarn (medium shade).

## Included activities start
The activity starts with loading the greige yarn into the dyeing machine for pre-treatment bleaching. However, this activity is modeled as a service, so no input of greige yarn is considered in the inputs from technosphere.

## Included activities end
The activity end with drying and conditioning of yarn. Activity delivers the service of dyeing 1 kg yarn. It has to be used with 1 kg of yarn.

## Geography
Based on average annual data from Indian manufacturer located Ludhiana (Punjab) in North India.

## Technology
Package dyeing technology is used. The following processes are used to dye cotton yarn: Pre treatment of yarn (Ready for Dyeing), Dyeing, hydro extraction, drying conditionng, and utilities. The process involves immersing yarn in dyebath and the bath circulates around the yarn. Bath is heated by electricity generated steam. This is followed by water extraction, drying and conditioning.

## Reference product
- bleaching and dyeing, yarn: 1 kg; By-product classification allocatable product; CPC 9715: Dyeing and colouring services
  production volume 2.2165e7 kg; name PV_RP; = 44330000/2
    Considering 50% of total yarn produced is dyed: http://texmin.nic.in/sites/default/files/prod_variety_yarn.pdf
  property price 0.723913 EUR2005
    Calculated based on inputs: The price of the product has been calculated as a sum of the values of the material and energy inputs for this product. This value is therefore a rough estimation. It may underestimate the real price since there are additional expenses when producing any product. These expences can include for example labour costs, treatment of waste materials and profit for the producer. Please consider carefully whether this level of data quality is acceptable for your application.

## Inputs from technosphere
- chemical, organic: 0.06 kg; lognormal variance with pedigree 0.0126, pedigree (4,4,3,1,1)
  sum of unspecified chemicals used in dyeing process. These are dye chemicals, stablising agent (cantovel gel), wetting agent (soap), sequencing agent and levelling agent.
  properties: heating value, net 19.03 MJ, carbon content, fossil 0.628, dry mass 1 kg, wet mass 1 kg
  note on carbon content, fossil: This dataset is an unweighted average of 20 organic substances (listed in Tab 88.1, ecoinvent v2.2 report 8, part II), being part of the top100 chemicals included in this database. The C-content has also been calculated as an unweighted average of the C content of the substances composing this dataset.
- tap water: 25 kg; name Water; lognormal variance with pedigree 0.0046, pedigree (1,4,3,1,1)
  For preparing Ready For Dyeing (RFD) solution
  properties: wet mass 1 kg, carbon content, fossil 0.00178991, dry mass 0.000337476 kg, water content 2962.17
  note on carbon content, fossil: Bicarbonate content is 2.93 mol/m3. CO2 content is 0.1 mol/m3 (ecoinvent v2.2 report 8, Tab 93.1).
- acetic acid, without water, in 98% solution state: 0.015 kg; lognormal variance with pedigree 0.0126, pedigree (4,4,3,1,1)
  For preparing Ready For Dyeing (RFD) solution
  properties: heating value, net 14.6 MJ, carbon content, fossil 0.400016, wet mass 1 kg, dry mass 1 kg
  note on heating value, net: Based on literature, page 10, Althaus H.-J., Chudacoff M., Hischier R., Jungbluth N., Osses M. and Primas A. (2007) Life Cycle Inventories of Chemicals. Final report ecoinvent data v2.0 No. 8. EMPA, Swiss Centre for Life Cycle Inventories, Dübendorf, CH, Online-Version under: www.ecoinvent.org.
- sodium hydroxide, without water, in 50% solution state: 0.04 kg; lognormal variance with pedigree 0.0126, pedigree (4,4,3,1,1)
  For preparing Ready For Dyeing (RFD) solution
  properties: heating value, net 3.03 MJ, wet mass 1 kg, dry mass 1 kg
- wastewater from textile production: -0.02 m3; name wastewater; = ((Water/1000)*80/100)*-1; lognormal variance with pedigree 0.0126, pedigree (4,4,3,1,1)
  considering 80% default wastewater generation
  production volume 443300 m3; = PV_RP*wastewater
    Calculated from production volume of reference product using the relative outputs.
  property price 0 EUR2005; name wastewater_price_EUR2005
- sodium chloride, powder: 0.15 kg; lognormal variance with pedigree 0.0126, pedigree (4,4,3,1,1)
  For preparing Ready For Dyeing (RFD) solution
  properties: dry mass 1 kg, wet mass 1 kg
- electricity, low voltage: 2.622 kWh; lognormal variance with pedigree 0.0046, pedigree (1,4,3,1,1)
  sum of electricity used for:
  dyeing machine
  boiler
  hydro extractor
  dryer
  yarn conditioning
- hydrogen peroxide, without water, in 50% solution state: 0.01 kg; lognormal variance with pedigree 0.0126, pedigree (4,4,3,1,1)
  For preparing Ready For Dyeing (RFD) solution
  properties: dry mass 1 kg, heating value, net 7.13 MJ, wet mass 1 kg
- soda ash, light, crystalline, heptahydrate: 0.41 kg; lognormal variance with pedigree 0.0126, pedigree (4,4,3,1,1)
  sum of unspecified chemicals used in dyeing process. These are sodium carbonate, dye chemicals, stablising agent, wetting agent, sequencing agent and levelling agent
  properties: heating value, net 3.43 MJ, carbon content, fossil 0.0517241, dry mass 1 kg, wet mass 1 kg
- diesel, burned in diesel-electric generating set, 18.5kW: 4.641 MJ; = 0.12*0.85*45.5
  Diesel used for power backup. Forumula includes diesel consumption in liters multiplied density of fule and its calorific value
- building, hall: 1.55665e-5 m2; = 8000/(10278500*50); lognormal variance with pedigree 0.3026, pedigree (2,1,3,1,1)
  total building area (square meters) divided by production per year and life time of the plant

## Emissions to nature
- Water [air, urban air close to ground]: 0.005 m3; = (Water/1000)- (wastewater*-1); lognormal variance with pedigree 0.0126, pedigree (4,4,3,1,1)
  Considering 20% evaporation rate

## Sampling procedure
Industry data. Spinning mill in Punjab, North India was chosen to provide data based on its technical representation of the current state of business and its willingness to participate.Industry data has been supplemented with some details from literature.

## Extrapolations
This dataset has been extrapolated from year 2017 to the year of the calculation (2021). The uncertainty has been adjusted accordingly.
