# hard coal mine operation and hard coal preparation

Dataset: EcoSpold 2, unit process
Geography: CN
Time period: 1999-01-01 to 2021-12-31
Technology level: current
Classification: ISIC rev.4 ecoinvent: 0510:Mining of hard coal
Scenario: Business-as-Usual
System model: Allocation, cut-off by classification
Generated by: Florentine Brunner
Database: ecoinvent
isCopyrightProtected: true
accessRestrictedTo: 1

## General comment
This activity describes the mining and preparation of hard coal in China. The activity comprises blasting during site development, mine infrastructure, additional requirements of steel and wood and electricity supply from both an on-site coal power plant, which is fueled with the unprepared raw coal, and from the grid. Emissions comprise both, emissions resulting directly from mine operation and coal preparation as well as emissions from uncontrolled coal fires in China. Please see in the comment of each emission exchange where it stems from. Emissions related to the mine operation and coal preparation were taken over from a previous version of this dataset for which detailed documentation can be found in Dones et al. (2007). Emissions related to uncontrolled coal fires were modeled according to the best available information in 2017.
Uncontrolled coal fires occur when coal deposits in untapped coal beds, in active or abandoned underground coal mines or in waste dumps of open pit mines ignite. This can happen spontaneously, for example when coal is exposed to oxygen and hot sunlight. Coal fires already occurred in prehistoric times, ignited for example by volcanoes. Today completely spontaneous fires without human involvement are less common (Künzer & Stracher, 2011). Song and Künzer (2014) estimate that Chinese coal fires accounted for 40% of GHG emissions from coal fires in 2002. At that time China also mined about 40% of global hard coal. In absolute terms, van Dijk (2011) estimates that a maximum of 20 million tonnes of coal is burnt in uncontrolled fires in China per year. Song and Künzer (2014) point out that given the investment in firefighting efforts over the past years this number may meanwhile be significantly lower. However, no more recent quantitative estimate is available to confirm that. For other geographies we carefully evaluated the available data and found them insufficient to make reliable estimates. For this reason, China continues to be the only geography in ecoinvent which accounts for the impacts of coal fires in the hard coal mining activity. While this is consistent with previous versions of the database, it is an important improvement in data accuracy. The estimate of 0.33kg CO2/kg of hard coal mined made by Dones et al. (2007) for ecoinvent version 2 relied on meanwhile disproved research which largely overestimated the significance of coal fires. We calculate the current emissions from coal fires based on the conservative estimate of 20Mt lost to such fires each year. This means we relate the current annual rate of burnt coal seams to the current coal production volumes in China and neglect the fact that past mining activities are responsible for the coal burning today, while today’s mining activities will be responsible for emissions occurring in the near to distant future. The combustion is modelled as open burning of the average Chinese coal composition according to USGS’s World Coal Quality Inventory (USGS, 2010). This means, we assume complete combustion conditions, while a major share of coal actually combusts under a lack of oxygen. Given the current state of knowledge on coal fires we consider this the best available approximation. We are eager to improve it as better data become available in the future. The amount of coal corresponding to the assumed losses of 20Mt/yr has been added to the coal resources consumption.
Methane emissions comprise those resulting from coal fires as well as fugitive methane emissions related to coal mining activities. (See exchange comment "methane, fossil" for more details.)
Further modeling choices and assumptions include:
• In order to enable a consistent calculation of the cumulative energy demand, the extracted mass of raw coal was adjusted by a factor of 1.03, taking into account the difference in the upper heating value of raw coal of this region (19.7 MJ/kg), compared to the used worldwide average of 19.1 MJ/kg.
• Mine reclamation is not included in this module, because it mostly concerns the tailings, which are described in a separate module.
• Electricity, heating from heavy oil industrial boilers, and diesel uses are included. The use of the module "heat, at hard coal industrial furnace 1-10MW" leads to an underestimation of emissions, because the quality of coal burned at mines is usually lower than coal burned in industrial boilers elsewhere.
• Water uses in mining and coal washing have been approximately described using the module "tap water".
• Radon emissions are recalculated from average value worldwide using the ratio of U content 36/20 from UNSCEAR 1993.
• Mining and preparation related emissions to water are estimated for Western European conditions and applied to this region. They are assumed to be released to rivers. Possible emissions to groundwater have not been accounted for.
• All coalbed methane released from the seam is accounted for as natural gas resource and assumed to be entirely emitted to air. The methane recovered in some major mines, possibly used for own energetic needs and/or district heating, has not been described as an energy byproduct. The unaccounted energy is most likely negligible compared to the energy content of the product coal.
Reference(s):
Dones, R., Bauer, C., Röder, A. (2007) Kohle. In: Dones, R. (Ed.) et al., Sachbilanzen
von Energiesystemen: Grundlagen für den ökologischen Vergleich von
Energiesystemen und den Einbezug von Energiesystemen in Ökobilanzen für die
Schweiz. Final report ecoinvent No. 6-VI, Paul Scherrer Institut Villigen, Swiss Centre
for Life Cycle Inventories, Dübendorf, CH
Song, Z., Künzer, C., 2014, Coal fires in China over the last decade: A comprehensive review, International Journal of Coal Geology, Volume 133, 1 November 2014, Pages 72-99, https://www.sciencedirect.com/science/article/pii/S0166516214001906
Kuenzer, C., Stracher, G., 2011. Geomorphology of coal seam fires. Geomorphology 209–222, http://dx.doi.org/10.1016/j.geomorph.2011.09.004.
USGS, 2010, World Coal Quality Inventory, Chemical Data for China retrieved from Chttps://eerscmap.usgs.gov/wocqi/resources/countries/China_WOCQI_chemical_data.xlsx, 1.March 2018

## Included activities start
This activity starts with the extraction of raw coal from ground. It includes the electricity, heat, and diesel requirements, pumped groundwater, explosives and solid wastes related to coal mining and preparation activities in China. Emissions to air, water and soil, compromise the emissions directly from mining activities as well as emissions from uncontrolled coal fires.

## Included activities end
This activity ends with the preparation of the mined coal to the quality demanded by the consumers. Not included is recovered methane. Specific processes for this CN dataset are: electricity supply from local coal power plant and grid (CN); blasting, steel, and wood requirements.

## Geography
Some data taken over from previous versions of this dataset are region specific (Shanxi Province and county-wide).

## Technology
Most data related to the mining and preparation activities relies on literature from the 1990ies.

## Parameters
- fraction, tap water, to air: 0.15 dimensionless; name fraction_TW_to_air; = fraction_PW_to_air; lognormal variance with pedigree 0.25, pedigree (5,5,5,5,5)
  Calculated value. See comment in the other parametres present in this dataset. Tap water is considered to be always used as process water, thus process water fractions to air are applied to all tap water input flows to calculate the amount of water consumed in the processes.
- fraction, process water, to air: 0.15 dimensionless; name fraction_PW_to_air; lognormal variance with pedigree 0.25, pedigree (5,5,5,5,5)
  Literature value. In case when no industry/process specific data are available, default evaporation fraction value is used. This value is 15% and is based on literature (Statistics Canada, 2007 & Shaffer, K.H., 2008, Consumptive water use in the Great Lakes Basin, USGS & Shiklomanov, 2003, World Water Resources at the Beginning of the 21st Century) and has been approved by an expert.

## Reference product
- hard coal: 1 kg; CPC 11010: Hard coal; By-product classification allocatable product
  0
  production volume 3.36e12 kg; name APV
    Production Volume in 2016, according to VDKi (2017), crossreferenced with statistics from the World Coal Association, the United Nations and BP. Reference(s): Verein der Kohleimporteure (VDKi). 2017. Jahresbericht 2017. Accessed online at: http://www.kohlenimporteure.de/publikationen/jahresbericht-2017.html, 28.11.2016
  property heating value, net 27.91 MJ
    Based on the Characterization factor of Hard coal in the CED method
  property price 0.036 EUR2005
    Steam coal import costs in EU in IEA key world energy statistics 2003-2004.
  property carbon content, fossil 0.845
    C content 75-94% (specified in Tab 1.1, report 6, part VI). A mean content of 0.845 kg C/ kg dry hard coal was considered
  property carbon content 0.845
    carbon content on a dry matter basis (reserved; not for manual entry)
  properties: wet mass 1 kg, dry mass 0.94 kg, carbon content, non-fossil 0, water content 0.0638298, water in wet mass 0.06 kg, carbon allocation 0.7943 kg

## Inputs from technosphere
- reinforcing steel: 0.0011 kg; lognormal variance with pedigree 0.2106, pedigree (5,5,5,5,5)
  Own assumption according to Dones et al. (2007).
  properties: wet mass 1 kg, dry mass 1 kg, carbon content, fossil 0.004
- blasting: 6e-5 kg; lognormal variance with pedigree 0.51, pedigree (5,5,5,5,5)
  Own assumption according to Dones et al. (2007).
- heat, district or industrial, other than natural gas: 0.107 MJ; lognormal variance with pedigree 0.2106, pedigree (5,5,5,5,5)
  Own assumption according to Dones et al. (2007).
  properties: heating value, net 1 MJ
- spoil from hard coal mining: -1.6396 kg; lognormal variance with pedigree 0.22, pedigree (5,5,5,5,5)
  Emissions from mining and preparation activities: Own assumption according to Dones et al. (2007).
  production volume 5.50906e12 kg
    Calculated from the production volume of hard coal in proportion to the respective output amounts.
  properties: dry mass 1 kg, wet mass 1 kg, carbon content, fossil 0.007879
- electricity, high voltage, for internal use in coal mining: 0.0242 kWh; lognormal variance with pedigree 0.2106, pedigree (5,5,5,5,5)
  Own assumption according to Dones et al. (2007).
- mine infrastructure, underground, hard coal: 3.33e-11 unit; lognormal variance with pedigree 0.51, pedigree (5,5,5,5,5)
  Own assumption according to Dones et al. (2007).
- electricity, high voltage: 0.0183 kWh; lognormal variance with pedigree 0.2106, pedigree (5,5,5,5,5)
  Own assumption according to Dones et al. (2007).
- tap water: 0.442 kg; name tap_water_input; lognormal variance with pedigree 0.2106, pedigree (5,5,5,5,5)
  Own assumption according to Dones et al. (2007).
  properties: carbon content, fossil 0.00178991, water content 2962.17, wet mass 1 kg, dry mass 0.000337476 kg
  note on carbon content, fossil: Bicarbonate content is 2.93 mol/m3. CO2 content is 0.1 mol/m3 (ecoinvent v2.2 report 8, Tab 93.1).
- coal slurry: -0.155 kg; lognormal variance with pedigree 0.44, pedigree (5,5,5,5,5)
  (same comment as for spoil from hard coal mining)
  production volume 5.208e11 kg
    (same comment as for spoil from hard coal mining)
  properties: carbon content, fossil 0.124, wet mass 1 kg, dry mass 1 kg
- sawlog and veneer log, hardwood, measured as solid wood under bark: 2.18e-6 m3; lognormal variance with pedigree 0.2106, pedigree (5,5,5,5,5)
  Own assumption according to Dones et al. (2007).
  properties: water content 0.7, heating value, net 6071.3 MJ, carbon content, non-fossil 0.494, dry mass 650 kg, wet mass 1105 kg
- diesel, burned in building machine: 0.0242 MJ; lognormal variance with pedigree 0.2106, pedigree (5,5,5,5,5)
  Own assumption according to Dones et al. (2007).
  properties: heating value, net 1 MJ

## Inputs from nature
- Oxygen [natural resource, in air]: 0.0107714 kg; lognormal variance with pedigree 0.2106, pedigree (5,5,5,5,5)
  Oxygen demand by uncontrolled fires.
- Transformation, to dump site [natural resource, land]: 0.00015 m2; lognormal variance with pedigree 0.33, pedigree (5,5,5,5,5)
  large spread in data. Dones et al. (2007).
- Water, well, in ground [natural resource, in water]: 0.00263 m3; name water_well_in_ground_input; lognormal variance with pedigree 0.2106, pedigree (5,5,5,5,5)
  Own assumption according to Dones et al. (2007).
- Gas, mine, off-gas, process, coal mining [natural resource, in ground]: 0.0127 m3; lognormal variance with pedigree 0.216, pedigree (5,5,5,5,5)
  Own assumption according to Dones et al. (2007).
- Occupation, mineral extraction site [natural resource, land]: 0.0013 m2*year; lognormal variance with pedigree 0.25, pedigree (5,5,5,5,5)
  Own assumption according to Dones et al. (2007).
- Transformation, to mineral extraction site [natural resource, land]: 1.1e-5 m2; lognormal variance with pedigree 0.33, pedigree (5,5,5,5,5)
  large spread in data. Dones et al. (2007).
- Coal, hard, unspecified, in ground [natural resource, in ground]: 1.11195 kg; = 1.106+20E+9/APV; lognormal variance with pedigree 0.216, pedigree (5,5,5,5,5)
  1.106 kg of coal resources are assumed to be extracted per kg of prepared hard coal, added are losses of 20Mt of coal burnt in uncontrolled fires per year
- Transformation, from unspecified [natural resource, land]: 0.000161 m2; lognormal variance with pedigree 0.33, pedigree (5,5,5,5,5)
  large spread in data. Dones et al. (2007).
- Occupation, dump site [natural resource, land]: 0.018 m2*year; lognormal variance with pedigree 0.25, pedigree (5,5,5,5,5)
  large spread in data. Dones et al. (2007).

## Emissions to nature
- Barium [soil, unspecified]: 8.46012e-7 kg; lognormal variance with pedigree 0.25, pedigree (5,5,5,5,5)
  Emissions from uncontrolled coal fires: These emissions were modeled under the assumption of 20Mt hard coal burnt under full combustion conditions (open burning) in coal seam fires per year using an averaged composition of Chinese coals reported by USGS’s World Coal Quality Inventory (USGS, 2010), average carbon content of 0.635.
- Iron, ion [water, ground-]: 2e-6 kg; lognormal variance with pedigree 1.09, pedigree (5,5,5,5,5)
  (same comment as for spoil from hard coal mining)
- Strontium [soil, unspecified]: 1.13786e-6 kg; lognormal variance with pedigree 0.25, pedigree (5,5,5,5,5)
  (same comment as for Barium)
- Sulfur dioxide [air, non-urban air or from high stacks]: 3.10714e-5 kg; lognormal variance with pedigree 0.86, pedigree (5,5,5,5,5)
  (same comment as for Barium)
- Phosphorus [soil, unspecified]: 1.47923e-6 kg; lognormal variance with pedigree 0.25, pedigree (5,5,5,5,5)
  (same comment as for Barium)
- Particulates, > 2.5 um, and < 10um [air, non-urban air or from high stacks]: 1.54994e-6 kg; lognormal variance with pedigree 0.33, pedigree (5,5,5,5,5)
  (same comment as for Barium)
- Radon-222 [air, non-urban air or from high stacks]: 0.0216 kBq; lognormal variance with pedigree 0.86, pedigree (5,5,5,5,5)
  Emissions from mining and preparation activities: Own assumption according to Dones et al. (2007): "emission 1.8 times the average for other coals in ecoinvent, along UNSCEAR 1993".
- PAH, polycyclic aromatic hydrocarbons [air, non-urban air or from high stacks]: 2.0494e-6 kg; lognormal variance with pedigree 0.51, pedigree (5,5,5,5,5)
  (same comment as for Barium)
- Chloride [water, ground-]: 0.0162 kg; lognormal variance with pedigree 0.44, pedigree (5,5,5,5,5)
  (same comment as for spoil from hard coal mining)
- Benzene, ethyl- [air, non-urban air or from high stacks]: 1.94917e-6 kg; lognormal variance with pedigree 0.51, pedigree (5,5,5,5,5)
  (same comment as for Barium)
- Carbon dioxide, fossil [air, non-urban air or from high stacks]: 0.0133357 kg; lognormal variance with pedigree 0.86, pedigree (5,5,5,5,5)
  Emissions from uncontrolled coal fires: These emissions were modeled under the assumption of 20Mt hard coal burnt under full combustion conditions (open burning) in coal seam fires per year using an averaged composition of Chinese coals reported by USGS’s World Coal Quality Inventory (USGS, 2010), average carbon content of 0.635. Mind that actual combustion conditions are likely to result in incomplete combustion, which would cause lower CO2 emissions than assumed here, while CO and CH4 emissions would likely be higher.
- Water [air, non-urban air or from high stacks]: 1.95565e-6 m3; lognormal variance with pedigree 0.25, pedigree (5,5,5,5,5)
  (same comment as for Barium)
- Manganese [air, non-urban air or from high stacks]: 4.00411e-9 kg; lognormal variance with pedigree 0.86, pedigree (5,5,5,5,5)
  (same comment as for Barium)
- Hydrogen chloride [air, non-urban air or from high stacks]: 2.25887e-6 kg; lognormal variance with pedigree 0.25, pedigree (5,5,5,5,5)
  (same comment as for Barium)
- Cobalt [air, non-urban air or from high stacks]: 1.78762e-9 kg; lognormal variance with pedigree 0.86, pedigree (5,5,5,5,5)
  (same comment as for Barium)
- Acetaldehyde [air, non-urban air or from high stacks]: 2.55e-6 kg; lognormal variance with pedigree 0.51, pedigree (5,5,5,5,5)
  (same comment as for Barium)
- Beryllium [soil, unspecified]: 1.10702e-8 kg; lognormal variance with pedigree 0.25, pedigree (5,5,5,5,5)
  (same comment as for Barium)
- Particulates, < 2.5 um [air, non-urban air or from high stacks]: 2.87845e-6 kg; lognormal variance with pedigree 0.51, pedigree (5,5,5,5,5)
  (same comment as for Barium)
- Molybdenum [soil, unspecified]: 1.26125e-8 kg; lognormal variance with pedigree 0.86, pedigree (5,5,5,5,5)
  (same comment as for Barium)
- Toluene [air, non-urban air or from high stacks]: 2.21429e-6 kg; lognormal variance with pedigree 0.51, pedigree (5,5,5,5,5)
  (same comment as for Barium)
- Silver [soil, unspecified]: 4.49208e-9 kg; lognormal variance with pedigree 0.86, pedigree (5,5,5,5,5)
  (same comment as for Barium)
- Styrene [air, non-urban air or from high stacks]: 3.13988e-6 kg; lognormal variance with pedigree 0.25, pedigree (5,5,5,5,5)
  (same comment as for Barium)
- Selenium [air, non-urban air or from high stacks]: 2.4825e-9 kg; lognormal variance with pedigree 0.86, pedigree (5,5,5,5,5)
  (same comment as for Barium)
- Sodium [soil, unspecified]: 4.67018e-6 kg; lognormal variance with pedigree 0.25, pedigree (5,5,5,5,5)
  (same comment as for Barium)
- Phosphorus [air, non-urban air or from high stacks]: 1.02333e-8 kg; lognormal variance with pedigree 0.25, pedigree (5,5,5,5,5)
  (same comment as for Barium)
- Formaldehyde [air, non-urban air or from high stacks]: 2.64077e-6 kg; lognormal variance with pedigree 0.51, pedigree (5,5,5,5,5)
  (same comment as for Barium)
- Tin [soil, unspecified]: 2.19155e-8 kg; lognormal variance with pedigree 0.86, pedigree (5,5,5,5,5)
  (same comment as for Barium)
- Antimony [air, non-urban air or from high stacks]: 1.84119e-14 kg; lognormal variance with pedigree 0.86, pedigree (5,5,5,5,5)
  (same comment as for Barium)
- Carbon [soil, unspecified]: 1.89613e-5 kg; lognormal variance with pedigree 0.25, pedigree (5,5,5,5,5)
  (same comment as for Barium)
- Vanadium [air, non-urban air or from high stacks]: 1.99756e-8 kg; lognormal variance with pedigree 0.86, pedigree (5,5,5,5,5)
  (same comment as for Barium)
- Benzene [air, non-urban air or from high stacks]: 5.83185e-6 kg; lognormal variance with pedigree 0.51, pedigree (5,5,5,5,5)
  (same comment as for Barium)
- Antimony [soil, unspecified]: 7.66131e-9 kg; lognormal variance with pedigree 0.86, pedigree (5,5,5,5,5)
  (same comment as for Barium)
- Dioxins, measured as 2,3,7,8-tetrachlorodibenzo-p-dioxin [soil, unspecified]: 1.00399e-14 kg; lognormal variance with pedigree 0.86, pedigree (5,5,5,5,5)
  (same comment as for Barium)
- Magnesium [soil, unspecified]: 8.77381e-6 kg; lognormal variance with pedigree 0.25, pedigree (5,5,5,5,5)
  (same comment as for Barium)
- Selenium [soil, unspecified]: 2.61613e-8 kg; lognormal variance with pedigree 0.25, pedigree (5,5,5,5,5)
  (same comment as for Barium)
- Dioxins, measured as 2,3,7,8-tetrachlorodibenzo-p-dioxin [air, non-urban air or from high stacks]: 3.61423e-14 kg; lognormal variance with pedigree 0.86, pedigree (5,5,5,5,5)
  (same comment as for Barium)
- Titanium [soil, unspecified]: 1.04381e-5 kg; lognormal variance with pedigree 0.25, pedigree (5,5,5,5,5)
  (same comment as for Barium)
- Magnesium [air, non-urban air or from high stacks]: 2.63637e-8 kg; lognormal variance with pedigree 0.25, pedigree (5,5,5,5,5)
  (same comment as for Barium)
- Thallium [air, non-urban air or from high stacks]: 3.84107e-12 kg; lognormal variance with pedigree 0.86, pedigree (5,5,5,5,5)
  (same comment as for Barium)
- Calcium [soil, unspecified]: 3.39405e-5 kg; lognormal variance with pedigree 0.25, pedigree (5,5,5,5,5)
  (same comment as for Barium)
- Arsenic [soil, unspecified]: 2.56107e-8 kg; lognormal variance with pedigree 0.86, pedigree (5,5,5,5,5)
  (same comment as for Barium)
- Tin [air, non-urban air or from high stacks]: 4.29464e-14 kg; lognormal variance with pedigree 0.86, pedigree (5,5,5,5,5)
  (same comment as for Barium)
- Potassium [soil, unspecified]: 1.38643e-5 kg; lognormal variance with pedigree 0.25, pedigree (5,5,5,5,5)
  (same comment as for Barium)
- Barium [air, non-urban air or from high stacks]: 3.63685e-8 kg; lognormal variance with pedigree 0.25, pedigree (5,5,5,5,5)
  (same comment as for Barium)
- Cadmium [air, non-urban air or from high stacks]: 4.97185e-12 kg; lognormal variance with pedigree 0.86, pedigree (5,5,5,5,5)
  (same comment as for Barium)
- Iron [soil, unspecified]: 5.83238e-5 kg; lognormal variance with pedigree 0.25, pedigree (5,5,5,5,5)
  (same comment as for Barium)
- Cobalt [soil, unspecified]: 4.25339e-8 kg; lognormal variance with pedigree 0.86, pedigree (5,5,5,5,5)
  (same comment as for Barium)
- Scandium [air, non-urban air or from high stacks]: 3.11875e-11 kg; lognormal variance with pedigree 0.86, pedigree (5,5,5,5,5)
  (same comment as for Barium)
- Sulfur [soil, unspecified]: 6.17857e-5 kg; lognormal variance with pedigree 0.25, pedigree (5,5,5,5,5)
  (same comment as for Barium)
- Scandium [soil, unspecified]: 3.11565e-8 kg; lognormal variance with pedigree 0.25, pedigree (5,5,5,5,5)
  (same comment as for Barium)
- Beryllium [air, non-urban air or from high stacks]: 2.09631e-11 kg; lognormal variance with pedigree 0.25, pedigree (5,5,5,5,5)
  (same comment as for Barium)
- Fluoride [water, ground-]: 3e-6 kg; lognormal variance with pedigree 0.44, pedigree (5,5,5,5,5)
  (same comment as for spoil from hard coal mining)
- Nickel [soil, unspecified]: 7.55893e-8 kg; lognormal variance with pedigree 0.86, pedigree (5,5,5,5,5)
  (same comment as for Barium)
- Silver [air, non-urban air or from high stacks]: 2.31726e-11 kg; lognormal variance with pedigree 0.86, pedigree (5,5,5,5,5)
  (same comment as for Barium)
- Aluminium [soil, unspecified]: 0.00018581 kg; lognormal variance with pedigree 0.25, pedigree (5,5,5,5,5)
  (same comment as for Barium)
- Lead [soil, unspecified]: 8.03274e-8 kg; lognormal variance with pedigree 0.86, pedigree (5,5,5,5,5)
  (same comment as for Barium)
- Molybdenum [air, non-urban air or from high stacks]: 6.32738e-11 kg; lognormal variance with pedigree 0.86, pedigree (5,5,5,5,5)
  (same comment as for Barium)
- Nitrogen oxides [air, non-urban air or from high stacks]: 7.66845e-5 kg; lognormal variance with pedigree 0.25, pedigree (5,5,5,5,5)
  (same comment as for Barium)
- Sodium [air, non-urban air or from high stacks]: 1.17935e-7 kg; lognormal variance with pedigree 0.25, pedigree (5,5,5,5,5)
  (same comment as for Barium)
- Boron [air, non-urban air or from high stacks]: 1.12327e-10 kg; lognormal variance with pedigree 0.86, pedigree (5,5,5,5,5)
  (same comment as for Barium)
- Carbon monoxide, fossil [air, non-urban air or from high stacks]: 0.000229762 kg; lognormal variance with pedigree 0.86, pedigree (5,5,5,5,5)
  (same comment as for Carbon dioxide, fossil)
- Phenol [air, non-urban air or from high stacks]: 8.80893e-8 kg; lognormal variance with pedigree 0.25, pedigree (5,5,5,5,5)
  (same comment as for Barium)
- Copper [air, non-urban air or from high stacks]: 1.32702e-10 kg; lognormal variance with pedigree 0.86, pedigree (5,5,5,5,5)
  (same comment as for Barium)
- Silicon [soil, unspecified]: 0.000291827 kg; lognormal variance with pedigree 0.25, pedigree (5,5,5,5,5)
  (same comment as for Barium)
- Copper [soil, unspecified]: 1.20607e-7 kg; lognormal variance with pedigree 0.86, pedigree (5,5,5,5,5)
  (same comment as for Barium)
- Arsenic [air, non-urban air or from high stacks]: 2.20149e-10 kg; lognormal variance with pedigree 0.86, pedigree (5,5,5,5,5)
  (same comment as for Barium)
- Water [air, unspecified]: 0.0026112 m3; name water_to_air_unspecified; = (tap_water_input/1000)*(1-fraction_TW_to_air)+water_well_in_ground_input*(1-fraction_PW_to_air); lognormal variance with pedigree 0.25, pedigree (5,5,5,5,5)
  Calculated value based on literature values and expert opinion. See comments in the parametres' comment field.
- Titanium [air, non-urban air or from high stacks]: 1.11869e-7 kg; lognormal variance with pedigree 0.25, pedigree (5,5,5,5,5)
  (same comment as for Barium)
- Chromium [air, non-urban air or from high stacks]: 1.8525e-10 kg; lognormal variance with pedigree 0.86, pedigree (5,5,5,5,5)
  (same comment as for Barium)
- Strontium [water, ground-]: 5e-6 kg; lognormal variance with pedigree 0.44, pedigree (5,5,5,5,5)
  (same comment as for spoil from hard coal mining)
- Iron [air, non-urban air or from high stacks]: 1.05869e-7 kg; lognormal variance with pedigree 0.25, pedigree (5,5,5,5,5)
  (same comment as for Barium)
- Nickel [air, non-urban air or from high stacks]: 1.08e-10 kg; lognormal variance with pedigree 0.86, pedigree (5,5,5,5,5)
  (same comment as for Barium)
- Dissolved solids [water, ground-]: 1.5e-5 kg; lognormal variance with pedigree 0.67, pedigree (5,5,5,5,5)
  (same comment as for spoil from hard coal mining)
- Potassium [air, non-urban air or from high stacks]: 2.08577e-7 kg; lognormal variance with pedigree 0.25, pedigree (5,5,5,5,5)
  (same comment as for Barium)
- Mercury [soil, unspecified]: 4.00512e-10 kg; lognormal variance with pedigree 0.86, pedigree (5,5,5,5,5)
  (same comment as for Barium)
- Water [water, unspecified]: 0.0004608 m3; name water_to_water_unspecified; = (tap_water_input/1000*fraction_TW_to_air)+(water_well_in_ground_input*fraction_PW_to_air); lognormal variance with pedigree 0.25, pedigree (5,5,5,5,5)
  (same comment as for Water)
- Aluminium [air, non-urban air or from high stacks]: 1.53286e-7 kg; lognormal variance with pedigree 0.25, pedigree (5,5,5,5,5)
  (same comment as for Barium)
- Polychlorinated biphenyls [air, non-urban air or from high stacks]: 6.66012e-10 kg; lognormal variance with pedigree 0.25, pedigree (5,5,5,5,5)
  (same comment as for Barium)
- Manganese [water, ground-]: 1e-6 kg; lognormal variance with pedigree 0.44, pedigree (5,5,5,5,5)
  (same comment as for spoil from hard coal mining)
- Calcium [air, non-urban air or from high stacks]: 8.20714e-7 kg; lognormal variance with pedigree 0.25, pedigree (5,5,5,5,5)
  (same comment as for Barium)
- Cadmium [soil, unspecified]: 8.7381e-10 kg; lognormal variance with pedigree 0.86, pedigree (5,5,5,5,5)
  (same comment as for Barium)
- Ammonium, ion [water, ground-]: 1e-6 kg; lognormal variance with pedigree 1.09, pedigree (5,5,5,5,5)
  (same comment as for spoil from hard coal mining)
- Chromium [soil, unspecified]: 1.24048e-7 kg; lognormal variance with pedigree 0.25, pedigree (5,5,5,5,5)
  (same comment as for Barium)
- Strontium [air, non-urban air or from high stacks]: 1.13899e-9 kg; lognormal variance with pedigree 0.25, pedigree (5,5,5,5,5)
  (same comment as for Barium)
- Methane, fossil [air, non-urban air or from high stacks]: 0.0131271 kg; = 0.0000351190476190476+0.013092; lognormal variance with pedigree 0.186, pedigree (4,5,5,5,3)
  Methane emissions are a sum of emissions from uncontrolled coal fires and fugitive emissions from mining, processing, storage and transportation of coal.
  CH4 emissions from uncontrolled fires:
  These emissions were modeled under the assumption of 20Mt hard coal burnt under full combustion conditions (open burning) in coal seam fires per year using an averaged composition of Chinese coals reported by USGS’s World Coal Quality Inventory (USGS, 2010) (average carbon content of 0.635). Mind that actual combustion conditions for coal burning in uncontrolled fires are likely to result in incomplete combustion, which would cause lower CO2 emissions than assumed here, while CO and CH4 emissions would likely be higher. (For more details see “general comment”-field of this dataset.)
  Fugitive CH4 emissions:
  These emissions are calculated based on the average emission factors for mine operation and post-mining activities of underground and surface coal mines suggested by the 2006 IPCC Guidelines for National Greenhouse Gas Inventories (Chapter 4.1 Fugitive emissions from mining, processing, storage and transportation of coal, p. 4.11 ff., accessible at <https://www.ipcc-nggip.iges.or.jp/public/2006gl/pdf/2_Volume2/V2_4_Ch4_Fugitive_Emissions.pdf>, July 2018).
  Average CH4 emission factors according to IPCC 2006 are:
  underground coal production = 18m3/tonne = 12.06 kg/tonne
  post-mining emissions, underground mines = 2.5m3/tonne = 1.675 kg/tonne
  surface coal production = 1.2m3/tonne = 0.804 kg/tonne
  post mining emissions, surface mines = 0.1m3/tonne =0.067 kg/tonne
  Ch4 density at 20 degrees Celsius and 1 bar is 0.67kg/m3.
  The applied share of coal from underground and surface mines in China is 95 % and 5 %, respectively (Bian et al., 2010).
  Under this approach the calculated CH4 emissions in China amount to 0.013 kg CH4/kg coal. Uncertainty of this value is high. Nonetheless, this approach was considered preferable by industry experts over the estimated fugitive CH4 emissions from soild fuels in China in2012, published in the UNFCCC database for “Greenhouse Gas Inventory Data - Detailed data by Party” (This source reports a total of 23847000 tonnes fugitive CH4 emissions from solid fuels in 2012. This would result in specific fugitive methane emission of 0.0065kg CH4/kg coal considering 2012 production volume (VDKi, 2017)). The reasons for this choice is mostly that no documentation is available for the UNFCCC 2012 value, which does not allow to evaluate underlying assumptions and uncertainties.
  Reference(s):
  Zhengfu BIAN, Hilary I INYANG, John L DANIELS, Frank OTTO, Sue STRUTHERS, 2010, Environmental issues from coal mining and their solutions, Mining Science and Technology (China), Volume 20, Issue 2, Pages 215-223, ISSN 1674-5264, <https://doi.org/10.1016/S1674-5264(09)60187-3>.
  IPCC, 2006, IPCC Guidelines for National Greenhouse Gas Inventories, Chapter 4.1 Fugitive emissions from mining, processing, storage and transportation of coal, p. 4.11 ff., accessible at <https://www.ipcc-nggip.iges.or.jp/public/2006gl/pdf/2_Volume2/V2_4_Ch4_Fugitive_Emissions.pdf>, July 2018
  UNFCCC, 2018, Greenhouse Gas Inventory Data - Detailed data by Party, data retrieved online from <http://di.unfccc.int/detailed_data_by_party> on 19.07.2018, Party: China, Inventory: All years, Category: 1.B Fugitive Emissions from Fuels, Gas: CH4, 1.B1 Solid Fuels in Last Reported year (2012): 23,847.00 Gg
  Verein der Kohleimporteure (VDKi). 2017. Jahresbericht 2017. Accessed online at: http://www.kohlenimporteure.de/publikationen/jahresbericht-2017.html, 28.11.2016
- Boron [soil, unspecified]: 2.80738e-7 kg; lognormal variance with pedigree 0.25, pedigree (5,5,5,5,5)
  (same comment as for Barium)
- Mercury [air, non-urban air or from high stacks]: 6.1619e-10 kg; lognormal variance with pedigree 0.86, pedigree (5,5,5,5,5)
  (same comment as for Barium)
- Particulates, > 10 um [air, non-urban air or from high stacks]: 0.000110107 kg; lognormal variance with pedigree 0.67, pedigree (5,5,5,5,5)
  (same comment as for spoil from hard coal mining)
- Vanadium [soil, unspecified]: 2.38744e-7 kg; lognormal variance with pedigree 0.86, pedigree (5,5,5,5,5)
  (same comment as for Barium)
- Thallium [soil, unspecified]: 1.91673e-9 kg; lognormal variance with pedigree 0.86, pedigree (5,5,5,5,5)
  (same comment as for Barium)
- Sulfate [water, ground-]: 0.0005 kg; lognormal variance with pedigree 1.09, pedigree (5,5,5,5,5)
  (same comment as for spoil from hard coal mining)
- Dinitrogen monoxide [air, non-urban air or from high stacks]: 6.91964e-7 kg; lognormal variance with pedigree 0.25, pedigree (5,5,5,5,5)
  (same comment as for Barium)
- Silicon [air, non-urban air or from high stacks]: 1.36357e-9 kg; lognormal variance with pedigree 0.25, pedigree (5,5,5,5,5)
  (same comment as for Barium)
- Nickel, ion [water, ground-]: 1e-7 kg; lognormal variance with pedigree 0.67, pedigree (5,5,5,5,5)
  (same comment as for spoil from hard coal mining)
- Manganese [soil, unspecified]: 4.66399e-7 kg; lognormal variance with pedigree 0.86, pedigree (5,5,5,5,5)
  (same comment as for Barium)
- Lead [air, non-urban air or from high stacks]: 6.80714e-10 kg; lognormal variance with pedigree 0.86, pedigree (5,5,5,5,5)
  (same comment as for Barium)
- Aluminium [water, ground-]: 1e-6 kg; lognormal variance with pedigree 1.09, pedigree (5,5,5,5,5)
  (same comment as for spoil from hard coal mining)
- Nitrogen [soil, unspecified]: 5.91714e-7 kg; lognormal variance with pedigree 0.25, pedigree (5,5,5,5,5)
  (same comment as for Barium)
- Zinc, ion [water, ground-]: 1e-7 kg; lognormal variance with pedigree 0.67, pedigree (5,5,5,5,5)
  (same comment as for spoil from hard coal mining)
- Chloride [soil, unspecified]: 1.09625e-6 kg; lognormal variance with pedigree 0.25, pedigree (5,5,5,5,5)
  (same comment as for Barium)
- Solids, inorganic [water, ground-]: 3e-6 kg; lognormal variance with pedigree 1.09, pedigree (5,5,5,5,5)
  (same comment as for spoil from hard coal mining)

## Sampling procedure
literature

## Extrapolations
This dataset has been extrapolated from year 2002 to the year of the calculation (2021). The uncertainty has been adjusted accordingly.

## Review by Christian Bauer 2018-03-22
passed
passed
