# inductor production, low value multilayer chip

Dataset: EcoSpold 2, unit process
Geography: GLO
Time period: 2005-01-01 to 2021-12-31
Technology level: current
Classification: ISIC rev.4 ecoinvent: 2610:Manufacture of electronic components and boards
Classification: EcoSpold01Categories: electronics/component
Scenario: Business-as-Usual
System model: Allocation, cut-off by classification
Generated by: Roland Hischier
Published in: Hischier R. 2007
Database: ecoinvent
isCopyrightProtected: true
accessRestrictedTo: 1

## General comment
This dataset represents the production of 1 kg of low value multilayer chip type inductors. It is based on the assumption that a typical low value multilayer chip type inductor electronic module has an average weight of 2.1 milligrams.The data represent a typical low value multilayer chip type inductor, used in the information and communication technology. Material data are taken from datasheets of producers of such inductors. Infrastructure and production efforts are based on own assumptions. The production efforts represent not a specific inductor type and have thus, accordingly higher uncertainties.
Based on expert assumption the original amount of silver was attributed to aluminium.

## Included activities start
From reception of metals, plastics at the factory gate.

## Included activities end
This dataset includes raw material input and production efforts for the production of currently used low value multilayer chip type inductors.

## Geography
Data represent a global valuable composition of low value multilayer chip type inductors.

## Technology
average production comprising the following steps: core mounting; epxoy-curing; winding; welding; molding; marking; bending; testing and final control.

## Reference product
- inductor, low value multilayer chip: 1 kg; CPC 471: Electronic valves and tubes; electronic components; parts thereof; By-product classification allocatable product
  Inductors are used extensively in analog circuits and signal processing, in conjunction with capacitors and other components form tuned circuits which can emphasize or filter out specific signal frequencies. This can range from the use of large inductors as chokes in power supplies, now obsolete, which in conjunction with filter capacitors remove residual hum or other fluctuations from the direct current output, to such small inductances as generated by a ferrite bead or torus around a cable to prevent radio frequency interference from being transmitted down the wire. Smaller inductor/capacitor combinations provide tuned circuits used in radio reception and broadcasting, for instance. (Wikipedia (2007))
  EcoSpold01Location=GLO
  production volume 1 kg
    Dummy value to be replaced by measured, estimated or calculated value
  property carbon content, fossil 0
    Calculated as the addition of C contents in the product composition, and referred to 1 kg DM inductor
  property price 167.69 EUR2005
    Calculated based on inputs: The price of the product has been calculated as a sum of the values of the material and energy inputs for this product. This value is therefore a rough estimation. It may underestimate the real price since there are additional expenses when producing any product. These expences can include for example labour costs, treatment of waste materials and profit for the producer. Please consider carefully whether this level of data quality is acceptable for your application.
  property carbon content, non-fossil 0
    (same comment as for inductor, low value multilayer chip)
  property carbon content 0
    carbon content on a dry matter basis (reserved; not for manual entry)
  properties: water content 0, wet mass 1 kg, water in wet mass 0 kg, dry mass 1 kg, carbon allocation 0 kg

## Inputs from technosphere
- tin: 0.057572 kg; source Venkel 2006; lognormal variance with pedigree 0.052, pedigree (1,4,5,1,1)
  EcoSpold01Location=RER
  Calculated Value. The production of 1 kg of inductors lead to a waste amount of 0.48 kg unused raw materials. Hence, this dataset here has an input of 1.48 kg of raw materials per kg of inductor. The split to the different raw materials (metals, plastics, etc.) is based on the reported material specifications.
  Uncertainty: average from company information
  properties: dry mass 1 kg, wet mass 1 kg
- copper oxide: 0.002072 kg; source Venkel 2006; lognormal variance with pedigree 0.052, pedigree (1,4,5,1,1)
  (same comment as for tin)
  properties: wet mass 1 kg, dry mass 1 kg
- glass tube, borosilicate: 0.50453 kg; source Venkel 2006; lognormal variance with pedigree 0.052, pedigree (1,4,5,1,1)
  Calculated Value. The production of 1 kg of inductors lead to a waste amount of 0.48 kg unused raw materials. Hence, this dataset here has an input of 1.48 kg of raw materials per kg of inductor. The split to the different raw materials (metals, plastics, etc.) is based on the reported material specifications.
  EcoSpold01Location=DE
  Uncertainty: average from company information
  properties: wet mass 1 kg, dry mass 1 kg
- inductor, auxilliaries and energy use: 1 kg; lognormal variance with pedigree 0.134, pedigree (3,4,5,1,4)
  Estimation - details see this other activity dataset
  EcoSpold01Location=GLO
  Uncertainty: rough estimation
- aluminium oxide, non-metallurgical: 0 kg; source Venkel 2006; pedigree (1,1,1,1,1)
  Calculated Value. The production of 1 kg of inductors lead to a waste amount of 0.48 kg unused raw materials. Hence, this dataset here has an input of 1.48 kg of raw materials per kg of inductor. The split to the different raw materials (metals, plastics, etc.) is based on the reported material specifications. The original amount of silver was attributed to aluminium, based on expert assumption.
  EcoSpold01Location=RER
  Uncertainty: average from company information
  properties: wet mass 1 kg, dry mass 1 kg
- funnel glass, for cathode ray tube display: 0.031228 kg; source Venkel 2006; lognormal variance with pedigree 0.052, pedigree (1,4,5,1,1)
  Calculated Value. The production of 1 kg of inductors lead to a waste amount of 0.48 kg unused raw materials. Hence, this dataset here has an input of 1.48 kg of raw materials per kg of inductor. The split to the different raw materials (metals, plastics, etc.) is based on the reported material specifications.
  EcoSpold01Location=GLO
  Uncertainty: average from company information
  properties: wet mass 1 kg, dry mass 1 kg
- nickel, class 1: 0.024568 kg; source Venkel 2006; lognormal variance with pedigree 0.052, pedigree (1,4,5,1,1)
  EcoSpold01Location=GLO
  Calculated Value. The production of 1 kg of inductors lead to a waste amount of 0.48 kg unused raw materials. Hence, this dataset here has an input of 1.48 kg of raw materials per kg of inductor. The split to the different raw materials (metals, plastics, etc.) is based on the reported material specifications.
  Uncertainty: average from company information
  properties: dry mass 1 kg, wet mass 1 kg
- aluminium oxide, non-metallurgical: 0.735509, 0.124521 kg (2 entries); source Venkel 2006; lognormal variance with pedigree 0.052, pedigree (1,4,5,1,1)
  (same comment as for aluminium oxide, non-metallurgical)

## Sampling procedure
literature

## Extrapolations
This dataset has been extrapolated from year 2007 to the year of the calculation (2021). The uncertainty has been adjusted accordingly.

## Review by Rolf Frischknecht 2007-09-14
passed
