# palm oil mill operation

Dataset: EcoSpold 2, unit process
Geography: RoW
Time period: 1995-01-01 to 2021-12-31
Technology level: current
Classification: EcoSpold01Categories: biomass/fuels
Classification: ISIC rev.4 ecoinvent: 1040:Manufacture of vegetable and animal oils and fats
Tags: ConvertedDataset
Scenario: Business-as-Usual
System model: Allocation, cut-off by classification
Share of production covered: 0 %
Generated by: Edgard Gnansounou
Published in: Jungbluth N. 2007
Database: ecoinvent
isCopyrightProtected: true
accessRestrictedTo: 1

## General comment
Inventory refers to the production of 1 kg palm oil, respectively palm kernel oil and palm kernel meal, from palm oil. The multioutput-process 'palm fruit bunches, in oil mill' delivers the co-products 'palm oil, at oil mill', 'palm kernel oil, at oil mill' and 'palm kernel meal, at oil mill'. Economic allocation with allocation factor of 81.3% to palm oil, 17.3% to palm kernel oil, and 1.4% to palm kernel meal. Allocation of CO2 emissions is done according to carbon balance.
[This dataset was already contained in the ecoinvent database version 2. It was not individually updated during the transfer to ecoinvent version 3. Life Cycle Impact Assessment results may still have changed, as they are affected by changes in the supply chain, i.e. in other datasets. This dataset was generated following the ecoinvent quality guidelines for version 2. It may have been subject to central changes described in the ecoinvent version 3 change report (http://www.ecoinvent.org/database/ecoinvent-version-3/reports-of-changes/), and the results of the central updates were reviewed extensively. The changes added e.g. consistent water flows and other information throughout the database. The documentation of this dataset can be found in the ecoinvent reports of version 2, which are still available via the ecoinvent website. The change report linked above covers all central changes that were made during the conversion process.]

## Included activities end
This process includes the extraction of palm oil, palm kernel oil and palm kernel meal, from palm fruit bunches. Energy supply from extracted solids (fibres, shells, digester solids and empty fruit bunches) and treatment of specific wastewater effluents are taken into account. System boundary is at the oil mill.

## Geography
Data from various literature references (incl. specific Malaysian and Indonesian industrial data)

## Technology
Typical palm oil mill designed for palm oil and palm kernel oil extraction, Malaysian context. Palm fuit bunches undergo sterilization, stripping, digestion, oil extraction, screening, settling and refining.

## Time period
Data from 1995 to 2006, current technology for palm oil mills in MY

## Parameters
- fraction, cooling water, to air: 0.3875 dimensionless; name fraction_CW_to_air; = (0.5*fraction_CW_OT_to_air)+(0.5*fraction_CW_R_to_air); lognormal variance with pedigree 0.092025, pedigree (4,4,3,2,4)
  Calculated value based on literature value (see comments of the other parametres present in this dataset) and expert opinion. In the case when no industry/literature data are available about the type of cooling or directly fraction, cooling water, to air specific for the process a default assumption is applied. It is assumed that the once-through cooling system is used in 50% of all cases and recirculating system is used in another 50% of all cases.
- fraction, cooling water, cooling pond system, to air: 0.032 dimensionless; name fraction_CW_CP_to_air; lognormal variance with pedigree 0.0413, pedigree (2,3,1,3,1)
  Calculated based on literature value (Scown, C.D., 2011, Water Footprint of U.S. Transportation Fuels and supplying information of the article) (Vionnet, S., Quantis Water Database - Technical Report, 2012).
- fraction, water, decarbonised, to air: 0.3875 dimensionless; name fraction_WDC_to_air; lognormal variance with pedigree 0.092025, pedigree (4,4,3,2,4)
- fraction, cooling water, recirculating system, to air: 0.771 dimensionless; name fraction_CW_R_to_air; lognormal variance with pedigree 0.0413, pedigree (2,3,1,3,1)
  (same comment as for fraction, cooling water, cooling pond system, to air)
- fraction, process water, to air: 0.205 dimensionless; name fraction_PW_to_air; lognormal variance with pedigree 0.092025, pedigree (4,4,3,2,4)
- fraction, tap water, to air: 0.205 dimensionless; name fraction_TW_to_air; lognormal variance with pedigree 0.092025, pedigree (4,4,3,2,4)
- fraction, cooling water, once-through system, to air: 0.004 dimensionless; name fraction_CW_OT_to_air; lognormal variance with pedigree 0.0413, pedigree (2,3,1,3,1)
  (same comment as for fraction, cooling water, cooling pond system, to air)

## Reference product
- palm oil, crude: 0 kg; CPC 21651: Palm oil, crude; By-product classification allocatable product; CAS 8002-75-3
  EcoSpold01Location=MY
  production volume 1.94187e10 kg
    Production volumes for 2005 from FAOSTAT (Production).
  property heating value, net 37 MJ
    Literature value, Source: Biograce, Condensed list of standard values, version 2 - Public. Available at: https://biograce.net/app/webroot/files/file/BioGrace_condensed_list_of_standard_values_-_version_2_-_Public.doc
  property carbon content, fossil 0
    C49H97O6. Palm oil (tab 17.4, ecoinvent v2.2 report 17-part 17)
  property carbon content, non-fossil 0.752881
    C49H97O6. Palm oil (tab 17.4, ecoinvent v2.2 report 17-part 17)
  property price 0.362 EUR2005
    Temporary price data. Calculated as 90% of purchasers price based on: 2004 World Import/Export prices (tonnes and US$) from FaoStat statistics (http://faostat.fao.org/site/535/default.aspx#ancor, TRADE)- [Accessed 24 May 2010].
  property carbon content 0.752881
    carbon content on a dry matter basis (reserved; not for manual entry)
  property true value 0.362
    allocation property applied in "true value" allocation // value calculated from revenue
  properties: EcoSpold01Allocation_undefined_30 81.33, EcoSpold01Allocation_undefined_62 81.33, EcoSpold01Allocation_undefined_40 81.33, EcoSpold01Allocation_undefined_23 81.33, EcoSpold01Allocation_undefined_66 81.33, water content 0, dry mass 1 kg, wet mass 1 kg, water in wet mass 0 kg, EcoSpold01Allocation_undefined_29 81.33, EcoSpold01Allocation_undefined_10 81.33, EcoSpold01Allocation_undefined_11 81.33, EcoSpold01Allocation_undefined_32 81.33, EcoSpold01Allocation_undefined_41 81.33, EcoSpold01Allocation_undefined_67 81.33, EcoSpold01Allocation_undefined_48 81.33, EcoSpold01Allocation_undefined_16 81.33, EcoSpold01Allocation_undefined_64 81.33, EcoSpold01Allocation_undefined_51 81.33, EcoSpold01Allocation_undefined_60 81.33, EcoSpold01Allocation_undefined_33 81.33, EcoSpold01Allocation_undefined_53 81.33, EcoSpold01Allocation_undefined_14 81.33, EcoSpold01Allocation_undefined_37 81.33, EcoSpold01Allocation_undefined_55 81.33, EcoSpold01Allocation_undefined_44 81.33, EcoSpold01Allocation_undefined_24 81.33, EcoSpold01Allocation_undefined_35 81.33, EcoSpold01Allocation_undefined_19 81.33, EcoSpold01Allocation_undefined_56 81.33, EcoSpold01Allocation_undefined_59 81.33, EcoSpold01Allocation_undefined_8 81.33, EcoSpold01Allocation_undefined_31 81.33, EcoSpold01Allocation_undefined_38 81.33, EcoSpold01Allocation_undefined_42 81.33, EcoSpold01Allocation_undefined_18 81.33, EcoSpold01Allocation_undefined_43 81.33, EcoSpold01Allocation_undefined_3 81.33, EcoSpold01Allocation_undefined_45 81.33, EcoSpold01Allocation_undefined_22 81.33, EcoSpold01Allocation_undefined_21 81.33, EcoSpold01Allocation_undefined_65 81.33, EcoSpold01Allocation_undefined_36 81.33, EcoSpold01Allocation_undefined_1 100, EcoSpold01Allocation_undefined_68 72.68, EcoSpold01Allocation_undefined_27 81.33, EcoSpold01Allocation_undefined_26 81.33, EcoSpold01Allocation_undefined_9 81.33, EcoSpold01Allocation_undefined_13 81.33, EcoSpold01Allocation_undefined_6 81.33, EcoSpold01Allocation_undefined_61 81.33, EcoSpold01Allocation_undefined_25 81.33, EcoSpold01Allocation_undefined_49 81.33, EcoSpold01Allocation_undefined_4 81.33, EcoSpold01Allocation_undefined_54 81.33, EcoSpold01Allocation_undefined_28 81.33, EcoSpold01Allocation_undefined_46 81.33, EcoSpold01Allocation_undefined_2 0, EcoSpold01Allocation_undefined_63 81.33, EcoSpold01Allocation_undefined_47 81.33, EcoSpold01Allocation_undefined_57 81.33, EcoSpold01Allocation_undefined_34 81.33, EcoSpold01Allocation_undefined_20 81.33, EcoSpold01Allocation_undefined_15 81.33, EcoSpold01Allocation_undefined_50 81.33, EcoSpold01Allocation_undefined_58 81.33, EcoSpold01Allocation_undefined_39 81.33, EcoSpold01Allocation_undefined_5 81.33, EcoSpold01Allocation_undefined_52 81.33, EcoSpold01Allocation_undefined_12 81.33, EcoSpold01Allocation_undefined_7 81.33, EcoSpold01Allocation_undefined_17 81.33, carbon allocation 0.752881 kg
- palm kernel meal: 1 kg; CPC 23319: Preparations used in animal feeding n.e.c.; By-product classification allocatable product
  EcoSpold01Location=MY
  production volume 2.86222e9 kg
    Production volumes for 2005 calculated from Palm oil production volumes, using allocation factor in Tab 17.16 (ecoinvent report v2 17)
  property carbon content, non-fossil 0.486591
    Composition data obtained from Table 1 in Palm Kernel Cake (PKC) as a Supplement for Fattening and Dairy Cattle in Malaysia, F.Y. Chin, FAO 7th Meeting of the Regional Working Group on Grazing and Feed Resources, 2001. First, composition data were refered to 1 kg dry mass. Then, C-contents were calculated considering a C-content/dry mass of 46% in carbohydrates (including fibres), 53% in proteins and 75% in fats. All data from "Evolutionary and Biochemical Aspects", A.D. Kay and T. Vrede (in Global Ecology, 2010, Elsevier B.V., S.E. Jørgensen Ed.).
  property price 0.061 EUR2005
    (same comment as for palm oil, crude)
  property carbon content 0.486591
    carbon content on a dry matter basis (reserved; not for manual entry)
  property true value 0.00895339
    allocation property applied in "true value" allocation // value calculated from revenue
  properties: water content 0.0787487, water in wet mass 0.073 kg, wet mass 1 kg, carbon content, fossil 0, dry mass 0.927 kg, EcoSpold01Allocation_undefined_55 1.402, EcoSpold01Allocation_undefined_51 1.402, EcoSpold01Allocation_undefined_38 1.402, EcoSpold01Allocation_undefined_45 1.402, EcoSpold01Allocation_undefined_68 0, EcoSpold01Allocation_undefined_28 1.402, EcoSpold01Allocation_undefined_40 1.402, EcoSpold01Allocation_undefined_25 1.402, EcoSpold01Allocation_undefined_39 1.402, EcoSpold01Allocation_undefined_5 1.402, EcoSpold01Allocation_undefined_21 1.402, EcoSpold01Allocation_undefined_7 1.402, EcoSpold01Allocation_undefined_29 1.402, EcoSpold01Allocation_undefined_52 1.402, EcoSpold01Allocation_undefined_66 1.402, EcoSpold01Allocation_undefined_24 1.402, EcoSpold01Allocation_undefined_17 1.402, EcoSpold01Allocation_undefined_20 1.402, EcoSpold01Allocation_undefined_30 1.402, EcoSpold01Allocation_undefined_58 1.402, EcoSpold01Allocation_undefined_44 1.402, EcoSpold01Allocation_undefined_43 1.402, EcoSpold01Allocation_undefined_31 1.402, EcoSpold01Allocation_undefined_11 1.402, EcoSpold01Allocation_undefined_64 1.402, EcoSpold01Allocation_undefined_48 1.402, EcoSpold01Allocation_undefined_2 100, EcoSpold01Allocation_undefined_62 1.402, EcoSpold01Allocation_undefined_10 1.402, EcoSpold01Allocation_undefined_3 1.402, EcoSpold01Allocation_undefined_49 1.402, EcoSpold01Allocation_undefined_63 1.402, EcoSpold01Allocation_undefined_57 1.402, EcoSpold01Allocation_undefined_18 1.402, EcoSpold01Allocation_undefined_60 1.402, EcoSpold01Allocation_undefined_37 1.402, EcoSpold01Allocation_undefined_13 1.402, EcoSpold01Allocation_undefined_67 1.402, EcoSpold01Allocation_undefined_34 1.402, EcoSpold01Allocation_undefined_14 1.402, EcoSpold01Allocation_undefined_26 1.402, EcoSpold01Allocation_undefined_4 1.402, EcoSpold01Allocation_undefined_27 1.402, EcoSpold01Allocation_undefined_54 1.402, EcoSpold01Allocation_undefined_8 1.402, EcoSpold01Allocation_undefined_36 1.402, EcoSpold01Allocation_undefined_41 1.402, EcoSpold01Allocation_undefined_70 100, EcoSpold01Allocation_undefined_53 1.402, EcoSpold01Allocation_undefined_19 1.402, EcoSpold01Allocation_undefined_33 1.402, EcoSpold01Allocation_undefined_16 1.402, EcoSpold01Allocation_undefined_42 1.402, EcoSpold01Allocation_undefined_50 1.402, EcoSpold01Allocation_undefined_47 1.402, EcoSpold01Allocation_undefined_22 1.402, EcoSpold01Allocation_undefined_23 1.402, EcoSpold01Allocation_undefined_35 1.402, EcoSpold01Allocation_undefined_15 1.402, EcoSpold01Allocation_undefined_6 1.402, EcoSpold01Allocation_undefined_59 1.402, EcoSpold01Allocation_undefined_65 1.402, EcoSpold01Allocation_undefined_61 1.402, EcoSpold01Allocation_undefined_32 1.402, EcoSpold01Allocation_undefined_9 1.402, EcoSpold01Allocation_undefined_12 1.402, EcoSpold01Allocation_undefined_56 1.402, EcoSpold01Allocation_undefined_46 1.402, carbon allocation 0.45107 kg

## By-products
- palm kernel oil, crude: 0 kg; By-product classification allocatable product; CPC 21691: Other vegetable oils, crude or refined, n.e.c.; CAS 8023-79-8
  EcoSpold01Location=MY
  production volume 2.39341e9 kg
    (same comment as for palm kernel meal)
  property heating value, net 37 MJ
    (same comment as for palm oil, crude)
  property carbon content, non-fossil 0.725581
    C13H27O2. Palm kernel oil (tab 17.4, ecoinvent v2.2 report 17-part 17)
  property carbon content, fossil 0
    C13H27O2. Palm kernel oil (tab 17.4, ecoinvent v2.2 report 17-part 17)
  property price 0.444 EUR2005
    (same comment as for palm oil, crude)
  property carbon content 0.725581
    carbon content on a dry matter basis (reserved; not for manual entry)
  property true value 0.0547701
    allocation property applied in "true value" allocation // value calculated from revenue
  properties: water in wet mass 0 kg, wet mass 1 kg, water content 0, dry mass 1 kg, EcoSpold01Allocation_undefined_55 17.27, EcoSpold01Allocation_undefined_9 17.27, EcoSpold01Allocation_undefined_68 27.32, EcoSpold01Allocation_undefined_3 17.27, EcoSpold01Allocation_undefined_15 17.27, EcoSpold01Allocation_undefined_59 17.27, EcoSpold01Allocation_undefined_36 17.27, EcoSpold01Allocation_undefined_58 17.27, EcoSpold01Allocation_undefined_38 17.27, EcoSpold01Allocation_undefined_44 17.27, EcoSpold01Allocation_undefined_7 17.27, EcoSpold01Allocation_undefined_33 17.27, EcoSpold01Allocation_undefined_2 0, EcoSpold01Allocation_undefined_28 17.27, EcoSpold01Allocation_undefined_13 17.27, EcoSpold01Allocation_undefined_16 17.27, EcoSpold01Allocation_undefined_27 17.27, EcoSpold01Allocation_undefined_56 17.27, EcoSpold01Allocation_undefined_25 17.27, EcoSpold01Allocation_undefined_43 17.27, EcoSpold01Allocation_undefined_19 17.27, EcoSpold01Allocation_undefined_46 17.27, EcoSpold01Allocation_undefined_62 17.27, EcoSpold01Allocation_undefined_10 17.27, EcoSpold01Allocation_undefined_5 17.27, EcoSpold01Allocation_undefined_23 17.27, EcoSpold01Allocation_undefined_11 17.27, EcoSpold01Allocation_undefined_37 17.27, EcoSpold01Allocation_undefined_29 17.27, EcoSpold01Allocation_undefined_17 17.27, EcoSpold01Allocation_undefined_35 17.27, EcoSpold01Allocation_undefined_30 17.27, EcoSpold01Allocation_undefined_57 17.27, EcoSpold01Allocation_undefined_20 17.27, EcoSpold01Allocation_undefined_14 17.27, EcoSpold01Allocation_undefined_48 17.27, EcoSpold01Allocation_undefined_65 17.27, EcoSpold01Allocation_undefined_61 17.27, EcoSpold01Allocation_undefined_32 17.27, EcoSpold01Allocation_undefined_45 17.27, EcoSpold01Allocation_undefined_4 17.27, EcoSpold01Allocation_undefined_8 17.27, EcoSpold01Allocation_undefined_39 17.27, EcoSpold01Allocation_undefined_60 17.27, EcoSpold01Allocation_undefined_63 17.27, EcoSpold01Allocation_undefined_41 17.27, EcoSpold01Allocation_undefined_22 17.27, EcoSpold01Allocation_undefined_42 17.27, EcoSpold01Allocation_undefined_34 17.27, EcoSpold01Allocation_undefined_12 17.27, EcoSpold01Allocation_undefined_49 17.27, EcoSpold01Allocation_undefined_40 17.27, EcoSpold01Allocation_undefined_24 17.27, EcoSpold01Allocation_undefined_53 17.27, EcoSpold01Allocation_undefined_21 17.27, EcoSpold01Allocation_undefined_47 17.27, EcoSpold01Allocation_undefined_54 17.27, EcoSpold01Allocation_undefined_26 17.27, EcoSpold01Allocation_undefined_67 17.27, EcoSpold01Allocation_undefined_6 17.27, EcoSpold01Allocation_undefined_66 17.27, EcoSpold01Allocation_undefined_18 17.27, EcoSpold01Allocation_undefined_51 17.27, EcoSpold01Allocation_undefined_52 17.27, EcoSpold01Allocation_undefined_50 17.27, EcoSpold01Allocation_undefined_31 17.27, EcoSpold01Allocation_undefined_64 17.27, EcoSpold01Allocation_undefined_69 100, carbon allocation 0.725581 kg

## Inputs from technosphere
- wood ash mixture, pure: 0 kg; pedigree (1,1,1,1,1)
  EcoSpold01Location=CH
  Adapted from the dataset 'wood chips, in cogen 6400kWth, wood', according to actual water, carbon and energy content of the fuel (fibres, empty fruit bunch, shell, digester solids)
  Uncertainty: Adapted from the dataset 'wood chips, in cogen 6400kWth, wood', according to actual water, carbon and energy content of the fuel (fibres, empty fruit bunch, shell, digester solids)
  production volume 0 kg
    Calculated from the production volume of palm oil in proportion to the respective output amounts.
  properties: carbon content, non-fossil 0.012, dry mass 1 kg, wet mass 1 kg
- lubricating oil: 7.83127e-6 kg; lognormal variance with pedigree 0.072, pedigree (4,4,5,5,1)
  EcoSpold01Location=RER
  Adapted from the dataset 'wood chips, in cogen 6400kWth, wood', according to actual water, carbon and energy content of the fuel (fibres, empty fruit bunch, shell, digester solids)
  Uncertainty: Adapted from the dataset 'wood chips, in cogen 6400kWth, wood', according to actual water, carbon and energy content of the fuel (fibres, empty fruit bunch, shell, digester solids)
  properties: heating value, net 40.2 MJ, carbon content, fossil 0.75, dry mass 1 kg, wet mass 1 kg
  note on heating value, net: Literature value, Source: IPCC 2006, 2006 IPCC Guidelines for National Greenhouse Gas Inventories, Prepared by the National Greenhouse Gas Inventories Programme, Eggleston H.S., Buendia L., Miwa K., Ngara T. and Tanabe K. (eds). Published: IGES, Japan
  note on carbon content, fossil: Lubricating oil is produced from diesel. C-content/dry mass of fats and oils considered 75%, from: ecoinvent v2.2 report, n 15a, pg 40
- ammonia, anhydrous, liquid: 0 kg; pedigree (1,1,1,1,1)
  Adapted from the dataset 'wood chips, in cogen 6400kWth, wood', according to actual water, carbon and energy content of the fuel (fibres, empty fruit bunch, shell, digester solids)
  EcoSpold01Location=RER
  Uncertainty: Adapted from the dataset 'wood chips, in cogen 6400kWth, wood', according to actual water, carbon and energy content of the fuel (fibres, empty fruit bunch, shell, digester solids)
  properties: dry mass 1 kg, wet mass 1 kg
- wastewater, average: 0 m3; pedigree (1,1,1,1,1)
  (same comment as for wood ash mixture, pure)
  production volume 0 m3
    (same comment as for wood ash mixture, pure)
  properties: dry mass 0.346837 kg, water content 2882.2, wet mass 1000 kg, carbon content, non-fossil 0.194039
  note on carbon content, non-fossil: 0.0673 kg TOC/m3 (Tab A.17, ecoinvent v2.2 report 13_I). TOC was considered as Total Carbon.
- phosphoric acid, industrial grade, without water, in 85% solution state: 0.000128491 kg; lognormal variance with pedigree 0.0432, pedigree (2,3,5,5,1)
  Literature data & biodiesel producer
  EcoSpold01Location=RER
  Uncertainty: Literature data & biodiesel producer
  properties: wet mass 1 kg, dry mass 1 kg
- waste mineral oil: 0 kg; pedigree (1,1,1,1,1)
  (same comment as for wood ash mixture, pure)
  production volume 0 kg
    (same comment as for wood ash mixture, pure)
  properties: dry mass 0.9 kg, water content 0.111111, wet mass 1 kg, carbon content, fossil 0.864444, heating value, net 34.7 MJ
  note on carbon content, fossil: Tab A.6, ecoinvent v2.2 report 13_I. C content has been calculated after data in the tables, and then referred to 1 kg DM
  note on heating value, net: Value taken from the general comment of the treatment dataset.
- municipal solid waste: 0 kg; pedigree (1,1,1,1,1)
  Adapted from the dataset 'wood chips, in cogen 6400kWth, wood', according to actual water, carbon and energy content of the fuel (fibres, empty fruit bunch, shell, digester solids)
  EcoSpold01Location=CH
  Uncertainty: Adapted from the dataset 'wood chips, in cogen 6400kWth, wood', according to actual water, carbon and energy content of the fuel (fibres, empty fruit bunch, shell, digester solids)
  production volume 0 kg
    (same comment as for wood ash mixture, pure)
  properties: heating value, net 11.74 MJ, water content 0.297017, carbon content, fossil 0.171549, wet mass 1 kg, dry mass 0.771 kg, carbon content, non-fossil 0.261655
  note on carbon content, fossil: MSW composition in tab 4.1, ecoinvent v2.2 report 13_I. C content referred to 1 kg DM
- sodium chloride, powder: 9.78942e-6 kg; lognormal variance with pedigree 0.072, pedigree (4,4,5,5,1)
  (same comment as for lubricating oil)
  properties: wet mass 1 kg, dry mass 1 kg
- oil mill: 1.46333e-10 unit; lognormal variance with pedigree 0.424, pedigree (1,4,5,5,4)
  EcoSpold01Location=CH
  Calculation, according to production capacity and lifetime of the plant
  Uncertainty: Calculation, according to production capacity and lifetime of the plant
- water, decarbonised: 0 kg; name water_decarbonised_input; pedigree (1,1,1,1,1)
  (same comment as for lubricating oil)
  properties: wet mass 1 kg
- tap water: 0 kg; name tap_water_input; source Subramaniam, V. 2008; pedigree (1,1,1,1,1)
  Literature and industrial data
  Calculated based on literature, (Vionnet, S., Quantis Water Database - Technical Report, 2012). The process starts when fruit bunches enters the palm oil plant. It includes the main processes: sterilizing, stripping, screw press, vibrating screen, clarifier and purifier.
  EcoSpold01Location=RER
  Uncertainty: Literature and industrial data
  properties: water content 2962.17, carbon content, fossil 0.00178991, dry mass 0.000337476 kg, wet mass 1 kg
  note on carbon content, fossil: Bicarbonate content is 2.93 mol/m3. CO2 content is 0.1 mol/m3 (ecoinvent v2.2 report 8, Tab 93.1).
- heat and power co-generation unit, 6400kW thermal, common components for heat+electricity: 2.3041e-9 unit; lognormal variance with pedigree 0.372, pedigree (4,4,5,5,1)
  (same comment as for municipal solid waste)
- heat and power co-generation unit, 6400kW thermal, building: 5.7542e-10 unit; lognormal variance with pedigree 0.372, pedigree (4,4,5,5,1)
  (same comment as for municipal solid waste)
- hexane: 0.000446536 kg; lognormal variance with pedigree 0.0432, pedigree (2,3,5,5,1)
  Literature and industrial data
  EcoSpold01Location=RER
  Uncertainty: Literature and industrial data
  properties: heating value, net 45.02 MJ, carbon content, fossil 0.837209, wet mass 1 kg, dry mass 1 kg
- chemical, organic: 1.3705e-5 kg; lognormal variance with pedigree 0.072, pedigree (4,4,5,5,1)
  EcoSpold01Location=GLO
  Adapted from the dataset 'wood chips, in cogen 6400kWth, wood', according to actual water, carbon and energy content of the fuel (fibres, empty fruit bunch, shell, digester solids)
  Uncertainty: Adapted from the dataset 'wood chips, in cogen 6400kWth, wood', according to actual water, carbon and energy content of the fuel (fibres, empty fruit bunch, shell, digester solids)
  properties: carbon content, fossil 0.628, wet mass 1 kg, dry mass 1 kg, heating value, net 19.03 MJ
  note on carbon content, fossil: This dataset is an unweighted average of 20 organic substances (listed in Tab 88.1, ecoinvent v2.2 report 8, part II), being part of the top100 chemicals included in this database. The C-content has also been calculated as an unweighted average of the C content of the substances composing this dataset.
- wastewater, from residence: -0.000543043 m3; lognormal variance with pedigree 0.0426, pedigree (1,3,5,5,1)
  Calculation, to close mass balance of process
  EcoSpold01Location=CH
  Uncertainty: Calculation, to close mass balance of process
  production volume 7.35956e7 m3
    (same comment as for wood ash mixture, pure)
  properties: water content 2962.17, carbon content, non-fossil 0.199421, dry mass 0.337476 kg, wet mass 1000 kg
- chlorine, liquid: 7.83127e-7 kg; lognormal variance with pedigree 0.072, pedigree (4,4,5,5,1)
  (same comment as for ammonia, anhydrous, liquid)
  properties: wet mass 1 kg, dry mass 1 kg
- palm fruit bunch: 0.664004 kg; lognormal variance with pedigree 0.0521, pedigree (1,2,5,5,1)
  EcoSpold01Location=MY
  Literature and industrial data, cross-checking of various references
  Uncertainty: Literature and industrial data, cross-checking of various references
  properties: water content 0.886792, dry mass 0.53 kg, wet mass 1 kg, carbon content, non-fossil 0.590566
- heat and power co-generation unit, 6400kW thermal, components for electricity only: 2.3041e-9 unit; lognormal variance with pedigree 0.372, pedigree (4,4,5,5,1)
  (same comment as for wood ash mixture, pure)
- wood ash mixture, pure: -2.54411e-5, -0.00123762 kg (2 entries); lognormal variance with pedigree 0.072, pedigree (4,4,5,5,1)
  (same comment as for wood ash mixture, pure)
  production volume 1.71176e8 kg
- ammonia, anhydrous, liquid: 3.74815e-9, 3.22198e-10, 2.15346e-9, 5.01258e-10, 9.93169e-10, 9.73044e-10, 1.01985e-10, 1.07856e-8 kg (8 entries); lognormal variance with pedigree 0.072, pedigree (4,4,5,5,1)
  (same comment as for ammonia, anhydrous, liquid)
- wastewater, average: -1.83435e-7, -1.69563e-6 m3 (2 entries); lognormal variance with pedigree 0.072, pedigree (4,4,5,5,1)
  (same comment as for wood ash mixture, pure)
  production volume 254660 m3
- waste mineral oil: -1.89187e-7, -7.64208e-6 kg (2 entries); lognormal variance with pedigree 0.072, pedigree (4,4,5,5,1)
  (same comment as for wood ash mixture, pure)
  production volume 1.06133e6 kg
- municipal solid waste: -1.29741e-7, -3.26915e-8, -4.67181e-8, -7.62212e-6 kg (4 entries); lognormal variance with pedigree 0.072, pedigree (4,4,5,5,1)
  (same comment as for municipal solid waste)
  production volume 1.06133e6 kg
- water, decarbonised: 4.36243e-5, 0.00011351, 7.09869e-8, 0.000457814, 0.000111796, 2.25375e-5, 7.41075e-5, 4.09118e-6, 5.82984e-5, 0.000135801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 kg (12 entries); lognormal variance with pedigree 0.072, pedigree (4,4,5,5,1)
  (same comment as for lubricating oil)
- tap water: 0.0409089, 0.00492433, 0.00813827, 0.205215, 0.00533862, 0.0151856, 1.75359 kg (7 entries); source Subramaniam, V. 2008; lognormal variance with pedigree 0.0546, pedigree (3,3,5,5,1)
  (same comment as for tap water)

## Inputs from nature
- Carbon dioxide, in air [natural resource, in air]: 0.0236439 kg; lognormal variance with pedigree 0.042, pedigree (1,1,5,5,1)
  Calculation, to close carbon balance
  Uncertainty: Calculation, to close carbon balance

## Emissions to nature
- Manganese [air, urban air close to ground]: 4.08283e-7 kg; lognormal variance with pedigree 0.712, pedigree (4,4,5,5,1)
  Adapted from the dataset 'wood chips, in cogen 6400kWth, wood', according to actual water, carbon and energy content of the fuel (fibres, empty fruit bunch, shell, digester solids)
  Uncertainty: Adapted from the dataset 'wood chips, in cogen 6400kWth, wood', according to actual water, carbon and energy content of the fuel (fibres, empty fruit bunch, shell, digester solids)
- Benzene, hexachloro- [air, urban air close to ground]: 1.65994e-14 kg; lognormal variance with pedigree 0.372, pedigree (4,4,5,5,1)
  (same comment as for Manganese)
- Water [water, unspecified]: 0.00107271 m3; name water_to_water_unspecified; = (tap_water_input/1000)*(1-fraction_TW_to_air)+(water_decarbonised_input/1000)*(1-fraction_WDC_to_air)-0.0037899-1.3114E-5; lognormal variance with pedigree 0.0827, pedigree (2,2,5,5,1)
  Calculated value based on literature values and expert opinion. See comments in the parametres' comment field.
  property fraction, origin: salt water 0; name fraction_origin_salt_water_Ww
  property fraction, origin: unspecified 0; name fraction_origin_unspecified_Ww
  property fraction, origin: fresh water 1; name fraction_origin_fresh_water_Ww
  property carbon content, fossil 0; name C_content_fossil
  property wet mass 1000 kg; name WM
  property carbon content, non-fossil 0; name C_content_non_fossil
  property dry mass 0 kg; name DM
  property water in wet mass 1000 kg; name WWM
- Carbon monoxide, non-fossil [air, urban air close to ground]: 1.61386e-5 kg; lognormal variance with pedigree 0.712, pedigree (4,4,5,5,1)
  (same comment as for Manganese)
- Copper [air, urban air close to ground]: 5.25281e-8 kg; lognormal variance with pedigree 0.712, pedigree (4,4,5,5,1)
  (same comment as for Manganese)
- Water [air, unspecified]: 0.000418677 m3; name water_to_air_unspecified; lognormal variance with pedigree 0.0827, pedigree (2,2,5,5,1)
  (same comment as for Water)
  property fraction, origin: unspecified 0; name fraction_origin_unspecified
  property fraction, origin: fresh water 1; name fraction_origin_fresh_water
  property fraction, origin: salt water 0; name fraction_origin_salt_water
- Dioxins, measured as 2,3,7,8-tetrachlorodibenzo-p-dioxin [air, urban air close to ground]: 7.14668e-14 kg; lognormal variance with pedigree 0.372, pedigree (4,4,5,5,1)
  (same comment as for Manganese)
- Ammonia [air, urban air close to ground]: 4.15448e-6 kg; lognormal variance with pedigree 0.072, pedigree (4,4,5,5,1)
  (same comment as for Manganese)
- Phosphorus [air, urban air close to ground]: 7.16261e-7 kg; lognormal variance with pedigree 0.112, pedigree (4,4,5,5,1)
  (same comment as for Manganese)
- Carbon dioxide, non-fossil [air, urban air close to ground]: 0.307673 kg; lognormal variance with pedigree 0.042, pedigree (1,1,5,5,1)
  Calculation, to close carbon balance
  Uncertainty: Calculation, to close carbon balance
- Benzo(a)pyrene [air, urban air close to ground]: 1.15271e-9 kg; lognormal variance with pedigree 0.372, pedigree (4,4,5,5,1)
  (same comment as for Manganese)
- Magnesium [air, urban air close to ground]: 8.61944e-7 kg; lognormal variance with pedigree 0.712, pedigree (4,4,5,5,1)
  (same comment as for Manganese)
- Benzene, ethyl- [air, urban air close to ground]: 6.91627e-8 kg; lognormal variance with pedigree 0.112, pedigree (4,4,5,5,1)
  (same comment as for Manganese)
- PAH, polycyclic aromatic hydrocarbons [air, urban air close to ground]: 2.53603e-8 kg; lognormal variance with pedigree 0.372, pedigree (4,4,5,5,1)
  (same comment as for Manganese)
- Fluorine [air, urban air close to ground]: 1.19381e-7 kg; lognormal variance with pedigree 0.112, pedigree (4,4,5,5,1)
  (same comment as for Manganese)
- Sodium [air, urban air close to ground]: 3.10395e-6 kg; lognormal variance with pedigree 0.712, pedigree (4,4,5,5,1)
  (same comment as for Manganese)
- Nickel [air, urban air close to ground]: 1.43259e-8 kg; lognormal variance with pedigree 0.712, pedigree (4,4,5,5,1)
  (same comment as for Manganese)
- Chlorine [air, urban air close to ground]: 4.29777e-7 kg; lognormal variance with pedigree 0.112, pedigree (4,4,5,5,1)
  (same comment as for Manganese)
- Toluene [air, urban air close to ground]: 6.91627e-7 kg; lognormal variance with pedigree 0.112, pedigree (4,4,5,5,1)
  (same comment as for Manganese)
- Lead [air, urban air close to ground]: 5.94523e-8 kg; lognormal variance with pedigree 0.712, pedigree (4,4,5,5,1)
  (same comment as for Manganese)
- Chromium [air, urban air close to ground]: 9.45476e-9 kg; lognormal variance with pedigree 0.712, pedigree (4,4,5,5,1)
  (same comment as for Manganese)
- Dinitrogen monoxide [air, urban air close to ground]: 5.49158e-6 kg; lognormal variance with pedigree 0.112, pedigree (4,4,5,5,1)
  (same comment as for Manganese)
- Phenol, pentachloro- [air, urban air close to ground]: 1.86745e-11 kg; lognormal variance with pedigree 0.112, pedigree (4,4,5,5,1)
  (same comment as for Manganese)
- Particulates, < 2.5 um [air, urban air close to ground]: 0.000103518 kg; lognormal variance with pedigree 0.372, pedigree (4,4,5,5,1)
  (same comment as for Manganese)
- Bromine [air, urban air close to ground]: 1.43259e-7 kg; lognormal variance with pedigree 0.712, pedigree (4,4,5,5,1)
  (same comment as for Manganese)
- Hexane [air, urban air close to ground]: 0.000446536 kg; lognormal variance with pedigree 0.082, pedigree (1,1,5,5,1)
  Calculation, based on hexane input
  Uncertainty: Calculation, based on hexane input
- Nitrogen oxides [air, urban air close to ground]: 0.000210111 kg; lognormal variance with pedigree 0.112, pedigree (4,4,5,5,1)
  (same comment as for Manganese)
- Mercury [air, urban air close to ground]: 7.16261e-10 kg; lognormal variance with pedigree 0.712, pedigree (4,4,5,5,1)
  (same comment as for Manganese)
- Formaldehyde [air, urban air close to ground]: 2.99712e-7 kg; lognormal variance with pedigree 0.112, pedigree (4,4,5,5,1)
  (same comment as for Manganese)
- Zinc [air, urban air close to ground]: 7.16261e-7 kg; lognormal variance with pedigree 0.712, pedigree (4,4,5,5,1)
  (same comment as for Manganese)
- Potassium [air, urban air close to ground]: 5.58707e-5 kg; lognormal variance with pedigree 0.712, pedigree (4,4,5,5,1)
  (same comment as for Manganese)
- Acetaldehyde [air, urban air close to ground]: 1.45643e-7 kg; lognormal variance with pedigree 0.112, pedigree (4,4,5,5,1)
  (same comment as for Manganese)
- Calcium [air, urban air close to ground]: 1.3968e-5 kg; lognormal variance with pedigree 0.712, pedigree (4,4,5,5,1)
  (same comment as for Manganese)
- Sulfur dioxide [air, urban air close to ground]: 5.94523e-6 kg; lognormal variance with pedigree 0.072, pedigree (4,4,5,5,1)
  (same comment as for Manganese)
- Benzene [air, urban air close to ground]: 2.09799e-6 kg; lognormal variance with pedigree 0.112, pedigree (4,4,5,5,1)
  (same comment as for Manganese)
- m-Xylene [air, urban air close to ground]: 2.76657e-7 kg; lognormal variance with pedigree 0.112, pedigree (4,4,5,5,1)
  (same comment as for Manganese)
- Cadmium [air, urban air close to ground]: 1.67137e-9 kg; lognormal variance with pedigree 0.712, pedigree (4,4,5,5,1)
  (same comment as for Manganese)
- Methane, non-fossil [air, urban air close to ground]: 1.00059e-6 kg; lognormal variance with pedigree 0.112, pedigree (4,4,5,5,1)
  (same comment as for Manganese)
- NMVOC, non-methane volatile organic compounds, unspecified origin [air, urban air close to ground]: 1.40636e-6 kg; lognormal variance with pedigree 0.112, pedigree (4,4,5,5,1)
  (same comment as for Manganese)
- Arsenic [air, urban air close to ground]: 2.38763e-9 kg; lognormal variance with pedigree 0.712, pedigree (4,4,5,5,1)
  (same comment as for Manganese)
- Hydrocarbons, aliphatic, unsaturated [air, urban air close to ground]: 7.14668e-6 kg; lognormal variance with pedigree 0.112, pedigree (4,4,5,5,1)
  (same comment as for Manganese)
- Chromium VI [air, urban air close to ground]: 9.55037e-11 kg; lognormal variance with pedigree 0.712, pedigree (4,4,5,5,1)
  (same comment as for Manganese)
- Hydrocarbons, aliphatic, alkanes, unspecified [air, urban air close to ground]: 2.09799e-6 kg; lognormal variance with pedigree 0.112, pedigree (4,4,5,5,1)
  (same comment as for Manganese)

## Sampling procedure
Cross-checking of various literature sources from 1998 to 2006

## Extrapolations
Direct emissions (resulting from the combustion of sorghum bagasse) are based on the the combustion of wood chips (without emission control), according to the corresponding dry matter content, carbon content and energy content. This dataset has been copied from an original dataset covering the geography MY. The uncertainty has been adjusted accordingly.

## Review by Niels Jungbluth 2006-08-15
Passed.
none
