# benzene production

Dataset: EcoSpold 2, unit process
Geography: RoW
Time period: 1999-01-01 to 2021-12-31
Technology level: current
Classification: EcoSpold01Categories: chemicals/organics
Classification: ISIC rev.4 ecoinvent: 1920:Manufacture of refined petroleum products
Tags: ConvertedDataset
Scenario: Business-as-Usual
System model: Allocation, cut-off by classification
Generated by: Roland Hischier
Published in: Hischier R. 2007
Database: ecoinvent
isCopyrightProtected: true
accessRestrictedTo: 1

## General comment
Data are derived from the Eco-profiles of the European plastics industry (PlasticsEurope). Not included are the values reported for: recyclable wastes, amount of air / N2 / O2 consumed, unspecified metal emission to air and to water, mercaptan emission to air, unspecified CFC/HCFC emission to air, dioxin to water. The amount of "sulphur (bonded)" is assumed to be included into the amount of raw oil.
[This dataset was already contained in the ecoinvent database version 2. It was not individually updated during the transfer to ecoinvent version 3. Life Cycle Impact Assessment results may still have changed, as they are affected by changes in the supply chain, i.e. in other datasets. This dataset was generated following the ecoinvent quality guidelines for version 2. It may have been subject to central changes described in the ecoinvent version 3 change report (http://www.ecoinvent.org/database/ecoinvent-version-3/reports-of-changes/), and the results of the central updates were reviewed extensively. The changes added e.g. consistent water flows and other information throughout the database. The documentation of this dataset can be found in the ecoinvent reports of version 2, which are still available via the ecoinvent website. The change report linked above covers all central changes that were made during the conversion process.]

## Included activities end
Aggregated data for all processes from raw material extraction until delivery at plant

## Geography
11 European production sites

## Technology
product out of catalytic reforming

## Time period
time to which data refer

## Parameters
- fraction, cooling water, once-through system, to air: 0.004 dimensionless; name fraction_CW_OT_to_air; lognormal variance with pedigree 0.0413, pedigree (2,3,1,3,1)
  Calculated based on literature value (Scown, C.D., 2011, Water Footprint of U.S. Transportation Fuels and supplying information of the article) (Vionnet, S., Quantis Water Database - Technical Report, 2012).
- fraction, cooling water, cooling pond system, to air: 0.032 dimensionless; name fraction_CW_CP_to_air; lognormal variance with pedigree 0.0413, pedigree (2,3,1,3,1)
  (same comment as for fraction, cooling water, once-through system, to air)
- fraction, process water, to air: 0.205 dimensionless; name fraction_PW_to_air; lognormal variance with pedigree 0.092025, pedigree (4,4,3,2,4)
- fraction, cooling water, recirculating system, to air: 0.771 dimensionless; name fraction_CW_R_to_air; lognormal variance with pedigree 0.0413, pedigree (2,3,1,3,1)
  (same comment as for fraction, cooling water, once-through system, to air)
- fraction, cooling water, to air: 0.3875 dimensionless; name fraction_CW_to_air; = (0.5*fraction_CW_OT_to_air)+(0.5*fraction_CW_R_to_air); lognormal variance with pedigree 0.092025, pedigree (4,4,3,2,4)
  Calculated value based on literature value (see comments of the other parametres present in this dataset) and expert opinion. In the case when no industry/literature data are available about the type of cooling or directly fraction, cooling water, to air specific for the process a default assumption is applied. It is assumed that the once-through cooling system is used in 50% of all cases and recirculating system is used in another 50% of all cases.

## Reference product
- benzene: 1 kg; name RP; By-product classification allocatable product; CPC 33100: Coke and semi-coke of coal, of lignite or of peat; retort carbon; CAS 71-43-2
  EcoSpold01Location=RER
  production volume 6.3911e10 kg; name RP_PV
    Global benzene production capacity 2017 based on statista, see: https://www.statista.com/statistics/1108114/global-benzene-capacity/.
    Capacity instead of production volume was chosen due to the relation to other benzene producing activities.
  property price 0.614 EUR2005
    Temporary price data. Calculated as 90% of purchasers price based on: 2004 prices calculated from Import/Export data (total trades (USD) divided by total weight (kg) in EU27, USA, China, Japan and India) from UN Trade data statistics (http://data.un.org/Explorer.aspx, Accessed 6 July 2010). Commodity: benzene
  property carbon content 0.923077
    carbon content on a dry matter basis (reserved; not for manual entry)
  properties: heating value, net 42.5 MJ, wet mass 1 kg, carbon content, fossil 0.923077, carbon content, non-fossil 0, water in wet mass 0 kg, water content 0, dry mass 1 kg, carbon allocation 0.923077 kg

## Inputs from technosphere
- coal slurry: -0.00015321 kg; name slurry
  EcoSpold01Location=GLO
  Uncertainty for LCI results cannot be determined
  production volume 9.7918e6 kg; = RP_PV*slurry/abs(RP)
    Calculated from the production volume of benzene in proportion to the respective output amounts.
  property price 0 EUR2005; name slurry_price_EUR2005
  properties: wet mass 1 kg, dry mass 1 kg, carbon content, fossil 0.124
  note on carbon content, fossil: Coal tailings composition in Tab 3.4, (Doka G. (2009) Life Cycle Inventory of the disposal of lignite spoil, coal spoil and coal tailings. Doka Life Cycle Assessments, Zurich. Commissioned by the Swiss Centre for Life Cycle Inventories ecoinvent Centre)
- waste wood, untreated: 0 kg; name waste_wood
  EcoSpold01Location=CH
  Uncertainty for LCI results cannot be determined
  production volume 0 kg
    (same comment as for coal slurry)
  property price 0 EUR2005; name waste_wood_price_EUR2005
  properties: wet mass 1 kg, carbon content, non-fossil 0.48632, heating value, net 13.99 MJ, water content 0.25, dry mass 0.8 kg
  note on carbon content, non-fossil: Tab A.4, ecoinvent v2.2 report 13_I. C content has been referred to 1 kg DM,
  note on heating value, net: Value taken from the general comment of the treatment dataset.
- decommissioned chemical production facilities: -5.0627e-5 kg; name decomiss
  EcoSpold01Location=RER
  Uncertainty for LCI results cannot be determined
  production volume 3.23562e6 kg; = RP_PV*decomiss/abs(RP)
    (same comment as for coal slurry)
  property price 0 EUR2005; name decomiss_price_EUR2005
  properties: carbon content, fossil 0.0169382, carbon content, non-fossil 5.78006e-6, wet mass 1 kg, dry mass 1 kg
  note on carbon content, fossil: Calculated from C content in input materials in the infrastructure
- waste plastic, mixture: 0 kg; name waste_plastic
  Uncertainty for LCI results cannot be determined
  EcoSpold01Location=CH
  production volume 0 kg
    (same comment as for coal slurry)
  property price 0 EUR2005; name waste_plastic_price_EUR2005
  properties: water content 0.180638, heating value, net 30.79 MJ, wet mass 1 kg, carbon content, fossil 0.747344, dry mass 0.847 kg
  note on carbon content, fossil: C content in 1 kg DM was calculated using data in Tab A.2, ecoinvent v2.2 report 13_I
- hazardous waste, for incineration: -0.0022028 kg; name h_waste
  EcoSpold01Location=CH
  Uncertainty for LCI results cannot be determined
  production volume 1.40783e8 kg; = RP_PV*h_waste/abs(RP)
    (same comment as for coal slurry)
  property price 0 EUR2005; name h_waste_price_EUR2005
  properties: carbon content, fossil 0.554667, wet mass 1 kg, dry mass 0.75 kg, water content 0.333333, heating value, net 17 MJ
  note on carbon content, fossil: Tab A.6, ecoinvent v2.2 report 13_I. C content has been calculated after data in the tables, and then referred to 1 kg DM
- spoil from hard coal mining: -0.011736 kg; name spoil
  Uncertainty for LCI results cannot be determined
  EcoSpold01Location=GLO
  production volume 7.50059e8 kg; = RP_PV*spoil/abs(RP)
    (same comment as for coal slurry)
  property price 0 EUR2005; name spoil_price_EUR2005
  properties: wet mass 1 kg, dry mass 1 kg, carbon content, fossil 0.007879
  note on carbon content, fossil: Composition of coal spoil is adopted by proxy from lignite spoil (pg 19, Doka G. (2009) Life Cycle Inventory of the disposal of lignite spoil, coal spoil and coal tailings. Doka Life Cycle Assessments, Zurich. Commissioned by the Swiss Centre for Life Cycle Inventories ecoinvent Centre)
- municipal solid waste: 0 kg; name msw
  EcoSpold01Location=CH
  Uncertainty for LCI results cannot be determined
  production volume 0 kg
    (same comment as for coal slurry)
  properties: wet mass 1 kg, dry mass 0.771 kg, heating value, net 11.74 MJ, carbon content, non-fossil 0.261655, carbon content, fossil 0.171549, water content 0.297017
  note on carbon content, non-fossil: MSW composition in tab 4.1, ecoinvent v2.2 report 13_I. C content referred to 1 kg DM
- average incineration residue: -0.0050386 kg; name residue
  EcoSpold01Location=CH
  Uncertainty for LCI results cannot be determined
  production volume 3.22022e8 kg; = RP_PV*residue/abs(RP)
    (same comment as for coal slurry)
  property price 0 EUR2005; name residue_price_EUR2005
  properties: dry mass 1 kg, carbon content, fossil 0.0325466, carbon content, non-fossil 0.0511208, wet mass 1 kg
  note on carbon content, fossil: Tab A.1, ecoinvent v2.2 report 13_I. It is considered that 61.1% of the C has a biogenic origin
- waste wood, untreated: -3.71913e-9, -4.61787e-10, -3.37618e-11, -1.29702e-9, -1.95948e-10, -3.09778e-10, -4.93416e-8 kg (7 entries)
  EcoSpold01Location=CH
  Uncertainty for LCI results cannot be determined
  production volume 3538.05 kg
- waste plastic, mixture: -4.44615e-7, -2.97075e-8, -2.24673e-9, -1.22702e-8, -4.95704e-9, -1.16517e-8, -3.11255e-6 kg (7 entries)
  Uncertainty for LCI results cannot be determined
  EcoSpold01Location=CH
  production volume 231230 kg
- municipal solid waste: -2.7158e-6, -6.84314e-7, -9.77925e-7, -0.00192072 kg (4 entries)
  EcoSpold01Location=CH
  Uncertainty for LCI results cannot be determined
  production volume 1.23035e8 kg

## Inputs from nature
- Calcite, in ground [natural resource, in ground]: 0.00030721 kg
  Uncertainty for LCI results cannot be determined
- Fluorspar, in ground [natural resource, in ground]: 7.3246e-7 kg
  92% CaF2 in ore; Uncertainty for LCI results cannot be determined
- Clay, bentonite, in ground [natural resource, in ground]: 8.8925e-5 kg
  Uncertainty for LCI results cannot be determined
- Energy, gross calorific value, in biomass [natural resource, biotic]: 0.10581 MJ
- Aluminium, in ground [natural resource, in ground]: 5.4125e-6 kg
  24% Al in bauxite; 11% Al in ore; Uncertainty for LCI results cannot be determined
- Feldspar, in ground [natural resource, in ground]: 0 kg
  Uncertainty for LCI results cannot be determined
- Phosphorus, in ground [natural resource, in ground]: 2.5521e-12 kg
  18% P in apatite; 12% in ore; Uncertainty for LCI results cannot be determined
- Oil, crude, in ground [natural resource, in ground]: 0.87741 kg
  Uncertainty for LCI results cannot be determined
- Olivine, in ground [natural resource, in ground]: 2.977e-6 kg
  Uncertainty for LCI results cannot be determined
- Sylvite, in ground [natural resource, in ground]: 1.3965e-7 kg
  25% Sylvite in sylvinite; Uncertainty for LCI results cannot be determined
- Water, river [natural resource, in water]: 0.00013766 m3; name water_river_input; lognormal variance with pedigree 1.21, pedigree (5,5,5,5,5)
  Uncertainty for LCI results cannot be determined
- Sodium chloride, in ground [natural resource, in ground]: 0.00047291 kg
  Uncertainty for LCI results cannot be determined
- Sodium nitrate, in ground [natural resource, in ground]: 2.5948e-15 kg
  Uncertainty for LCI results cannot be determined
- Energy, potential (in hydropower reservoir), converted [natural resource, in water]: 0.083222 MJ
- Uranium, in ground [natural resource, in ground]: 3.5058e-6 kg
  Uncertainty for LCI results cannot be determined
- Talc, in ground [natural resource, in ground]: 0 kg
  Uncertainty for LCI results cannot be determined
- Anhydrite, in ground [natural resource, in ground]: 8.8719e-6 kg
  Uncertainty for LCI results cannot be determined
- Water, salt, ocean [natural resource, in water]: 0.0005514 m3; name water_salt_ocean_input; lognormal variance with pedigree 1.21, pedigree (5,5,5,5,5)
  Uncertainty for LCI results cannot be determined
- Peat, in ground [natural resource, biotic]: 7.3084e-5 kg
  Uncertainty for LCI results cannot be determined
- Shale, in ground [natural resource, in ground]: 2.5116e-5 kg
  Uncertainty for LCI results cannot be determined
- Sulfur, in ground [natural resource, in ground]: 7.607e-5 kg
  Uncertainty for LCI results cannot be determined
- Chromium, in ground [natural resource, in ground]: 4.5741e-10 kg
  25.5% Cr in chromite; 11.6% in ore; Uncertainty for LCI results cannot be determined
- Water, unspecified natural origin [natural resource, in water]: 0.00099843 m3; name water_UNO_input; lognormal variance with pedigree 1.21, pedigree (5,5,5,5,5)
  Uncertainty for LCI results cannot be determined
- Water, cooling, unspecified natural origin [natural resource, in water]: 0.083017 m3; name water_cooling_UNO_input; lognormal variance with pedigree 1.21, pedigree (5,5,5,5,5)
  Uncertainty for LCI results cannot be determined
- Magnesite, in ground [natural resource, in ground]: 0 kg
  60% Magnesite in ore; Uncertainty for LCI results cannot be determined
- Nickel, in ground [natural resource, in ground]: 5.886e-12 kg
  1.98% Ni in silicates; 1.04% Ni in ore; Uncertainty for LCI results cannot be determined
- Titanium, in ground [natural resource, in ground]: 0 kg
  95% TiO2 in rutile; 0.4% TiO2 in ore; Uncertainty for LCI results cannot be determined
- Dolomite, in ground [natural resource, in ground]: 3.8978e-6 kg
  Uncertainty for LCI results cannot be determined
- Gas, natural, in ground [natural resource, in ground]: 0.63155 m3
  Uncertainty for LCI results cannot be determined
- Barium, in ground [natural resource, in ground]: 5.7823e-8 kg
  15% BaSO4 in ore; Uncertainty for LCI results cannot be determined
- Mercury, in ground [natural resource, in ground]: 8.7498e-10 kg
  Uncertainty for LCI results cannot be determined
- Coal, brown, in ground [natural resource, in ground]: 5.3133e-7 kg
  Uncertainty for LCI results cannot be determined
- Sand, unspecified, in ground [natural resource, in ground]: 0.00010842 kg
  Uncertainty for LCI results cannot be determined
- Coal, hard, unspecified, in ground [natural resource, in ground]: 0.056811 kg
  Uncertainty for LCI results cannot be determined
- Lead, in ground [natural resource, in ground]: 2.3938e-7 kg
  5.0% Pb in sulfide; 3.0% Pb in ore; Uncertainty for LCI results cannot be determined
- Clay, unspecified, in ground [natural resource, in ground]: 2.4942e-9 kg
  Uncertainty for LCI results cannot be determined
- Manganese, in ground [natural resource, in ground]: 4.0928e-7 kg
  35.7% Mn in sedimentary deposit; 14.2% Mn in ore; Uncertainty for LCI results cannot be determined
- Copper, in ground [natural resource, in ground]: 3.7012e-6 kg
  0.99% Cu in sulfide; 0.36% Cu and 82 ppm Mo in ore; Uncertainty for LCI results cannot be determined
- Zinc, in ground [natural resource, in ground]: 9.7698e-9 kg
  9.0% Zn in sulfide; 5.3% Zn in ore; Uncertainty for LCI results cannot be determined
- Iron, in ground [natural resource, in ground]: 0.00031732 kg
  46% Fe in siderite; 25% Fe in ore; Uncertainty for LCI results cannot be determined
- Wood, unspecified, standing [natural resource, biotic]: 4.8909e-9 m3
  Uncertainty for LCI results cannot be determined
- Gravel, in ground [natural resource, in ground]: 1.1708e-6 kg
  Uncertainty for LCI results cannot be determined
- Granite, in ground [natural resource, in ground]: 1.172e-14 kg
  Uncertainty for LCI results cannot be determined
- Water, well, in ground [natural resource, in water]: 1.1812e-10 m3; name water_well_in_ground_input; lognormal variance with pedigree 1.21, pedigree (5,5,5,5,5)
  Uncertainty for LCI results cannot be determined

## Emissions to nature
- Zinc [air, urban air close to ground]: 6.4617e-10 kg
  Uncertainty for LCI results cannot be determined
- Copper [air, urban air close to ground]: 6.0757e-9 kg
  Uncertainty for LCI results cannot be determined
- Lead [water, surface water]: 2.6113e-10 kg
  Uncertainty for LCI results cannot be determined
- BOD5, Biological Oxygen Demand [water, surface water]: 5.9256e-5 kg
  Uncertainty for LCI results cannot be determined
- Sulfide [water, surface water]: 3.5763e-9 kg
  Uncertainty for LCI results cannot be determined
- Cadmium [air, urban air close to ground]: 3.2548e-11 kg
  Uncertainty for LCI results cannot be determined
- Chromium [air, urban air close to ground]: 3.1649e-6 kg
  Uncertainty for LCI results cannot be determined
- Magnesium [water, surface water]: 5.5618e-10 kg
  Uncertainty for LCI results cannot be determined
- Mercury [water, surface water]: 9.1162e-11 kg
  Uncertainty for LCI results cannot be determined
- Hydrogen chloride [air, urban air close to ground]: 3.0206e-5 kg
  Uncertainty for LCI results cannot be determined
- Dinitrogen monoxide [air, urban air close to ground]: 2.539e-8 kg
  Uncertainty for LCI results cannot be determined
- Hydrogen sulfide [air, urban air close to ground]: 1.0686e-8 kg
  Uncertainty for LCI results cannot be determined
- Nickel [air, urban air close to ground]: 5.754e-6 kg
  Uncertainty for LCI results cannot be determined
- Ethene, chloro- [water, surface water]: 5.8301e-12 kg
  Uncertainty for LCI results cannot be determined
- Oils, unspecified [water, surface water]: 3.4192e-5 kg
  Uncertainty for LCI results cannot be determined
- Acidity, unspecified [water, surface water]: 1.6714e-6 kg
  Uncertainty for LCI results cannot be determined
- Hydrocarbons, aromatic [air, urban air close to ground]: 1.67e-5 kg
  Uncertainty for LCI results cannot be determined
- Cyanide [water, surface water]: 3.0071e-11 kg
  Uncertainty for LCI results cannot be determined
- Hydrocarbons, unspecified [water, surface water]: 1.6597e-5 kg
  Uncertainty for LCI results cannot be determined
- Carbonate [water, surface water]: 0.00012146 kg
  Uncertainty for LCI results cannot be determined
- Particulates, > 2.5 um, and < 10um [air, urban air close to ground]: 0.00020529 kg
  Uncertainty for LCI results cannot be determined
- Suspended solids, unspecified [water, surface water]: 7.7428e-5 kg
  Uncertainty for LCI results cannot be determined
- Tin, ion [water, surface water]: 7.9608e-15 kg
  Uncertainty for LCI results cannot be determined
- Bromate [water, surface water]: 5.835e-10 kg
  Uncertainty for LCI results cannot be determined
- Nickel, ion [water, surface water]: 4.1906e-10 kg
  Uncertainty for LCI results cannot be determined
- Chloride [water, surface water]: 0.00010058 kg
  Uncertainty for LCI results cannot be determined
- Hydrocarbons, aliphatic, alkanes, cyclic [air, urban air close to ground]: 5.754e-6 kg
  Uncertainty for LCI results cannot be determined
- Benzene [air, urban air close to ground]: 1.9197e-5 kg
  Uncertainty for LCI results cannot be determined
- Toluene [air, urban air close to ground]: 3.2534e-6 kg
  Uncertainty for LCI results cannot be determined
- Copper, ion [water, surface water]: 1.6768e-8 kg
  Uncertainty for LCI results cannot be determined
- Benzene, ethyl- [air, urban air close to ground]: 1.0843e-6 kg
  Uncertainty for LCI results cannot be determined
- Methane, dichloro-, HCC-30 [air, urban air close to ground]: 6.0085e-11 kg
  Uncertainty for LCI results cannot be determined
- Sulfate [air, urban air close to ground]: 3.5499e-15 kg
  Uncertainty for LCI results cannot be determined
- Silicon [water, surface water]: 0 kg
  Uncertainty for LCI results cannot be determined
- Lead [air, urban air close to ground]: 5.7041e-9 kg
  Uncertainty for LCI results cannot be determined
- Selenium [air, urban air close to ground]: 6.9384e-13 kg
  Uncertainty for LCI results cannot be determined
- Aldehydes, unspecified [air, urban air close to ground]: 2.7645e-15 kg
  Uncertainty for LCI results cannot be determined
- Cadmium, ion [water, surface water]: 2.1549e-13 kg
  Uncertainty for LCI results cannot be determined
- Potassium, ion [water, surface water]: 4.381e-9 kg
  Uncertainty for LCI results cannot be determined
- AOX, Adsorbable Organic Halogen as Cl [water, surface water]: 1.6919e-12 kg
  Uncertainty for LCI results cannot be determined
- COD, Chemical Oxygen Demand [water, surface water]: 0.0002502 kg
  Uncertainty for LCI results cannot be determined
- Carbon monoxide, non-fossil [air, urban air close to ground]: 3.7153e-6 kg
  Uncertainty for LCI results cannot be determined
- Carbon dioxide, fossil [air, urban air close to ground]: 1.4502 kg
  Uncertainty for LCI results cannot be determined
- Antimony [air, urban air close to ground]: 1.8569e-15 kg
  Uncertainty for LCI results cannot be determined
- Nitrate [water, surface water]: 5.0609e-6 kg
  Uncertainty for LCI results cannot be determined
- Dioxins, measured as 2,3,7,8-tetrachlorodibenzo-p-dioxin [air, urban air close to ground]: 0 kg
  Uncertainty for LCI results cannot be determined
- Cyanide [air, urban air close to ground]: 0 kg
  Uncertainty for LCI results cannot be determined
- Ammonia [air, urban air close to ground]: 2.9936e-10 kg
  Uncertainty for LCI results cannot be determined
- Ethane, 1,2-dichloro- [air, urban air close to ground]: 3.3452e-10 kg
  Uncertainty for LCI results cannot be determined
- Water [air, unspecified]: 0.032515 m3; name water_to_air_unspecified; lognormal variance with pedigree 0.0827, pedigree (2,2,5,5,1)
  Calculated value based on literature values and expert opinion. See comments in the parametres' comment field.
  property fraction, origin: unspecified 0.995656; name fraction_origin_unspecified
  property fraction, origin: salt water 0.00347645; name fraction_origin_salt_water
  property fraction, origin: fresh water 0.000867916; name fraction_origin_fresh_water
- Manganese [water, surface water]: 1.8335e-14 kg
  Uncertainty for LCI results cannot be determined
- Methane, non-fossil [air, urban air close to ground]: 2.2023e-5 kg
  Uncertainty for LCI results cannot be determined
- Chlorate [water, surface water]: 1.0966e-7 kg
  Uncertainty for LCI results cannot be determined
- Carbon disulfide [air, urban air close to ground]: 1.5113e-10 kg
  Uncertainty for LCI results cannot be determined
- Nitrogen [water, surface water]: 2.738e-6 kg
  Uncertainty for LCI results cannot be determined
- Chlorine [water, surface water]: 1.4411e-9 kg
  Uncertainty for LCI results cannot be determined
- Carbon dioxide, non-fossil [air, urban air close to ground]: 0.0024472 kg
  Uncertainty for LCI results cannot be determined
- Hydrogen fluoride [air, urban air close to ground]: 1.1342e-6 kg
  Uncertainty for LCI results cannot be determined
- Silver [air, urban air close to ground]: 2.0034e-11 kg
  Uncertainty for LCI results cannot be determined
- Iron, ion [water, surface water]: 1.3577e-8 kg
  Uncertainty for LCI results cannot be determined
- Zinc, ion [water, surface water]: 2.5696e-8 kg
  Uncertainty for LCI results cannot be determined
- Calcium, ion [water, surface water]: 3.3664e-8 kg
  Uncertainty for LCI results cannot be determined
- Water [water, unspecified]: 0.0521895 m3; name water_to_water_unspecified; lognormal variance with pedigree 0.0827, pedigree (2,2,5,5,1)
  (same comment as for Water)
  property carbon content, non-fossil 0; name C_content_non_fossil
  property dry mass 0 kg; name DM
  property fraction, origin: unspecified 0.989504; name fraction_origin_unspecified_Ww
  property wet mass 1000 kg; name WM
  property fraction, origin: fresh water 0.00209697; name fraction_origin_fresh_water_Ww
  property fraction, origin: salt water 0.00839945; name fraction_origin_salt_water_Ww
  property water in wet mass 1000 kg; name WWM
  property carbon content, fossil 0; name C_content_fossil
- Chlorinated solvents, unspecified [water, surface water]: 5.8972e-9 kg
  Uncertainty for LCI results cannot be determined
- Aluminium [water, surface water]: 1.2035e-6 kg
  Uncertainty for LCI results cannot be determined
- Chlorine [air, urban air close to ground]: 1.6119e-8 kg
  Uncertainty for LCI results cannot be determined
- Strontium [water, surface water]: 1.1472e-11 kg
  Uncertainty for LCI results cannot be determined
- TOC, Total Organic Carbon [water, surface water]: 3.5463e-5 kg
  Uncertainty for LCI results cannot be determined
- Propene [air, urban air close to ground]: 4.6693e-6 kg
  Uncertainty for LCI results cannot be determined
- Fluoride [water, surface water]: 1.208e-8 kg
  Uncertainty for LCI results cannot be determined
- Particulates, > 10 um [air, urban air close to ground]: 0.00015278 kg
  Uncertainty for LCI results cannot be determined
- Arsenic, ion [water, surface water]: 5.6863e-10 kg
  Uncertainty for LCI results cannot be determined
- Mercury [air, urban air close to ground]: 7.7384e-10 kg
  Uncertainty for LCI results cannot be determined
- Arsenic [air, urban air close to ground]: 2.3544e-10 kg
  Uncertainty for LCI results cannot be determined
- Nitrogen oxides [air, urban air close to ground]: 0.0027991 kg
  Uncertainty for LCI results cannot be determined
- Styrene [air, urban air close to ground]: 1.9224e-7 kg
  Uncertainty for LCI results cannot be determined
- Fluorine [air, urban air close to ground]: 3.2342e-10 kg
  Uncertainty for LCI results cannot be determined
- Methane, fossil [air, urban air close to ground]: 0.013051 kg
  Uncertainty for LCI results cannot be determined
- Ethene [air, urban air close to ground]: 6.3037e-6 kg
  Uncertainty for LCI results cannot be determined
- NMVOC, non-methane volatile organic compounds, unspecified origin [air, urban air close to ground]: 0.0022374 kg
  Uncertainty for LCI results cannot be determined
- Sodium, ion [water, surface water]: 0.00012528 kg
  Uncertainty for LCI results cannot be determined
- Phenol [water, surface water]: 3.5601e-7 kg
  Uncertainty for LCI results cannot be determined
- Hydrogen [air, urban air close to ground]: 2.6578e-5 kg
  Uncertainty for LCI results cannot be determined
- Sulfur dioxide [air, urban air close to ground]: 0.004225 kg
  Uncertainty for LCI results cannot be determined
- Dissolved solids [water, surface water]: 2.4142e-5 kg
  Uncertainty for LCI results cannot be determined
- Xylene [air, urban air close to ground]: 1.3437e-6 kg
  Uncertainty for LCI results cannot be determined
- Particulates, < 2.5 um [air, urban air close to ground]: 0.00011936 kg
  Uncertainty for LCI results cannot be determined
- Carbon monoxide, fossil [air, urban air close to ground]: 0.0022017 kg
  Uncertainty for LCI results cannot be determined
- Hydrocarbons, chlorinated [air, urban air close to ground]: 4.6742e-9 kg
  Uncertainty for LCI results cannot be determined
- Ethene, chloro- [air, urban air close to ground]: 2.7648e-10 kg
  Uncertainty for LCI results cannot be determined
- DOC, Dissolved Organic Carbon [water, surface water]: 3.5463e-5 kg
  Calculated as equal to TOC.
- Sulfate [water, surface water]: 0.00031125 kg
  Uncertainty for LCI results cannot be determined
- Chromium, ion [water, surface water]: 3.05e-12 kg
  Uncertainty for LCI results cannot be determined
- Ethane, 1,2-dichloro- [water, surface water]: 5.2717e-12 kg
  Uncertainty for LCI results cannot be determined
- Ammonium, ion [water, surface water]: 3.1196e-6 kg
  Uncertainty for LCI results cannot be determined
- Benzene [water, surface water]: 0 kg
  Uncertainty for LCI results cannot be determined
- Phosphorus [water, surface water]: 6.4316e-8 kg
  Uncertainty for LCI results cannot be determined

## Sampling procedure
literature values based on company survey

## Extrapolations
no extrapolation This dataset has been copied from an original dataset covering the geography RER. The uncertainty has been adjusted accordingly.

## Review by Jürgen Sutter 2010-04-06
passed.
