# hard coal mine operation and hard coal preparation

Dataset: EcoSpold 2, unit process
Geography: ID
Time period: 1990-01-01 to 2021-12-31
Technology level: current
Classification: ISIC rev.4 ecoinvent: 0510:Mining of hard coal
Classification: EcoSpold01Categories: hard coal/production
Scenario: Business-as-Usual
System model: Allocation, cut-off by classification
Generated by: Matthias Stucki (obsolete but e-mail OK)
Published in: Röder, A. 2004
Database: ecoinvent
isCopyrightProtected: true
accessRestrictedTo: 1

## General comment
This dataset represents hard coal mining in Indonesia based on the ecoinvent v2.2 dataset for centrally planned Asia (CPA) with Indonesia-specific production volumes and adjusted uncertainty. Average data for coal mining in the specific region have been taken from a summary study on material flows and energy uses. Data are normalized by the mass unit of produced coal, including preparation and without differentiating steam coal from the rest. In order to enable a consistent calculation of the cumulative energy demand, the extracted mass of raw coal was adjusted by a factor of 1.03, taking into account the difference in the upper heating value of raw coal of this region (19.7 MJ/kg), compared to the used worldwide average of 19.1 MJ/kg. Mine reclamation is not included in this module, because it mostly concerns the tailings, which are described in a separate module. Electricity, heating from heavy oil industrial boilers, and diesel uses are included. The use of the module "heat, at hard coal industrial furnace 1-10MW" leads to an underestimation of emissions, because the quality of coal burned at mines is usually lower than coal burned in industrial boilers elsewhere. Water uses in mining and coal washing have been approximately described using the module "tap water". Particle emissions are assumed to be all greater than 10 micrometer. Radon emissions are average value worldwide. Methane emissions are based on average emission factors according to the 2006 IPCC Guidelines for National Greenhouse Gas Inventories (see exchange comment for more details). Emissions to water are estimated for Western European conditions and applied to this region. They are assumed to be released to rivers. Possible emissions to groundwater have not been accounted for. All coalbed methane released from the seam is accounted for as natural gas resource. However the recovered methane, possibly used for district heating and for energetic needs of some individual mines, has not been described as an energy byproduct. The unaccounted energy is nevertheless negligible compared to the energy content of the product coal (maximum of two percent for underground mining).
[This dataset is meant to replace the following datasets:
- hard coal mine operation, Asia without China, 1990 - 2002]
[This dataset is meant to replace the following datasets:]

## Included activities start
From hard coal embedded in rock.

## Included activities end
The activitiy ends with loading of hard coal on lorries. The dataset includes the blasting of rock and the operation of machinery used in mining.

## Technology
Not specified.

## Parameters
- fraction, tap water, to air: 0.15 dimensionless; name fraction_TW_to_air; = fraction_PW_to_air; lognormal variance with pedigree 0.092025, pedigree (4,4,3,2,4)
  Calculated value. See comment in the other parametres present in this dataset. Tap water is considered to be always used as process water, thus process water fractions to air are applied to all tap water input flows to calculate the amount of water consumed in the processes.
- fraction, process water, to air: 0.15 dimensionless; name fraction_PW_to_air; lognormal variance with pedigree 0.092025, pedigree (4,4,3,2,4)
  Literature value. In case when no industry/process specific data are available, default evaporation fraction value is used. This value is 15% and is based on literature (Statistics Canada, 2007 & Shaffer, K.H., 2008, Consumptive water use in the Great Lakes Basin, USGS & Shiklomanov, 2003, World Water Resources at the Beginning of the 21st Century) and has been approved by an expert.

## Reference product
- hard coal: 1 kg; CPC 11010: Hard coal; By-product classification allocatable product
  EcoSpold01Location=CPA
  production volume 4.91e11 kg; name apv_hardcoal
    Production Volume in 2016, according to VDKi (2017), crossreferenced with statistics from the World Coal Association, the United Nations and BP. Reference(s): Verein der Kohleimporteure (VDKi). 2017. Jahresbericht 2017. Accessed online at: http://www.kohlenimporteure.de/publikationen/jahresbericht-2017.html, 28.11.2016
  property heating value, net 27.91 MJ
    Based on the Characterization factor of Hard coal in the CED method
  property carbon content, fossil 0.845
    C content 75-94% (specified in Tab 1.1, report 6, part VI). A mean content of 0.845 kg C/ kg dry hard coal was considered
  property price 0.036 EUR2005
    Steam coal import costs in EU in IEA key world energy statistics 2003-2004.
  property carbon content 0.845
    carbon content on a dry matter basis (reserved; not for manual entry)
  properties: carbon content, non-fossil 0, water content 0.0638298, wet mass 1 kg, water in wet mass 0.06 kg, dry mass 0.94 kg, carbon allocation 0.7943 kg

## Inputs from technosphere
- electricity, high voltage: 0.0129 kWh; lognormal variance with pedigree 0.16, pedigree (1,1,5,1,1)
  own assumption
  EcoSpold01Location=UCTE
- coal slurry: -0.155 kg; name a_slurry; lognormal variance with pedigree 0.16, pedigree (1,1,5,1,1)
  own assumption
  EcoSpold01Location=GLO
  production volume 7.6105e10 kg; = apv_hardcoal* a_slurry
    Calculated from the production volume of hard coal in proportion to the respective output amounts.
  property price 0 EUR2005; name a_slurry_price_EUR2005
  properties: wet mass 1 kg, carbon content, fossil 0.124, dry mass 1 kg
  note on carbon content, fossil: Coal tailings composition in Tab 3.4, (Doka G. (2009) Life Cycle Inventory of the disposal of lignite spoil, coal spoil and coal tailings. Doka Life Cycle Assessments, Zurich. Commissioned by the Swiss Centre for Life Cycle Inventories ecoinvent Centre)
- heat, district or industrial, other than natural gas: 0.107 MJ; lognormal variance with pedigree 0.16, pedigree (1,1,5,1,1)
  EcoSpold01Location=RER
  own assumption
  properties: heating value, net 1 MJ
- diesel, burned in building machine: 0.0242 MJ; lognormal variance with pedigree 0.16, pedigree (1,1,5,1,1)
  own assumption
  EcoSpold01Location=GLO
  properties: heating value, net 1 MJ
- blasting: 0.000125 kg; lognormal variance with pedigree 0.16, pedigree (1,1,5,1,1)
  EcoSpold01Location=RER
  own assumption
- mine infrastructure, underground, hard coal: 3.23e-11 unit; lognormal variance with pedigree 0.04, pedigree (1,1,5,1,1)
  standard for ressources
  EcoSpold01Location=GLO
  properties: capacity [kg/s] 31.71 kg/s, lifetime capacity [kg] 3e10 kg
- spoil from hard coal mining: -5.0014 kg; name a_spoil; lognormal variance with pedigree 0.16, pedigree (1,1,5,1,1)
  own assumption
  EcoSpold01Location=GLO
  production volume 2.45569e12 kg; = apv_hardcoal* a_spoil
    (same comment as for coal slurry)
  property price 0 EUR2005; name a_spoil_price_EUR2005
  properties: dry mass 1 kg, carbon content, fossil 0.007879, wet mass 1 kg
  note on carbon content, fossil: Composition of coal spoil is adopted by proxy from lignite spoil (pg 19, Doka G. (2009) Life Cycle Inventory of the disposal of lignite spoil, coal spoil and coal tailings. Doka Life Cycle Assessments, Zurich. Commissioned by the Swiss Centre for Life Cycle Inventories ecoinvent Centre)
- mine infrastructure, open cast, hard coal: 1e-12 unit; lognormal variance with pedigree 0.04, pedigree (1,1,5,1,1)
  EcoSpold01Location=GLO
  standard for ressources
  properties: capacity [kg/s] 31.71 kg/s, lifetime capacity [kg] 3e10 kg
- tap water: 0.442 kg; name tap_water_input; lognormal variance with pedigree 0.16, pedigree (1,1,5,1,1)
  EcoSpold01Location=RER
  own assumption
  properties: dry mass 0.000337476 kg, water content 2962.17, wet mass 1 kg, carbon content, fossil 0.00178991
  note on carbon content, fossil: Bicarbonate content is 2.93 mol/m3. CO2 content is 0.1 mol/m3 (ecoinvent v2.2 report 8, Tab 93.1).

## Inputs from nature
- Occupation, mineral extraction site [natural resource, land]: 0.0013 m2*year; lognormal variance with pedigree 1.37, pedigree (1,1,5,1,1)
  own assumption
- Transformation, from unspecified [natural resource, land]: 0.000161 m2; lognormal variance with pedigree 1.37, pedigree (1,1,5,1,1)
  large spread in data
- Gas, mine, off-gas, process, coal mining [natural resource, in ground]: 0.0127 m3; lognormal variance with pedigree 0.16, pedigree (1,1,5,1,1)
  own assumption
- Transformation, to dump site [natural resource, land]: 0.00015 m2; lognormal variance with pedigree 0.69, pedigree (1,1,5,1,1)
  large spread in data
- Occupation, dump site [natural resource, land]: 0.018 m2*year; lognormal variance with pedigree 0.69, pedigree (1,1,5,1,1)
  large spread in data
- Water, well, in ground [natural resource, in water]: 0.00263 m3; name water_well_in_ground_input; lognormal variance with pedigree 0.34, pedigree (1,1,5,1,1)
  own assumption
- Coal, hard, unspecified, in ground [natural resource, in ground]: 1.11 kg; lognormal variance with pedigree 0.05, pedigree (1,1,5,1,1)
  own assumption
- Transformation, to mineral extraction site [natural resource, land]: 1.1e-5 m2; lognormal variance with pedigree 1.37, pedigree (1,1,5,1,1)
  large spread in data

## Emissions to nature
- Nickel, ion [water, ground-]: 1e-7 kg; lognormal variance with pedigree 0.34, pedigree (1,1,5,1,1)
  own assumption
- Particulates, > 10 um [air, non-urban air or from high stacks]: 0.000109 kg; lognormal variance with pedigree 0.34, pedigree (1,1,5,1,1)
  own assumption
- Iron, ion [water, ground-]: 2e-6 kg; lognormal variance with pedigree 0.69, pedigree (1,1,5,1,1)
  own assumption
- Sulfate [water, ground-]: 0.0005 kg; lognormal variance with pedigree 0.69, pedigree (1,1,5,1,1)
  own assumption
- Ammonium, ion [water, ground-]: 1e-6 kg; lognormal variance with pedigree 0.69, pedigree (1,1,5,1,1)
  own assumption
- Methane, fossil [air, non-urban air or from high stacks]: 0.001 kg; lognormal variance with pedigree 0.186, pedigree (4,5,5,5,3)
  This value represents fugitive CH4 emissions from mining, processing, storage and transportation of coal:
  These emissions are calculated based on the average emission factors for mine operation and post-mining activities of underground and surface coal mines suggested by the 2006 IPCC Guidelines for National Greenhouse Gas Inventories (Chapter 4.1 Fugitive emissions from mining, processing, storage and transportation of coal, p. 4.11 ff., accessible at <https://www.ipcc-nggip.iges.or.jp/public/2006gl/pdf/2_Volume2/V2_4_Ch4_Fugitive_Emissions.pdf>, July 2018).
  Average CH4 emission factors according to IPCC 2006 are:
  underground coal production = 18m3/tonne = 12.06 kg/tonne
  post-mining emissions, underground mines = 2.5m3/tonne = 1.675 kg/tonne
  surface coal production = 1.2m3/tonne = 0.804 kg/tonne
  post mining emissions, surface mines = 0.1m3/tonne =0.067 kg/tonne
  Ch4 density at 20 degrees Celsius and 1 bar is 0.67kg/m3.
  The applied share of coal from underground and surface mines in Indonesia is 1 % and 99 %, respectively (Sasaoka et al., 2015).
  Under this approach the calculated CH4 emissions in Indonesia amount to 0.001 kg CH4/kg coal. The uncertainty of this value is high. Nonetheless, this approach was considered more reliable by the ecoinvent industry experts than applying the estimated fugitive CH4 emissions from soild fuels in 2014, published in 3rd National Communication on Climate Change of Indonesia (total CH4 emissions of 2221000000kg CO2-eq), because it calculation underlying the report are neither transparent nor consistent with the IPCC 2006 emission factors.
  Reference(s):
  IPCC, 2006, IPCC Guidelines for National Greenhouse Gas Inventories, Chapter 4.1 Fugitive emissions from mining, processing, storage and transportation of coal, p. 4.11 ff., accessible at <https://www.ipcc-nggip.iges.or.jp/public/2006gl/pdf/2_Volume2/V2_4_Ch4_Fugitive_Emissions.pdf>, July 2018
  Takashi Sasaoka, Hiroshi Takamoto, Hideki Shimada, Jiro Oya, Akihiro Hamanaka, Kikuo Matsui, 2015, Surface subsidence due to underground mining operation under weak geological condition in Indonesia, Journal of Rock Mechanics and Geotechnical Engineering, Volume 7, Issue 3, Pages 337-344, ISSN 1674-7755, https://doi.org/10.1016/j.jrmge.2015.01.007.
- Zinc, ion [water, ground-]: 1e-7 kg; lognormal variance with pedigree 0.34, pedigree (1,1,5,1,1)
  own assumption
- Radon-222 [air, non-urban air or from high stacks]: 0.012 kBq; lognormal variance with pedigree 0.69, pedigree (1,1,5,1,1)
  own assumption
- Solids, inorganic [water, ground-]: 3e-6 kg; lognormal variance with pedigree 0.69, pedigree (1,1,5,1,1)
  own assumption
- Water [air, unspecified]: 0.0004608 m3; name water_to_air_unspecified; = (tap_water_input/1000*fraction_TW_to_air)+(water_well_in_ground_input*fraction_PW_to_air); lognormal variance with pedigree 0.0807, pedigree (2,2,5,1,1)
  Calculated value based on literature values and expert opinion. See comments in the parametres' comment field.
  property fraction, origin: unspecified 0; name fraction_origin_unspecified
  property fraction, origin: fresh water 1; name fraction_origin_fresh_water
  property fraction, origin: salt water 0; name fraction_origin_salt_water
- Fluoride [water, ground-]: 3e-6 kg; lognormal variance with pedigree 0.16, pedigree (1,1,5,1,1)
  own assumption
- Dissolved solids [water, ground-]: 1.5e-5 kg; lognormal variance with pedigree 0.34, pedigree (1,1,5,1,1)
  own assumption
- Water [water, unspecified]: 0.0026112 m3; name water_to_water_unspecified; = (tap_water_input/1000)*(1-fraction_TW_to_air)+water_well_in_ground_input*(1-fraction_PW_to_air); lognormal variance with pedigree 0.0807, pedigree (2,2,5,1,1)
  (same comment as for Water)
  property carbon content, fossil 0; name C_content_fossil
  property water in wet mass 1000 kg; name WWM
  property fraction, origin: salt water 0; name fraction_origin_salt_water_Ww
  property fraction, origin: unspecified 0; name fraction_origin_unspecified_Ww
  property dry mass 0 kg; name DM
  property wet mass 1000 kg; name WM
  property carbon content, non-fossil 0; name C_content_non_fossil
  property fraction, origin: fresh water 1; name fraction_origin_fresh_water_Ww
- Strontium [water, ground-]: 5e-6 kg; lognormal variance with pedigree 0.16, pedigree (1,1,5,1,1)
  own assumption
- Manganese [water, ground-]: 1e-6 kg; lognormal variance with pedigree 0.16, pedigree (1,1,5,1,1)
  own assumption
- Aluminium [water, ground-]: 1e-6 kg; lognormal variance with pedigree 0.69, pedigree (1,1,5,1,1)
  own assumption
- Chloride [water, ground-]: 0.0162 kg; lognormal variance with pedigree 0.16, pedigree (1,1,5,1,1)
  own assumption

## Sampling procedure
literature

## Extrapolations
This dataset has been extrapolated from year 2008 to the year of the calculation (2021). The uncertainty has been adjusted accordingly.

## Review by Christian Bauer 2018-02-22
passed

## Review by Roland Hischier 2011-09-30
"New" datasets - replacing, together with a new Indian dataset, the so far existing "Asia without China" dataset. Only change concerns the production volume.
