# refractory production, basic, packed

Dataset: EcoSpold 2, unit process
Geography: DE
Time period: 1999-01-01 to 2021-12-31
Technology level: current
Classification: EcoSpold01Categories: construction materials/bricks
Classification: ISIC rev.4 ecoinvent: 2391:Manufacture of refractory products
Synonyms: ceramics; brick lining of a furnace
Tags: ConvertedDataset
Scenario: Business-as-Usual
System model: Allocation, cut-off by classification
Generated by: Tina Künniger
Published in: Kellenberger D. 2007
Database: ecoinvent
isCopyrightProtected: true
accessRestrictedTo: 1

## General comment
This dataset represents the production of 1 kg of basic refractory bricks.
[This dataset was already contained in the ecoinvent database version 2. It was not individually updated during the transfer to ecoinvent version 3. Life Cycle Impact Assessment results may still have changed, as they are affected by changes in the supply chain, i.e. in other datasets. This dataset was generated following the ecoinvent quality guidelines for version 2. It may have been subject to central changes described in the ecoinvent version 3 change report (http://www.ecoinvent.org/database/ecoinvent-version-3/reports-of-changes/), and the results of the central updates were reviewed extensively. The changes added e.g. consistent water flows and other information throughout the database. The documentation of this dataset can be found in the ecoinvent reports of version 2, which are still available via the ecoinvent website. The change report linked above covers all central changes that were made during the conversion process.]

## Included activities start
From magnesia and chromite ore, at the factory gate.

## Included activities end
The activity ends with the packed product, at factory. This dataset includes the whole manufacturing process, internal processes (transport, etc.), packing and infrastructure. This dataset doesn't include the administration.

## Geography
Data was obtained from a German company.

## Technology
The typical German technology for refractory fireclay production.
For the production of one ton of basic refractory 0.95 tons of magnesia (sinter of magnesium oxide) and 0.1 ton of chromite ore is required. The raw materials are fractionated in different coarse size groups and one or several flour components. The grains and flours are mixed in a certain share and a fixing agent (lime milk) is added. The mixture is pressed to bricks, which are baked at 1200 to 1800°C.

## Parameters
- fraction, process water, to air: 0.15 dimensionless; name fraction_PW_to_air; lognormal variance with pedigree 0.092025, pedigree (4,4,3,2,4)
  Literature value. In case when no industry/process specific data are available, default evaporation fraction value is used. This value is 15% and is based on literature (Statistics Canada, 2007 & Shaffer, K.H., 2008, Consumptive water use in the Great Lakes Basin, USGS & Shiklomanov, 2003, World Water Resources at the Beginning of the 21st Century) and has been approved by an expert.

## Reference product
- refractory, basic, packed: 1 kg; source Routschka G. and Granitzki K.-E. 1997; CPC 373: Refractory products and structural non-refractory clay products; By-product classification allocatable product
  Basic Refractry (Magnesia bricks) contain at least 80% MgO, according to ISO 1109. A variety of magnesia raw materials have been used to manufacture magnesia and magnesia- containing products (i.e., natural magnesite sinters, seawater magnesia, and fused magnesia with various chemical and mineralogical compositions). Magnesia contains varying amounts of Fe2O3 (<8%), Al2O3 (<0.3%), CaO (<4%), SiO2 (<4%), and B2O3 (<0.2%). Beside the main mineralogical component periclase, silicates and ferrites occur as secondary components. The CaO/SiO2 ratio and the B2O3 content (formation of low melting components) are especially important in determining the mineral compositions and properties (hot strength, corrosion resistance) of magnesia bricks. Monticellite (CaO · MgO · SiO2,) with a CaO/SiO2 mass ratio of 0.94 has the lowest melting point (1495 °C) of the silicates.
  High-performance bricks are highly fired, have a low iron content (<1.5% Fe2O3), and contain a dicalcium silicate (2 CaO · SiO2, melting point: 2130°C) or forsterite (2 MgO · SiO2, melting point: 1890°C) bond. These bricks show first subsidence at temperatures >=1600°C. Magnesia bricks display high thermal expansion and are prone to thermal shock and thermally induced stress in furnace linings. Thermal shock resistance can be increased by a coarse grain distribution or the addition of Al2O3 (spinel formation on firing, microcrack formation) or chrome ore (texture elasticity). Special products include magnesia - forsterite (olivine) bricks and zircon- or zirconia- containing magnesia bricks.
  High refractoriness, good resistance to attack by basic slags and alkali resistance characterise magnesia refractories. Slagging causes diffusion and migration of silicate or ferritic melts deep into the brick, producing a zoned structure prone to peeling (structural spalling). A pitch, resin, or carbon bond reduces the infiltration of metal and slags under reducing-atmosphere service conditions. Magnesia bricks are sensitive to hydration (humid atmosphere the range 40 - 120°C), SO3 (magnesium sulphate) formation, and SiO2 attack (forsterite bursting). Excessive growth of magnesia crystals during service, promoted by acquired impurities and high temperature, can also loosen brick texture.
  The main applications of basic refractory (magnesia brick) are steel melting and refining furnaces and vessels, regenerators for glass melting furnaces, cement and lime furnaces.
  EcoSpold01Location=DE
  production volume 0.242058 kg
    This is a placeholder value that does not reflect real-world production volumes. This dataset does not currently require a real-world production volume to work in the database framework, and no actual data were collected yet. This has no negative effect on the results of the ecoinvent database. The placeholder value of this activity was scaled according to the nominal GDP of 2005 (source: United Nations, http://data.un.org/Glossary.aspx?q=GDP+%28current+US%24%29, accessed 20130726) to reflect an appropriate share of the global production volume, which is also a placeholder value.
  property price 0.63 EUR2005
    UN import prices. From UN trade database. Category: 'Refractory bricks, etc with >50% Mg, Ca or Cr as oxid.'
  property carbon content 0
    carbon content on a dry matter basis (reserved; not for manual entry)
  properties: water content 0, water in wet mass 0 kg, carbon content, non-fossil 0, carbon content, fossil 0, dry mass 1 kg, wet mass 1 kg, carbon allocation 0 kg

## Inputs from technosphere
- lubricating oil: 1.31e-5 kg; source Bruck, M. 1996; lognormal variance with pedigree 0.138025, pedigree (1,5,5,2,4)
  EcoSpold01Location=RER
  Literature value. Data was obtained from the "brick production" dataset.
  properties: heating value, net 40.2 MJ, carbon content, fossil 0.75, wet mass 1 kg, dry mass 1 kg
  note on heating value, net: Literature value, Source: IPCC 2006, 2006 IPCC Guidelines for National Greenhouse Gas Inventories, Prepared by the National Greenhouse Gas Inventories Programme, Eggleston H.S., Buendia L., Miwa K., Ngara T. and Tanabe K. (eds). Published: IGES, Japan
  note on carbon content, fossil: Lubricating oil is produced from diesel. C-content/dry mass of fats and oils considered 75%, from: ecoinvent v2.2 report, n 15a, pg 40
- diesel, burned in building machine: 1.16 MJ; lognormal variance with pedigree 0.052625, pedigree (2,4,5,2,1)
  Estimation, based on personal communication from one company in Germany for the year 1999. It is assumed that diesel is used for internal tranports.
  EcoSpold01Location=GLO
  properties: heating value, net 1 MJ
- lime, hydrated, packed: 0.015 kg; lognormal variance with pedigree 0.0527, pedigree (2,4,5,3,1)
  Estimation, based on personal communication from one company in Germany for the year 1999.
  EcoSpold01Location=CH
  properties: water content 0.00300903, wet mass 1 kg, dry mass 0.997 kg
- municipal solid waste: -0.005 kg; lognormal variance with pedigree 0.0527, pedigree (2,4,5,3,1)
  EcoSpold01Location=CH
  Estimation. Primarily wood pallets and used oil are treated.
  production volume 0.005 kg
    Calculated from the production volume of refractory, basic, packed in proportion to the respective output amounts.
  properties: heating value, net 11.74 MJ, dry mass 0.771 kg, water content 0.297017, carbon content, fossil 0.171549, carbon content, non-fossil 0.261655, wet mass 1 kg
  note on heating value, net: Value taken from the general comment of the treatment dataset.
  note on carbon content, fossil: MSW composition in tab 4.1, ecoinvent v2.2 report 13_I. C content referred to 1 kg DM
- industrial machine, heavy, unspecified: 0.000167 kg; lognormal variance with pedigree 0.422025, pedigree (5,4,5,2,1)
  Estimation. The infrastructure of all machines are considered. A production volume of 1.000.000 kg/year, a weight of 50t and a lifetime of 30 years are assumed.
  EcoSpold01Location=RER
- packing, clay product: 1 kg; lognormal variance with pedigree 0.0507, pedigree (3,5,5,3,1)
  Estimation. The packing of 1 kg of product is considered.
  EcoSpold01Location=CH
- chromite ore concentrate: 0.1 kg; lognormal variance with pedigree 0.052625, pedigree (2,4,5,2,1)
  Estimation, based on personal communication from one company in Germany for the year 1999. Chromite ore is used as raw material.
  EcoSpold01Location=GLO
  properties: wet mass 1 kg, dry mass 1 kg
- heat, district or industrial, natural gas: 12.42 MJ; lognormal variance with pedigree 0.052625, pedigree (2,4,5,2,1)
  EcoSpold01Location=RER
  Estimation, based on personal communication from one company in Germany for the year 1999. A low-NOx furnace is assumed. The amount of carbon dioxide emission is based on the natural gas consumption of the company and on the produced amount of refractory bricks. That reported amount is considerably smaller than the calculated amount from the burning process. It is assumed that some of the carbon dioxide is fixed in the raw material (hydrated lime or limestone in the clay) or that the amount declared by the company is to low.
  properties: heating value, net 1 MJ
- magnesium oxide: 0.95 kg; lognormal variance with pedigree 0.0527, pedigree (2,4,5,3,1)
  Estimation, based on personal communication from one company in Germany for the year 1999. Magnesite is used as raw material.
  EcoSpold01Location=RER
  properties: dry mass 1 kg, wet mass 1 kg
- electricity, medium voltage: 0.12 kWh; lognormal variance with pedigree 0.0526, pedigree (2,4,5,1,1)
  EcoSpold01Location=DE
  Estimation, based on personal communication from one company in Germany for the year 1999.
- clay pit infrastructure: 2e-11 unit; lognormal variance with pedigree 0.4381, pedigree (1,5,5,3,4)
  Proxy. Clay pit infrastructure is used as proxy. The amount has been copied from land-use "brick production". A production volume of 1.000.000 kg/year and a production time of 50 years are assumed.
  EcoSpold01Location=CH

## Inputs from nature
- Water, unspecified natural origin [natural resource, in water]: 2e-5 m3; name water_UNO_input; source EAA - European Aluminium Association 2008; lognormal variance with pedigree 0.0527, pedigree (2,4,5,3,1)
  Estimation, based on personal communication from one company in Germany for the year 1999.

## Emissions to nature
- Water [water, unspecified]: 1.7e-5 m3; name water_to_water_unspecified; = water_UNO_input*(1-fraction_PW_to_air); lognormal variance with pedigree 0.0807, pedigree (2,2,5,1,1)
  Calculated value based on literature values and expert opinion. See comments in the parametres' comment field.
  property fraction, origin: fresh water 0; name fraction_origin_fresh_water_Ww
  property water in wet mass 1000 kg; name WWM
  property wet mass 1000 kg; name WM
  property carbon content, fossil 0; name C_content_fossil
  property carbon content, non-fossil 0; name C_content_non_fossil
  property dry mass 0 kg; name DM
  property fraction, origin: unspecified 1; name fraction_origin_unspecified_Ww
  property fraction, origin: salt water 0; name fraction_origin_salt_water_Ww
- Water [air, unspecified]: 3e-6 m3; name water_to_air_unspecified; = (water_UNO_input*fraction_PW_to_air); lognormal variance with pedigree 0.0807, pedigree (2,2,5,1,1)
  (same comment as for Water)
  property fraction, origin: salt water 0; name fraction_origin_salt_water
  property fraction, origin: unspecified 1; name fraction_origin_unspecified
  property fraction, origin: fresh water 0; name fraction_origin_fresh_water

## Sampling procedure
Measured data of one German plant

## Extrapolations
This dataset has been extrapolated from year 2001 to the year of the calculation (2021). The uncertainty has been adjusted accordingly.

## Review by Roberto Dones 2003-08-06
passed

## Review by Roland Hischier 2011-09-22
Transfer of documentation done.
