# milk production, from cow

Dataset: EcoSpold 2, unit process
Geography: CA-QC
Time period: 2009-01-01 to 2021-12-31
Technology level: current
Classification: ISIC rev.4 ecoinvent: 0141:Raising of cattle and buffaloes
Scenario: Business-as-Usual
System model: Allocation, cut-off by classification
Share of production covered: 99 %
Generated by: Dominique Maxime
Published in: Quantis 2012
Database: ecoinvent
isCopyrightProtected: true
accessRestrictedTo: 1

## General comment
This dataset represents the production of conventional milk from dairy cows, in Québec (Canada), in 2009-2011. The module includes the consumption of feed, and the operation of cattle housing systems for the management of the dairy herd and the production of cow milk. The functional unit is 1 kg of Fat and Protein Corrected Milk (FPCM) raw milk from Québec dairy farms. The FPCM correction is made for a conversion to a 4.0% fat and 3.3% true protein content, following the equation provided by the International Dairy Federation (IDF): FPCM (kg/yr) = Production (kg/yr) x [0.1226 x Fat% + 0.0776 x Protein% + 0.2534]. Live animals (culled cows and calves) sold for slaughterhing are by-products, as well as solid and liquid manure.
The average dairy farm in Québec produced 449400 L raw milk (at 4.06 kg/hL butterfat and 3.36 kg/hL protein), hence 469488 kg FCPM per farm. The average herd size over the year is: 57,7 milk cows (8137 kg FPCM/cow/year), 0.18 bulls, 0.39 young bulls, 1.11 veals male, 10.72 veals female, 12.56 bred heifers, 14.90 open heifers. Hence, the whole herd is worth 74 livestock units. 11 culled cows and 41 calves are sold for slaughter. The replacement rate is 32%. 91% of animals are housed in tie-stall systems, 9% in free-stall systems. With 6414 dairy farms, Québec milk production accounts for 38% of overall Canada production.
This dataset does not cover organic milk production in Quebec, which is marginal. 1.5% of overall Quebec dairy farms were organic-certified in 2010, and 1% of total milk produced in Québec in 2010 was organic milk (Fédération des Producteurs de lait du Québec; http://www.lait.org/en/interactive-faq/the-production.php). Furthermore, only 80% of organic milk ends up into organic-certified processed products (e.g. organic milk, yogurt, cheese)
44% of the manure is managed as solid manure (35% solid stored; 9% stockpiled) and 56% managed as liquid manure (35% liquid in open-pit with crust formation; 8% liquid in covered pit; 8% liquid in open-pit without crust; and 5% liquid in lagoon). According to these management figures and to the distribution of animal categories within the herd, emissions to the air from manure management have been calculated (in kg/kg FPCM): N2O (direct+indirect): 5,7866E-04 kg; NH3: 5,5310E-04 kg; CH4: 5,5198E-03 kg.

## Included activities start
This activity starts from the reception and storage of feed materials, and dairy herd housing.

## Included activities end
This activity ends with the provision of milk at farm, ready-to-deliver. The dataset includes the consumption of feed; the livestock management operations (including bedding, drinking water, milking equipment, cleaning products and water, ammonia and dinitrogen oxyde emissions from housing, and methane emissions from enteric fermentation), manure management emissions; energy and buildings (including electricity for dairying, cattle housing and milk parlour equipment and buildings, and gasoline for regular operations) necessary for the operation of a typical dairy farm. The dataset does not include fodder and feed production and processing into meal for animals, litter production, manure management operations (however, emissions are accounted for); nor milk transportation beyond the farm gate (e.g. to dairy processing plants). Also, the dataset does not include particulate matter emissions, nor any drugs used on the dairy farm, because of the lack of data available on quantities and content. In terms of mass, drugs represent much less than 1% of inputs.

## Geography
The inventory applies to Québec dairy farms.

## Technology
Data and assumptions are intended to reflect current equipment, processes, and market conditions.

## Time period
Period indicated in the reference.

## Parameters
- fraction, process water, to air: 0.15 dimensionless; name fraction_PW_to_air; lognormal variance with pedigree 0.092025, pedigree (4,4,3,2,4)
  Literature value. In case when no industry/process specific data are available, default evaporation fraction value is used. This value is 15% and is based on literature (Statistics Canada, 2007 & Shaffer, K.H., 2008, Consumptive water use in the Great Lakes Basin, USGS & Shiklomanov, 2003, World Water Resources at the Beginning of the 21st Century) and has been approved by an expert.
- milk productivity of Quebec dairy cows: 8136.71 kg; name dairy_cows_productivity; lognormal variance with pedigree 0.0007, pedigree (1,2,1,1,1)
  kg FPCM milk per dairy cow per year, in Québec, in 2009-2011. Source: Quantis, 2012.
- dairy farm herd size: 73.97 unit; name dairy_herd_size_LU; lognormal variance with pedigree 0.0013, pedigree (2,2,1,1,1)
  dairy farm herd size expressed in livestock unit. This is calculated from 57,7 milk cows (@ 1 head/LU), 0.18 bulls (@ 1 head/LU), 1.11+10.72 veals (@ 5 heads/LU), and 12.56+14.90 heifers (@ 2 heads/LU). (Quantis, 2012)
- fraction, water, deionised, to air: 0.15 dimensionless; name fraction_WDI_to_air; = fraction_PW_to_air; lognormal variance with pedigree 0.092025, pedigree (4,4,3,2,4)
  Calculated value. See comment in the other parametres present in this dataset. Deionised water is considered to be always used as process water, thus process water fractions to air are applied to all deionised water input flows to calculate the amount of water consumed in the processes.
- dairy cows per herd over the year, in average dairy farm: 57.7 unit; name dairy_cows_per_herd; lognormal variance with pedigree 0.0007, pedigree (1,2,1,1,1)
  (Quantis, 2012)
- fraction, tap water, to air: 0.15 dimensionless; name fraction_TW_to_air; = fraction_PW_to_air; lognormal variance with pedigree 0.092025, pedigree (4,4,3,2,4)
  Calculated value. See comment in the other parametres present in this dataset. Tap water is considered to be always used as process water, thus process water fractions to air are applied to all tap water input flows to calculate the amount of water consumed in the processes.
- fraction of dairy cows under tie-stall housing: 0.9082 dimensionless; name dairy_tie_stall_fraction; lognormal variance with pedigree 0.0007, pedigree (1,2,1,1,1)
  91% of Quebec dairy herd is in tie-stall systems, 9% in free-stall systems (Quantis, 2012)

## Reference product
- cow milk: 0 kg; name RP_amount_1; By-product classification allocatable product; CPC 02211: Raw milk of cattle
  kg of Fat and Protein Corrected Milk. FPCM is 4.0% fat and 3.3% true protein content. Conversion to FPCM is as follow, according to the International Dairy Federation: FPCM (kg/yr) = Production (kg/yr) x [0.1226 x Fat% + 0.0776 x Protein% + 0.2534]
  Raw milk density: 1031 kg/m3
  production volume 3.0113e9 kg; name RP_PV_1
    Milk at 4.0% fat and 3.3% true protein content (Fat and Protein Corrected milk, FPCM). Source: Quantis, 2012.
  property price 0.349 EUR2005
    Calculated based on data from FAOSTAT (accessed 20140428). The price is calculated as a weighted average (by yearly production) of prices of "Milk, whole fresh cow" for all the countries in the world where data for both price and production volume are available. The Producer Prices -Annual from the year 2005. Using the same calculation and data the price in 2010 was 458.7 Euro.
  property carbon content, non-fossil 0.53797
    biogene carbon content on a dry matter basis.
    Composition data obtained from the Canadian Nutrient Database 2010 ((http://webprod3.hc-sc.gc.ca/cnf-fce/index-eng.jsp), Food Code 123: Milk, fluid, whole, producer, 3.7% M.F. First, composition data were refered to 1 kg dry mass. Then, C-contents were calculated considering a C-content/dry mass of 46% in carbohydrates, 53% in proteins and 75% in fats. All data from "Evolutionary and Biochemical Aspects", A.D. Kay and T. Vrede (in Global Ecology, 2010, Elsevier B.V., S.E. Jørgensen Ed.). Note that these figures are approximative for milk constituents. Finally, C-content in kg was multiplied by kg dry mass in the exchange.
  property energy content 2.615 MJ
    as gross calorific value (when relevant). Composition data obtained from the Canadian Nutrient Database 2010 ((http://webprod3.hc-sc.gc.ca/cnf-fce/index-eng.jsp), Food Code 123: Milk, fluid, whole, producer, 3.7% M.F.
  property carbon content 0.53797
    carbon content on a dry matter basis (reserved; not for manual entry)
  property true value 0.349; name RP_amount_1_true_value
    allocation property applied in "true value" allocation // value calculated from revenue
  properties: dry mass 0.1231 kg, wet mass 1 kg, carbon content, fossil 0, water content 7.12348, water in wet mass 0.8769 kg, carbon allocation 0.0662241 kg
- cattle for slaughtering, live weight: 1 kg; name BP_amount_1; = 14070.9/ (dairy_cows_productivity* dairy_cows_per_herd); source Quantis 2012; CPC 02111: Cattle; By-product classification allocatable product; pedigree (1,1,1,1,1)
  11.37 culled cows (average live weight 615 kg) and 40.80 calves (average live weight 173,5 kg) are sold every year for slaughtering by the dairy farm. Total live weight is 14070,9 kg
  production volume 9.02507e7 kg; = RP_PV_1 * (BP_amount_1 / RP_amount_1)
    Calculated from production volume of reference product using the relative outputs.
  property price 2.025 EUR2005
    Calculated as an average of the regional prices (ZA and BR) which were provided by the data providers for the specific countries.
  property true value 0.0606907; name BP_amount_1_true_value
    allocation property applied in "true value" allocation // value calculated from revenue

## By-products
- manure, solid, cattle: 0 kg; source Quantis 2012; CPC 34654: Excreta of animals useful for manure/fertilizer and fuel preparation; By-product classification Recyclable; pedigree (1,1,1,1,1)
  Calculated from numbers of animals (Quantis, 2012) and production rate per animal category (CRAAQ, 2003). "CRAAQ (2003). Charges fertilisantes des effluents d'élevage, Période transitoire - Valeurs références - Production laitière. Mars 2003 (http://bureauvirtuel.craaq.qc.ca/web/effluents/documents-de-reference)". Solid dairy cattle manure characteristics (wet basis):
  17% dry matter; 4.75 kg N/t; 2.83 kg P2O5/t; 4.90 kg K2O/t. This is a weighted average of 75% solid manure and 25% of liquid manure (as excreted, without any additional water like cleaning or water) mixed with solid manure and managed as solid manure.
  production volume 0 kg; = RP_PV_1 * (BP_amount_3 / RP_amount_1)
    Calculated from production volume of reference product using the relative outputs.
  property price 0.0042 EUR2005
    World market value of manure, deflated with barley world market price and consumer price index, based on [http://www.gov.pe.ca/photos/original/af_NM_manconv.pdf].
  property carbon content 0.441
    carbon content on a dry matter basis (reserved; not for manual entry)
  properties: wet mass 1 kg, dry mass 0.1715 kg, carbon content, fossil 0, nitrogen content 0.0277, water content 4.8309, water in wet mass 0.8285 kg, carbon content, non-fossil 0.441, carbon allocation 0.0756315 kg
- manure, liquid, cattle: 0 kg; source Quantis 2012; CPC 34654: Excreta of animals useful for manure/fertilizer and fuel preparation; By-product classification Recyclable; pedigree (1,1,1,1,1)
  calculated from numbers of animals (Quantis, 2012) and production rate per animal category (CRAAQ, 2003). "CRAAQ (2003). Charges fertilisantes des effluents d'élevage, Période transitoire - Valeurs références - Production laitière. Mars 2003 (http://bureauvirtuel.craaq.qc.ca/web/effluents/documents-de-reference)". Liquid dairy cattle manure characteristics (wet basis): 7.2% dry matter; 3.10 kg N/t; 1.50 kg P2O5/t; 3.40 kg K2O/t.
  production volume 0 kg; = RP_PV_1 * (BP_amount_2 / RP_amount_1)
    Calculated from production volume of reference product using the relative outputs.
  property price 0.0042 EUR2005
    (same comment as for manure, solid, cattle)
  property carbon content 0.68
    carbon content on a dry matter basis (reserved; not for manual entry)
  properties: dry mass 0.072 kg, nitrogen content 0.04306, wet mass 1 kg, water content 12.8889, carbon content, non-fossil 0.68, carbon content, fossil 0, water in wet mass 0.928 kg, carbon allocation 0.04896 kg

## Inputs from technosphere
All rows: source Quantis 2012
- limestone, crushed, washed: 0.00997723 kg; lognormal variance with pedigree 0.0107, pedigree (3,2,4,1,1)
  calcium supplementation for animals, in commercial dairy mix
  properties: wet mass 1 kg, dry mass 0.998 kg, water content 0.00200401, carbon content, fossil 0.117257
  note on carbon content, fossil: Table 3.1, ecoinvent v2.2 report 7, part VII, pg 3. MW CaCO3=100, MW MgCO3=84. C content of limestone is 0.117257 kg/kg DM
- hay: 0.677058 kg; lognormal variance with pedigree 0.0087, pedigree (1,2,4,1,1)
  mix of hay grass like thimothy and leguminous like alfalfa and clover cultivated for hay and haylage. (dry matter)
  properties: dry mass 1 kg, wet mass 1.1236 kg, energy content 19 MJ, carbon content, non-fossil 0.4801, water content 0.1236
- sodium chloride, powder: 0.00997723 kg; lognormal variance with pedigree 0.0107, pedigree (3,2,4,1,1)
  sodium and chlorine supplementation for animals, in commercial dairy mix
  properties: dry mass 1 kg, wet mass 1 kg
- alfalfa-grass silage: 2.07492 kg; lognormal variance with pedigree 0.0087, pedigree (1,2,4,1,1)
  mix of alfalfa and thimothy ensiled for animal feed. (dry matter)
  properties: dry mass 1 kg, energy content 18.55 MJ, carbon content, non-fossil 0.484, water content 1.1739, wet mass 2.1739 kg
- oat grain: 0.0629707 kg; lognormal variance with pedigree 0.0093, pedigree (2,2,4,1,1)
  oat grain as a proxy for oat grain, feed
  property dry mass 0.865 kg; name REF_PRODUCT_DM; = REF_PRODUCT_WM- REF_PRODUCT_WWM
  property wet mass 1 kg; name REF_PRODUCT_WM
  property water in wet mass 0.135 kg; name REF_PRODUCT_WWM
  properties: water content 0.156069, carbon content, non-fossil 0.4916
  note on carbon content, non-fossil: biogene carbon content on a dry matter basis. Composition data obtained from http://ndb.nal.usda.gov/ndb/search/list (DB number: 20038, Oats). First, composition data were refered to 1 kg dry mass. Then, C-contents were calculated considering a C-content/dry mass of 46% in carbohydrates (including fibres), 53% in proteins and 75% in fats. All data from "Evolutionary and Biochemical Aspects", A.D. Kay and T. Vrede (in Global Ecology, 2010, Elsevier B.V., S.E. Jørgensen Ed.).
- protein feed, 100% crude: 0.0284351 kg; lognormal variance with pedigree 0.0107, pedigree (3,2,4,1,1)
  Protein provided by 0.015139176 kg DDGS through commercial dairy mix, assuming 0.38 kg crude protein/kg DDGS.
  properties: wet mass 1 kg, dry mass 1 kg, carbon content, non-fossil 0.53
- transport, passenger car, large size, petrol, EURO 4: 0.108531 km; lognormal variance with pedigree 0.0487, pedigree (5,2,4,1,1)
  29% of gasoline expense at farm are for car use, e.g. for servicing people (personnal communication with D. Gilbert, Groupe AGECO, 2014) and this amount has to be allocated to milk production. This translates into 0,001694 kg gasoline/kg FPCM.
- wheat grain, feed: 0.0636627 kg; lognormal variance with pedigree 0.0093, pedigree (2,2,4,1,1)
  wheat grain processed for animal feed.
  properties: dry mass 0.85 kg, water content 0.17647, wet mass 1 kg, carbon content, non-fossil 0.4646
- wood chips, dry, measured as dry mass: 0.282037 kg; = 0.079885/1.4; lognormal variance with pedigree 0.0093, pedigree (2,2,4,1,1)
  650 kg dried wood chips (wet mass) per dairy cow per year is used for animal litter. Sawdust may also be used. The division by 1.4 is to add up to the wet mass of the exchange.
  properties: carbon content, non-fossil 0.494, dry mass 1 kg, heating value, net 9.99 MJ, wet mass 1.4 kg, water content 0.4
  note on carbon content, non-fossil: C content of dry mass is 0.494 kgC/kg dry wood (ecoinvent v2.2 report 9).
- energy feed, gross: 1.14196 MJ; lognormal variance with pedigree 0.0107, pedigree (3,2,4,1,1)
  Gross energy supply from 0,0151 kg wheat shorts (15,26 MJ/kg as fed) contained in commercial dairy mix feed. (amounts in kg/kg FCPM)
  properties: wet mass 1 kg, dry mass 1 kg
- straw: 0.138501 kg; lognormal variance with pedigree 0.0093, pedigree (2,2,4,1,1)
  228 kg straw per dairy cow per year is used for animal litter.
  properties: heating value, net 14.25 MJ, carbon content, non-fossil 0.437377, wet mass 1 kg, water content 0.176471, dry mass 0.85 kg
  note on heating value, net: Literature value, Source: Phyllis2, database for (treated) biomass, algae, feedstocks for biogas production and biochar, https://phyllis.nl/Biomass/View/1271, ECN.TNO
- soybean, feed: 0.981532 kg; lognormal variance with pedigree 0.0087, pedigree (1,2,4,1,1)
  soybean processed for animal feed.
  properties: water content 0.1236, wet mass 1 kg, carbon content, non-fossil 0.52451, dry mass 0.89 kg
- selenium: 9.87745e-7 kg; lognormal variance with pedigree 0.0107, pedigree (3,2,4,1,1)
  Selenium (@ 600 ppm in selenium premix 600) for animal supplementation, in commercial dairy mix
  properties: wet mass 1 kg, dry mass 1 kg
- maize silage: 2.41182 kg; lognormal variance with pedigree 0.0087, pedigree (1,2,4,1,1)
  (fresh matter)
  properties: water content 1.85714, carbon content, non-fossil 0.4773, energy content 6.6325 MJ, wet mass 1 kg, dry mass 0.35 kg
- operation, housing system, cattle, loose, per animal unit: 7.14895e-5 unit; = dairy_herd_size_LU* (1-dairy_tie_stall_fraction)/ (dairy_cows_productivity* dairy_cows_per_herd); lognormal variance with pedigree 0.008, pedigree (1,1,4,1,1)
  considering the whole herd of the dairy farm, in livestock unit, and total milk produced over the year
  Uncertainty: math relation
- magnesium oxide: 0.00164624 kg; lognormal variance with pedigree 0.0107, pedigree (3,2,4,1,1)
  Magnesium oxide for animal supplementation, in commercial dairy mix
  properties: wet mass 1 kg, dry mass 1 kg
- maize grain, feed: 0.800677 kg; lognormal variance with pedigree 0.0087, pedigree (1,2,4,1,1)
  maize grain processed for animal feed.
  properties: water content 0.162791, dry mass 0.86 kg, wet mass 1 kg, carbon content, non-fossil 0.46957
- operation, housing system, cattle, tied, per animal unit: 0.000707264 unit; = dairy_herd_size_LU* dairy_tie_stall_fraction/ (dairy_cows_productivity* dairy_cows_per_herd); lognormal variance with pedigree 0.008, pedigree (1,1,4,1,1)
  (same comment as for operation, housing system, cattle, loose, per animal unit)
- protein feed, 100% crude: 0.0411561 kg; lognormal variance with pedigree 0.0107, pedigree (3,2,4,1,1)
  Aggregate crude protein supply from 0,0252 kg corn gluten feed (21% crude protein as fed) and 0,0151 kg corn germ meal (20% crude protein as fed) contained in commercial dairy mix feed. (amounts in kg/kg FCPM). protein contents from: Batal, A., Dale, N. and Persia, M. (2011). Feedstuffs ingredient analysis table, 2012 edition.
  properties: dry mass 1 kg, carbon content, non-fossil 0.53, wet mass 1 kg
- barley grain, feed: 0.210265 kg; lognormal variance with pedigree 0.0107, pedigree (3,2,4,1,1)
  barley grain processed primarily for animal feed. In practice, 70% comes through commercial dairy mix purchased, 30% from on-farm cropping.
  properties: carbon content, non-fossil 0.46538, water content 0.16279, dry mass 0.86 kg, wet mass 1 kg
- manure, solid, cattle: -3.74117 kg; lognormal variance with pedigree 0.0461, pedigree (3,2,5,1,1)
  (same comment as for manure, solid, cattle)
  production volume 2.27925e9 kg
  properties: wet mass 1 kg, dry mass 0.1715 kg, price 0.0042 EUR2005, nitrogen content 0.0277, water content 4.8309, carbon content, non-fossil 0.441
- manure, liquid, cattle: -14.1081 kg; lognormal variance with pedigree 0.0461, pedigree (3,2,5,1,1)
  (same comment as for manure, liquid, cattle)
  production volume 8.59514e9 kg
  properties: price 0.0042 EUR2005, dry mass 0.072 kg, nitrogen content 0.04306, wet mass 1 kg, water content 12.8889, carbon content, non-fossil 0.68

## Emissions to nature
- Dinitrogen monoxide [air, non-urban air or from high stacks]: 0.00313613 kg; source Quantis 2012; lognormal variance with pedigree 0.0851, pedigree (3,2,5,1,4)
  Housing emission (indirect N2O from ammonia volatilization in housing, not related to manure mangement/storage), calculated according to IPCC methodology (2006) with emission factor EF4=0.01 (5.5829E-05 kg/kg FPCM), and direct+indirect N2O emission from manure management (5,7866E-04 kg/kg FPCM) (Calculations based on a IPCC Tier 2 methodology).
- Methane, non-fossil [air, non-urban air or from high stacks]: 0.127933 kg; source Quantis 2012; lognormal variance with pedigree 0.0501, pedigree (3,2,5,1,1)
  enteric fermentation from dairy cows, calves, heifers and bulls (0.020363 kg/kg FPCM) (Calculations based on a IPCC Tier 2 methodology, plus daily-based methane conversion factors considering dry matter intake per animal category (see source for more details)), and CH4 from manure management (5.5198E-03 kg/kg FPCM) (Calculations based on a IPCC Tier 2 methodology).
- Ammonia [air, non-urban air or from high stacks]: 0.0155509 kg; source Quantis 2012; lognormal variance with pedigree 0.0501, pedigree (3,2,5,1,1)
  Housing emission, calculated according to Sheppard et al. (2011) (0.0025931 kg/kg FPCM), and manure management emission (5.5310E-04 kg/kg FPCM) according to IPCC Tier 1 (Quantis, 2012).
  Sheppard S, Bittman S, Swift M, and Tait J (2011), Modelling monthly NH3 emissions from dairy in 12 Ecoregions of Canada, Can. J. Anim. Sci., 91:649-661.

## Sampling procedure
A majority of activity data was sourced from on-farm surveys (about 100 dairy farms surveyed in Québec) for deriving figures representative of conventional milk production in Québec, which is about 99% of milk produced in Québec during this period. Other sources include literature, statistics, and discussions with the Quebec federation of milk producers [FPLQ] and various experts. For more details, please refer to the main source (Quantis, 2012).

## Extrapolations
Modelling of animal direct emissions is described in the main source (Quantis, 2012). Feed includes all animal categories present on the dairy farm. Milk waste is accounted for, inherently, to satisfy milk production, while its disposal is added to manure output. No information was available for any other solid or liquid waste.

## Review by Thomas Nemecek 2013-12-30
Once the appropriate feedstuff datasets are included in the database, the inputs of feedstuffs should be adapted accordingly.
