# heat production, wood pellet, at furnace 9kW

Dataset: EcoSpold 2, unit process
Geography: CH
Time period: 2000-01-01 to 2021-12-31
Technology level: current
Classification: ISIC rev.4 ecoinvent: 3530:Steam and air conditioning supply
Classification: EcoSpold01Categories: wood energy/heating systems
Scenario: Business-as-Usual
System model: Allocation, cut-off by classification
Share of production covered: 100 %
Generated by: Christian Bauer
Published in: Bauer, C. 2007
Database: ecoinvent
isCopyrightProtected: true
accessRestrictedTo: 1

## General comment
Activity represents combustion of wood pellets in average small wood pellet furnaces in Switzerland in 2014. The inventory shall be considered valid for boilers with nominal capacities in the approximate range of 5 to 20 kW. The activity represents average annual operation including start/stop (warm up and cool down), which reduces the efficiency compared to rated values provided by boiler manufacturers and increases some emission factors such as CO. Air emission factors as well as other exchanges correspond to v2.2 except of PM, CO, NOx, CH4 and NMVOC. These key emission factors were updated based on latest available information.

## Included activities start
From reception of wood pellets.

## Included activities end
This activity describes the combustion of wood pellets until heat production at the boiler outlet. Included are the infrastructure, the wood requirements (average pellets, u=10%), the emissions to air, the electricity needed for operation, and the disposal of the ashes.

## Geography
valid for average Switzerland

## Technology
Boiler of average technology installed in CH in 2014

## Time period
Some emission data are from the second half of the 1990´s. However, key emission factors (PM, CO, NOx, CH4 and NMVOC) are updated in 2014

## Parameters
- scaling factor: 1.42857 dimensionless; name scaling_factor; = 1/0.7
  the scaling factor corresponds to the inverse of the annual use efficiency. This efficiency represents an average annual value including start/stop operation (warm-up and cool down), which reduces the efficiency compared to rated values of the manufacturer. Source: Thomas Nussbaumer, Verenum, January 2014, personal communication.

## Reference product
- heat, central or small-scale, other than natural gas: 1 MJ; = 0.7 * scaling_factor; source T. Nussbaumer 2014; CPC 17300: Steam and hot water; By-product classification allocatable product
  EcoSpold01Location=CH
  Original dataset referred to 1MJ energy input (end energy). Amount was scaled to 1 using annual use efficiency of 0.7 (according to source).
  production volume 6.1e7 MJ; name heat_apv; = 122000000*0.5
    Literature value corresponding to useful energy in table F, heating device category 4b according to the source. 50% of total considered as "current" technology corresponding to average of installed devices in this category. This fraction was estimated based on the trend in recent years: installations after 2007 (update of Swiss emission standards) are categorized as "modern".
  property price 0.0106 EUR2005
    Average European district heat price from Ecoheatcool and Euroheat 2005-2006, Ecoheat Work package 1: The European heat market. Final report. 10.6 EUR/GJ i s the price of district heat. http://www.solarthermalworld.org/files/Ecoheatcool%20WP1%20Web.pdf?download
  properties: heating value, net 1 MJ, Corresponding fuel use 1.22 MJ

## Inputs from technosphere
- electricity, low voltage: 0.00595714 kWh; = 0.00417 * scaling_factor; source Bauer, C. 2007; lognormal variance with pedigree 0.4707, pedigree (2,2,5,1,1)
  EcoSpold01Location=CH
  Literature value. Original amount (from the source, ecoinvent v2.2) was scaled to the amount of the new reference product using the annual efficiency.
- wood ash mixture, pure: -0.00034 kg; name wood_ash; = (0.000238 * scaling_factor)*-1; source Bauer, C. 2007; lognormal variance with pedigree 0.04, pedigree (1,1,5,1,1)
  homogeneous fuel
  Amount was scaled to the amount of reference product.
  EcoSpold01Location=CH
  production volume 20740 kg; = heat_apv*wood_ash
    Calculated from the production volume of wood pellet, mixed, burned in furnace 15kW in proportion to the respective output amounts.
  property price 0 EUR2005; name wood_ash_price_EUR2005
  properties: dry mass 1 kg, wet mass 1 kg, carbon content, non-fossil 0.012
- furnace, pellets, 9kW: 1.10229e-6 unit; = 1/(20*2000*9*3.6) * scaling_factor; lognormal variance with pedigree 0.4707, pedigree (2,2,5,1,1)
  Calculated value. Assuming 20 years lifetime, 2000 operational hours per year, 9kW capactiy.
- wood pellet, measured as dry mass: 0.0762357 kg; = 0.053365 * scaling_factor; source Bauer, C. 2007; lognormal variance with pedigree 0.4707, pedigree (2,2,5,1,1)
  EcoSpold01Location=RER
  Literature value. Original amount (from the source, ecoinvent v2.2) was scaled to the amount of the new reference product using the annual efficiency. Corresponds to a LHV of 18.7 MJ/kg.
  properties: dry mass 1 kg, water content 0.1, wet mass 1.1 kg, carbon content, non-fossil 0.494, heating value, net 13.38 MJ
  note on carbon content, non-fossil: C content of dry mass is 0.494 kgC/kg dry wood (ecoinvent v2.2 report 9).

## Emissions to nature
- Particulates, > 2.5 um, and < 10um [air, urban air close to ground]: 4.28571e-6 kg; = 3e-6*scaling_factor; source T. Nussbaumer 2014; lognormal variance with pedigree 0.4712, pedigree (2,3,5,1,1)
  estimation
- Ammonia [air, urban air close to ground]: 2.47143e-6 kg; = 1.73E-06 * scaling_factor; source Bauer, C. 2007; lognormal variance with pedigree 0.4726, pedigree (2,4,5,1,1)
  Literature value. Original amount (from the source, ecoinvent v2.2) was scaled to the amount of the new reference product using the annual efficiency.
- NMVOC, non-methane volatile organic compounds, unspecified origin [air, urban air close to ground]: 5e-5 kg; = 35E-06 * scaling_factor; source T. Nussbaumer 2014; lognormal variance with pedigree 0.4712, pedigree (2,3,5,1,1)
  estimation
- Methane, non-fossil [air, urban air close to ground]: 2.14286e-5 kg; = 15E-06 * scaling_factor; source Bauer, C. 2007; lognormal variance with pedigree 0.4726, pedigree (2,4,5,1,1)
  (same comment as for Ammonia)
- Benzene, hexachloro- [air, urban air close to ground]: 1.02857e-14 kg; = 7.2E-15 * scaling_factor; source Bauer, C. 2007; lognormal variance with pedigree 0.4726, pedigree (2,4,5,1,1)
  (same comment as for Ammonia)
- Hydrocarbons, aliphatic, alkanes, unspecified [air, urban air close to ground]: 1.3e-6 kg; = 9.1E-07 * scaling_factor; source Bauer, C. 2007; lognormal variance with pedigree 0.4726, pedigree (2,4,5,1,1)
  (same comment as for Ammonia)
- Mercury [air, urban air close to ground]: 4.28571e-10 kg; = 3E-10 * scaling_factor; source Bauer, C. 2007; lognormal variance with pedigree 0.4726, pedigree (2,4,5,1,1)
  (same comment as for Ammonia)
- Fluorine [air, urban air close to ground]: 7.14286e-8 kg; = 5E-08 * scaling_factor; source Bauer, C. 2007; lognormal variance with pedigree 0.4726, pedigree (2,4,5,1,1)
  (same comment as for Ammonia)
- Manganese [air, urban air close to ground]: 2.42857e-7 kg; = 1.7E-07 * scaling_factor; source Bauer, C. 2007; lognormal variance with pedigree 0.4726, pedigree (2,4,5,1,1)
  (same comment as for Ammonia)
- Chromium VI [air, urban air close to ground]: 5.71429e-11 kg; = 4E-11 * scaling_factor; source Bauer, C. 2007; lognormal variance with pedigree 0.4726, pedigree (2,4,5,1,1)
  (same comment as for Ammonia)
- Potassium [air, urban air close to ground]: 3.34286e-5 kg; = 2.34E-05 * scaling_factor; source Bauer, C. 2007; lognormal variance with pedigree 0.4726, pedigree (2,4,5,1,1)
  (same comment as for Ammonia)
- Bromine [air, urban air close to ground]: 8.57143e-8 kg; = 6E-08 * scaling_factor; source Bauer, C. 2007; lognormal variance with pedigree 0.4726, pedigree (2,4,5,1,1)
  (same comment as for Ammonia)
- Lead [air, urban air close to ground]: 3.57143e-8 kg; = 2.5E-08 * scaling_factor; source Bauer, C. 2007; lognormal variance with pedigree 0.4726, pedigree (2,4,5,1,1)
  (same comment as for Ammonia)
- Phosphorus [air, urban air close to ground]: 4.28571e-7 kg; = 3E-07 * scaling_factor; source Bauer, C. 2007; lognormal variance with pedigree 0.4726, pedigree (2,4,5,1,1)
  (same comment as for Ammonia)
- Acetaldehyde [air, urban air close to ground]: 8.71429e-8 kg; = 6.1E-08 * scaling_factor; source Bauer, C. 2007; lognormal variance with pedigree 0.4726, pedigree (2,4,5,1,1)
  (same comment as for Ammonia)
- Cadmium [air, urban air close to ground]: 1e-9 kg; = 7E-10 * scaling_factor; source Bauer, C. 2007; lognormal variance with pedigree 0.4726, pedigree (2,4,5,1,1)
  (same comment as for Ammonia)
- Chromium [air, urban air close to ground]: 5.65714e-9 kg; = 3.96E-09 * scaling_factor; source Bauer, C. 2007; lognormal variance with pedigree 0.4726, pedigree (2,4,5,1,1)
  (same comment as for Ammonia)
- Hydrocarbons, aliphatic, unsaturated [air, urban air close to ground]: 4.42857e-6 kg; = 3.1E-06 * scaling_factor; source Bauer, C. 2007; lognormal variance with pedigree 0.4726, pedigree (2,4,5,1,1)
  (same comment as for Ammonia)
- Carbon monoxide, non-fossil [air, urban air close to ground]: 0.000428571 kg; = 3E-04 * scaling_factor; source T. Nussbaumer 2014; lognormal variance with pedigree 0.4712, pedigree (2,3,5,1,1)
  estimation
- Carbon dioxide, non-fossil [air, urban air close to ground]: 0.137857 kg; = 0.0965 * scaling_factor; source Bauer, C. 2007; lognormal variance with pedigree 0.4726, pedigree (2,4,5,1,1)
  (same comment as for Ammonia)
- m-Xylene [air, urban air close to ground]: 1.71429e-7 kg; = 1.2E-07 * scaling_factor; source Bauer, C. 2007; lognormal variance with pedigree 0.4726, pedigree (2,4,5,1,1)
  (same comment as for Ammonia)
- Copper [air, urban air close to ground]: 3.14286e-8 kg; = 2.2E-08 * scaling_factor; source Bauer, C. 2007; lognormal variance with pedigree 0.4726, pedigree (2,4,5,1,1)
  (same comment as for Ammonia)
- Phenol, pentachloro- [air, urban air close to ground]: 1.15714e-11 kg; = 8.1E-12 * scaling_factor; source Bauer, C. 2007; lognormal variance with pedigree 0.4726, pedigree (2,4,5,1,1)
  (same comment as for Ammonia)
- Formaldehyde [air, urban air close to ground]: 1.85714e-7 kg; = 1.3E-07 * scaling_factor; source Bauer, C. 2007; lognormal variance with pedigree 0.4726, pedigree (2,4,5,1,1)
  (same comment as for Ammonia)
- Nickel [air, urban air close to ground]: 8.57143e-9 kg; = 6E-09 * scaling_factor; source Bauer, C. 2007; lognormal variance with pedigree 0.4726, pedigree (2,4,5,1,1)
  (same comment as for Ammonia)
- Arsenic [air, urban air close to ground]: 1.42857e-9 kg; = 1E-09 * scaling_factor; source Bauer, C. 2007; lognormal variance with pedigree 0.4726, pedigree (2,4,5,1,1)
  (same comment as for Ammonia)
- Magnesium [air, urban air close to ground]: 5.14286e-7 kg; = 3.6E-07 * scaling_factor; source Bauer, C. 2007; lognormal variance with pedigree 0.4726, pedigree (2,4,5,1,1)
  (same comment as for Ammonia)
- Benzene, ethyl- [air, urban air close to ground]: 4.28571e-8 kg; = 3E-08 * scaling_factor; source Bauer, C. 2007; lognormal variance with pedigree 0.4726, pedigree (2,4,5,1,1)
  (same comment as for Ammonia)
- Sulfur dioxide [air, urban air close to ground]: 3.57143e-6 kg; = 2.5E-06 * scaling_factor; source Bauer, C. 2007; lognormal variance with pedigree 0.4726, pedigree (2,4,5,1,1)
  (same comment as for Ammonia)
- Chlorine [air, urban air close to ground]: 2.57143e-7 kg; = 1.8E-07 * scaling_factor; source Bauer, C. 2007; lognormal variance with pedigree 0.4726, pedigree (2,4,5,1,1)
  (same comment as for Ammonia)
- Dinitrogen monoxide [air, urban air close to ground]: 4.28571e-6 kg; = 3E-06 * scaling_factor; source Bauer, C. 2007; lognormal variance with pedigree 0.4726, pedigree (2,4,5,1,1)
  (same comment as for Ammonia)
- Toluene [air, urban air close to ground]: 4.28571e-7 kg; = 3E-07 * scaling_factor; source Bauer, C. 2007; lognormal variance with pedigree 0.4726, pedigree (2,4,5,1,1)
  (same comment as for Ammonia)
- PAH, polycyclic aromatic hydrocarbons [air, urban air close to ground]: 1.58571e-8 kg; = 1.11E-08 * scaling_factor; source Bauer, C. 2007; lognormal variance with pedigree 0.4726, pedigree (2,4,5,1,1)
  (same comment as for Ammonia)
- Dioxins, measured as 2,3,7,8-tetrachlorodibenzo-p-dioxin [air, urban air close to ground]: 4.42857e-14 kg; = 3.1E-14 * scaling_factor; source Bauer, C. 2007; lognormal variance with pedigree 0.4726, pedigree (2,4,5,1,1)
  (same comment as for Ammonia)
- Benzo(a)pyrene [air, urban air close to ground]: 7.14286e-10 kg; = 5E-10 * scaling_factor; source Bauer, C. 2007; lognormal variance with pedigree 0.4726, pedigree (2,4,5,1,1)
  (same comment as for Ammonia)
- Nitrogen oxides [air, urban air close to ground]: 8.57143e-5 kg; = 6E-05 * scaling_factor; source T. Nussbaumer 2014; lognormal variance with pedigree 0.4712, pedigree (2,3,5,1,1)
  estimation
- Calcium [air, urban air close to ground]: 8.35714e-6 kg; = 5.85E-06 * scaling_factor; source Bauer, C. 2007; lognormal variance with pedigree 0.4726, pedigree (2,4,5,1,1)
  (same comment as for Ammonia)
- Sodium [air, urban air close to ground]: 1.85714e-6 kg; = 1.3E-06 * scaling_factor; source Bauer, C. 2007; lognormal variance with pedigree 0.4726, pedigree (2,4,5,1,1)
  (same comment as for Ammonia)
- Benzene [air, urban air close to ground]: 1.3e-6 kg; = 9.1E-07 * scaling_factor; source Bauer, C. 2007; lognormal variance with pedigree 0.4726, pedigree (2,4,5,1,1)
  (same comment as for Ammonia)
- Water [air, urban air close to ground]: 7.62e-5 m3; lognormal variance with pedigree 0.0463, pedigree (2,2,5,1,2)
  calculated value, supposed to ensure correct water balance
- Zinc [air, urban air close to ground]: 4.28571e-7 kg; = 3E-07 * scaling_factor; source Bauer, C. 2007; lognormal variance with pedigree 0.4726, pedigree (2,4,5,1,1)
  (same comment as for Ammonia)
- Particulates, < 2.5 um [air, urban air close to ground]: 7.71429e-5 kg; = 54E-06 * scaling_factor; source T. Nussbaumer 2014; lognormal variance with pedigree 0.4712, pedigree (2,3,5,1,1)
  estimation

## Sampling procedure
literature

## Extrapolations
This dataset has been extrapolated from year 2001 to the year of the calculation (2021). The uncertainty has been adjusted accordingly.

## Review by Emilia Moreno Ruiz 2013-07-25
PV adjusted

## Review by Hans-Jörg Althaus 2007-10-04
passed
