# recultivation, potash salt mine

Dataset: EcoSpold 2, unit process
Geography: RER
Time period: 2000-01-01 to 2021-12-31
Technology level: current
Classification: ISIC rev.4 ecoinvent: 3900:Remediation activities and other waste management services
Classification: EcoSpold01Categories: construction materials/additives
Scenario: Business-as-Usual
System model: Allocation, cut-off by classification
Generated by: Avraam Symeonidis
Database: ecoinvent
isCopyrightProtected: true
accessRestrictedTo: 1

## General comment
This dataset represents the recultivation of 1 m2 of topsoil after potash salt mine. An assumed average thickness of about 0.3 m and a density of 1400 kg/m3 are assumed. The weight of topsoil per m2 is therefore about 420 kg. The ratio of topsoil to extracted limestone is 0.26% (density: 2'300 kg/m3, thickness: 70m, weight: 160'000 kg/m2).

## Included activities start
Recultivation process starting from the end of an excavation activity.

## Included activities end
The activity ends with the area recultivated. The dataset includes only the transformation from a mineral extraction site to a forest and the diesel consumption.

## Technology
The data corresponds to the high level of technology.

## Reference product
- recultivation, potash salt mine: 1 m2; By-product classification allocatable product; CPC 9441: Site remediation and clean-up services
  production volume 0.0336675 m2
    This is a placeholder value that does not reflect real-world production volumes. This dataset does not currently require a real-world production volume to work in the database framework, and no actual data were collected yet. This has no negative effect on the results of the ecoinvent database. The placeholder value of this activity was scaled according to the nominal GDP of 2005 (source: United Nations, http://data.un.org/Glossary.aspx?q=GDP+%28current+US%24%29, accessed 20130726) to reflect an appropriate share of the global production volume, which is also a placeholder value.
  property price 0.139872 EUR2005
    Calculated based on inputs: The price of the product has been calculated as a sum of the values of the material and energy inputs for this product. This value is therefore a rough estimation. It may underestimate the real price since there are additional expenses when producing any product. These expences can include for example labour costs, treatment of waste materials and profit for the producer. Please consider carefully whether this level of data quality is acceptable for your application.

## Inputs from technosphere
- diesel, burned in building machine: 7.44 MJ; lognormal variance with pedigree 0.368625, pedigree (4,3,5,2,1)
  EcoSpold01Location=GLO
  Estimation. The diesel fuel used for covering the closed mine is calculated using the 0.26% ratio compared to the consumption during the operation of the mine. The yearly recultivation area is about 2.400 m2.
  properties: heating value, net 1 MJ

## Inputs from nature
- Transformation, from mineral extraction site [natural resource, land]: 1 m2; lognormal variance with pedigree 0.162125, pedigree (3,2,5,2,1)
  Literature value.
- Transformation, to forest, unspecified [natural resource, land]: 1 m2; lognormal variance with pedigree 0.162125, pedigree (3,2,5,2,1)
  Literature value.

## Sampling procedure
Data is extrapolated from a limestone quarry.

## Extrapolations
This dataset has been extrapolated from year 2002 to the year of the calculation (2021). The uncertainty has been adjusted accordingly.
