# hydrogen peroxide production, product in 50% solution state

Dataset: EcoSpold 2, unit process
Geography: RoW
Time period: 1995-01-01 to 2021-12-31
Technology level: current
Classification: ISIC rev.4 ecoinvent: 2011:Manufacture of basic chemicals
Synonyms: Oxydol; Perhydrol; Superoxol; Peroxaan; Inhibine
Scenario: Business-as-Usual
System model: Allocation, cut-off by classification
Generated by: Roland Hischier
Published in: Althaus H.-J. 2007
Database: ecoinvent
isCopyrightProtected: true
accessRestrictedTo: 1

## General comment
This dataset represents the production of 1 kg of hydrogen peroxide. Hydrogen peroxide is a colourless liquid with a slightly sharp odour at higher concentrations. Due to its characteristics as a strong oxidising agent, hydrogen peroxide is widely used as a bleaching agent in the paper and the textile industry. Further important uses are e.g. wastewater treatment, disinfection applications or hydrometallurgical processes. In dilute solutions H2O2 acts as a very efficient antiseptic.
This dataset is based on a study performed by EMPA and Boustead Consulting, commissioned by CEFIC, and contains data from 8 European producers of hydrogen peroxide.
References:
Althaus H.-J., Chudacoff M., Hischier R., Jungbluth N., Osses M. and Primas A. (2007) Life Cycle Inventories of Chemicals. ecoinvent report No. 8, v2.0. EMPA Dübendorf, Swiss Centre for Life Cycle Inventories, Dübendorf, CH.
Boustead I. and Fawer M. (1998) Ecoprofile of hydrogen peroxide. Peroxygens - a sector group of CEFIC, Brussels (Belgium), Online-Version under: http://www.cefic.org/sector/peroxy/ecohydro/tc.htm.

## Included activities start
From reception of raw materials at the factory gate.

## Included activities end
This activity ends with the production of 1 kg of hydrogen peroxide. This dataset contains material and energy inputs, as well as the production of waste and emissions from the production of hydrogen peroxide by the anthraquinone process.

## Geography
Average data from 8 European producers. The inventory is assumed to be representative of the global production.

## Technology
The most common technique for the production of hydrogen peroxide is the autooxidation (AO) or anthraquinone process. In a first step, hydrogen peroxide is produced by reducing alkylanthraquinone with hydrogen in the presence of a catalyst to the hydrochinone. Then the catalyst is removed and the hydrochinone is oxidised – usually with air – back to the origin quinone and in the same time hydrogen peroxide is produced. The quinones can then be re-hydrolysed again. The whole reaction takes place in a working solution that consists of a mixture of various solvents (i.e. parts are aromatic solvents). The whole process is exothermic. In a second step, hydrogen peroxide is extracted from the working solution and concentrated. Both steps are included in this dataset.

## Time period
Time of publications.

## Parameters
- fraction, cooling water, to air: 0.3875 dimensionless; name fraction_CW_to_air; = (0.5*fraction_CW_OT_to_air)+(0.5*fraction_CW_R_to_air); lognormal variance with pedigree 0.092025, pedigree (4,4,3,2,4)
  Calculated value based on literature value (see comments of the other parametres present in this dataset) and expert opinion. In the case when no industry/literature data are available about the type of cooling or directly fraction, cooling water, to air specific for the process a default assumption is applied. It is assumed that the once-through cooling system is used in 50% of all cases and recirculating system is used in another 50% of all cases.
- fraction, cooling water, cooling pond system, to air: 0.032 dimensionless; name fraction_CW_CP_to_air; lognormal variance with pedigree 0.0413, pedigree (2,3,1,3,1)
  Calculated based on literature value (Scown, C.D., 2011, Water Footprint of U.S. Transportation Fuels and supplying information of the article) (Vionnet, S., Quantis Water Database - Technical Report, 2012).
- fraction, cooling water, recirculating system, to air: 0.771 dimensionless; name fraction_CW_R_to_air; lognormal variance with pedigree 0.0413, pedigree (2,3,1,3,1)
  (same comment as for fraction, cooling water, cooling pond system, to air)
- fraction, cooling water, once-through system, to air: 0.004 dimensionless; name fraction_CW_OT_to_air; lognormal variance with pedigree 0.0413, pedigree (2,3,1,3,1)
  (same comment as for fraction, cooling water, cooling pond system, to air)
- fraction, process water, to air: 0.205 dimensionless; name fraction_PW_to_air; lognormal variance with pedigree 0.092025, pedigree (4,4,3,2,4)
  Literature value (Statistics Canada, 2007 & Shaffer, K.H., 2008, Consumptive water use in the Great Lakes Basin, USGS) (Vionnet, S., Quantis Water Database - Technical Report, 2012).

## Reference product
- hydrogen peroxide, without water, in 50% solution state: 1 kg; name RP; By-product classification allocatable product; CPC 34280: Hydrogen peroxide; phosphides; carbides; hydrides, nitrides, azides, silicides and borides; CAS 7722-84-1
  Hydrogen peroxide is a colourless liquid with a slightly sharp odour at higher concentrations. Due to its characteristics as a strong oxidising agent, hydrogen peroxide is widely used as a bleaching agent in the paper and the textile industry. Further important uses are e.g. wastewater treatment, disinfection applications or hydrometallurgical processes. In dilute solutions H2O2 acts as a very efficient antiseptic.
  References:
  Althaus H.-J., Chudacoff M., Hischier R., Jungbluth N., Osses M. and Primas A. (2007) Life Cycle Inventories of Chemicals. ecoinvent report No. 8, v2.0. EMPA Dübendorf, Swiss Centre for Life Cycle Inventories, Dübendorf, CH.
  Boustead I. and Fawer M. (1998) Ecoprofile of hydrogen peroxide. Peroxygens - a sector group of CEFIC, Brussels (Belgium), Online-Version under: http://www.cefic.org/sector/peroxy/ecohydro/tc.htm.
  production volume 1.7759e9 kg; name RP_PV
    Eul et al. estimate the global production volume of hydrogen peroxide in 2000 to be 2.15 billion kg, the US production volume to be 0.681 billion kg (Eul et al., 2001). This value does not differentiate between different prodcution routes/technologies. It therefore, covers all industrial hydrogen peroxide production and is not specific to the technology represented in this dataset.
    Reference(s):
    Eul, W., Moeller, A. and Steiner, N. 2001. Hydrogen Peroxide, in Kirk-Othmer Encyclopedia of Chemical Technology. 4th ed. Volumes 1: New York, NY. John Wiley and Sons
  property price 0.471 EUR2005
    From UN trade database. http://data.un.org/ Calculated as average price for all chemicals in the category 'Trade of goods , US$, HS 1992, 28 Inorganic chemicals, precious metal compound, isotope'. Import data from the largest economies of the world are used (Brazil, India, USA, China, Japan and EU-27).
  property heating value, net 7.13 MJ
    LHV is calculated based on the elemental composition of the substance. Based on the CAS number of the substance (007722-84-1), the chemical formula of the substance is found to be: H2O2, (PubChem 2020).
    Reference: Kim, S., Chen, J., Cheng, T., Gindulyte, A., He, J., He, S., Li, Q., Shoemaker, B. A., Thiessen, P. A., Yu, B., Zaslavsky, L., Zhang, J., & Bolton, E. E. (2019). PubChem 2019 update: improved access to chemical data. Nucleic acids research, 47(D1), D1102–D1109. https://doi.org/10.1093/nar/gky1033
  property carbon content 0
    carbon content on a dry matter basis (reserved; not for manual entry)
  properties: wet mass 1 kg, water in wet mass 0 kg, water content 0, dry mass 1 kg, carbon content, non-fossil 0, carbon content, fossil 0, carbon allocation 0 kg

## Inputs from technosphere
- benzene: 0.00193 kg; lognormal variance with pedigree 0.0427, pedigree (2,2,5,5,1)
  Average data from 8 European producers.
  Uncertainty: A
  properties: dry mass 1 kg, wet mass 1 kg, carbon content, fossil 0.923077, heating value, net 42.5 MJ
- nitrogen, liquid: 0.0508 kg; lognormal variance with pedigree 0.0427, pedigree (2,2,5,5,1)
  Average data from 8 European producers.
  Uncertainty: A
  properties: dry mass 1 kg, wet mass 1 kg
- anthraquinone: 0.000952 kg; lognormal variance with pedigree 0.0427, pedigree (2,2,5,5,1)
  Average data from 8 European producers.
  Uncertainty: A
  properties: heating value, net 29.13 MJ, wet mass 1 kg, carbon content, fossil 0.807692, dry mass 1 kg
- hydrogen, liquid: 0.0656 kg; lognormal variance with pedigree 0.0427, pedigree (2,2,5,5,1)
  Average data from 8 European producers.
  Uncertainty: A
  properties: wet mass 1 kg, dry mass 1 kg, heating value, net 120.21 MJ
- aluminium oxide, non-metallurgical: 0.00961 kg; lognormal variance with pedigree 0.0427, pedigree (2,2,5,5,1)
  Average data from 8 European producers.
  Uncertainty: A
  properties: wet mass 1 kg, dry mass 1 kg
- heat, district or industrial, other than natural gas: 0 MJ; pedigree (1,1,1,1,1)
  Average data from 8 European producers.
  Uncertainty: A
  properties: heating value, net 1 MJ
- waste aluminium: -0.00282 kg; name BP_waste_aluminium; lognormal variance with pedigree 0.0427, pedigree (2,2,5,5,1)
  Average data from 8 European producers. Proxy for the landfilled waste, which consists mainly of aluminium oxide.
  Uncertainty: A
  production volume 5.00804e6 kg; = RP_PV*BP_waste_aluminium/ABS(RP)
    Calculated from the production volume of hydrogen peroxide, without water, in 50% solution state in proportion to the respective output amounts.
  property price 0 EUR2005; name BP_waste_aluminium_price_EUR2005
  properties: wet mass 1 kg, dry mass 1 kg
- heat, district or industrial, natural gas: 0 MJ; pedigree (1,1,1,1,1)
  Average data from 8 European producers.
  Uncertainty: A
  properties: heating value, net 1 MJ
- steam, in chemical industry: 1.58 kg; lognormal variance with pedigree 0.0427, pedigree (2,2,5,5,1)
  Average data from 8 European producers.
  Uncertainty: A
  properties: water content 9999, wet mass 1 kg, dry mass 0.0001 kg
- residue from cooling tower: -4.43e-5 kg; name BP_residue_from_cooling_tower; lognormal variance with pedigree 0.0427, pedigree (2,2,5,5,1)
  Average data from 8 European producers.
  Uncertainty: A
  production volume 78672.4 kg; = RP_PV*BP_residue_from_cooling_tower/ABS(RP)
    (same comment as for waste aluminium)
  property price 0 EUR2005; name BP_residue_from_cooling_to_price_EUR2005
  properties: water content 0.428571, dry mass 0.7 kg, wet mass 1 kg, carbon content, fossil 0.0544233
- electricity, medium voltage: 0 kWh; pedigree (1,1,1,1,1)
  Average data from 8 European producers.
  Uncertainty: A
- solvent, organic: 0.00145 kg; lognormal variance with pedigree 0.0427, pedigree (2,2,5,5,1)
  Average data from 8 European producers.
  Uncertainty: A
  properties: wet mass 1 kg, carbon content, fossil 0.63072, heating value, net 19.11 MJ, dry mass 1 kg
  note on carbon content, fossil: Mixture of 15 of the most often used solvents (list in ecoinvent v2.2 report 11-III, pg 293). C content was calculated as an unweighted average of C content of the different solvents
- municipal solid waste: 0 kg; name BP_municipal_solid_waste; pedigree (1,1,1,1,1)
  Average data from 8 European producers.
  Uncertainty: A
  production volume 0 kg
    (same comment as for waste aluminium)
  properties: carbon content, non-fossil 0.261655, heating value, net 11.74 MJ, wet mass 1 kg, dry mass 0.771 kg, water content 0.297017, carbon content, fossil 0.171549
  note on carbon content, non-fossil: MSW composition in tab 4.1, ecoinvent v2.2 report 13_I. C content referred to 1 kg DM
  note on heating value, net: Value taken from the general comment of the treatment dataset.
- chemical, inorganic: 0.00068 kg; lognormal variance with pedigree 0.0427, pedigree (2,2,5,5,1)
  Average data from 8 European producers.
  Uncertainty: A
  properties: carbon content, fossil 0.003, wet mass 1 kg, dry mass 1 kg
  note on carbon content, fossil: This dataset is an unweighted average of 20 inorganic substances (listed in Tab 88.1, ecoinvent v2.2 report 8, part II), being part of the top100 chemicals included in this database. The C-content has also been calculated as an unweighted average of the C content of the substances composing this dataset.
- sodium hydroxide, without water, in 50% solution state: 0.00064 kg; lognormal variance with pedigree 0.0427, pedigree (2,2,5,5,1)
  Average data from 8 European producers.
  Uncertainty: A
  properties: dry mass 1 kg, wet mass 1 kg, heating value, net 3.03 MJ
- chemical factory, organics: 4e-10 unit; lognormal variance with pedigree 0.3498, pedigree (2,3,5,4,3)
  Calculated based on literature data published by the industry. For this activity, no information was readily available concerning infrastructure and land-use. Therefore, the infrastructure is estimated based on data from two chemical factories, the BASF site of Ludwigshafen and the chemical factory in Gendorf (which are both located in Germany), which produce a wide range of chemical substances. Based on this data, the following assumptions are made: the built area amounts to about 4.2 ha, the plant has an average output of 50'000 t/a and a lifespan of fifty years. The estimated infrastructure amount is therefore 4.00 E-10 units per kg of produced chemical.
  References:
  Althaus H.-J., Chudacoff M., Hischier R., Jungbluth N., Osses M. and Primas A. (2007) Life Cycle Inventories of Chemicals. ecoinvent report No. 8, v2.0. EMPA Dübendorf, Swiss Centre for Life Cycle Inventories, Dübendorf, CH.
  Gendorf (2000) Umwelterklärung 2000, Werk Gendorf. Werk Gendorf, Burgkirchen.
- oxygen, liquid: 0.0293 kg; lognormal variance with pedigree 0.0427, pedigree (2,2,5,5,1)
  Average data from 8 European producers.
  Uncertainty: A
  properties: wet mass 1 kg, dry mass 1 kg
- heat, district or industrial, other than natural gas: 0.000102958, 0.253897 MJ (2 entries); lognormal variance with pedigree 0.0427, pedigree (2,2,5,5,1)
  Average data from 8 European producers.
  Uncertainty: A
- heat, district or industrial, natural gas: 0.0318742, 2.06813 MJ (2 entries); lognormal variance with pedigree 0.0427, pedigree (2,2,5,5,1)
  Average data from 8 European producers.
  Uncertainty: A
- electricity, medium voltage: 0.00705891, 0.00135359, 0.022724, 0.330501, 0.0465842, 0.151778 kWh (6 entries); lognormal variance with pedigree 0.0427, pedigree (2,2,5,5,1)
  Average data from 8 European producers.
  Uncertainty: A
- municipal solid waste: -0.000125132, -3.15301e-5, -4.50584e-5, -0.0884983 kg (4 entries); lognormal variance with pedigree 0.0427, pedigree (2,2,5,5,1)
  Average data from 8 European producers.
  Uncertainty: A
  production volume 1.57522e8 kg

## Inputs from nature
- Water, unspecified natural origin [natural resource, in water]: 0.00192 m3; name water_UNO_input; lognormal variance with pedigree 0.0427, pedigree (2,2,5,5,1)
  Average data from 8 European producers.
  Uncertainty: A
- Water, cooling, unspecified natural origin [natural resource, in water]: 0.17 m3; name water_cooling_UNO_input; lognormal variance with pedigree 0.0427, pedigree (2,2,5,5,1)
  Average data from 8 European producers.
  Uncertainty: A

## Emissions to nature
- Hydrogen [air, urban air close to ground]: 3.83e-5 kg; lognormal variance with pedigree 0.0827, pedigree (2,2,5,5,1)
  Average data from 8 European producers.
  Uncertainty: A
- Water [air, unspecified]: 0.0662686 m3; = (water_cooling_UNO_input*fraction_CW_to_air)+(water_UNO_input*fraction_PW_to_air); lognormal variance with pedigree 0.0827, pedigree (2,2,5,5,1)
  Calculated as a fraction of the input of water. For more details, refer to the mathematical relation and the parameters.
  property fraction, origin: fresh water 0; name fraction_origin_fresh_water
  property fraction, origin: salt water 0; name fraction_origin_salt_water
  property fraction, origin: unspecified 1; name fraction_origin_unspecified
- Hydrocarbons, aromatic [water, surface water]: 3.75e-7 kg; lognormal variance with pedigree 0.3527, pedigree (2,2,5,5,1)
  Average data from 8 European producers.
  Uncertainty: A
- TOC, Total Organic Carbon [water, surface water]: 0.0003 kg; lognormal variance with pedigree 0.0827, pedigree (2,2,5,5,1)
  Average data from 8 European producers.
  Uncertainty: A
- Hydrocarbons, aromatic [air, urban air close to ground]: 0.000128 kg; lognormal variance with pedigree 0.1627, pedigree (2,2,5,5,1)
  Average data from 8 European producers.
  Uncertainty: A
- Suspended solids, unspecified [water, surface water]: 0.000151 kg; lognormal variance with pedigree 0.0827, pedigree (2,2,5,5,1)
  Average data from 8 European producers.
  Uncertainty: A
- DOC, Dissolved Organic Carbon [water, surface water]: 0.0003 kg; lognormal variance with pedigree 0.0827, pedigree (2,2,5,5,1)
  Calculated as equal to TOC.
  Uncertainty: A
- Phosphate [water, surface water]: 1.25e-5 kg; lognormal variance with pedigree 0.0827, pedigree (2,2,5,5,1)
  Average data from 8 European producers.
  Uncertainty: A
- COD, Chemical Oxygen Demand [water, surface water]: 0.00094 kg; lognormal variance with pedigree 0.0827, pedigree (2,2,5,5,1)
  Average data from 8 European producers.
  Uncertainty: A
- NMVOC, non-methane volatile organic compounds, unspecified origin [air, urban air close to ground]: 0.00053 kg; lognormal variance with pedigree 0.1627, pedigree (2,2,5,5,1)
  Average data from 8 European producers.
  Uncertainty: A
- BOD5, Biological Oxygen Demand [water, surface water]: 0.00026 kg; lognormal variance with pedigree 0.0827, pedigree (2,2,5,5,1)
  Average data from 8 European producers.
  Uncertainty: A
- Nitrate [water, surface water]: 0.000203 kg; lognormal variance with pedigree 0.0827, pedigree (2,2,5,5,1)
  Average data from 8 European producers.
  Uncertainty: A
- Chloride [water, surface water]: 0.00038 kg; lognormal variance with pedigree 0.0827, pedigree (2,2,5,5,1)
  Average data from 8 European producers.
  Uncertainty: A
- Hydrogen peroxide [water, surface water]: 0.0006 kg; lognormal variance with pedigree 0.3527, pedigree (2,2,5,5,1)
  Average data from 8 European producers.
  Uncertainty: A
- Water [water, unspecified]: 0.105651 m3; = water_cooling_UNO_input*(1-fraction_CW_to_air)+water_UNO_input*(1-fraction_PW_to_air); lognormal variance with pedigree 0.0827, pedigree (2,2,5,5,1)
  (same comment as for Water)
  property fraction, origin: fresh water 0; name fraction_origin_fresh_water_Ww
  property fraction, origin: salt water 0; name fraction_origin_salt_water_Ww
  property fraction, origin: unspecified 1; name fraction_origin_unspecified_Ww
  property water in wet mass 1000 kg; name WWM
  property wet mass 1000 kg; name WM
  property carbon content, non-fossil 0; name C_content_non_fossil
  property dry mass 0 kg; name DM
  property carbon content, fossil 0; name C_content_fossil

## Sampling procedure
Industrial data from 8 producers in Europe.

## Extrapolations
The input of aromatic solvents is modeled with benzene, which is one of the possible aromatic solvents that can be used for this process. This dataset has been copied from an original dataset covering the geography RER. The uncertainty has been adjusted accordingly.

## Review by Emilia Moreno Ruiz 2017-08-10
This dataset was additionally reviewed in a separate review process by Eric Johnson of Atlantic Consulting as well as Emilia Moreno Ruiz and Gregor Wernet of ecoinvent.
