# coffee green bean production, robusta

Dataset: EcoSpold 2, unit process
Geography: RoW
Time period: 2012-01-01 to 2021-12-31
Technology level: current
Classification: ISIC rev.4 ecoinvent: 0127:Growing of beverage crops
Tags: WFLDB
Scenario: Business-as-Usual
System model: Allocation, cut-off by classification
Generated by: [System]
Database: ecoinvent
isCopyrightProtected: true
accessRestrictedTo: 1

## General comment
This dataset is a weighted average of the regional datasets, with weights based on production volume of the reference product. Detailed comments and sources about the exchanges can be found in the regional datasets.
The geographicalCorrelation score of every pedigree matrix of was changed to '5'.
Sum of regional production volumes: 2.825e+9 kg
VN: PV = 1.251e+9 kg; weight = 0.4429
BR: PV = 6.998e+8 kg; weight = 0.2477
ID: PV = 6.741e+8 kg; weight = 0.2386
IN: PV = 2.000e+8 kg; weight = 0.07079
Yield of the global dataset = 2472.04646382 kg/ha, calculated as a weighted average of the regional yields.
The comments below were part of the VN regional dataset.
This dataset represents the production of 1 kg of green coffee beans (Robusta). Robusta is a variety of coffee that has a stronger, harsher taste, with a grain-like overtone and peanutty aftertaste. It contains twice as much caffeine as Arabica beans, and is generally considered to be of inferior quality compared to Arabica. Robusta is mostly grown in Africa, South-East Asia, India and Brazil. The reference flow is the average yield per ha and year, from 2012 - 2014: yield (2500 kg/ha) obtained under irrigated conditions (total amount of water 833 m3/ha). The data are representative for Robusta green coffee beans production in Vietnam used for the export market. Mineral NPK fertiliser input is 331-127-249 kg/ha. No organic fertilisers are applied. Total active ingredients (a.i.) applied as pesticides amount to 0.5 kg a.i./ha.
The dataset was modelled within the project 'World Food LCA database (WFLDB)'. The aim of this project was to provide inventories of a broad variety of agricultural products and processes and to cover for each product at least 50% of the global export market. The export share of coffee produced in Vietnam amounts to 13.1% of the global export (tonnage exported in 2010). The production system regarded in this dataset aimed at representing Robusta green coffee beans produced in Vietnam for the export market.
Statistical data from FAO used to assess land use change is incomplete for Vietnam. The original land use of 93.8% of perennial cropland transformed in the last 20 years is unknown. To avoid a potentially significant underestimation of land use change impacts, the conservative assumption was made that the unknown land transformation share shall be attributed to transformation from forest land (primary and secondary).
PEF-Quality: data quality rating (DQR) = 2.2 (i.e. good quality)
This dataset refers to an average situation; for specific situations exchanges might differ substantially due to site specific parameters.

## Included activities start
This activity starts with the nursery producing fruit tree seedlings, i.e.grafted young trees to be planted.

## Included activities end
This activity ends with the waste treatment after the clearing of the orchard (rooting up the trees). The dataset includes all activities during a year in the productive phase of the orchard including the establishment phase per year of lifetime (20 years), the clearing of the orchard including waste treatment.
The establishment phase of the orchard includes tree nursery, soil cultivation, planting trees, installation of trellis system (posts and wires) and irrigation. Fertiliser and pesticide use in a year of the establishment phase is assumed to be half of the amount of a year in the productive phase.
The productive phase of the orchard includes machine operations, corresponding infrastructure, fuel use and sheds. Machine operations in the productive phase are: soil cultivation (mulching, mowing), fertiliser application, harvesting and irrigation. Further, direct field emissions and land use change are included. At the end of the productive phase the orchard is cleared by rooting up the trees.
The inputs of seedlings, fertilisers and pesticides as well as packaging of fertilisers and pesticides are considered. Green coffee beans are sun-dried. Heavy metal uptake by the crop is considered.

## Reference product
- coffee, green bean: 1 kg; CPC 01610: Coffee, green; By-product classification allocatable product
  production volume 2.22011e9 kg
    Source: FAOSTAT. Average, 2009-2012. 59.6% Robusta (http://apps.fas.usda.gov/psdonline/psdReport.aspx?hidReportRetrievalName=Table+01+Coffee+World+Production%2c+Supply+and+Distribution&hidReportRetrievalID=2051&hidReportRetrievalTemplateID=13)
  property price 1.6 EUR2005
    Calculated value based on data from United Nations Commodity Trade Statistics Database (comtrade.un.org). UN comtrade category: 90111 Coffee, not roasted, not decaffeinated. Year: 2005. Using exchange rate of 1EURO = 1.209 USD. Average of price of import into 5 main markets (EU, US, JP, IN and CN).
  property carbon content, non-fossil 0.490083
    calculation: C-content of components according to ecoinvent report No. 15a. Source of composition: Souci, S.W., Fachmann, W., Kraut, H. (Hg.: Bundesminsiterium fur Ernahrung, Landwirtschaft und Forsten, Bonn) 'Die Zusammensetzung der Lebensmittel - Nahrwerttabellen', medpharm Scientific Publishers Stuttgart, CRC Press; 2000.
  property carbon content 0.490083
    carbon content on a dry matter basis (reserved; not for manual entry)
  properties: carbon content, fossil 0, wet mass 1 kg, water in wet mass 0.092559 kg, water content 0.102, dry mass 0.907441 kg, carbon allocation 0.444722 kg

## Inputs from technosphere
- diesel, burned in agricultural machinery: 0.0524378 MJ; lognormal variance with pedigree 0.120177, pedigree (2,1,3,5,1)
  Literature value or expert estimation (Personal written communication, Herma Mulder, Nedcoffee., 2014). Diesel, for coffee processing (depulping).
- phosphate rock, beneficiated: 0 kg; pedigree (1,1,1,1,1)
  The exchange has been updated from 'phosphate rock, as P2O5, beneficiated, dry' into 'phosphate rock, beneficiated' and therefore its amount has been scaled (multiplied) from 0.0001 kg by 3.125 kg of 'phosphate rock, beneficiated' per kg of 'phosphate rock, as P2O5, beneficiated, dry'. Original comment of the exchange is: Calculated based on literature values or expert estimation: The total amount of nutrient (Personal written communication, Ms. Namy Espinoza Orias, Nestle., 2015) multiplied by the country-share of fertiliser type (IFA 2014). See supporting documentation 'WFLDB-Documentation.pdf' chapter 'Fertiliser application' for L3 and L4 data (https://ecoquery.ecoinvent.org/File/Reports).
  Corresponds to 1.23 kg/ha
  properties: dry mass 1 kg, wet mass 1 kg
- compost: 1.05162 kg; lognormal variance with pedigree 0.120177, pedigree (2,1,3,5,1)
  Literature value or expert estimation (Personal written communication, Herma Mulder, Nedcoffee., 2014).
  Corresponds to 2940.0 kg/ha
  properties: cadmium content 3.6e-7, dry mass 0.5 kg, nickel content 1.63e-5, potassium content 0.01, nitrogen content 0.014, chromium content 2.23e-5, lead content 4.9e-5, water content 1, wet mass 1 kg, copper content 5.77e-5, phosphorus content 0.0035, mercury content 1.2e-7, zinc content 0.000184, carbon content, non-fossil 0.183645
- ammonium sulfate: 0.00260122 kg; lognormal variance with pedigree 0.120177, pedigree (2,1,3,5,1)
  Calculated based on literature values or expert estimation: The total amount of nutrient (Personal written communication, Ms. Namy Espinoza Orias, Nestle., 2015) multiplied by the country-share of fertiliser type (IFA 2014). See supporting documentation 'WFLDB-Documentation.pdf' chapter 'Fertiliser application' for L3 and L4 data (https://ecoquery.ecoinvent.org/File/Reports).
  Corresponds to 44.1 kg/ha
  properties: wet mass 1 kg, dry mass 1 kg
- cyclic N-compound: 0.000258308 kg; lognormal variance with pedigree 0.00984984, pedigree (2,2,3,5,1)
  properties: wet mass 1 kg, carbon content, fossil 0.641962, dry mass 1 kg
- solid manure loading and spreading, by hydraulic loader and spreader: 0.318145 kg; lognormal variance with pedigree 0.120177, pedigree (2,1,3,5,1)
  This amount corresponds the input of solid manure. Personal written communication, Herma Mulder, Nedcoffee., 2014
- ammonium nitrate: 0 kg; pedigree (1,1,1,1,1)
  The exchange has been updated from 'ammonium nitrate, as N' into 'ammonium nitrate' and therefore its amount has been scaled (multiplied) from 0.0412 kg by 2.8573 kg of 'ammonium nitrate' per kg of 'ammonium nitrate, as N'. Original comment of the exchange is: Calculated based on literature values or expert estimation: The total amount of nutrient (Personal written communication, Herma Mulder, Nedcoffee., 2014) multiplied by the share of fertiliser type (Personal written communication, Herma Mulder, Nedcoffee., 2014). See supporting documentation 'WFLDB-Documentation.pdf' chapter 'Fertiliser application' for L3 and L4 data (https://ecoquery.ecoinvent.org/File/Reports).
  Corresponds to 215.0 kg/ha
  properties: wet mass 1 kg, dry mass 1 kg
- petrol, unleaded, burned in machinery: 0.0648538 MJ; lognormal variance with pedigree 0.120177, pedigree (2,1,3,5,1)
  Literature value or expert estimation (Personal written communication, Herma Mulder, Nedcoffee., 2014).
  properties: heating value, net 1 MJ
- fertilising, by broadcaster: 0.000113796 ha; lognormal variance with pedigree 0.120177, pedigree (2,1,3,5,1)
  Proxy: Extrapolated using a modified MEXALCA-approach (Roches et al. 2010; Nemecek et al. 2012). See supporting documentation 'WFLDB-Documentation.pdf' chapter 'Machinery processes' for L1 data (https://ecoquery.ecoinvent.org/File/Reports).
- poultry manure, dried: 0.0911911 kg; lognormal variance with pedigree 0.120177, pedigree (2,1,3,5,1)
  Calculated based on literature values: The total amount of manure (Personal written communication, Herma Mulder, Nedcoffee., 2014) multiplied by the country-share of manure per animal category (FAOSTAT 2015). See supporting documentation 'WFLDB-Documentation.pdf' chapter 'Fertiliser application' (https://ecoquery.ecoinvent.org/File/Reports).
  Corresponds to 344.0 kg/ha
  properties: nickel content 4e-5, carbon content, non-fossil 0.33389, cadmium content 2.92e-7, water content 0.156069, mercury content 2e-7, zinc content 0.000349, potassium content 0.024, wet mass 1 kg, nitrogen content 0.532, phosphorus content 0.0167, copper content 4.38e-5, lead content 2.92e-6, dry mass 0.865 kg
- heat, central or small-scale, other than natural gas: 1.4156 MJ; lognormal variance with pedigree 0.120177, pedigree (2,1,3,5,1)
  properties: heating value, net 1 MJ
- manure, solid, cattle: 0.226953 kg; lognormal variance with pedigree 0.120177, pedigree (2,1,3,5,1)
  Calculated based on literature values: The total amount of manure (Personal written communication, Herma Mulder, Nedcoffee., 2014) multiplied by the country-share of manure per animal category (FAOSTAT 2015). See supporting documentation 'WFLDB-Documentation.pdf' chapter 'Fertiliser application' (https://ecoquery.ecoinvent.org/File/Reports).
  Corresponds to 856.0 kg/ha
  properties: dry mass 0.22 kg, wet mass 1 kg, carbon content, non-fossil 0.441, water content 3.5454
- heat, district or industrial, other than natural gas: 0 MJ; pedigree (1,1,1,1,1)
  Literature value or expert estimation (Coltro et al. 2006). Light fuel oil used at the farm for other activities than depulping and drying.
  properties: heating value, net 1 MJ
- lime: 0.379867 kg; lognormal variance with pedigree 0.120177, pedigree (2,1,3,5,1)
  Calculated based on literature values or expert estimation: The total amount of nutrient (Personal written communication, Herma Mulder, Nedcoffee., 2014) multiplied by the share of fertiliser type (Personal written communication, Herma Mulder, Nedcoffee., 2014). See supporting documentation 'WFLDB-Documentation.pdf' chapter 'Fertiliser application' for L3 and L4 data (https://ecoquery.ecoinvent.org/File/Reports).
  Corresponds to 1620.0 kg/ha
  properties: wet mass 1 kg, carbon content, fossil 0.120005, dry mass 1 kg
- application of plant protection product, by field sprayer: 0.000170694 ha; lognormal variance with pedigree 0.120664, pedigree (2,2,3,5,1)
  Proxy: Extrapolated using a modified MEXALCA-approach (Roches et al. 2010; Nemecek et al. 2012). See supporting documentation 'WFLDB-Documentation.pdf' chapter 'Machinery processes' for L1 data (https://ecoquery.ecoinvent.org/File/Reports). Field sprayer used as a proxy for pesticide application in orchards.
- trellis system, wooden poles, soft wood, tar impregnated: 0.000546931 ha; lognormal variance with pedigree 0.129577, pedigree (3,1,3,5,3)
  Used to attach trees in orchards with a tree density of more than 500 trees per ha. Trellis system are included as a conservative approach.
- potassium sulfate: 0.000100753 kg; lognormal variance with pedigree 0.120177, pedigree (2,1,3,5,1)
  The exchange has been updated from 'potassium sulfate, as K2O' into 'potassium sulfate' and therefore its amount has been scaled (multiplied) from 0.0001 kg by 1.85 kg of 'potassium sulfate' per kg of 'potassium sulfate, as K2O'. Original comment of the exchange is: Calculated based on literature values or expert estimation: The total amount of nutrient (Personal written communication, Ms. Namy Espinoza Orias, Nestle., 2015) multiplied by the country-share of fertiliser type (IFA 2014). See supporting documentation 'WFLDB-Documentation.pdf' chapter 'Fertiliser application' for L3 and L4 data (https://ecoquery.ecoinvent.org/File/Reports).
  Corresponds to 0.923 kg/ha
  properties: dry mass 1 kg, wet mass 1 kg
- transport, tractor and trailer, agricultural: 0.000636968 metric ton*km; lognormal variance with pedigree 0.158439, pedigree (4,1,3,5,1)
  On-farm transport: Yield (in tonnes) multiplied by the average distance from field to farm. The distance was obtained by extrapolation (modified MEXALCA approach). See supporting documentation 'WFLDB-Documentation.pdf' chapter 'Machinery processes' (https://ecoquery.ecoinvent.org/File/Reports).
- waste wood, untreated: 0 kg; pedigree (1,1,1,1,1)
  Wood from trees after 1-2 years of sorrage at the field (20% water) per lifetime year (20 years) of the orchard
  production volume 0 kg
    Calculated from reference product production volume, reference product amount and byproduct amount.
  properties: wet mass 1 kg, dry mass 0.8 kg, water content 0.25, carbon content, non-fossil 0.48632, heating value, net 13.99 MJ
  note on heating value, net: Value taken from the general comment of the treatment dataset.
- urea: 0 kg; pedigree (1,1,1,1,1)
  The exchange has been updated from 'urea, as N' into 'urea' and therefore its amount has been scaled (multiplied) from 0.125 kg by 2.1438 kg of 'urea' per kg of 'urea, as N'. Original comment of the exchange is: Calculated based on literature values or expert estimation: The total amount of nutrient (Personal written communication, Herma Mulder, Nedcoffee., 2014) multiplied by the share of fertiliser type (Personal written communication, Herma Mulder, Nedcoffee., 2014). See supporting documentation 'WFLDB-Documentation.pdf' chapter 'Fertiliser application' for L3 and L4 data (https://ecoquery.ecoinvent.org/File/Reports).
  Corresponds to 400.0 kg/ha
  properties: wet mass 1 kg, dry mass 1 kg, carbon content, fossil 0.2
- biowaste: -3.35 kg; lognormal variance with pedigree 0.325577, pedigree (5,5,5,5,5)
  production volume 7.43738e9 kg
    (same comment as for waste wood, untreated)
  properties: carbon content, non-fossil 0.1624, water content 1.5, heating value, net 4.29 MJ, dry mass 0.4 kg, wet mass 1 kg
- potassium chloride: 0.124948 kg; lognormal variance with pedigree 0.120177, pedigree (2,1,3,5,1)
  The exchange has been updated from 'potassium chloride, as K2O' into 'potassium chloride' and therefore its amount has been scaled (multiplied) from 0.0789 kg by 1.5829 kg of 'potassium chloride' per kg of 'potassium chloride, as K2O'. Original comment of the exchange is: Calculated based on literature values or expert estimation: The total amount of nutrient (Personal written communication, Herma Mulder, Nedcoffee., 2014) multiplied by the share of fertiliser type (Personal written communication, Herma Mulder, Nedcoffee., 2014). See supporting documentation 'WFLDB-Documentation.pdf' chapter 'Fertiliser application' for L3 and L4 data (https://ecoquery.ecoinvent.org/File/Reports).
  Corresponds to 249.0 kg/ha
  properties: dry mass 1 kg, wet mass 1 kg
- packaging, for pesticides: 0.000975375 kg; lognormal variance with pedigree 0.0532, pedigree (4,3,3,5,4)
  Total amount of active substance/s of pesticides needed for the production of coffee, green bean is calculated to be circa 4.88E-04 kg. Pesticide/s used in this dataset is/are: 'cyclic N-compound', 'glyphosate'. The total amount of active substance/s is doubled in order to account for the packaging of the dilluted product of pesticide/s that is/are applied. Therefore, 9.75E-04 kg of packaging for pesticides is justified with this exchange.
  properties: price 0.0642 EUR2005, carbon content, fossil 0.85714, heating value, net 25.97 MJ, wet mass 1 kg, dry mass 1 kg
- inorganic phosphorus fertiliser, as P2O5: 0 kg; pedigree (1,1,1,1,1)
  Calculated based on literature values or expert estimation: The total amount of nutrient (Personal written communication, Herma Mulder, Nedcoffee., 2014) multiplied by the share of fertiliser type (Personal written communication, Herma Mulder, Nedcoffee., 2014). See supporting documentation 'WFLDB-Documentation.pdf' chapter 'Fertiliser application' for L3 and L4 data (https://ecoquery.ecoinvent.org/File/Reports).
  Corresponds to 92.7 kg/ha
  properties: wet mass 1 kg, dry mass 1 kg
- packaging, for fertilisers: 1.66061 kg; lognormal variance with pedigree 0.0532, pedigree (4,3,3,5,4)
  Total amount of active substance/s of fertilisers needed for the production of 'coffee, green bean' is calculated to be circa 8.30E-01 kg. Fertiliser/s used in this dataset is/are: 'ammonium nitrate, as N', 'ammonium sulfate, as N', 'lime', 'nitrogen fertiliser, as N', 'phosphate fertiliser, as P2O5', 'phosphate rock, as P2O5, beneficiated, dry', 'potassium chloride, as K2O', 'potassium fertiliser, as K2O', 'potassium sulfate, as K2O', 'urea, as N'. The total amount of active substance/s is doubled in order to account for the packaging of the dilluted product of fertiliser/s that is/are applied. Therefore, 1.66E+00 kg of packaging for fertilisers is justified with this exchange.
  properties: price 0.0642 EUR2005, wet mass 1 kg, carbon content, fossil 0.825301, heating value, net 25.01 MJ, dry mass 1 kg
  note on carbon content, fossil: Considering a chemical formula (C2H4)n for polyethylene, carbon content-fossil is calculated to be 0.856286 kg of Carbon per kg of dry mass.
- planting tree: 0.0248987 unit
  Literature value expert estimation. This is the number of trees per ha (i.e. 1000 trees/ha) divided by the lifetime years of the orchard (i.e. 20 years).
- inorganic nitrogen fertiliser, as N: 0 kg; pedigree (1,1,1,1,1)
  Calculated based on literature values or expert estimation: The total amount of nutrient (Personal written communication, Herma Mulder, Nedcoffee., 2014) multiplied by the share of fertiliser type (Personal written communication, Herma Mulder, Nedcoffee., 2014). See supporting documentation 'WFLDB-Documentation.pdf' chapter 'Fertiliser application' for L3 and L4 data (https://ecoquery.ecoinvent.org/File/Reports).
  Corresponds to 116.0 kg/ha
  properties: wet mass 1 kg, dry mass 1 kg
- inorganic potassium fertiliser, as K2O: 0 kg; pedigree (1,1,1,1,1)
  Calculated based on literature values or expert estimation: The total amount of nutrient (Personal written communication, Herma Mulder, Nedcoffee., 2014) multiplied by the share of fertiliser type (Personal written communication, Herma Mulder, Nedcoffee., 2014). See supporting documentation 'WFLDB-Documentation.pdf' chapter 'Fertiliser application' for L3 and L4 data (https://ecoquery.ecoinvent.org/File/Reports).
  Corresponds to 50.0 kg/ha
  properties: dry mass 1 kg, wet mass 1 kg
- irrigation: 0 m3; pedigree (1,1,1,1,1)
  Calculated value: The total amount of water used for irrigation (Personal written communication, Herma Mulder, Nedcoffee., 2014) multiplied by the country-share of irrigation technique (Personal written communication, Herma Mulder, Nedcoffee., 2014). See supporting documentation 'WFLDB-Documentation.pdf' chapter 'Water use for irrigation' (https://ecoquery.ecoinvent.org/File/Reports).
  properties: water content 9089.91, dry mass 0.11 kg, wet mass 1000 kg
- glyphosate: 0.000229379 kg; lognormal variance with pedigree 0.00984984, pedigree (2,2,3,5,1)
  Literature value or expert estimation (ECLAC 2014).
  properties: dry mass 1 kg, wet mass 1 kg, carbon content, fossil 0.214286
- establishing orchard: 0.0248987 unit
  Literature value or expert estimation (Personal written communication, Herma Mulder, Nedcoffee., 2014). This is the number of trees per ha divided by the lifetime years of the orchard.
- fruit tree seedling, for planting: 0.0248987 unit
  (same comment as for establishing orchard)
  properties: carbon content, non-fossil 0.439481, wet mass 1 kg, dry mass 0.578035 kg, water content 0.73
  note on carbon content, non-fossil: calculation: C-content of components according to ecoinvent report No. 15a. Source of composition: https://ndb.nal.usda.gov/ndb/search/. Unspecific seedling used as proxy.
- phosphate rock, beneficiated: 9.69526e-5, 3.30705e-5, 9.69526e-5 kg (3 entries); lognormal variance with pedigree 0.120177, pedigree (2,1,3,5,1)
  (same comment as for phosphate rock, beneficiated)
- ammonium nitrate: 0.0281668, 0.0528401, 0.0366465 kg (3 entries); lognormal variance with pedigree 0.120177, pedigree (2,1,3,5,1)
  (same comment as for ammonium nitrate)
- heat, district or industrial, other than natural gas: 0.00102862, 0.0623801 MJ (2 entries); lognormal variance with pedigree 0.120177, pedigree (2,1,3,5,1)
  (same comment as for heat, district or industrial, other than natural gas)
- waste wood, untreated: -0.0367504, -0.00268687, -0.0155942, -0.0246531, -0.467109 kg (5 entries); lognormal variance with pedigree 0.120177, pedigree (2,1,3,5,1)
  (same comment as for waste wood, untreated)
  production volume 1.21394e9 kg
- urea: 0.201175, 0.0369362, 0.0297952 kg (3 entries); lognormal variance with pedigree 0.120177, pedigree (2,1,3,5,1)
  (same comment as for urea)
- inorganic phosphorus fertiliser, as P2O5: 0.00110499, 0.00143363, 0.00114796, 0.00189397, 7.80387e-5, 0.000205707, 0.0212199, 0.000382478, 4.17376e-5, 9.11913e-6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 kg (26 entries); lognormal variance with pedigree 0.120177, pedigree (2,1,3,5,1)
  (same comment as for inorganic phosphorus fertiliser, as P2O5)
- inorganic nitrogen fertiliser, as N: 0.000315013, 0.000452789, 0.000404687, 0.000848999, 1.05232e-5, 6.30091e-5, 0.00798361, 0.000149208, 2.24105e-5, 2.17609e-6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 kg (26 entries); lognormal variance with pedigree 0.120177, pedigree (2,1,3,5,1)
  (same comment as for inorganic nitrogen fertiliser, as N)
- inorganic potassium fertiliser, as K2O: 1.05013e-5, 5.20381e-5, 0.000105548, 9.34189e-5, 1.35112e-5, 2.24964e-5, 0.00218578, 7.60283e-5, 1.87284e-5, 8.47236e-7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 kg (26 entries); lognormal variance with pedigree 0.120177, pedigree (2,1,3,5,1)
  (same comment as for inorganic potassium fertiliser, as K2O)
- irrigation: 0.000413993, 1.65597e-5, 0.087187, 0.00142876, 7.14441e-5, 0.00405678, 0.000660315, 0.00322063, 0.00110074, 0.00295129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 m3 (14 entries); lognormal variance with pedigree 0.120177, pedigree (2,1,3,5,1)
  (same comment as for irrigation)

## Inputs from nature
- Transformation, to permanent crop, irrigated [natural resource, land]: 0.273465 m2
  Calculated value: 10000 m2 divided by the yield and the life time of the perennial crop (20 years).
- Transformation, from permanent crop, irrigated [natural resource, land]: 0.273465 m2
  (same comment as for Transformation, to permanent crop, irrigated)
- Energy, gross calorific value, in biomass [natural resource, biotic]: 16.3338 MJ; lognormal variance with pedigree 0.00984984, pedigree (2,2,3,5,1)
- Occupation, permanent crop, irrigated [natural resource, land]: 5.48407 m2*year; lognormal variance with pedigree 0.0160616, pedigree (2,1,3,5,1)
  Related to the duration from harvest date of previous crop to harvest date of main crop.
- Carbon dioxide, in air [natural resource, in air]: 1.54188 kg; lognormal variance with pedigree 0.00984984, pedigree (2,2,3,5,1)
  CO2 uptake by biomass
- Water, unspecified natural origin [natural resource, in ground]: 0.0114361 m3; lognormal variance with pedigree 0.120177, pedigree (2,1,3,5,1)
  Literature data or expert estimate: water for depulping

## Emissions to nature
- Water [water, ground-]: 0.0165154 m3; lognormal variance with pedigree 0.120177, pedigree (2,1,3,5,1)
  Calculated value - Emission calculated from water balance. See 'WFLDB-Guidelines.pdf', available at https://ecoquery.ecoinvent.org/File/Reports.
- Copper, ion [water, ground-]: 1.93471e-6 kg; lognormal variance with pedigree 0.352938, pedigree (2,2,3,5,1)
  Calculated value - Freiermuth (2006). See 'WFLDB-Guidelines.pdf', available at https://ecoquery.ecoinvent.org/File/Reports.
- Water [air, non-urban air or from high stacks]: 0.0765314 m3; lognormal variance with pedigree 0.120177, pedigree (2,1,3,5,1)
  (same comment as for Water)
- Copper [soil, agricultural]: 3.71876e-5 kg
  Comment on mathematicalRelation:
  4.1874672e-05 from Calculated value - Freiermuth (2006). See 'WFLDB-Guidelines.pdf', available at https://ecoquery.ecoinvent.org/File/Reports.
  -5.9509562e-06 from Crop, default, heavy metals uptake model
  Heavy metal uptake can be excluded by setting the parameter heavyMetalUptakeSwitch to zero.
- TOC, Total Organic Carbon [water, ground-]: 0.37037 kg
  Calculated value - Best estimates: DOC = TOC ; COD (g O2) = 2.7*TOC (g C) and BOD5 = 0.5*COD. See 'WFLDB-Guidelines.pdf', available at https://ecoquery.ecoinvent.org/File/Reports.
- Phosphorus [water, surface water]: 0.00026325 kg; lognormal variance with pedigree 0.171866, pedigree (2,2,3,5,1)
  Calculated value - Prasuhn (2006) and SQCB-Erosion. See 'WFLDB-Guidelines.pdf', available at https://ecoquery.ecoinvent.org/File/Reports.
- Carbon dioxide, from soil or biomass stock [air, non-urban air or from high stacks]: 0.537207 kg; normal variance with pedigree 0.5452, pedigree (3,3,5,5,2)
  Global average LUC emissions according 2nd edition of the Quantis-modified tool developed by Blonk Consultants 'WFLDB-adapted-Blonk 2014 direct-land-use-change-assessment-tool_2015-05-18a.xlsx', tab. 'Country & land use unknown'. The emission are based on the relative change in production areas in all countries for a given crop. The weighted average is used which takes into acount relative difference in crop expansion into primary forest, secondary forest, grassland, perennial and annual land.
  Uncertainty: Uncertainty estimated based on IPCC guidlines 2006.
- Phosphate [water, surface water]: 0.000675773 kg; lognormal variance with pedigree 0.171866, pedigree (2,2,3,5,1)
  Calculated value - Prasuhn (2006). See 'WFLDB-Guidelines.pdf', available at https://ecoquery.ecoinvent.org/File/Reports.
- Chromium, ion [water, surface water]: 1.04666e-5 kg; lognormal variance with pedigree 0.352938, pedigree (2,2,3,5,1)
  (same comment as for Copper, ion)
- Phosphate [water, ground-]: 0.000100839 kg; lognormal variance with pedigree 0.171866, pedigree (2,2,3,5,1)
  (same comment as for Phosphate)
- Chromium, ion [water, ground-]: 1.14504e-5 kg; lognormal variance with pedigree 0.352938, pedigree (2,2,3,5,1)
  (same comment as for Copper, ion)
- Nitrogen oxides [air, non-urban air or from high stacks]: 0.0089405 kg; lognormal variance with pedigree 0.120664, pedigree (2,2,3,5,1)
  Calculated value - EEA/EMEP (2013). See 'WFLDB-Guidelines.pdf', available at https://ecoquery.ecoinvent.org/File/Reports.
- Chromium [soil, agricultural]: 0.000132587 kg
  Comment on mathematicalRelation:
  0.0001399158072 from Calculated value - Freiermuth (2006). See 'WFLDB-Guidelines.pdf', available at https://ecoquery.ecoinvent.org/File/Reports.
  -4.8941e-07 from Crop, default, heavy metals uptake model
  Heavy metal uptake can be excluded by setting the parameter heavyMetalUptakeSwitch to zero.
- Nitrate [water, ground-]: 0.247734 kg; lognormal variance with pedigree 0.171866, pedigree (2,2,3,5,1)
- Carbon dioxide, fossil [air, non-urban air or from high stacks]: 0.367417 kg; lognormal variance with pedigree 0.00984984, pedigree (2,2,3,5,1)
  Calculated value - CO2 emissions from urea and lime. See 'WFLDB-Guidelines.pdf', available at https://ecoquery.ecoinvent.org/File/Reports.
- Dinitrogen monoxide [air, non-urban air or from high stacks]: 0.00495649 kg; lognormal variance with pedigree 0.120664, pedigree (2,2,3,5,1)
  Calculated value - IPCC (2006). See 'WFLDB-Guidelines.pdf', available at https://ecoquery.ecoinvent.org/File/Reports.
- Nickel, ion [water, surface water]: 8.90027e-6 kg; lognormal variance with pedigree 0.352938, pedigree (2,2,3,5,1)
  (same comment as for Copper, ion)
- Cadmium, ion [water, surface water]: 1.17611e-7 kg; lognormal variance with pedigree 0.352938, pedigree (2,2,3,5,1)
  (same comment as for Copper, ion)
- Water [water, surface water]: 0.0775011 m3; lognormal variance with pedigree 0.120177, pedigree (2,1,3,5,1)
  (same comment as for Water)
- Nickel, ion [water, ground-]: 4.92344e-10 kg; lognormal variance with pedigree 0.352938, pedigree (2,2,3,5,1)
  (same comment as for Copper, ion)
- Cadmium, ion [water, ground-]: 2.65456e-8 kg; lognormal variance with pedigree 0.352938, pedigree (2,2,3,5,1)
  (same comment as for Copper, ion)
- Nickel [soil, agricultural]: 2.4118e-5 kg
  Comment on mathematicalRelation:
  2.30086612e-05 from Calculated value - Freiermuth (2006). See 'WFLDB-Guidelines.pdf', available at https://ecoquery.ecoinvent.org/File/Reports.
  -9.380508e-07 from Crop, default, heavy metals uptake model
  Heavy metal uptake can be excluded by setting the parameter heavyMetalUptakeSwitch to zero.
- Ammonia [air, non-urban air or from high stacks]: 0.0412968 kg; lognormal variance with pedigree 0.0407216, pedigree (2,2,3,5,1)
  Calculated value - EMEP/EEA (2013). See 'WFLDB-Guidelines.pdf', available at https://ecoquery.ecoinvent.org/File/Reports.
- Mercury [water, ground-]: 2.61017e-9 kg; lognormal variance with pedigree 0.352938, pedigree (2,2,3,5,1)
  (same comment as for Copper, ion)
- Cyproconazole [soil, agricultural]: 0.000169727 kg; lognormal variance with pedigree 0.0407216, pedigree (2,2,3,5,1)
  Calculated value - 100% emission in soil. See 'WFLDB-Guidelines.pdf', available at https://ecoquery.ecoinvent.org/File/Reports.
- Mercury [water, surface water]: 2.77099e-8 kg; lognormal variance with pedigree 0.352938, pedigree (2,2,3,5,1)
  (same comment as for Copper, ion)
- Hexaconazole [soil, agricultural]: 8.85816e-5 kg; lognormal variance with pedigree 0.0407216, pedigree (2,2,3,5,1)
  (same comment as for Cyproconazole)
- Mercury [soil, agricultural]: 2.5726e-7 kg
  Comment on mathematicalRelation:
  2.531468e-07 from Calculated value - Freiermuth (2006). See 'WFLDB-Guidelines.pdf', available at https://ecoquery.ecoinvent.org/File/Reports.
  Heavy metal uptake can be excluded by setting the parameter heavyMetalUptakeSwitch to zero.
- Lead [water, surface water]: 8.33805e-6 kg; lognormal variance with pedigree 0.352938, pedigree (2,2,3,5,1)
  (same comment as for Copper, ion)
- Zinc, ion [water, surface water]: 2.32757e-5 kg; lognormal variance with pedigree 0.352938, pedigree (2,2,3,5,1)
  (same comment as for Copper, ion)
- Lead [water, ground-]: 2.76906e-7 kg; lognormal variance with pedigree 0.352938, pedigree (2,2,3,5,1)
  (same comment as for Copper, ion)
- Zinc, ion [water, ground-]: 1.53605e-5 kg; lognormal variance with pedigree 0.352938, pedigree (2,2,3,5,1)
  (same comment as for Copper, ion)
- Lead [soil, agricultural]: 5.49585e-5 kg
  Comment on mathematicalRelation:
  -4.8561146e-07 from Crop, default, heavy metals uptake model
  Heavy metal uptake can be excluded by setting the parameter heavyMetalUptakeSwitch to zero.
- Glyphosate [soil, agricultural]: 0.000229379 kg; lognormal variance with pedigree 0.0407216, pedigree (2,2,3,5,1)
  (same comment as for Cyproconazole)
- DOC, Dissolved Organic Carbon [water, ground-]: 0.37037 kg
  (same comment as for TOC, Total Organic Carbon)
- Cadmium [soil, agricultural]: 1.3814e-5 kg
  Comment on mathematicalRelation:
  7.4792324e-06 from Calculated value - Freiermuth (2006). See 'WFLDB-Guidelines.pdf', available at https://ecoquery.ecoinvent.org/File/Reports.
  -9.118292e-08 from Crop, default, heavy metals uptake model
  Heavy metal uptake can be excluded by setting the parameter heavyMetalUptakeSwitch to zero.
- BOD5, Biological Oxygen Demand [water, ground-]: 0.5 kg; lognormal variance with pedigree 0.120177, pedigree (2,1,3,5,1)
  Calculated value - Expert estimate for organic matter in waste water (0.5 kg BOD5/kg green coffee). See 'WFLDB-Guidelines.pdf', available at https://ecoquery.ecoinvent.org/File/Reports.
- COD, Chemical Oxygen Demand [water, ground-]: 1 kg
  (same comment as for TOC, Total Organic Carbon)
- Copper, ion [water, surface water]: 1.49724e-5 kg; lognormal variance with pedigree 0.352938, pedigree (2,2,3,5,1)
  (same comment as for Copper, ion)
- Zinc [soil, agricultural]: 0.00022451 kg
  Comment on mathematicalRelation:
  0.0001854315736 from Calculated value - Freiermuth (2006). See 'WFLDB-Guidelines.pdf', available at https://ecoquery.ecoinvent.org/File/Reports.
  -2.8756654e-05 from Crop, default, heavy metals uptake model
  Heavy metal uptake can be excluded by setting the parameter heavyMetalUptakeSwitch to zero.

## Sampling procedure
WFLDB Methodological Guidelines for the Life Cycle Inventory of Agricultural Products in the latest version, available at: https://ecoquery.ecoinvent.org/File/Reports. Data sources: Data were categorised from level 0 (L0) to level (L4) as follows: L0 = estimate, proxy; L1 = statistical data (e.g. FAOSTAT); L2 = L1 adapted to crop and country; L3 = literature data or L1 resp. L2 data approved by experts; medium detailing (i.e. kg of total N-fertiliser); L4 = L3 data of high detailing (i.e. portion N-fertiliser types).In this dataset data were obtained for yield: L3; Fertilisers: L4; Pesticides: L1; Machinery: L0; Irrigation: L2. For information regarding the calculation of individual exchanges see supporting documentation WFLDB-Documentation.pdf

## Extrapolations
The amount of the exchanges are weighted average of regional datasets.

## Review by Assumpció ANTON 2016-05-30
Be aware that the use of statistics in input calculations could provide some specific inputs not common for specific crops, this should be corrected if better information is available and better reflexed in DQR . Currently, I would dissent for some of good marks provided, being a revision of criteria applied advisable.

Pesticides will need to be amended periodically checking for update of pesticides' ban.
