# treatment of basic oxygen furnace waste, residual material landfill

Dataset: EcoSpold 2, unit process
Geography: CH
Time period: 1994-01-01 to 2021-12-31
Technology level: current
Classification: EcoSpold01Categories: waste management/residual material landfill
Classification: ISIC rev.4 ecoinvent: 3822:Treatment and disposal of hazardous waste
Synonyms: 86w% BOF slags + 14w% desulphurisation slag + 3w% BOF dust; Mischung aus 3 Abfälle der Blasstahlproduktion; mixture of 3 wastes from BOF steel production; mixture of 3 wastes from converter steel production
Tags: Treatment; ConvertedDataset
Scenario: Business-as-Usual
System model: Allocation, cut-off by classification
Generated by: Gabor Doka (obsolete)
Published in: Doka G. 2009
Database: ecoinvent
isCopyrightProtected: true
accessRestrictedTo: 1

## General comment
Inventoried waste contains 100% BOF waste mix; .
waste composition (wet, in ppm): H2O n.a.; O 346840; H n.a.; C n.a.; S 4168.6; N n.a.; P 33252; B n.a.; Cl n.a.; Br n.a.; F n.a.; I n.a.; Ag n.a.; As n.a.; Ba n.a.; Cd n.a.; Co n.a.; Cr 3994.9; Cu n.a.; Hg n.a.; Mn 10423; Mo n.a.; Ni n.a.; Pb n.a.; Sb n.a.; Se n.a.; Sn n.a.; V n.a.; Zn n.a.; Be n.a.; Sc n.a.; Sr n.a.; Ti n.a.; Tl n.a.; W n.a.; Si 83852; Fe 105500; Ca 376640; Al 13267; K n.a.; Mg 22058; Na n.a.;
Share of carbon in waste that is biogenic 60.4%.
Additional solidification with 0.4 kg of cement.
[This dataset was already contained in the ecoinvent database version 2. It was not individually updated during the transfer to ecoinvent version 3. Life Cycle Impact Assessment results may still have changed, as they are affected by changes in the supply chain, i.e. in other datasets. This dataset was generated following the ecoinvent quality guidelines for version 2. It may have been subject to central changes described in the ecoinvent version 3 change report (http://www.ecoinvent.org/database/ecoinvent-version-3/reports-of-changes/), and the results of the central updates were reviewed extensively. The changes added e.g. consistent water flows and other information throughout the database. The documentation of this dataset can be found in the ecoinvent reports of version 2, which are still available via the ecoinvent website. The change report linked above covers all central changes that were made during the conversion process.]

## Included activities end
Waste-specific short-term emissions to water from leachate. Long-term emissions from landfill to ground water. Expenditures for solidificalion with cement (user-specified option)

## Geography
Technology encountered in Switzerland in 2000. Landfill includes base seal and leachate collection system.

## Technology
Swiss residual material landfill for polluted, inorganic waste. With base seal and leachate collection system. Recultivation after closure.

## Time period
Waste composition as given in literature reference, theoretical data or other source. Transfer coefficients from prospective model.

## Reference product
- basic oxygen furnace waste: -1 kg; CPC 39990: Other wastes n.e.c.; By-product classification Waste
  EcoSpold01Location=CH
  production volume 0.0336675 kg
    This is a placeholder value that does not reflect real-world production volumes. This dataset does not currently require a real-world production volume to work in the database framework, and no actual data were collected yet. This has no negative effect on the results of the ecoinvent database. The placeholder value of this activity was scaled according to the nominal GDP of 2005 (source: United Nations, http://data.un.org/Glossary.aspx?q=GDP+%28current+US%24%29, accessed 20130726) to reflect an appropriate share of the global production volume, which is also a placeholder value.
  property price 0 EUR2005
    Waste products are assigned a price of zero as they are assumed to require further treatment.
  property carbon content 0
    carbon content on a dry matter basis (reserved; not for manual entry)
  properties: water in wet mass 0 kg, dry mass 1 kg, wet mass 1 kg, carbon content, non-fossil 0, carbon content, fossil 0, water content 0, carbon allocation 0 kg

## Inputs from technosphere
- waste cement, hydrated: -1 kg; lognormal variance with pedigree 0.05, pedigree (1,1,5,1,1)
  Hydrated cement for solidification of residual material waste. Uncertainty in mass from solidification recipe.
  EcoSpold01Location=CH
  production volume 1 kg
    Calculated from the production volume of basic oxygen furnace waste, 0% water in proportion to the respective output amounts.
  properties: dry mass 1 kg, wet mass 1 kg
- process-specific burdens, residual material landfill: 1 kg; lognormal variance with pedigree 0.04, pedigree (1,1,5,1,1)
  demands per kilogram waste. uncertainty is heeded in the module;activityLink introduced to establish a direct link to the corresponding regional supply of this product
  EcoSpold01Location=CH
- residual material landfill: 2.0833e-9 unit; lognormal variance with pedigree 0.04, pedigree (1,1,5,1,1)
  EcoSpold01Location=CH
  demands per kilogram waste. uncertainty is heeded in the module
- cement, unspecified: 0.4 kg; lognormal variance with pedigree 0.05, pedigree (1,1,5,1,1)
  EcoSpold01Location=CH
  Cement for solidification of residual material waste. Uncertainty in mass from solidification recipe.
  properties: dry mass 1 kg, wet mass 1 kg

## Emissions to nature
- Aluminium [water, ground-, long-term]: 0.0039382 kg; lognormal variance with pedigree 0.74, pedigree (1,1,5,1,1)
  uncertainty is calculated from uncertainties in waste composition and transfer coefficients in incinerator and landfills.
- Phosphate [water, ground-, long-term]: 0.022778 kg; lognormal variance with pedigree 0.83, pedigree (1,1,5,1,1)
  (same comment as for Aluminium)
- Silicon [water, ground-, long-term]: 0.083663 kg; lognormal variance with pedigree 0.18, pedigree (1,1,5,1,1)
  (same comment as for Aluminium)
- Sulfate [water, ground-, long-term]: 0.011164 kg; lognormal variance with pedigree 0.52, pedigree (1,1,5,1,1)
  (same comment as for Aluminium)
- Manganese [water, surface water]: 1.4374e-7 kg; lognormal variance with pedigree 1.62, pedigree (1,1,5,1,1)
  uncertainty is calculated from uncertainties in waste composition and transfer coefficients in residual landfill
- Manganese [water, ground-, long-term]: 8.6099e-5 kg; lognormal variance with pedigree 6.15, pedigree (1,1,5,1,1)
  (same comment as for Aluminium)
- Chromium VI [water, surface water]: 0.00024014 kg; lognormal variance with pedigree 0.69, pedigree (1,1,5,1,1)
  (same comment as for Manganese)
- Chromium VI [water, ground-, long-term]: 0.00075858 kg; lognormal variance with pedigree 0.53, pedigree (1,1,5,1,1)
  (same comment as for Aluminium)
- Aluminium [water, surface water]: 6.5746e-6 kg; lognormal variance with pedigree 1.12, pedigree (1,1,5,1,1)
  (same comment as for Manganese)
- Phosphate [water, surface water]: 3.8027e-5 kg; lognormal variance with pedigree 1.05, pedigree (1,1,5,1,1)
  (same comment as for Manganese)
- Calcium, ion [water, ground-, long-term]: 0.034033 kg; lognormal variance with pedigree 1.51, pedigree (1,1,5,1,1)
  (same comment as for Aluminium)
- Magnesium [water, surface water]: 4.1841e-6 kg; lognormal variance with pedigree 1.19, pedigree (1,1,5,1,1)
  (same comment as for Manganese)
- Magnesium [water, ground-, long-term]: 0.0025063 kg; lognormal variance with pedigree 1.5, pedigree (1,1,5,1,1)
  (same comment as for Aluminium)
- Iron, ion [water, surface water]: 8.8274e-7 kg; lognormal variance with pedigree 1.44, pedigree (1,1,5,1,1)
  (same comment as for Manganese)
- Sulfate [water, surface water]: 0.0013417 kg; lognormal variance with pedigree 0.63, pedigree (1,1,5,1,1)
  (same comment as for Manganese)
- Iron, ion [water, ground-, long-term]: 0.00052876 kg; lognormal variance with pedigree 7.17, pedigree (1,1,5,1,1)
  (same comment as for Aluminium)
- Calcium, ion [water, surface water]: 5.6816e-5 kg; lognormal variance with pedigree 0.97, pedigree (1,1,5,1,1)
  (same comment as for Manganese)
- Silicon [water, surface water]: 0.00018858 kg; lognormal variance with pedigree 0.73, pedigree (1,1,5,1,1)
  (same comment as for Manganese)

## Sampling procedure
Landfill model based on observed leachate concentrations in literature. Extrapolated to 60'000 years heeding chemical characteristics. Initial waste composition from various literature sources.

## Extrapolations
This dataset has been extrapolated from year 2000 to the year of the calculation (2021). The uncertainty has been adjusted accordingly.

## Review by Niels Jungbluth 2009-02-15
passed.
