# laminated timber element production, for outdoor use

Dataset: EcoSpold 2, unit process
Geography: RER
Time period: 1986-01-01 to 2021-12-31
Technology level: current
Classification: ISIC rev.4 ecoinvent: 1621:Manufacture of veneer sheets and wood-based panels
Tags: Swiss brush-up completed; ConvertedDataset
Scenario: Business-as-Usual
System model: Allocation, cut-off by classification
Generated by: Frank Werner
Published in: Werner F. 2007
Database: ecoinvent
isCopyrightProtected: true
accessRestrictedTo: 1

## Included activities start
From reception of sawn softwood and hardwood at the factory gate.

## Included activities end
This activity ends with laminated timber elements at the factory gate. The dataset includes the inputs to the production processes and transports of those inputs. The dataset does not include process emission data (not available) and infrastructure.

## Geography
Data for Germany used for central Europe

## Technology
Technology reflects the technology of a German medium enterprise in 1995.
Laterally pre-stressed laminated timber plates are preferably used for parts that bear medium to heavy loads, e.g. as building material for houses.Screwed laminated timber plates consist of a horizontal stack of single boards which are aligned on end and joined together using different techniques. Depending on the direction of loading and/or installation in reference to their plain, these construction parts serve as load bearing or non load bearing plates or panels. Most frequently, laminated timber plates are used for walls, roofs, ceilings and bridge decks.
Laminated wood is made mostly from spruce, which is the easiest wood to process and fulfils the specific requirements of strength and durability.
Reference:
Kollmann F. F. P., Kuenzi E. W. and Stamm A. J. (1975) Principles of Wood Science and Technology. Springer-Verl., Berlin, Heidelberg, New York. AND Nimz H., Schmitt U., Schwab E., Wittmann O. and Wolf F. (1997) Wood. In: Ullmann's encyclopedia of indus-trial chemistry (ed. Anonymous). 5th edition on CD-ROM Edition. Wiley & Sons, London.

## Reference product
- laminated timber element, transversally prestressed, for outdoor use: 1 m3; CPC 3142: Other plywood, veneered panels and similar laminated wood, except of bamboo; By-product classification allocatable product
  Reference product. Laminated timber from soft- and hardwood intended for outdoor use. The laminated timber is produced at a wooden board factory in Germany by processes representative for European average. The reference product is ready for delivery at the wooden board factory. Used as basis for timber-concrete composite structures providing increased load bearing capacities.
  production volume 460000 m3
    Unknown
    Assuming same amount as glulam production for outdoor use
  property price 298 EUR2005
    Temporary price data. Calculated as 90% of purchasers price based on: Price for plywood applied (from 2004 World Import/Export (USD/cubicmeter) from FaoStat http://faostat.fao.org/site/626/default.aspx#ancor, accessed 14th June 2010)
  property carbon content, non-fossil 0.478422
    The laminated timber is composed of wood and steel. The weight of the wood is assumed to be the DM minus 82.3 kg steel. C content of wood is 0.494 kgC/kg dry wood (ecoinvent v2.2 report 9)
  property heating value, net 5402.78 MJ
    LHV is calculated based on the Carbon content of the product. More details can be found on the respective documentation.The property is based on a value of 12.56MJ/kg
  property carbon content 0.479109
    carbon content on a dry matter basis (reserved; not for manual entry)
  property true value 298
    allocation property applied in "true value" allocation // value calculated from revenue
  properties: water in wet mass 49.469 kg, carbon content, fossil 0.000687198, dry mass 380.531 kg, wet mass 430 kg, water content 0.13, carbon allocation 182.316 kg

## By-products
- residual wood, dry: 0 m3; CPC 39283: Non-agglomerated wood waste and scrap; By-product classification allocatable product; pedigree (1,1,1,1,1)
  Proxy. Abatement according to glued laminated timber. Value increased by 1.61 due to lower water content. Estimation after Werner (2002):
  production volume 174340 m3
    Calculated from output of main product (0.025 m3 / m3 laminated timber)
  property price 26.9 EUR2005
    Temporary price data. Calculated as 90% of purchasers price based on: 2004 prices for World Import/Export (USD/cubicmeter) from FaoStat (http://faostat.fao.org/site/626/default.aspx#ancor, [accessed 10th June 2010]) Commodity: 'Chips and Particles' assuming this is for air-dry chips (10% water on a dry matter basis at 650 kg/m3) and no price difference for water content (i.e. assuming air-drying).
  property heating value, net 8030.06 MJ
    LHV is calculated based on the Carbon content of the product. More details can be found on the respective documentation.The property is based on a value of 12.7MJ/kg
  property carbon content 0.494
    carbon content on a dry matter basis (reserved; not for manual entry)
  property true value 10.1951
    allocation property applied in "true value" allocation // value calculated from revenue
  properties: water in wet mass 82.5 kg, dry mass 550 kg, wet mass 632.5 kg, carbon content, non-fossil 0.494, water content 0.15, carbon content, fossil 0, carbon allocation 271.7 kg

## Inputs from technosphere
- wooden board factory, organic bonded boards: 3.21984e-8 unit; lognormal variance with pedigree 0.6461, pedigree (4,5,5,3,4)
  Estimation.
- steel, low-alloyed, hot rolled: 50.5699 kg; lognormal variance with pedigree 0.0891, pedigree (4,5,5,3,3)
  Estimation. Calculation based on literature.
  properties: carbon content, fossil 0.005, UVEK_relative_amount_1 1, UVEK_relative_amount_2 1, UVEK_link_2 2662, UVEK_link_1 4222, dry mass 1 kg, wet mass 1 kg
  note on carbon content, fossil: Low alloyed steel composition given in Tab. 3.2 ecoinvent v2.2 report 10_partII. Steel assumed to have a C content of 0.5%
  note on UVEK_relative_amount_1: to be used only in special submissions in coordination with ecoinvent and the Swiss FOEN
- electricity, medium voltage: 9.6692 kWh; source Ressel 1986; lognormal variance with pedigree 0.0891, pedigree (4,5,5,3,3)
  Literature Value. Regarding mechanical treatment.
  properties: UVEK_relative_amount_8 0.0866, UVEK_relative_amount_1 1, UVEK_link_1 1779, UVEK_link_8 4417, UVEK_relative_amount_9 0.1732, UVEK_link_9 4433
  note on UVEK_relative_amount_8: Scaling factor = amount of transport in corresponding KBOB dataset (excluding the input of wood, assumed to be 98%)/amount of this input from technosphere. Source for transport distance: Life Cycle Inventories of Wood as Fuel and Construction Material/2007/Werner F. To be used only in special submissions in coordination with ecoinvent and the Swiss FOEN
  note on UVEK_link_8: This link has been introduced to model transport specifically for the SAM model; to be used only in special submissions in coordination with ecoinvent and the Swiss FOEN.
- sawnwood, board, softwood, raw, dried (u=20%): 0 m3; pedigree (1,1,1,1,1)
  Proxy. Abatement according to glued laminated timber.
  With the update of wood products in ecoinvent v3.1, the generic input of sawnwood was updated to an input of boards specifically.
  property dry mass 387.2 kg; name basic_d_wood
  property water content 0.2; name water_content
  properties: heating value, net 5860.46 MJ, wet mass 464.64 kg, carbon content, non-fossil 0.494
- sawnwood, board, hardwood, raw, dried (u=20%): 0 m3; name board_hardwood_raw; pedigree (1,1,1,1,1)
  (same comment as for sawnwood, board, softwood, raw, dried (u=20%))
  property wet mass 675.84 kg; name board_hardwood_raw_WM; = board_hardwood_raw_DM*(1+ board_hardwood_raw_water_content)
  property water content 0.2; name board_hardwood_raw_water_content
  property carbon content, non-fossil 0.494; name board_hardwood_ra_C_content_non_fossil_0
  property water in wet mass 112.64 kg; name board_hardwood_raw_WWM; = board_hardwood_raw_DM* board_hardwood_raw_water_content
  property dry mass 563.2 kg; name board_hardwood_raw_DM
  properties: heating value, net 8524.3 MJ
- sawnwood, board, softwood, raw, dried (u=20%): 1.23276, 0.0048987 m3 (2 entries); lognormal variance with pedigree 0.0891, pedigree (4,5,5,3,3)
  (same comment as for sawnwood, board, softwood, raw, dried (u=20%))
  properties: heating value, net 5860.46 MJ, dry mass 387.2 kg, wet mass 464.64 kg, carbon content, non-fossil 0.494, water content 0.2
- sawnwood, board, hardwood, raw, dried (u=20%): 0.088536, 0.000420665 m3 (2 entries); lognormal variance with pedigree 0.0891, pedigree (4,5,5,3,3)
  (same comment as for sawnwood, board, softwood, raw, dried (u=20%))
  properties: heating value, net 8524.3 MJ, wet mass 675.84 kg, water content 0.2, carbon content, non-fossil 0.494, dry mass 563.2 kg

## Inputs from nature
- Carbon dioxide, non-fossil, resource correction [natural resource, in air]: -325.433 kg; pedigree (1,1,1,1,1)
  This exchange has been added after economic allocation in order to re-balance the non-fossil carbon dioxide resource extraction.

## Sampling procedure
Literature

## Extrapolations
see Geography and Technology
