# transport, regular bus

Dataset: EcoSpold 2, unit process
Geography: RoW
Time period: 2005-01-01 to 2021-12-31
Technology level: current
Classification: ISIC rev.4 ecoinvent: 4921:Urban and suburban passenger land transport
Scenario: Business-as-Usual
System model: Allocation, cut-off by classification
Share of production covered: 100 %
Generated by: Michael Spielmann (obsolete)
Published in: Spielmann M. 2007
Database: ecoinvent
isCopyrightProtected: true
accessRestrictedTo: 1

## General comment
Based on 'transport, regular bus, CH 2005'. Inventory refers to the entire transport life cycle. For road infrastructure, expenditures and environmental interventions due to construction of roads have been allocated based on the Gross tonne kilometre performance. Expenditures due to operation of the road infrastructure, as well as land use have been allocated based on the yearly vehicle kilometre performance. For the attribution of vehicle share to the transport performance a vehicle life time performance of 2.39E05 pkm/vehicle has been assumed. The energy use and combustion emissions data represents average data for the operation of an average Swiss regular bus (fleet average) in the year 2005, comprising various emission technologies.

## Included activities end
operation of vehicle; production and maintenance of vehicles; construction of road. For the energy use and combustion emissions dataset, the fuel consumption is included. Direct airborne emissions of gaseous substances, particulate matters and heavy metals are accounted for. Particulate emissions comprise exhaust- and abrasions emissions. Heavy metal emissions to soil and water caused by tyre abrasion are included.

## Geography
Extrapolated from 'transport, regular bus, CH 2005'. The data for vehicle operation and road infrastructure reflect Swiss conditions. Data for vehicle manufacturing and maintenance represents generic European data. Data for the vehicle disposal reflect the Swiss situation. The data of the energy use and combustion emissions refers to Swiss Conditions.

## Technology
Diesel, various emission treatment standards. Diesel engine

## Reference product
- transport, regular bus: 1 person*km; CPC 64: Passenger transport services; By-product classification allocatable product
  production volume 3.96633 person*km; name transport_RP_PV
    This is a placeholder value that does not reflect real-world production volumes. This dataset does not currently require a real-world production volume to work in the database framework, and no actual data were collected yet. This has no negative effect on the results of the ecoinvent database.
  property price 0.0187696 EUR2005
    Calculated based on inputs: The price of the product has been calculated as a sum of the values of the material and energy inputs for this product. This value is therefore a rough estimation. It may underestimate the real price since there are additional expenses when producing any product. These expences can include for example labour costs, treatment of waste materials and profit for the producer. Please consider carefully whether this level of data quality is acceptable for your application.

## Inputs from technosphere
- maintenance, bus: 7.1429e-8 unit; lognormal variance with pedigree 0.344, pedigree (3,1,5,5,1)
  Uncertainty: o
- diesel, low-sulfur: 0 kg; pedigree (1,1,1,1,1)
  Energy use and combustion emissions
  Uncertainty: d
  properties: wet mass 1 kg, dry mass 1 kg, heating value, net 42.8 MJ, carbon content, fossil 0.865
- road: 0.00045728 m*year; lognormal variance with pedigree 0.344, pedigree (3,1,5,5,1)
  Uncertainty: o
- road maintenance: 8.6684e-5 m*year; lognormal variance with pedigree 0.344, pedigree (3,1,5,5,1)
  This input indicates the unit of road per vkm used during the transport activity. The road input is composed by two demand factors: - Road infrastructure and disposal (RI&D), which varies according to the gross vehicle weight. - Road operations & maintenance (RO&M), which does not vary according to the gross vehicle weight.
  Uncertainty: o
- bus: 7.1429e-8 unit; lognormal variance with pedigree 0.344, pedigree (3,1,5,5,1)
  Uncertainty: o
- diesel, low-sulfur: 0.000748454, 0.000755581, 0.00354469, 0.00151066, 5.01123e-5, 0.000338969, 0.0180381 kg (7 entries); lognormal variance with pedigree 0.042, pedigree (1,1,5,5,1)
  Energy use and combustion emissions
  Uncertainty: d

## Emissions to nature
- Particulates, > 2.5 um, and < 10um [air, unspecified]: 4.39924e-6 kg; lognormal variance with pedigree 0.1646, pedigree (3,3,5,5,1)
  Energy use and combustion emissions
  Uncertainty: a
- Particulates, > 10 um [air, unspecified]: 4.04574e-6 kg; lognormal variance with pedigree 0.0826, pedigree (1,3,5,5,1)
  Energy use and combustion emissions
  Uncertainty: a
- Nitrogen oxides [air, unspecified]: 0.00091722 kg; lognormal variance with pedigree 0.082, pedigree (1,1,5,5,1)
  Energy use and combustion emissions
  Uncertainty: d
- Zinc, ion [water, unspecified]: 3.58495e-7 kg; lognormal variance with pedigree 0.81, pedigree (5,5,5,5,1)
  Energy use and combustion emissions
  Uncertainty: a
- Toluene [air, unspecified]: 1.12008e-6 kg; lognormal variance with pedigree 0.082, pedigree (1,1,5,5,1)
  Energy use and combustion emissions
  Uncertainty: d
- PAH, polycyclic aromatic hydrocarbons [air, unspecified]: 2.85716e-11 kg; lognormal variance with pedigree 1.5832, pedigree (2,3,5,5,1)
  Energy use and combustion emissions
  Uncertainty: r
- Copper [air, unspecified]: 7.04176e-8 kg; lognormal variance with pedigree 0.758, pedigree (4,5,5,5,1)
  Energy use and combustion emissions
  Uncertainty: t
- Zinc [soil, unspecified]: 3.58495e-7 kg; lognormal variance with pedigree 0.21, pedigree (5,5,5,5,1)
  Energy use and combustion emissions
  Uncertainty: a
- Cadmium, ion [water, unspecified]: 1.26936e-10 kg; lognormal variance with pedigree 0.47, pedigree (5,5,5,5,1)
  Energy use and combustion emissions
  Uncertainty: a
- Cadmium [air, unspecified]: 2.65294e-10 kg; lognormal variance with pedigree 0.758, pedigree (4,5,5,5,1)
  Energy use and combustion emissions
  Uncertainty: t
- Lead [air, unspecified]: 2.01858e-9 kg; lognormal variance with pedigree 0.758, pedigree (4,5,5,5,1)
  Energy use and combustion emissions
  Uncertainty: t
- Chromium [air, unspecified]: 1.66365e-9 kg; lognormal variance with pedigree 0.758, pedigree (4,5,5,5,1)
  Energy use and combustion emissions
  Uncertainty: t
- NMVOC, non-methane volatile organic compounds, unspecified origin [air, unspecified]: 5.34882e-5 kg; lognormal variance with pedigree 0.082, pedigree (1,1,5,5,1)
  Energy use and combustion emissions
  Uncertainty: d
- Lead [soil, unspecified]: 5.22396e-9 kg; lognormal variance with pedigree 0.21, pedigree (5,5,5,5,1)
  Energy use and combustion emissions
  Uncertainty: a
- Dinitrogen monoxide [air, unspecified]: 9.4422e-7 kg; lognormal variance with pedigree 0.0832, pedigree (2,3,5,5,1)
  Energy use and combustion emissions
  Uncertainty: d
- Methane, fossil [air, unspecified]: 1.60965e-6 kg; lognormal variance with pedigree 0.082, pedigree (1,1,5,5,1)
  Energy use and combustion emissions
  Uncertainty: d
- Sulfur dioxide [air, unspecified]: 2.49866e-6 kg; lognormal variance with pedigree 0.0426, pedigree (2,1,5,5,1)
  Energy use and combustion emissions
  Uncertainty: o
- Formaldehyde [air, unspecified]: 5.49853e-6 kg; lognormal variance with pedigree 0.0832, pedigree (2,3,5,5,1)
  Energy use and combustion emissions
  Uncertainty: d
  property water content 0; name water_content
  property water in wet mass 0 kg; name WWM
  property carbon content, non-fossil 0; name C_content_non_fossil
  property carbon content, fossil 0.400016; name C_content_fossil
  property wet mass 1 kg; name WM
  property dry mass 1 kg; name DM
- Selenium [air, unspecified]: 2.49866e-10 kg; lognormal variance with pedigree 0.758, pedigree (4,5,5,5,1)
  Energy use and combustion emissions
  Uncertainty: t
- Lead [water, unspecified]: 5.22396e-9 kg; lognormal variance with pedigree 0.81, pedigree (5,5,5,5,1)
  Energy use and combustion emissions
  Uncertainty: a
- Carbon dioxide, fossil [air, unspecified]: 0.0788933 kg; lognormal variance with pedigree 0.0426, pedigree (2,1,5,5,1)
  Energy use and combustion emissions
  Uncertainty: o
- Mercury [air, unspecified]: 4.99724e-13 kg; lognormal variance with pedigree 0.758, pedigree (4,5,5,5,1)
  Energy use and combustion emissions
  Uncertainty: t
- Chromium, ion [water, unspecified]: 6.05389e-10 kg; lognormal variance with pedigree 0.47, pedigree (5,5,5,5,1)
  Energy use and combustion emissions
  Uncertainty: a
- Particulates, < 2.5 um [air, unspecified]: 3.17252e-5 kg; lognormal variance with pedigree 0.342, pedigree (1,1,5,5,1)
  Energy use and combustion emissions
  Uncertainty: i
- Cadmium [soil, unspecified]: 1.26936e-10 kg; lognormal variance with pedigree 0.21, pedigree (5,5,5,5,1)
  Energy use and combustion emissions
  Uncertainty: a
- Carbon monoxide, fossil [air, unspecified]: 0.000229537 kg; lognormal variance with pedigree 0.692, pedigree (1,1,5,5,1)
  Energy use and combustion emissions
  Uncertainty: d
- Nickel [air, unspecified]: 2.10508e-9 kg; lognormal variance with pedigree 0.758, pedigree (4,5,5,5,1)
  Energy use and combustion emissions
  Uncertainty: t
- Copper, ion [water, unspecified]: 8.49505e-9 kg; lognormal variance with pedigree 0.47, pedigree (5,5,5,5,1)
  Energy use and combustion emissions
  Uncertainty: a
- Ammonia [air, unspecified]: 3.57145e-7 kg; lognormal variance with pedigree 0.0532, pedigree (2,3,5,5,1)
  Energy use and combustion emissions
  Uncertainty: d
- Chromium [soil, unspecified]: 6.05389e-10 kg; lognormal variance with pedigree 0.21, pedigree (5,5,5,5,1)
  Energy use and combustion emissions
  Uncertainty: a
- Chromium VI [air, unspecified]: 2.49866e-12 kg; lognormal variance with pedigree 0.758, pedigree (4,5,5,5,1)
  Energy use and combustion emissions
  Uncertainty: o
- Nickel [soil, unspecified]: 1.64044e-9 kg; lognormal variance with pedigree 0.21, pedigree (5,5,5,5,1)
  Energy use and combustion emissions
  Uncertainty: a
- Acetaldehyde [air, unspecified]: 2.99145e-6 kg; lognormal variance with pedigree 0.0832, pedigree (2,3,5,5,1)
  Energy use and combustion emissions
  Uncertainty: d
- Xylene [air, unspecified]: 5.36553e-7 kg; lognormal variance with pedigree 0.082, pedigree (1,1,5,5,1)
  Energy use and combustion emissions
  Uncertainty: d
- Zinc [air, unspecified]: 5.32367e-8 kg; lognormal variance with pedigree 0.758, pedigree (4,5,5,5,1)
  Energy use and combustion emissions
  Uncertainty: t
- Benzene [air, unspecified]: 2.14623e-7 kg; lognormal variance with pedigree 0.082, pedigree (1,1,5,5,1)
  Energy use and combustion emissions
  Uncertainty: d
- Copper [soil, unspecified]: 8.49505e-9 kg; lognormal variance with pedigree 0.21, pedigree (5,5,5,5,1)
  Energy use and combustion emissions
  Uncertainty: a
- Nickel, ion [water, unspecified]: 1.64044e-9 kg; lognormal variance with pedigree 0.81, pedigree (5,5,5,5,1)
  Energy use and combustion emissions
  Uncertainty: a

## Sampling procedure
Literature data.

## Extrapolations
none This dataset has been copied from an original dataset covering the geography CH. The uncertainty has been adjusted accordingly.
