# heat and power co-generation, oil

Dataset: EcoSpold 2, unit process
Geography: PT
Time period: 1980-01-01 to 2021-12-31
Technology level: current
Classification: EcoSpold01Categories: hard coal/power plants
Classification: ISIC rev.4 ecoinvent: 3510:Electric power generation, transmission and distribution
Synonyms: petroleum; heavy fuel oil
Tags: fossil fuels; oil power
Scenario: Business-as-Usual
System model: Allocation, cut-off by classification
Generated by: Karin Treyer
Published in: Jungbluth N. 2003
Database: ecoinvent
isCopyrightProtected: true
accessRestrictedTo: 1

## General comment
This dataset represents the production of high voltage electricity and district heat at a grid-connected oil power plant with a capacity of 500 MW on the world in 2012.
Emissions are in general calculated/estimated based on the fuel oil type S, European quality. This dataset has been built on the basis of oil electricity production datasets in version 2 of the ecoinvent database which were elaborated by N. Jungbluth 2007 (see main publication in modelling and administrative). Nothing else than the efficiency has been adjusted in this dataset; besides that no new data collection has taken place
Comments:
- sulfur content of the oil is not adapted to local/average conditions.
- CO2 emissions are presented for the combustion and for the flue gas treatment
- Extensive comments on emissions can be found in Jungbluth 2007, on which this dataset is based on.
Emissions to the water are from flue gas treatment. Most of these data come from two power plants in Portugal (EDP 2001) and data from Slowakia
EDP (2001) Environmental Report 2000. Electricidade de Portugal, S.A., Lisboa, PT, retrieved from: www.edp.pt.
Slovenské elektrárne (2002) Environment Report 2001, Bratislave, SK, retrieved from: www.seas.sk.
IEA/OECD. 2010. Electricity Information 2010. International Energy Agency (IEA), Paris Cedex (FR). Part IV. Detailed OECD Electricity And Heat Data.
[This dataset is meant to replace the following datasets:]

## Included activities start
From the constructed power plant ready to produce electricity and from the fuel ready to be used.

## Included activities end
This activity ends with 1MJ of heavy fuel oil burned in power plant with heat and electricity as main products.

This dataset includes all energy use, use of chemicals, emissions to air and water including treatment of flue gasses and effluents. In an oil power plant, water is needed for cooling, feed water for the steam circuit, for the flue gas treatment, or other cleaning. This dataset only considers water use (evaporation) for cooling and steam circuit.

## Technology
Electricity and heat production in a conventional combined heat and power oil power plant with a capacity of 500 MWe

## Time period
The Annual Production Volume is valid for the year 2012.

## Parameters
- fraction, water, decarbonised, to air: 0.0118019 dimensionless; name fraction_WDC_to_air; = fraction_CW_to_air; lognormal variance with pedigree 0.092025, pedigree (4,4,3,2,4)
  Calculated value. See comments in the other parametres present in this dataset. Decarbonised water is considered to be always used as cooling water, thus cooling water fractions to air are applied to all carbonised water input flows to calculate the amount of water consumed in the processes.
  nan
- water withdrawal, electricity production from oil, once-T and coolingP CS: 0.098 m3/kWh; name WWithdrawal_EP_oil_onceT_andCP_CS; lognormal variance with pedigree 0.092025, pedigree (4,4,3,2,4)
  Estimated based on literature (Scown, 2011, Water Footprint of U.S. Transportation Fuels, SI).
  nan
- fraction, process water, to air: 0.15 dimensionless; name fraction_PW_to_air; lognormal variance with pedigree 0.092025, pedigree (4,4,3,2,4)
  Literature value. In case when no industry/process specific data are available, default evaporation fraction value is used. This value is 15% and is based on literature (Statistics Canada, 2007 & Shaffer, K.H., 2008, Consumptive water use in the Great Lakes Basin, USGS & Shiklomanov, 2003, World Water Resources at the Beginning of the 21st Century) and has been approved by an expert.
  nan
- losses from gross electricity production: 0.04 dimensionless; name losses_gross_net; lognormal variance with pedigree 0.003525, pedigree (3,2,2,2,2)
  Calculated value. Own use of electricity plants in this country in 2012. For the OECD countries, the OECD iLibrary provides gross and net electricity values for the specific sector \"Total Fuel Combustion\", from which the loss value is being calculated. This value is then applied to all fossil fuel datasets, as no data on a more detailed level were available.
  OECD. 2014. IEA Electricity Information Statistics: OECD - Electricity and heat generation. OECD iLibrary. Online database. DOI : 10.1787/elect-data-en
  nan
  Uncertainty: g
- water withdrawal, electricity production from oil, recirculating CS: 0.0021 m3/kWh; name WWithdrawal_EP_oil_recirculating_CS; lognormal variance with pedigree 0.092025, pedigree (4,4,3,2,4)
  (same comment as for water withdrawal, electricity production from oil, once-T and coolingP)
- fraction, cooling water, to air: 0.0118019 dimensionless; name fraction_CW_to_air; = (WConsumption_EP_oil_recirculatingCS*recirculating_CS_fraction_from_allCS+WConsumption_EP_oil_onceT_andCP_CS*once_through_andCP_CS_fractio_from_allCS)/(WWithdrawal_EP_oil_recirculating_CS*recirculating_CS_fraction_from_allCS+WWithdrawal_EP_oil_onceT_andCP_CS*once_through_andCP_CS_fractio_from_allCS); lognormal variance with pedigree 0.041425, pedigree (2,3,2,2,1)
  Calculated value
  nan
- once-through and cooling pond cooling systems as a fraction of all cooling syste: 0.73 dimensionless; name once_through_andCP_CS_fractio_from_allCS; lognormal variance with pedigree 0.092025, pedigree (4,4,3,2,4)
  Calculated as an average of data available for Europe (Floerke, 2008, Future changes of freshwater needs in the electricity production sector) and USA (NERL, 2011, Estimating freshwater needs to meet future thermoelectric generation requirements).
  nan
- relation between the global and the country's efficiency of oil power plants: 0 dimensionless
  Parameter not needed anymore.
- gross electricity production: 1.036e9 kWh; name gross_electricity; lognormal variance with pedigree 0.0012, pedigree (2,1,1,1,1)
  Literature value/statistics.
  For OECD countries, gross electricity production 2012 with natural gas in electricity plants or CHP plants was taken from the IEA electricity informaiton 2014, country tables 8 and 9.
  For non-OECD countries, these values were found in the Energy balances of non-OECD countries.
  The split of electricity only and CHP plants into conventional and combined cycle plants (see general comment) was made based on information on installed electrical capacity with natural gas as fuel in the individual countries taken from the WEPP database.
  IEA. 2014. Electricity Information 2014. ISBN 978-92-64-21692-1. International Energy Agency (IEA), Paris Cedex (FR).
  IEA/OECD. 2014. Energy balances of non-OECD countries 2014. International Energy Agency (IEA), Paris Cedex (FR).
  WEPP 2014. World Electric Power Plants Database. PLATTS McGraw Hill Financial. http://www.platts.com/products/world-electric-power-plants-database
  nan
- fraction, water, completely softened, to air: 0.15 dimensionless; name fraction_WCS_to_air; = fraction_PW_to_air; lognormal variance with pedigree 0.092025, pedigree (4,4,3,2,4)
  Calculated value. See comment in the other parametres present in this dataset. Water, completely softened is considered to be always used as process water, thus process water fractions to air are applied to all water, completely softened input flows to calculate the amount of water consumed in the processes.
  nan
- recirculating cooling system as a fraction of all cooling systems: 0.27 dimensionless; name recirculating_CS_fraction_from_allCS; lognormal variance with pedigree 0.092025, pedigree (4,4,3,2,4)
  (same comment as for once-through and cooling pond cooling systems as a fraction of all coo)
- average efficiency of oil power plants, country: 0.483 dimensionless; name efficiency_oil_country; lognormal variance with pedigree 0.003325, pedigree (3,2,1,2,2)
  Literature value/calculated value. Net electrical efficiency based on the lower heating value (LHV).
  For all OECD countries, the IEA Electricity information 2014 provides data for the year 2012 on fuel input (TJ, Net calorific value NCV) and gross electricity production (GWh) as well as heat production (TJ) in tables 8 and 9 for each country for electricity only and Combined Heat and Power (CHP) plants each. Together with the information on own use (see parameter "losses"), the net electrical efficiency based on the NCV is calculated.
  For all non-OECD countries, data from the IEA Energy balances of non-OECD countries 2014 have been used. These tables do not always provide information on how much of the electricity has been produced in electricity only and in CHP plants, but often give the total value only.
  IEA. 2014. Electricity Information 2014. ISBN 978-92-64-21692-1. International Energy Agency (IEA), Paris Cedex (FR).
  IEA/OECD. 2014. Energy balances of non-OECD countries 2014. International Energy Agency (IEA), Paris Cedex (FR).
  nan
- water consumption, electricity production from oil, recirculating CS: 0.0018 m3/kWh; name WConsumption_EP_oil_recirculatingCS; lognormal variance with pedigree 0.092025, pedigree (4,4,3,2,4)
  (same comment as for water withdrawal, electricity production from oil, once-T and coolingP)
- average efficiency of oil power plants, global: 0 dimensionless
  Parameter not needed anymore.
- factor: input of MJ for the production of 1 kWh: 7.45342 MJ/kWh; name factor_MJ_kWh; = 1*3.6/efficiency_oil_country; lognormal variance with pedigree 0.0006, pedigree (1,1,1,1,1)
  Calculated value. 3.6 MJ = 1kWh.
  nan
- water consumption, electricity production from oil, once-T and coolingP CS: 0.0005 m3/kWh; name WConsumption_EP_oil_onceT_andCP_CS; lognormal variance with pedigree 0.092025, pedigree (4,4,3,2,4)
  (same comment as for water withdrawal, electricity production from oil, once-T and coolingP)

## Reference product
- heat, district or industrial, other than natural gas: 1 MJ; name heat; By-product classification allocatable product; CPC 17300: Steam and hot water
  Literature value/calculated value. Net thermal efficiency based on the lower heating value (LHV).
  For all OECD countries, the IEA Electricity information 2014 provides data for the year 2012 on fuel input (TJ, Net calorific value NCV) and gross electricity production (GWh) as well as heat production (TJ) in tables 8 and 9 for each country for electricity only and Combined Heat and Power (CHP) plants each. Together with the information on own use (see parameter "losses"), the net electrical efficiency based on the NCV is calculated.
  For all non-OECD countries, data from the IEA Energy balances of non-OECD countries 2014 have been used. These tables do not always provide information on how much of the electricity has been produced in electricity only and in CHP plants, but often give the total value only.
  IEA. 2014. Electricity Information 2014. ISBN 978-92-64-21692-1. International Energy Agency (IEA), Paris Cedex (FR).
  IEA/OECD. 2014. Energy balances of non-OECD countries 2014. International Energy Agency (IEA), Paris Cedex (FR).
  production volume 2.111e9 MJ; name apv_heat
    Literature value/statistics. Taken from the IEA electricity information 2014. The global value is the sum of all oil CHP datasets in ecoinvent.
    IEA. 2014. Electricity Information 2014. ISBN 978-92-64-21692-1. International Energy Agency (IEA), Paris Cedex (FR).
  property price 0.0106 EUR2005; name heat_price_EUR2005
    Average European district heat price from Ecoheatcool and Euroheat 2005-2006, Ecoheat Work package 1: The European heat market. Final report. 10.6 EUR/GJ i s the price of district heat. http://www.solarthermalworld.org/files/Ecoheatcool%20WP1%20Web.pdf?download
  property exergy 0.1842 MJ; name heat_exergy
    This exergy property is based on the exergy content of the product.
  property true value relation 0.1842; name heat_true_value_relation
    property to calculate "true value" from
  property true value 0.0015812; name heat_true_value
    allocation property applied in "true value" allocation // value calculated from true value relation
  properties: corresponding fuel use, propane, furnace >100kW 0 MJ, heating value, net 1 MJ

## By-products
- fly ash and scrubber sludge: 0 kg; name fly_ash; source Jungbluth, N. 2007, p. Tab. 12.27, p. 238; CPC 39: Wastes or scraps; By-product classification Waste
  Exchange present due to parent child relationship but not relevant for this dataset.
  production volume 0 kg; = apv_electricity * fly_ash
    Calculated from the production volume of electricity produced in proportion to the respective output amounts.
  property heating value, net 0 MJ
    Non combustible products are assumed to have an LHV equal to zero (0).
  property carbon content, fossil 0.167
    Tab A.6, ecoinvent v2.2 report 13_I. C content has been calculated after data in the tables, and then referred to 1 kg DM
  property price 0 EUR2005; name fly_ash_price_EUR2005
    Waste products are assigned a price of zero as they are assumed to require further treatment.
  property carbon content 0.167
    carbon content on a dry matter basis (reserved; not for manual entry)
  properties: water in wet mass 0.9 kg, water content 9, wet mass 1 kg, dry mass 0.1 kg, carbon content, non-fossil 0, carbon allocation 0.0167 kg
- residue from cooling tower: 0 kg; name cooling_tower; source Jungbluth, N. 2007, p. Tab. 12.27, p. 238; CPC 39: Wastes or scraps; By-product classification Waste
  Exchange present due to parent child relationship but not relevant for this dataset.
  production volume 0 kg; = apv_electricity * cooling_tower
    (same comment as for fly ash and scrubber sludge)
  property price 0 EUR2005; name cooling_tower_price_EUR2005
    (same comment as for fly ash and scrubber sludge)
  property heating value, net 0 MJ
    Non combustible products are assumed to have an LHV equal to zero (0).
  property carbon content 0.0544233
    carbon content on a dry matter basis (reserved; not for manual entry)
  properties: carbon content, fossil 0.0544233, water in wet mass 0.3 kg, wet mass 1 kg, carbon content, non-fossil 0, water content 0.428571, dry mass 0.7 kg, carbon allocation 0.0380963 kg
- electricity, high voltage: 0 kWh; name electricity; By-product classification allocatable product; CPC 17100: Electrical energy; undefined min 1, max 1, standardDeviation95 0, pedigree (1,1,3,1,1)
  Electricity output per MJ of oil burned.
  production volume 9.9456e8 kWh; name apv_electricity; = gross_electricity* (1-losses_gross_net)
    Calculated value.
  property exergy 3.6 MJ; name electricity_exergy
    This exergy property is based on the exergy content of the product.
  property price 0.0977 EUR2005; name electricity_price_EUR2005
    Temporary price data. Calculated as 90% of purchasers price based on: 94% of the average price (to account for a 6% loss in transformation and transmission) for electricity for industrial consumersin 2005 (excluded taxes). From IEA.
  property true value relation 3.6; name electricity_true_value_relation
    property to calculate "true value" from
  property true value 0.0145479; name electricity_true_value
    (same comment as for heat, district or industrial, other than natural gas)
- municipal solid waste: 0 kg; name municipal_waste; source Jungbluth, N. 2007; CPC 39910: Municipal waste; By-product classification Waste
  Exchange present due to parent child relationship but not relevant for this dataset.
  production volume 0 kg; = apv_electricity * municipal_waste
    (same comment as for fly ash and scrubber sludge)
  property price 0 EUR2005; name municipal_waste_price_EUR2005
    (same comment as for fly ash and scrubber sludge)
  property carbon content, non-fossil 0.261655
    MSW composition in tab 4.1, ecoinvent v2.2 report 13_I. C content referred to 1 kg DM
  property heating value, net 11.74 MJ
    Value taken from the general comment of the treatment dataset.
  property carbon content, fossil 0.171549
    MSW composition in tab 4.1, ecoinvent v2.2 report 13_I. C content referred to 1 kg DM
  property carbon content 0.433204
    carbon content on a dry matter basis (reserved; not for manual entry)
  properties: wet mass 1 kg, water content 0.297017, dry mass 0.771 kg, water in wet mass 0.229 kg, carbon allocation 0.334 kg
- waste mineral oil: 0 kg; name waste_oil; source Jungbluth, N. 2007; CPC 39990: Other wastes n.e.c.; By-product classification Waste
  Exchange present due to parent child relationship but not relevant for this dataset.
  production volume 0 kg; = apv_electricity *waste_oil
    (same comment as for fly ash and scrubber sludge)
  property carbon content, fossil 0.864444
    (same comment as for fly ash and scrubber sludge)
  property price 0 EUR2005; name waste_oil_price_EUR2005
    (same comment as for fly ash and scrubber sludge)
  property heating value, net 34.7 MJ
    Value taken from the general comment of the treatment dataset.
  property carbon content 0.864444
    carbon content on a dry matter basis (reserved; not for manual entry)
  properties: wet mass 1 kg, water content 0.111111, carbon content, non-fossil 0, dry mass 0.9 kg, water in wet mass 0.1 kg, carbon allocation 0.778 kg

## Inputs from technosphere
- lignite ash: -1.81067e-5 kg; name lignite_ash; source Jungbluth, N. 2007; lognormal variance with pedigree 0.0027, pedigree (2,2,3,1,1)
  Literature data for this country
  Amount was scaled to the amount of reference product.
  production volume 52352.6 kg; = apv_electricity * lignite_ash
    Calculated from the production volume of electricity produced in proportion to the respective output amounts. An extra amount has been added in the global dataset due to parent child relationship.
  property price 0 EUR2005; name lignite_ash_price_EUR2005
  properties: wet mass 1 kg, dry mass 1 kg
- bilge oil: -1.22594e-6 kg; name bilge_oil; source Jungbluth, N. 2007; lognormal variance with pedigree 0.0027, pedigree (2,2,3,1,1)
  Literature data for this country
  Amount was scaled to the amount of reference product.
  production volume 3544.61 kg; = apv_electricity * bilge_oil
    (same comment as for fly ash and scrubber sludge)
  property price 0 EUR2005; name bilge_oil_price_EUR2005
  properties: wet mass 1 kg, heating value, net 1.92 MJ, dry mass 0.1 kg, water content 9, carbon content, fossil 0.84
  note on heating value, net: Value taken from the general comment of the treatment dataset.
  note on carbon content, fossil: Tab A.6, ecoinvent v2.2 report 13_I. C content has been calculated after data in the tables, and then referred to 1 kg DM
- limestone, crushed, washed: 0.000473385 kg; source Jungbluth, N. 2007, p. Tab. 12.11 p. 228; lognormal variance with pedigree 0.0147, pedigree (2,4,3,3,1)
  IPPC 2001 for flue gas treatment
  Amount was scaled to the amount of reference product.
  properties: dry mass 0.998 kg, carbon content, fossil 0.117257, water content 0.00200401, wet mass 1 kg
  note on carbon content, fossil: Table 3.1, ecoinvent v2.2 report 7, part VII, pg 3. MW CaCO3=100, MW MgCO3=84. C content of limestone is 0.117257 kg/kg DM
- water, decarbonised: 0.0159696 kg; name water_decarbonised_input; source Jungbluth, N. 2007, p. Tab. 12.10 p. 228; lognormal variance with pedigree 0.0027, pedigree (2,2,3,1,1)
  Literature data for this country
  Amount was scaled to the amount of reference product.
  Literature data for this country
  Amount was scaled to the amount of reference product.
  properties: wet mass 1 kg
- heavy fuel oil: 0.0084932 kg; source Jungbluth, N. 2007; lognormal variance with pedigree 0.0027, pedigree (2,2,3,1,1)
  Literature data for heating value
  Amount was scaled to the amount of reference product.
  properties: carbon content, fossil 0.849, heating value, net 41.2 MJ, dry mass 1 kg, wet mass 1 kg
- ammonia, anhydrous, liquid: 2.17416e-5 kg; source Jungbluth, N. 2007, p. Tab. 12.11 p. 228; lognormal variance with pedigree 0.0147, pedigree (2,4,3,3,1)
  IPPC 2001 for flue gas treatment
  Amount was scaled to the amount of reference product.
  properties: wet mass 1 kg, dry mass 1 kg
- oil power plant, 500MW: 0 unit; source Jungbluth, N. 2007
  Estimation based on case study
- oil power plant, 500MW: 4.26535e-13 unit; source Jungbluth, N. 2007; lognormal variance with pedigree 0.3506, pedigree (2,5,5,5,1)
  Estimation based on case study
- water, completely softened: 0 kg; name water_softened_input; source Jungbluth, N. 2007, p. Tab. 12.10 p. 228
  Exchange present due to parent child relationship but not relevant for this dataset.
  properties: wet mass 1 kg

## Inputs from nature
- Water, cooling, unspecified natural origin [natural resource, in water]: 0.00254733 m3; name water_cooling_UNO_input; = ((recirculating_CS_fraction_from_allCS*WWithdrawal_EP_oil_recirculating_CS)+(once_through_andCP_CS_fractio_from_allCS*WWithdrawal_EP_oil_onceT_andCP_CS))/9.737; source Scown, C.D., et al. 2011, p. Tab. 12.10 p. 228; lognormal variance with pedigree 0.130025, pedigree (4,4,5,2,4)
  Literature data for this country
  Amount was scaled to the amount of reference product.
  Calculated based on literature (Scown, C.D., et al., 2011, Water Footprint of U.S. Trasportation Fuels;Scown, C.D., et al., 2011, Water Footprint of U.S. Trasportation Fuels (SI); Stiegel, 2008, Estimating Freshwater Needs to Meet Future Thermoelectric Generation Requirements; Floerke, M., 2009, Future changes of freshwater needs in the electricity production sector), (Vionnet, S., Quantis Water Database - Technical Report, 2012). Water use in this process is modelled based on literature (see references). The process boundaries are given by the boundaries of the power plant. The process ends when the energy (MJ) is produced and ready to be used for electricity production (kWh).
  Calculated based on literature data. 9.7 MJ is calculated efficiency of the electricity production, average of all available regions.

## Emissions to nature
- Hydrogen chloride [air, urban air close to ground]: 1.55135e-8 kg; source Jungbluth, N. 2007, p. Tab. 12.25; lognormal variance with pedigree 0.0612, pedigree (2,3,3,1,3)
  Literature
  Amount was scaled to the amount of reference product.
- Selenium [air, urban air close to ground]: 4.65989e-9 kg; source Jungbluth, N. 2007; lognormal variance with pedigree 1.212, pedigree (1,1,3,1,1)
  Calculation based on particle emission. Deviation calculated from ranges
  Amount was scaled to the amount of reference product.
- Nitrogen oxides [air, urban air close to ground]: 8.64971e-5 kg; source Jungbluth, N. 2007, p. Tab. 12.15 p. 231; lognormal variance with pedigree 0.0427, pedigree (2,2,3,1,1)
  Literature data for this country
  Amount was scaled to the amount of reference product.
- Vanadium [air, urban air close to ground]: 9.31978e-7 kg; source Jungbluth, N. 2007; lognormal variance with pedigree 1.392, pedigree (1,1,3,1,1)
  (same comment as for Selenium)
- AOX, Adsorbable Organic Halogen as Cl [water, surface water]: 5.66913e-10 kg; source Jungbluth, N. 2007, p. Tab. 12.26, p. 238; lognormal variance with pedigree 0.0427, pedigree (2,2,3,1,1)
  Literature data for this country
  Amount was scaled to the amount of reference product.
- Water [water, unspecified]: 0.000353514 m3; name water_to_water_unspecified; = (water_softened_input/1000)*(1-fraction_WCS_to_air)+(water_decarbonised_input/1000)*(1-fraction_WDC_to_air)+water_cooling_UNO_input*(1-fraction_CW_to_air)*(efficiency_oil_country/3.6); lognormal variance with pedigree 0.0427, pedigree (2,2,3,1,1)
  Calculated value based on literature values and expert opinion. See comments in the parametres" comment field.
  property fraction, origin: fresh water 0.0062301; name fraction_origin_fresh_water_Ww
  property carbon content, fossil 0; name C_content_fossil
  property fraction, origin: unspecified 0.99377; name fraction_origin_unspecified_Ww
  property carbon content, non-fossil 0; name C_content_non_fossil
  property fraction, origin: salt water 0; name fraction_origin_salt_water_Ww
  property water in wet mass 1000 kg; name WWM
  property dry mass 0 kg; name DM
  property wet mass 1000 kg; name WM
- Lead [air, urban air close to ground]: 3.16877e-8 kg; source Jungbluth, N. 2007; lognormal variance with pedigree 1.212, pedigree (1,1,3,1,1)
  (same comment as for Selenium)
- Formaldehyde [air, urban air close to ground]: 2.74451e-7 kg; source Jungbluth, N. 2007, p. Tab. 12.19, Tab. 12.20; lognormal variance with pedigree 0.092, pedigree (1,1,3,1,1)
  Calculation based on VOC emission. Deviation calculated from ranges
  Amount was scaled to the amount of reference product.
- TOC, Total Organic Carbon [water, surface water]: 1.37341e-7 kg; source Jungbluth, N. 2007, p. Tab. 12.26, p. 238; lognormal variance with pedigree 0.0427, pedigree (2,2,3,1,1)
  Literature data for this country
  Amount was scaled to the amount of reference product.
- Dinitrogen monoxide [air, urban air close to ground]: 1.37592e-6 kg; source Jungbluth, N. 2007, p. Tab. 12.16 p. 232; lognormal variance with pedigree 0.352, pedigree (1,1,3,1,1)
  Calculation from ranges
  Amount was scaled to the amount of reference product.
- Thallium [water, surface water]: 4.95055e-10 kg; source Jungbluth, N. 2007, p. Tab. 12.26, p. 238; lognormal variance with pedigree 0.6527, pedigree (2,2,3,1,1)
  Literature data for this country
  Amount was scaled to the amount of reference product.
- Water [air, unspecified]: 4.22197e-6 m3; name water_to_air_unspecified; = (water_softened_input/1000)*fraction_WCS_to_air+(water_decarbonised_input/1000)*fraction_WDC_to_air+water_cooling_UNO_input*fraction_CW_to_air*(efficiency_oil_country/3.6); lognormal variance with pedigree 0.0427, pedigree (2,2,3,1,1)
  (same comment as for Water)
  property fraction, origin: salt water 0; name fraction_origin_salt_water
  property fraction, origin: fresh water 0.0062301; name fraction_origin_fresh_water
  property fraction, origin: unspecified 0.99377; name fraction_origin_unspecified
- Ammonia [air, urban air close to ground]: 3.4398e-8 kg; source Jungbluth, N. 2007, p. p.232; lognormal variance with pedigree 1.102, pedigree (1,1,3,1,1)
  Calculation from ranges
  Amount was scaled to the amount of reference product.
- Calcium [air, urban air close to ground]: 1.03194e-8 kg; source Jungbluth, N. 2007, p. Tab. 12.25; lognormal variance with pedigree 0.1007, pedigree (3,3,5,3,3)
  Literature
  Amount was scaled to the amount of reference product.
- Mercury [water, surface water]: 1.6768e-11 kg; source Jungbluth, N. 2007, p. Tab. 12.26, p. 238; lognormal variance with pedigree 0.6527, pedigree (2,2,3,1,1)
  Literature data for this country
  Amount was scaled to the amount of reference product.
- Iron [air, urban air close to ground]: 2.40786e-8 kg; source Jungbluth, N. 2007; lognormal variance with pedigree 0.7107, pedigree (3,3,5,3,3)
  Literature
  Amount was scaled to the amount of reference product.
- Methanol [air, urban air close to ground]: 1.82966e-7 kg; source Jungbluth, N. 2007; lognormal variance with pedigree 0.092, pedigree (1,1,3,1,1)
  (same comment as for Formaldehyde)
- Zinc, ion [water, surface water]: 9.41644e-10 kg; source Jungbluth, N. 2007, p. Tab. 12.26, p. 238; lognormal variance with pedigree 0.6527, pedigree (2,2,3,1,1)
  Literature data for this country
  Amount was scaled to the amount of reference product.
- Acetic acid [air, urban air close to ground]: 3.65925e-7 kg; source Jungbluth, N. 2007; lognormal variance with pedigree 0.092, pedigree (1,1,3,1,1)
  (same comment as for Formaldehyde)
- Particulates, > 2.5 um, and < 10um [air, urban air close to ground]: 4.65989e-6 kg; source Jungbluth, N. 2007, p. Tab. 12.17 / Tab. 12.18; lognormal variance with pedigree 0.1227, pedigree (2,2,3,1,1)
  Literature data for this country
  Amount was scaled to the amount of reference product.
- Propane [air, urban air close to ground]: 1.82966e-8 kg; source Jungbluth, N. 2007, p. Tab. 12.19, Tab. 12.20; lognormal variance with pedigree 0.092, pedigree (1,1,3,1,1)
  (same comment as for Formaldehyde)
- Arsenic [air, urban air close to ground]: 6.15104e-9 kg; source Jungbluth, N. 2007, p. Tab. 12.23, Tab. 12.24; lognormal variance with pedigree 1.212, pedigree (1,1,3,1,1)
  (same comment as for Selenium)
- Cadmium [air, urban air close to ground]: 2.94508e-9 kg; source Jungbluth, N. 2007, p. Tab. 12.23, Tab. 12.24; lognormal variance with pedigree 1.212, pedigree (1,1,3,1,1)
  (same comment as for Selenium)
- Carbon dioxide, fossil [air, urban air close to ground]: 0.026452 kg; source Jungbluth, N. 2007, p. Tab. 12.12, p. 229; lognormal variance with pedigree 0.0027, pedigree (2,2,3,1,1)
  Literature data for this country
  Amount was scaled to the amount of reference product.
- Hypochlorite [water, surface water]: 1.30712e-7 kg; source Jungbluth, N. 2007; lognormal variance with pedigree 0.1021, pedigree (3,4,5,3,3)
  Literature
  Amount was scaled to the amount of reference product.
- Phosphorus [water, surface water]: 2.47531e-9 kg; source Jungbluth, N. 2007, p. Tab. 12.26, p. 238; lognormal variance with pedigree 0.0427, pedigree (2,2,3,1,1)
  Literature data for this country
  Amount was scaled to the amount of reference product.
- Particulates, > 10 um [air, urban air close to ground]: 9.31978e-6 kg; source Jungbluth, N. 2007, p. Tab. 12.17 / Tab. 12.18; lognormal variance with pedigree 0.0427, pedigree (2,2,3,1,1)
  Literature data for this country
  Amount was scaled to the amount of reference product.
- Tin, ion [water, surface water]: 1.59696e-11 kg; source Jungbluth, N. 2007, p. Tab. 12.26, p. 238; lognormal variance with pedigree 0.6527, pedigree (2,2,3,1,1)
  Literature data for this country
  Amount was scaled to the amount of reference product.
- Acetone [air, urban air close to ground]: 8.9617e-8 kg; source Jungbluth, N. 2007; lognormal variance with pedigree 0.092, pedigree (1,1,3,1,1)
  (same comment as for Formaldehyde)
- Nickel [air, urban air close to ground]: 2.57228e-7 kg; source Jungbluth, N. 2007; lognormal variance with pedigree 1.212, pedigree (1,1,3,1,1)
  (same comment as for Selenium)
- Vanadium, ion [water, surface water]: 9.19629e-9 kg; source Jungbluth, N. 2007, p. Tab. 12.26, p. 238; lognormal variance with pedigree 0.6527, pedigree (2,2,3,1,1)
  Literature data for this country
  Amount was scaled to the amount of reference product.
- Iron, ion [water, surface water]: 1.59091e-8 kg; source Jungbluth, N. 2007, p. Tab. 12.26, p. 238; lognormal variance with pedigree 0.6527, pedigree (2,2,3,1,1)
  Literature data for this country
  Amount was scaled to the amount of reference product.
- Particulates, < 2.5 um [air, urban air close to ground]: 4.65989e-6 kg; source Jungbluth, N. 2007, p. Tab. 12.17 / Tab. 12.18; lognormal variance with pedigree 0.3027, pedigree (2,2,3,1,1)
  Literature data for this country
  Amount was scaled to the amount of reference product.
- PAH, polycyclic aromatic hydrocarbons [air, urban air close to ground]: 6.19163e-10 kg; source Jungbluth, N. 2007, p. Tab. 12.21, p. 235; lognormal variance with pedigree 0.3147, pedigree (2,4,3,3,1)
  Literature
  Amount was scaled to the amount of reference product.
- Hydrocarbons, aromatic [air, urban air close to ground]: 3.65925e-9 kg; source Jungbluth, N. 2007; lognormal variance with pedigree 0.092, pedigree (1,1,3,1,1)
  (same comment as for Formaldehyde)
- Carbon monoxide, fossil [air, urban air close to ground]: 3.4398e-6 kg; source Jungbluth, N. 2007, p. Tab. 12.13, p. 229; lognormal variance with pedigree 0.162, pedigree (1,1,3,1,1)
  Calculation from ranges
  Amount was scaled to the amount of reference product.
- Zinc [air, urban air close to ground]: 2.2368e-8 kg; source Jungbluth, N. 2007; lognormal variance with pedigree 1.212, pedigree (1,1,3,1,1)
  (same comment as for Selenium)
- Hydrocarbons, unspecified [water, surface water]: 4.82397e-9 kg; source Jungbluth, N. 2007, p. Tab. 12.26, p. 238; lognormal variance with pedigree 0.3027, pedigree (2,2,3,1,1)
  Literature data for this country
  Amount was scaled to the amount of reference product.
- Hypochlorite [water, ocean]: 1.10073e-7 kg; source Jungbluth, N. 2007; lognormal variance with pedigree 0.1021, pedigree (3,4,5,3,3)
  Literature
  Amount was scaled to the amount of reference product.
- Lead [water, surface water]: 6.67011e-10 kg; source Jungbluth, N. 2007, p. Tab. 12.26, p. 238; lognormal variance with pedigree 0.6527, pedigree (2,2,3,1,1)
  Literature data for this country
  Amount was scaled to the amount of reference product.
- Sulfur dioxide [air, urban air close to ground]: 0.000462824 kg; source Jungbluth, N. 2007, p. Tab. 12.14 p. 230; lognormal variance with pedigree 0.0027, pedigree (2,2,3,1,1)
  Literature data for this country
  Amount was scaled to the amount of reference product.
- Mercury [air, urban air close to ground]: 5.15969e-11 kg; source Jungbluth, N. 2007; lognormal variance with pedigree 1.632, pedigree (1,1,3,1,1)
  Calculation from ranges
  Amount was scaled to the amount of reference product.
- Hydrocarbons, aliphatic, unsaturated [air, urban air close to ground]: 1.82966e-8 kg; source Jungbluth, N. 2007; lognormal variance with pedigree 0.092, pedigree (1,1,3,1,1)
  (same comment as for Formaldehyde)
- Acetaldehyde [air, urban air close to ground]: 8.9617e-8 kg; source Jungbluth, N. 2007; lognormal variance with pedigree 0.092, pedigree (1,1,3,1,1)
  (same comment as for Formaldehyde)
- Benzene [air, urban air close to ground]: 1.82966e-8 kg; source Jungbluth, N. 2007; lognormal variance with pedigree 0.092, pedigree (1,1,3,1,1)
  (same comment as for Formaldehyde)
- Sodium [air, urban air close to ground]: 1.03194e-7 kg; source Jungbluth, N. 2007, p. Tab. 12.25; lognormal variance with pedigree 0.1007, pedigree (3,3,5,3,3)
  Literature
  Amount was scaled to the amount of reference product.
- Nitrogen [water, surface water]: 1.09179e-6 kg; source Jungbluth, N. 2007, p. Tab. 12.26, p. 238; lognormal variance with pedigree 0.0427, pedigree (2,2,3,1,1)
  Literature data for this country
  Amount was scaled to the amount of reference product.
- COD, Chemical Oxygen Demand [water, surface water]: 2.45667e-7 kg; source Jungbluth, N. 2007, p. Tab. 12.26, p. 238; lognormal variance with pedigree 0.0427, pedigree (2,2,3,1,1)
  Literature data for this country
  Amount was scaled to the amount of reference product.
- Hydrocarbons, aliphatic, alkanes, unspecified [air, urban air close to ground]: 3.65925e-7 kg; source Jungbluth, N. 2007; lognormal variance with pedigree 0.092, pedigree (1,1,3,1,1)
  (same comment as for Formaldehyde)
- Sulfide [water, surface water]: 7.18642e-9 kg; source Jungbluth, N. 2007, p. Tab. 12.26, p. 238; lognormal variance with pedigree 0.0427, pedigree (2,2,3,1,1)
  Literature data for this country
  Amount was scaled to the amount of reference product.
- Suspended solids, unspecified [water, surface water]: 2.0645e-7 kg; source Jungbluth, N. 2007, p. Tab. 12.26, p. 238; lognormal variance with pedigree 0.0427, pedigree (2,2,3,1,1)
  Literature data for this country
  Amount was scaled to the amount of reference product.
- Copper, ion [water, surface water]: 1.59696e-10 kg; source Jungbluth, N. 2007, p. Tab. 12.26, p. 238; lognormal variance with pedigree 0.6527, pedigree (2,2,3,1,1)
  Literature data for this country
  Amount was scaled to the amount of reference product.
- Fluoride [water, surface water]: 2.71482e-8 kg; source Jungbluth, N. 2007, p. Tab. 12.26, p. 238; lognormal variance with pedigree 0.0427, pedigree (2,2,3,1,1)
  Literature data for this country
  Amount was scaled to the amount of reference product.
- Sulfite [water, surface water]: 2.41143e-7 kg; source Jungbluth, N. 2007, p. Tab. 12.26, p. 238; lognormal variance with pedigree 0.0427, pedigree (2,2,3,1,1)
  Literature data for this country
  Amount was scaled to the amount of reference product.
- Molybdenum [air, urban air close to ground]: 7.08323e-9 kg; source Jungbluth, N. 2007; lognormal variance with pedigree 1.212, pedigree (1,1,3,1,1)
  (same comment as for Selenium)
- Carbon dioxide, fossil [air, unspecified]: 0.000212548 kg; source Jungbluth, N. 2007, p. Tab. 12.29, Tab. 12.30; lognormal variance with pedigree 0.0206, pedigree (2,5,3,1,1)
  Calculation for limestone use
  Amount was scaled to the amount of reference product.
- Benzo(a)pyrene [air, urban air close to ground]: 5.15969e-12 kg; source Jungbluth, N. 2007; lognormal variance with pedigree 0.3707, pedigree (3,3,5,3,3)
  Literature
  Amount was scaled to the amount of reference product.
- Beryllium [air, urban air close to ground]: 1.91844e-11 kg; source Jungbluth, N. 2007; lognormal variance with pedigree 0.6927, pedigree (3,3,5,3,1)
  Literature
  Amount was scaled to the amount of reference product.
- Manganese [air, urban air close to ground]: 1.0252e-8 kg; source Jungbluth, N. 2007, p. Tab. 12.23, Tab. 12.24; lognormal variance with pedigree 1.212, pedigree (1,1,3,1,1)
  (same comment as for Selenium)
- Chromium VI [air, urban air close to ground]: 1.0705e-10 kg; source Jungbluth, N. 2007, p. Tab. 12.23, Tab. 12.24; lognormal variance with pedigree 2.2927, pedigree (3,3,5,3,1)
  Literature, basic uncertainity = 20
  Amount was scaled to the amount of reference product.
- Dioxins, measured as 2,3,7,8-tetrachlorodibenzo-p-dioxin [air, urban air close to ground]: 3.4398e-15 kg; source Jungbluth, N. 2007, p. Tab. 12.22 p. 235; lognormal variance with pedigree 0.3147, pedigree (2,4,3,3,1)
  Literature
  Amount was scaled to the amount of reference product.
- BOD5, Biological Oxygen Demand [water, surface water]: 2.24608e-7 kg; source Jungbluth, N. 2007, p. Tab. 12.26, p. 238; lognormal variance with pedigree 0.0427, pedigree (2,2,3,1,1)
  Literature data for this country
  Amount was scaled to the amount of reference product.
- Manganese [water, surface water]: 4.79095e-10 kg; source Jungbluth, N. 2007, p. Tab. 12.26, p. 238; lognormal variance with pedigree 0.6527, pedigree (2,2,3,1,1)
  Literature data for this country
  Amount was scaled to the amount of reference product.
- Chloride [water, surface water]: 3.26739e-6 kg; source Jungbluth, N. 2007, p. Tab. 12.26, p. 238; lognormal variance with pedigree 0.0427, pedigree (2,2,3,1,1)
  Literature data for this country
  Amount was scaled to the amount of reference product.
- Arsenic, ion [water, surface water]: 1.59696e-11 kg; source Jungbluth, N. 2007, p. Tab. 12.26, p. 238; lognormal variance with pedigree 0.6527, pedigree (2,2,3,1,1)
  Literature data for this country
  Amount was scaled to the amount of reference product.
- Chromium, ion [water, surface water]: 1.59696e-10 kg; source Jungbluth, N. 2007, p. Tab. 12.26, p. 238; lognormal variance with pedigree 0.6527, pedigree (2,2,3,1,1)
  Literature data for this country
  Amount was scaled to the amount of reference product.
- Copper [air, urban air close to ground]: 4.38024e-8 kg; source Jungbluth, N. 2007, p. Tab. 12.23, Tab. 12.24; lognormal variance with pedigree 1.312, pedigree (1,1,3,1,1)
  (same comment as for Selenium)
- Ethanol [air, urban air close to ground]: 1.82966e-7 kg; source Jungbluth, N. 2007; lognormal variance with pedigree 0.092, pedigree (1,1,3,1,1)
  (same comment as for Formaldehyde)
- DOC, Dissolved Organic Carbon [water, surface water]: 1.37341e-7 kg; source Jungbluth, N. 2007; lognormal variance with pedigree 0.0427, pedigree (2,2,3,1,1)
  Calculated as equal to TOC.
  Amount was scaled to the amount of reference product.
- Cobalt [air, urban air close to ground]: 3.26196e-8 kg; source Jungbluth, N. 2007, p. Tab. 12.23, Tab. 12.24; lognormal variance with pedigree 1.212, pedigree (1,1,3,1,1)
  (same comment as for Selenium)
- Cobalt [water, surface water]: 3.19392e-11 kg; source Jungbluth, N. 2007, p. Tab. 12.26, p. 238; lognormal variance with pedigree 0.6527, pedigree (2,2,3,1,1)
  Literature data for this country
  Amount was scaled to the amount of reference product.
- Cadmium, ion [water, surface water]: 3.88594e-11 kg; source Jungbluth, N. 2007, p. Tab. 12.26, p. 238; lognormal variance with pedigree 0.6527, pedigree (2,2,3,1,1)
  Literature data for this country
  Amount was scaled to the amount of reference product.
- Chromium [air, urban air close to ground]: 1.07972e-8 kg; source Jungbluth, N. 2007, p. Tab. 12.23, Tab. 12.24; lognormal variance with pedigree 1.462, pedigree (1,1,3,1,1)
  (same comment as for Selenium)
- Hydrogen fluoride [air, urban air close to ground]: 1.03538e-8 kg; source Jungbluth, N. 2007, p. Tab. 12.25; lognormal variance with pedigree 0.0612, pedigree (2,3,3,1,3)
  Literature
  Amount was scaled to the amount of reference product.
- Sulfate [water, surface water]: 2.67093e-5 kg; source Jungbluth, N. 2007, p. Tab. 12.26, p. 238; lognormal variance with pedigree 0.0427, pedigree (2,2,3,1,1)
  Literature data for this country
  Amount was scaled to the amount of reference product.
- Methane, fossil [air, urban air close to ground]: 1.82966e-6 kg; source Jungbluth, N. 2007, p. Tab. 12.19, Tab. 12.20; lognormal variance with pedigree 0.092, pedigree (1,1,3,1,1)
  (same comment as for Formaldehyde)
- Oils, unspecified [water, surface water]: 7.40106e-9 kg; source Jungbluth, N. 2007, p. Tab. 12.26, p. 238; lognormal variance with pedigree 0.3027, pedigree (2,2,3,1,1)
  Literature data for this country
  Amount was scaled to the amount of reference product.
- Nickel, ion [water, surface water]: 3.70053e-9 kg; source Jungbluth, N. 2007, p. Tab. 12.26, p. 238; lognormal variance with pedigree 0.6527, pedigree (2,2,3,1,1)
  Literature data for this country
  Amount was scaled to the amount of reference product.

## Sampling procedure
Literature, environmental reports and questionnaires

## Extrapolations
Data are originally from sources from the 90ies. Uncertainty has been adjusted accordingly.

## Review by Carl Vadenbo 2015-07-24
The update of the whole electricity sector for the ecoinvent v3.2 database consist of hundreds of datasets. All these datasets have passed through a streamlined review processes where the underlying modelling of production volumes, technology shares and efficiencies was reviewed in detail prior to the datasets being submitted to the database.
