# treatment of used Li-ion battery, pyrometallurgical treatment

Dataset: EcoSpold 2, unit process
Geography: GLO
Time period: 2005-01-01 to 2021-12-31
Technology level: current
Classification: EcoSpold01Categories: waste management/recycling
Classification: ISIC rev.4 ecoinvent: 3830:Materials recovery
Tags: ConvertedDataset
Scenario: Business-as-Usual
System model: Allocation, cut-off by classification
Generated by: Roland Hischier
Published in: Hischier R. 2007
Database: ecoinvent
isCopyrightProtected: true
accessRestrictedTo: 1

## General comment
[This dataset was already contained in the ecoinvent database version 2. It was not individually updated during the transfer to ecoinvent version 3. Life Cycle Impact Assessment results may still have changed, as they are affected by changes in the supply chain, i.e. in other datasets. This dataset was generated following the ecoinvent quality guidelines for version 2. It may have been subject to central changes described in the ecoinvent version 3 change report (http://www.ecoinvent.org/database/ecoinvent-version-3/reports-of-changes/), and the results of the central updates were reviewed extensively. The changes added e.g. consistent water flows and other information throughout the database. The documentation of this dataset can be found in the ecoinvent reports of version 2, which are still available via the ecoinvent website. The change report linked above covers all central changes that were made during the conversion process.]

## Included activities end
This dataset represents the treatment of Li-Ion batteries from electric and electronic devices by a pyrometallurgical process. It includes energy & auxiliary consumption, waste production, emission (to air/to water) production and rough estimations of the efforts for infrastructure & transportation.

## Geography
Data from a European recycling company - used as global average data.

## Technology
Crushing of the batteries, followed by a neutralization and a processing step.

## Parameters
- fraction, process water, to air: 0.15 dimensionless; name fraction_PW_to_air; lognormal variance with pedigree 0.092025, pedigree (4,4,3,2,4)
  Literature value. In case when no industry/process specific data are available, default evaporation fraction value is used. This value is 15% and is based on literature (Statistics Canada, 2007 & Shaffer, K.H., 2008, Consumptive water use in the Great Lakes Basin, USGS & Shiklomanov, 2003, World Water Resources at the Beginning of the 21st Century) and has been approved by an expert.

## Reference product
- used Li-ion battery: -1 kg; By-product classification Waste; CPC 39990: Other wastes n.e.c.
  EcoSpold01Location=GLO
  production volume 1e6 kg
    estimated global value 4xEurope. Source for Europe: http://www.icm.ch/pdf/pressarticles/pressarticle_recycling_oct08.pdf; estimated proportion; source: ecoinvent v2
  property price 0 EUR2005
    Waste products are assigned a price of zero as they are assumed to require further treatment.
  property carbon content 0.328011
    carbon content on a dry matter basis (reserved; not for manual entry)
  properties: water in wet mass 0 kg, water content 0, dry mass 1 kg, carbon content, non-fossil 0, carbon content, fossil 0.328011, EcoSpold01Allocation_undefined_1 100, EcoSpold01Allocation_undefined_2 100, wet mass 1 kg, carbon allocation 0.328011 kg

## By-products
- cobalt: 0 kg; CPC 41601: Tungsten, molybdenum, tantalum, magnesium, cobalt, cadmium, titanium, zirconium, beryllium, gallium, hafnium, […]; By-product classification allocatable product; CAS 7440-48-4
  EcoSpold01Location=GLO
  production volume 192000 kg
    Output relative to batteries treated
  property price 26.5168 EUR2005
    Price calculated as 5-year market average (2015-2019; USD/kg; USGS [2020]) and converted to EUR2005 (USD2019/EUR2005 exchange rate: 0.62; Official Data Foundation [2020] and Macrotrends [2020]).
    References:
    Official Data Foundation (2020). Inflation Calculator [Online]. Available from: https://www.officialdata.org/us/inflation/2005?endYear=2019&amount=1 [Accessed 28/07/2020]
    USGS (2020). Mineral Commodity Summaries 2020 [Online]. Available from: https://pubs.usgs.gov/periodicals/mcs2020/mcs2020.pdf [Accessed 28/07/2020]
    Macrotrends (2020). Euro Dollar Exchange Rate (EUR USD) - Historical Chart [Online]. Available from: https://www.macrotrends.net/2548/euro-dollar-exchange-rate-historical-chart [Accessed 28/07/2020]
  property carbon content 0
    carbon content on a dry matter basis (reserved; not for manual entry)
  properties: carbon content, non-fossil 0, water content 0, carbon content, fossil 0, water in wet mass 0 kg, dry mass 1 kg, wet mass 1 kg, carbon allocation 0 kg
- iron scrap, unsorted: 0 kg; CPC 39310: Slag, dross, scalings and other waste from the manufacture of iron or steel; By-product classification Recyclable
  this flow substitutes the original byproduct "steel, Cr-Ni, from used Li-ion battery pyrometallurgical process". Following an update in the production process of Li-battery, the byproduct of steel corresponds to reinforcing steel. This differs from the Chromium steel output modelled in the present treatment activity.
  production volume 0 kg
    Output relative to batteries treated
  property price 0.149 EUR2005
    Temporary price data. Calculated as 90% of purchasers price based on: estimated at 85% of sorted scrap
  property carbon content 0
    carbon content on a dry matter basis (reserved; not for manual entry)
  properties: water content 0, water in wet mass 0 kg, carbon content, fossil 0, carbon content, non-fossil 0, wet mass 1 kg, dry mass 1 kg, carbon allocation 0 kg
- manganese dioxide: 0 kg; CPC 34220: Zinc oxide; zinc peroxide; chromium oxides and hydroxides; manganese oxides; iron oxides and hydroxides; earth[…]; By-product classification allocatable product; CAS 1313-13-9
  EcoSpold01Location=GLO
  production volume 10000 kg
    Output relative to batteries treated
  property price 1.04 EUR2005
    Calculated value based on data from United Nations Commodity Trade Statistics Database (comtrade.un.org). UN comtrade category: 282010 Managanese dioxide. Prices from the year 2005. Using exchange rate of 1EURO = 1.209 USD. Average of price of import into 5 main markets (EU, US, JP, IN and CN).
  property carbon content 0
    carbon content on a dry matter basis (reserved; not for manual entry)
  properties: dry mass 1 kg, carbon content, fossil 0, water content 0, carbon content, non-fossil 0, water in wet mass 0 kg, wet mass 1 kg, carbon allocation 0 kg

## Inputs from technosphere
- non-Fe-Co-metals, from used Li-ion battery, pyrometallurgical processing: -0.24 kg
  EcoSpold01Location=GLO
  production volume 240000 kg
    Output relative to batteries treated
  properties: price 10.4 EUR2005, dry mass 1 kg, wet mass 1 kg
- electricity, medium voltage: 0.8 kWh; lognormal variance with pedigree 0.0521, pedigree (1,4,5,3,1)
  Data of 1 European plant - reported in Fisher (2006)
  EcoSpold01Location=UCTE
  Uncertainty: data of 1 European plant - reported in Fisher (2006)
- sodium hydroxide, without water, in 50% solution state: 0.35 kg; lognormal variance with pedigree 0.0521, pedigree (1,4,5,3,1)
  Data of 1 European plant - reported in Fisher (2006)
  EcoSpold01Location=RER
  Uncertainty: data of 1 European plant - reported in Fisher (2006)
  properties: heating value, net 3.03 MJ, dry mass 1 kg, wet mass 1 kg
- copper smelting facility: 5e-10 unit; lognormal variance with pedigree 0.5761, pedigree (4,5,5,3,5)
  Rough estimation of infrastructure
  EcoSpold01Location=SE
  Uncertainty: rough estimation of infrastructure
- waste plastic, mixture: 0 kg; pedigree (1,1,1,1,1)
  EcoSpold01Location=CH
  Data of 1 European plant - reported in Fisher (2006)
  Uncertainty: data of 1 European plant - reported in Fisher (2006)
  production volume 0 kg
    Calculated from the production volume of used Li-ion battery in proportion to the respective output amounts.
  properties: water content 0.180638, carbon content, fossil 0.747344, dry mass 0.847 kg, wet mass 1 kg, heating value, net 30.79 MJ
  note on carbon content, fossil: C content in 1 kg DM was calculated using data in Tab A.2, ecoinvent v2.2 report 13_I
  note on heating value, net: Value taken from the general comment of the treatment dataset.
- iron scrap, unsorted: -0.27 kg
  (same comment as for iron scrap, unsorted)
  production volume 270000 kg
  properties: price 0.149 EUR2005, wet mass 1 kg, dry mass 1 kg
- waste plastic, mixture: -0.0192509, -0.00148413, -0.000613001, -0.000582101, -0.0222122, -0.000247645, -0.000112243, -0.155498 kg (8 entries); lognormal variance with pedigree 0.0521, pedigree (1,4,5,3,1)
  (same comment as for waste plastic, mixture)
  production volume 200000 kg

## Inputs from nature
- Water, unspecified natural origin [natural resource, in water]: 0.001 m3; name water_UNO_input; lognormal variance with pedigree 0.0521, pedigree (1,4,5,3,1)
  Data of 1 European plant - reported in Fisher (2006)
  Uncertainty: data of 1 European plant - reported in Fisher (2006)

## Emissions to nature
- Particulates, > 10 um [air, urban air close to ground]: 1.04e-5 kg; lognormal variance with pedigree 0.1721, pedigree (1,4,5,3,1)
  (same comment as for Water, unspecified natural origin)
- Chloride [water, surface water]: 0.04 kg; lognormal variance with pedigree 0.0921, pedigree (1,4,5,3,1)
  (same comment as for Water, unspecified natural origin)
- Water [air, unspecified]: 0.00015 m3; name water_to_air_unspecified; = (water_UNO_input*fraction_PW_to_air); lognormal variance with pedigree 0.0807, pedigree (2,2,5,1,1)
  Calculated value based on literature values and expert opinion. See comments in the parametres' comment field.
  property fraction, origin: fresh water 0; name fraction_origin_fresh_water
  property fraction, origin: unspecified 1; name fraction_origin_unspecified
  property fraction, origin: salt water 0; name fraction_origin_salt_water
- Sulfate [water, surface water]: 0.06 kg; lognormal variance with pedigree 0.0921, pedigree (1,4,5,3,1)
  (same comment as for Water, unspecified natural origin)
- Particulates, < 2.5 um [air, urban air close to ground]: 0.000104 kg; lognormal variance with pedigree 0.3521, pedigree (1,4,5,3,1)
  (same comment as for Water, unspecified natural origin)
- Sulfur dioxide [air, urban air close to ground]: 4.8e-5 kg; lognormal variance with pedigree 0.0921, pedigree (1,4,5,3,1)
  (same comment as for Water, unspecified natural origin)
- Particulates, > 2.5 um, and < 10um [air, urban air close to ground]: 9.36e-5 kg; lognormal variance with pedigree 0.1721, pedigree (1,4,5,3,1)
  (same comment as for Water, unspecified natural origin)
- Water [water, unspecified]: 0.00085 m3; name water_to_water_unspecified; = water_UNO_input*(1-fraction_PW_to_air); lognormal variance with pedigree 0.0807, pedigree (2,2,5,1,1)
  (same comment as for Water)
  property fraction, origin: fresh water 0; name fraction_origin_fresh_water_Ww
  property fraction, origin: salt water 0; name fraction_origin_salt_water_Ww
  property fraction, origin: unspecified 1; name fraction_origin_unspecified_Ww
  property dry mass 0 kg; name DM
  property wet mass 1000 kg; name WM
  property carbon content, fossil 0; name C_content_fossil
  property water in wet mass 1000 kg; name WWM
  property carbon content, non-fossil 0; name C_content_non_fossil

## Sampling procedure
Company information & own estimation

## Extrapolations
This dataset has been extrapolated from year 2005 to the year of the calculation (2021). The uncertainty has been adjusted accordingly.

## Review by Jürgen Sutter 2007-08-31
passed.
