# potassium nitrate production, agricultural grade

Dataset: EcoSpold 2, unit process
Geography: CL
Time period: 2015-01-01 to 2021-12-31
Technology level: current
Classification: ISIC rev.4 ecoinvent: 2012:Manufacture of fertilizers and nitrogen compounds
Scenario: Business-as-Usual
System model: Allocation, cut-off by classification
Generated by: Yvonne Baeuerle
Database: ecoinvent
isCopyrightProtected: true
accessRestrictedTo: 1

## General comment
This activity represents the production of potassium nitrate in a purity of 50%. This potassium nitrate (KNO3) is chlorine-free, water soluble, and shows fast absorption for agricultural use. The chemical production process of potassium nitrates (KNO3) goes via sodium nitrate (NaO3) extracted from the caliche ore and potassium chloride (KCl) harvested from the Salar brines.

## Included activities start
The activity involves a nitrate crystallization process at moderate temperatures (80°C) to form KNO3 from NaNO3 and KCL.

## Included activities end
The activity ends with the potassium nitrate ready for use at a purity of 50%.

## Geography
The production facilitiy is located in the Atacama Desert in northern Chile where the chemical is produced by the global producer and supplier SQM.

## Technology
SQM continueously improves this process to increase production volume and its efficiency.

## Time period
Process data provided are from 2014/2015 and are valid for today's and near future production at SQM in Chile.

## Reference product
- potassium nitrate, agricultural grade: 1 kg; name RP_amount_1; By-product classification allocatable product; CPC 34646: Potassium nitrate; CAS 7757-79-1
  production volume 2.94e8 kg; name RP_PV_1
    Average production volume from 2015/2016 specific this dataset provided by experts from SQM
  property price 0.34 EUR2005; name RP_amount_1_price_EUR2005
    Calculated value based on data from United Nations Commodity Trade Statistics Database (comtrade.un.org). UN comtrade category: 283421 Potassium nitrate. Year 2005. Using exchange rate of 1EURO = 1.209 USD. Average of price of import into 5 main markets (EU, US, JP, IN and CN).

## By-products
- purge gas, rich in sodium nitrate: 0 kg; CPC 88422: Fertilizer manufacturing services; By-product classification Recyclable
  production volume 0 kg; = RP_PV_1 * (BP_amount_1 / RP_amount_1)
    Calculated from production volume of reference product using the relative outputs.
  property price 0.23 EUR2005; name BP_amount_1_price_EUR2005
    Price set equal to price of sodium nitrate, unrefined. Comment:"Calculated value based on data from United Nations Commodity Trade Statistics Database (comtrade.un.org). UN comtrade category: 310250 Sodium nitrate, in packs > 10 kg. Year 2005. Using exchange rate of 1EURO = 1.209 USD. Average of price of import into 5 main markets (EU, US, JP, IN and CN)."

## Inputs from technosphere
- electricity, medium voltage: 0.14 kWh; lognormal variance with pedigree 0.0008, pedigree (1,1,2,1,1)
  Electricity used for the processes based on plant measurements
- heat, district or industrial, other than natural gas: 1.74 MJ; lognormal variance with pedigree 0.0008, pedigree (1,1,2,1,1)
  Bunker burned to provide heat for the crystallization process
  properties: heating value, net 1 MJ, corresponding fuel use, propane, furnace >100kW 1.05263 MJ
  note on corresponding fuel use, propane, furnace >100kW: Lower heating value of the fuel input related to the heat/electricity output, taken directly from ecoinvent v3.0 dataset "heat production, natural gas, at industrial furnace >100kW, GLO 2000".
- tap water: 1.06 kg; name water; lognormal variance with pedigree 0.0008, pedigree (1,1,2,1,1)
  Used in the crystallization process
  properties: water content 2962.17, carbon content, fossil 0.00178991, wet mass 1 kg, dry mass 0.000337476 kg
  note on carbon content, fossil: Bicarbonate content is 2.93 mol/m3. CO2 content is 0.1 mol/m3 (ecoinvent v2.2 report 8, Tab 93.1).
- diesel, burned in building machine: 0.002 MJ; lognormal variance with pedigree 0.0008, pedigree (1,1,2,1,1)
  Diesel used for the processes based on plant measurements
  properties: heating value, net 1 MJ
- sodium nitrate, unrefined: 0.98 kg; name NaNO; lognormal variance with pedigree 0.0008, pedigree (1,1,2,1,1)
  Sodium nitrate reaching a purity of about 50%. This sodium nitrate is used in the production of potassium nitrate or will be further procecced to higher purities. So, this product is not sold on the market.
  properties: wet mass 1 kg, dry mass 1 kg
- transport, freight, lorry 16-32 metric ton, EURO3: 0.4963 metric ton*km; = 0.185*NaNO+0.300*KCL; lognormal variance with pedigree 0.1202, pedigree (1,1,2,1,1)
  Transport of NaNO3 from Nueva Victoria to Coya Sur (185 km) and transport of KCL from Salar del Atacama to Coya Sur (300 km)
- potassium chloride, industrial grade: 1.05 kg; name KCL; lognormal variance with pedigree 0.0008, pedigree (1,1,2,1,1)
  Potassium chloride at a purity of 95% extracted from salar brines in the Atacama Desert in Chile. Most of the product is used in further processes for the potassium nitrate production.
  properties: wet mass 1 kg, water content 0.00300903, dry mass 0.997 kg
- purge gas, rich in sodium nitrate: -0.83 kg
  production volume 2.4402e8 kg

## Emissions to nature
- Water [air, unspecified]: 0.00106 m3; = water/1000; lognormal variance with pedigree 0.1222, pedigree (3,1,2,1,1)
  Drying process releases water from evaporation.

## Sampling procedure
Data have been provided by the producer SQM in Chile. SQM is a global producer and supplier of plant nutrients, iodine, lithium and industrial chemicals. The production facilities are located in the Atacama Desert where the chemicals are produced from natural resources via mining, crystalization and refining processes. Initially, some data and process information has been exchanged via questionaires. Further, more specific data were provided via intensive direct contact with experts at SQM.

## Extrapolations
This dataset has been extrapolated from year 2018 to the year of the calculation (2021). The uncertainty has been adjusted accordingly.
