# battery production, NMC811, Li-ion, rechargeable, prismatic

Dataset: EcoSpold 2, unit process
Geography: RoW
Time period: 2017-01-01 to 2021-12-31
Technology level: current
Classification: ISIC rev.4 ecoinvent: 2720:Manufacture of batteries and accumulators
Synonyms: nickel-manganese-cobalt battery; nickel-manganese-cobalt811 battery, Li-ion; nickel-manganese-cobalt battery, Li-ion
Scenario: Business-as-Usual
System model: Allocation, cut-off by classification
Generated by: Eleonora Crenna
Published in: Dai, Q. 2018
Database: ecoinvent
isCopyrightProtected: true
accessRestrictedTo: 1

## General comment
This dataset represents the production of 1 kg of Li-ion battery pack used e.g. for mechanical drive of an electric vehicle. The inventory is modelled according to the publication of Dai et al. (2017; 2018), in which a battery pack of 158 kg, with gross pack energy of 23.53 kWh made of 140 3.6 V- 46Ah prismatic cells is presented. Cells are made of nicke-manganese-cobalt (NMC811) cathode and a silicon coated graphite-based anode, liquid electrolyte and a porous plastic separator.Infrastructure is included as well in this dataset as "electronic component factory". This dataset is a copy of the corresponding regional dataset. Production volume was adjusted.
Reference:
Dai, Q., Dunn, J., Kelly, J. C., & Elgowainy, A. (2017). Update of Life Cycle Analysis of Lithium-Ion Batteries in the GREET Model. 2017. Argonne National Laboratory.
Dai, Q., Kelly, J. C., Dunn, J., & Benavides, P. (2018). Update of Bill-of-Materials and Cathode Materials Production for Lithium-Ion Batteries in the GREET Model. 2018. Argonne National Laboratory.

## Included activities start
The activity starts with the battery cells, module packaging and the materials for additional components (esternal case, tabs, etc.) entering the factory gate.

## Included activities end
The activity ends with the production of Li-ion battery pack.

## Geography
This dataset is considered representative of the global situation. It is based on data from the geography China, which is the leader country of Li-ion battery production.

## Technology
The battery pack includes module packaging, cells with NMC811 cathode and silicon coated graphite-based anode and additional components (external case, tabs, electronic components).

## Time period
The time period is from 2017 (year of the collection of data) and 2020 (year of the dataset)

## Reference product
- battery, Li-ion, NMC811, rechargeable, prismatic: 1 kg; By-product classification allocatable product; CPC 46410: Primary cells and primary batteries
  production volume 5.63039e7 kg
    The PV is expressed in kg. According to UN Comtrade (https://comtrade.un.org/data/, HS code: 850760) 1317479226 kg Li-ion batteries were traded worldwide in 2019. Approximately 5% are NMC811 (Benchmark Mineral Intelligence, 2019. The Current Position of Li-ion Raw Material Supply and the Role of Recycling)
  property wet mass 1 kg; name WM
  property water in wet mass 0.0230122 kg; = WM-DM
  property water content 0.0235543; = (WM-DM)/DM
  property price 16.6955 EUR2005; = 135*0.149*0.83
    Price infromation from: https://www.statista.com/statistics/883118/global-lithium-ion-battery-pack-costs/
  property dry mass 0.976988 kg; name DM
  property carbon content 0.218692
    carbon content on a dry matter basis (reserved; not for manual entry)
  properties: copper content 0.026793, carbon content, fossil 0.217225, carbon content, non-fossil 0.00146765, carbon allocation 0.21366 kg

## Inputs from technosphere
- polyethylene, high density, granulate: 0.00405 kg; source Dai, Q. 2018; lognormal variance with pedigree 0.0046, pedigree (2,3,2,5,2)
  Literature. Plastic component of the battery jacket
  properties: wet mass 1 kg, heating value, net 42.47 MJ, carbon content, fossil 0.857143, dry mass 1 kg
  note on carbon content, fossil: Polyethylene is formed out of a huge amount of ethylene monomers (C2H4) (ecoinvent v2.2 report 11_II). MW=28 g/mol
- reinforcing steel: 0.00642 kg; source Dai, Q. 2018; lognormal variance with pedigree 0.0046, pedigree (2,3,2,5,2)
  Literature. Material for module compression plates and straps
  properties: dry mass 1 kg, carbon content, fossil 0.004, wet mass 1 kg
- sheet rolling, steel: 0.00642 kg; lognormal variance with pedigree 0.0046, pedigree (2,3,2,5,2)
  Proxy for the production of module compression plates and straps
- electronic component, passive, unspecified: 0.00431 kg; source Dai, Q. 2018; lognormal variance with pedigree 0.0046, pedigree (2,3,2,5,2)
  Literature. Representative for module interconnections
  properties: dry mass 1 kg, wet mass 1 kg, carbon content, non-fossil 0.0045566, carbon content, fossil 0.317311
- sheet rolling, copper: 0.001 kg; lognormal variance with pedigree 0.006, pedigree (2,4,2,5,2)
  Proxy for the production of the negative terminals
- tap water: 0 kg; source Dai, Q. 2018; pedigree (1,1,1,1,1)
  Literature. The coolant system is made of ethylene glycol and water in ratio 50:50
  properties: dry mass 0.000337476 kg, water content 2962.17, wet mass 1 kg, carbon content, fossil 0.00178991
  note on carbon content, fossil: Bicarbonate content is 2.93 mol/m3. CO2 content is 0.1 mol/m3 (ecoinvent v2.2 report 8, Tab 93.1).
- glass fibre reinforced plastic, polyamide, injection moulded: 0.00033 kg; source Dai, Q. 2018; lognormal variance with pedigree 0.0046, pedigree (2,3,2,5,2)
  Literature. Plastic insulation layer of the battery pack terminals
  properties: wet mass 1 kg, carbon content, fossil 0.446018, dry mass 1 kg
- electricity, medium voltage: 0 kWh; source Siret, C, 2018; pedigree (1,1,1,1,1)
  Literature. Conversion factor: 1 MJ = 0.277778 kwh
- ethylene glycol: 0.02302 kg; source Dai, Q. 2018; lognormal variance with pedigree 0.0046, pedigree (2,3,2,5,2)
  Literature. The coolant system is made of ethylene glycol and water in ratio 50:50
  properties: heating value, net 23.44 MJ, dry mass 1 kg, carbon content, fossil 0.387097, wet mass 1 kg
- battery module packaging, Li-ion: 0.05718 kg; source Dai, Q. 2018; lognormal variance with pedigree 0.0046, pedigree (2,3,2,5,2)
  Literature.
  properties: carbon content, fossil 0.061671, carbon content, non-fossil 0.0005633, dry mass 1 kg, wet mass 1 kg
- metal working factory: 1.47679e-9 unit; = 1/(40000*300/140*158*50); lognormal variance with pedigree 0.36, pedigree (4,4,5,5,3)
  Calculated value, based on 40000 cells average annual production; 300 operationg days per year; 140 cells per pack; 158 kg pack (Dai et al. 2017); assumption of 50 years lifetime factory
- battery cell, Li-ion, NMC811: 0.71359 kg; lognormal variance with pedigree 0.0046, pedigree (2,3,2,5,2)
  Literature.
  properties: copper content 0.032901, carbon content, non-fossil 0.00192286, wet mass 1 kg, dry mass 1 kg, carbon content, fossil 0.26431
- aluminium, wrought alloy: 0.14283 kg; name Al_input; source Dai, Q. 2018; lognormal variance with pedigree 0.0046, pedigree (2,3,2,5,2)
  Literature. Aluminium used to produce the metalic component of the battery jacket (99.15%) and the battery heating plate (0.85%)
  properties: dry mass 1 kg, wet mass 1 kg
- battery management system, for Li-ion battery: 0.02426 kg; source Dai, Q. 2018; lognormal variance with pedigree 0.0046, pedigree (2,3,2,5,2)
  Literature.
  properties: copper content 0.081, carbon content, fossil 0.257652, carbon content, non-fossil 0.000574587, dry mass 1 kg, wet mass 1 kg
- impact extrusion of aluminium, 1 stroke: 0.141616 kg; = 0.9915* Al_input; lognormal variance with pedigree 0.0046, pedigree (2,3,2,5,2)
  Proxy for the production of the battery jacket, which represents 99.15% of the input aluminium material.
- sheet rolling, aluminium: 0.00121405 kg; = 0.0085*Al_input; lognormal variance with pedigree 0.0046, pedigree (2,3,2,5,2)
  Proxy for the production of the battery heating plate, which represents 0.85% of the input aluminium material.
- injection moulding: 0.00405 kg; lognormal variance with pedigree 0.0046, pedigree (2,3,2,5,2)
  Proxy for the production of the plastic component of the battery jacket
- copper, anode: 0.001 kg; source Dai, Q. 2018; lognormal variance with pedigree 0.0046, pedigree (2,3,2,5,2)
  Literature. Material for the negative terminals
  properties: copper content 0.997, dry mass 1 kg, wet mass 1 kg
- tap water: 0.000463149, 5.57507e-5, 9.21373e-5, 0.00232334, 6.0441e-5, 0.000171924, 0.0198533 kg (7 entries); source Dai, Q. 2018; lognormal variance with pedigree 0.0046, pedigree (2,3,2,5,2)
  Literature. The coolant system is made of ethylene glycol and water in ratio 50:50
- electricity, medium voltage: 5.40996e-6, 1.0374e-6, 2.38203e-5, 1.74157e-5, 8.02911e-5, 3.57022e-5, 0.000116323 kWh (7 entries); source Siret, C, 2018; lognormal variance with pedigree 0.004, pedigree (2,3,2,5,1)
  Literature. Conversion factor: 1 MJ = 0.277778 kwh

## Sampling procedure
From Literature. Data on battery materials have been entirely retrieved from Dai et al. 2018 (see published source field). The bill of materials has been modelled following the battery scheme presented in Dai et al. 2019 (Life cycle analysis of lithium-ion batteries for automotive applications. Batteries, 5(2), 48). The information on the energy consumption for battery assembly come from Siret et al. (2018), which is the report on Product Environmental Footprint Category Rules for High Specific Energy Rechargeable Batteries for Mobile Applications.

## Extrapolations
The dataset is extrapolated from CN data; the uncertainty has been adjusted accordingly.
