# treatment of basic oxygen furnace sludge, residual material landfill

Dataset: EcoSpold 2, unit process
Geography: GLO
Time period: 1987-01-01 to 2021-12-31
Technology level: current
Classification: ISIC rev.4 ecoinvent: 3821:Treatment and disposal of non-hazardous waste
Scenario: Business-as-Usual
System model: Allocation, cut-off by classification
Generated by: Avraam Symeonidis
Database: ecoinvent
isCopyrightProtected: true
accessRestrictedTo: 1

## General comment
Steelmaking produces large quantities of by-products, with around 450-500 kg of by-products produced per tonne of steel. The main components of these are slags (approximately 80%), along with dusts and sludges from air pollution abatement equipment (flue gas scrubbing) and mill scale. The physical or chemical natures of these by-products means that it can be difficult to find possible uses. Hence, most of these by-products have historically been disposed of in landfills. However, new legislation and financial instruments, such as landfill taxes, mean that landfilling is now a costly and undesirable management solution. Instead, considerable efforts have been made to recover by-products for internal reuse or to sell them to other industries to recover value. The fraction of steelmaking by-products that is sent to landfill has drastically reduced. This activity represents the disposal of 'basic oxygen furnace sludge' in a residual material landfill. This type of landfill is designed to receive mostly inorganic (low carbon, <5 w-%) wastes in a physically stable form. Further information is provided in ecoinvent report no. 13, Part II: Landfills – Underground Deposits – Landfarming (Doka, 2009).
References
Doka, G. (2009). Life cycle inventories of waste treatment services. Ecoinvent report no. 13. Swiss Centre for Life Cycle Inventories, Dubendorf, Switzerland.
Inventoried waste contains 100% basic oxygen furnace sludge; .
waste composition (wet, in ppm): H2O 320000; O 20651; H n.a.; C 4000; S 749; N n.a.; P 1130; B n.a.; Cl n.a.; Br n.a.; F n.a.; I n.a.; Ag n.a.; As n.a.; Ba n.a.; Cd 50; Co n.a.; Cr 400; Cu n.a.; Hg n.a.; Mn 1700; Mo n.a.; Ni 100; Pb 1200; Sb n.a.; Se n.a.; Sn n.a.; V n.a.; Zn 10900; Be n.a.; Sc n.a.; Sr n.a.; Ti n.a.; Tl n.a.; W n.a.; Si 5710; Fe 609000; Ca 20200; Al 2240; K n.a.; Mg 1970; Na n.a.;
Share of carbon in waste that is biogenic 0%.
Additional solidification with 0.4 kg of cement. Note that value for oxygen content was calculated by assuming that other elements in the material are present as oxides and that any missing mass (either not reported or not detected) was assumed to be oxygen.

## Included activities start
Activity starts with the reception of the waste.

## Included activities end
Waste-specific short-term emissions to water from leachate. Long-term emissions from landfill to ground water. Expenditures for solidification with cement.

## Technology
Time period based on the range of years of publication from which composition data were taken. Note that the Residual Material Landfill modelling tool was published in 2009.

## Reference product
- basic oxygen furnace sludge: -1 kg; name RP; By-product classification Waste; CPC 39310: Slag, dross, scalings and other waste from the manufacture of iron or steel
  production volume 7.8821e7 kg; name PVRP
    Assuming that 21.7% of basic oxygen furnace sludge is sent for disposal in landfill (worldsteel, 2010).
    References:
    Worldsteel (2010). Steel industry by-products. World Steel Association: Brussels, Belgium.
  property price 0 EUR2005; name RP_price_EUR2005
    Waste products are assigned a price of zero as they are assumed to require further treatment.
  property cadmium content 7.35294e-5
    The value of 'cadmium content' is documented in Turner & Symeonidis, 2020.
    Reference: Turner David & Symeonidis Avraam, 2020, Life cycle inventories of the treatment of iron and steelmaking by-products, ecoinvent association, Zürich, Switzerland
  property lead content 0.00176471
    The value of 'lead content' is documented in Turner & Symeonidis, 2020.
    Reference: Turner David & Symeonidis Avraam, 2020, Life cycle inventories of the treatment of iron and steelmaking by-products, ecoinvent association, Zürich, Switzerland
  property silicon content 0.00839706
    The value of 'silicon content' is documented in Turner & Symeonidis, 2020.
    Reference: Turner David & Symeonidis Avraam, 2020, Life cycle inventories of the treatment of iron and steelmaking by-products, ecoinvent association, Zürich, Switzerland
  property aluminium content 0.00329412
    The value of 'aluminium content' is documented in Turner & Symeonidis, 2020.
    Reference: Turner David & Symeonidis Avraam, 2020, Life cycle inventories of the treatment of iron and steelmaking by-products, ecoinvent association, Zürich, Switzerland
  property calcium content 0.0297059
    The value of 'calcium content' is documented in Turner & Symeonidis, 2020.
    Reference: Turner David & Symeonidis Avraam, 2020, Life cycle inventories of the treatment of iron and steelmaking by-products, ecoinvent association, Zürich, Switzerland
  property iron content 0.895588
    The value of 'iron content' is documented in Turner & Symeonidis, 2020.
    Reference: Turner David & Symeonidis Avraam, 2020, Life cycle inventories of the treatment of iron and steelmaking by-products, ecoinvent association, Zürich, Switzerland
  property phosphorus content 0.00166176
    The value of 'phosphorus content' is documented in Turner & Symeonidis, 2020.
    Reference: Turner David & Symeonidis Avraam, 2020, Life cycle inventories of the treatment of iron and steelmaking by-products, ecoinvent association, Zürich, Switzerland
  property manganese content 0.0025
    The value of 'manganese content' is documented in Turner & Symeonidis, 2020.
    Reference: Turner David & Symeonidis Avraam, 2020, Life cycle inventories of the treatment of iron and steelmaking by-products, ecoinvent association, Zürich, Switzerland
  property carbon content, fossil 0.00588235
    The value of 'carbon content, fossil' is documented in Turner & Symeonidis, 2020.
    Reference: Turner David & Symeonidis Avraam, 2020, Life cycle inventories of the treatment of iron and steelmaking by-products, ecoinvent association, Zürich, Switzerland
  property magnesium content 0.00289706
    The value of 'magnesium content' is documented in Turner & Symeonidis, 2020.
    Reference: Turner David & Symeonidis Avraam, 2020, Life cycle inventories of the treatment of iron and steelmaking by-products, ecoinvent association, Zürich, Switzerland
  property zinc content 0.0160294
    The value of 'zinc content' is documented in Turner & Symeonidis, 2020.
    Reference: Turner David & Symeonidis Avraam, 2020, Life cycle inventories of the treatment of iron and steelmaking by-products, ecoinvent association, Zürich, Switzerland
  property sulfur content 0.00110147
    The value of 'sulfur content' is documented in Turner & Symeonidis, 2020.
    Reference: Turner David & Symeonidis Avraam, 2020, Life cycle inventories of the treatment of iron and steelmaking by-products, ecoinvent association, Zürich, Switzerland
  property oxygen content 0.0303691
    The value of 'oxygen content' is documented in Turner & Symeonidis, 2020.
    Reference: Turner David & Symeonidis Avraam, 2020, Life cycle inventories of the treatment of iron and steelmaking by-products, ecoinvent association, Zürich, Switzerland
  property nickel content 0.000147059
    The value of 'nickel content' is documented in Turner & Symeonidis, 2020.
    Reference: Turner David & Symeonidis Avraam, 2020, Life cycle inventories of the treatment of iron and steelmaking by-products, ecoinvent association, Zürich, Switzerland
  property carbon content, non-fossil 0
    The value of 'carbon content, non-fossil' is documented in Turner & Symeonidis, 2020.
    Reference: Turner David & Symeonidis Avraam, 2020, Life cycle inventories of the treatment of iron and steelmaking by-products, ecoinvent association, Zürich, Switzerland
  property chromium content 0.000588235
    The value of 'chromium content' is documented in Turner & Symeonidis, 2020.
    Reference: Turner David & Symeonidis Avraam, 2020, Life cycle inventories of the treatment of iron and steelmaking by-products, ecoinvent association, Zürich, Switzerland
  property heating value, net 0 MJ
    Non combustible products are assumed to have an LHV equal to zero (0).
  property carbon content 0.00588235
    carbon content on a dry matter basis (reserved; not for manual entry)
  properties: water content 0.470588, wet mass 1 kg, water in wet mass 0.32 kg, dry mass 0.68 kg, carbon allocation 0.004 kg

## Inputs from technosphere
- waste cement, hydrated: 0 kg; name BP; pedigree (1,1,1,1,1)
  Hydrated cement for solidification of residual material waste. Uncertainty in mass from solidification recipe.
  production volume 0 kg
    Calculated based on the production volume of the reference product.
  property price 0 EUR2005; name BP_price_EUR2005
  properties: dry mass 1 kg, wet mass 1 kg
- cement, unspecified: 0.4 kg; lognormal variance with pedigree 0.091084, pedigree (1,1,5,5,4)
  Cement for solidification of residual material waste. Uncertainty in mass from solidification recipe.
  properties: wet mass 1 kg, dry mass 1 kg
- residual material landfill: 2.08333e-9 unit; lognormal variance with pedigree 0.082, pedigree (1,1,5,5,4)
  demands per kilogram waste. uncertainty is heeded in the module
- process-specific burdens, residual material landfill: 0 kg; pedigree (1,1,1,1,1)
  demands per kilogram waste. uncertainty is heeded in the module
- waste cement, hydrated: -0.280494, -0.00841689, -0.71109 kg (3 entries); lognormal variance with pedigree 0.091084, pedigree (1,1,5,5,4)
  (same comment as for waste cement, hydrated)
  production volume 7.8821e7 kg
- process-specific burdens, residual material landfill: 0.280494, 0.00841689, 0.71109 kg (3 entries); lognormal variance with pedigree 0.082, pedigree (1,1,5,5,4)
  demands per kilogram waste. uncertainty is heeded in the module

## Emissions to nature
- Chromium VI [water, ground-, long-term]: 7.5955e-5 kg; lognormal variance with pedigree 0.866624, pedigree (1,1,5,5,4)
  uncertainty is calculated from uncertainties in waste composition and transfer coefficients in incinerator and landfills.
- TOC, Total Organic Carbon [water, ground-, long-term]: 0.00258501 kg; lognormal variance with pedigree 0.609458, pedigree (1,1,5,5,4)
  (same comment as for Chromium VI)
- BOD5, Biological Oxygen Demand [water, ground-, long-term]: 0.00213684 kg; lognormal variance with pedigree 0.609458, pedigree (1,1,5,5,4)
  (same comment as for Chromium VI)
- Zinc, ion [water, ground-, long-term]: 0.00013359 kg; lognormal variance with pedigree 5.28294, pedigree (1,1,5,5,4)
  (same comment as for Chromium VI)
- Aluminium [water, surface water]: 1.1101e-6 kg; lognormal variance with pedigree 1.37975, pedigree (1,1,5,5,4)
  uncertainty is calculated from uncertainties in waste composition and transfer coefficients in residual landfill
- Sulfate [water, ground-, long-term]: 0.00200592 kg; lognormal variance with pedigree 0.778225, pedigree (1,1,5,5,4)
  (same comment as for Chromium VI)
- Iron, ion [water, surface water]: 5.09564e-6 kg; lognormal variance with pedigree 1.37268, pedigree (1,1,5,5,4)
  (same comment as for Aluminium)
- Manganese [water, ground-, long-term]: 1.40425e-5 kg; lognormal variance with pedigree 6.42188, pedigree (1,1,5,5,4)
  (same comment as for Chromium VI)
- DOC, Dissolved Organic Carbon [water, ground-, long-term]: 0.00258501 kg; lognormal variance with pedigree 0.609458, pedigree (1,1,5,5,4)
  (same comment as for Chromium VI)
- TOC, Total Organic Carbon [water, surface water]: 4.31554e-6 kg; lognormal variance with pedigree 1.20487, pedigree (1,1,5,5,4)
  (same comment as for Aluminium)
- Chromium VI [water, surface water]: 2.4045e-5 kg; lognormal variance with pedigree 1.02768, pedigree (1,1,5,5,4)
  (same comment as for Aluminium)
- Nickel, ion [water, ground-, long-term]: 3.62037e-5 kg; lognormal variance with pedigree 1.30204, pedigree (1,1,5,5,4)
  (same comment as for Chromium VI)
- Silicon [water, surface water]: 1.28415e-5 kg; lognormal variance with pedigree 1.06627, pedigree (1,1,5,5,4)
  (same comment as for Aluminium)
- Magnesium [water, ground-, long-term]: 0.000223837 kg; lognormal variance with pedigree 1.83429, pedigree (1,1,5,5,4)
  (same comment as for Chromium VI)
- Cadmium, ion [water, ground-, long-term]: 3.39444e-7 kg; lognormal variance with pedigree 7.36749, pedigree (1,1,5,5,4)
  (same comment as for Chromium VI)
- Zinc, ion [water, surface water]: 2.23022e-7 kg; lognormal variance with pedigree 1.60462, pedigree (1,1,5,5,4)
  (same comment as for Aluminium)
- Calcium, ion [water, ground-, long-term]: 0.00182524 kg; lognormal variance with pedigree 1.81213, pedigree (1,1,5,5,4)
  (same comment as for Chromium VI)
- Manganese [water, surface water]: 2.34432e-8 kg; lognormal variance with pedigree 1.88833, pedigree (1,1,5,5,4)
  (same comment as for Aluminium)
- Calcium, ion [water, surface water]: 3.04714e-6 kg; lognormal variance with pedigree 1.26853, pedigree (1,1,5,5,4)
  (same comment as for Aluminium)
- Lead [water, surface water]: 1.03915e-8 kg; lognormal variance with pedigree 1.99465, pedigree (1,1,5,5,4)
  (same comment as for Aluminium)
- BOD5, Biological Oxygen Demand [water, surface water]: 3.56734e-6 kg; lognormal variance with pedigree 1.20487, pedigree (1,1,5,5,4)
  (same comment as for Aluminium)
- Magnesium [water, surface water]: 3.73684e-7 kg; lognormal variance with pedigree 1.52266, pedigree (1,1,5,5,4)
  (same comment as for Aluminium)
- COD, Chemical Oxygen Demand [water, surface water]: 1.0906e-5 kg; lognormal variance with pedigree 1.20487, pedigree (1,1,5,5,4)
  (same comment as for Aluminium)
- Phosphate [water, ground-, long-term]: 0.000774066 kg; lognormal variance with pedigree 1.28479, pedigree (1,1,5,5,4)
  (same comment as for Chromium VI)
- Cadmium, ion [water, surface water]: 5.66685e-10 kg; lognormal variance with pedigree 2.37969, pedigree (1,1,5,5,4)
  (same comment as for Aluminium)
- Phosphate [water, surface water]: 1.29226e-6 kg; lognormal variance with pedigree 1.50533, pedigree (1,1,5,5,4)
  (same comment as for Aluminium)
- COD, Chemical Oxygen Demand [water, ground-, long-term]: 0.00653271 kg; lognormal variance with pedigree 0.609458, pedigree (1,1,5,5,4)
  (same comment as for Chromium VI)
- Silicon [water, ground-, long-term]: 0.00569716 kg; lognormal variance with pedigree 0.517562, pedigree (1,1,5,5,4)
  (same comment as for Chromium VI)
- Aluminium [water, ground-, long-term]: 0.000664949 kg; lognormal variance with pedigree 1.00405, pedigree (1,1,5,5,4)
  (same comment as for Chromium VI)
- Sulfate [water, surface water]: 0.000241077 kg; lognormal variance with pedigree 0.891484, pedigree (1,1,5,5,4)
  (same comment as for Aluminium)
- Iron, ion [water, ground-, long-term]: 0.00305229 kg; lognormal variance with pedigree 7.10109, pedigree (1,1,5,5,4)
  (same comment as for Chromium VI)
- Lead [water, ground-, long-term]: 6.22453e-6 kg; lognormal variance with pedigree 7.63692, pedigree (1,1,5,5,4)
  (same comment as for Chromium VI)
- DOC, Dissolved Organic Carbon [water, surface water]: 4.31554e-6 kg; lognormal variance with pedigree 1.20487, pedigree (1,1,5,5,4)
  (same comment as for Aluminium)
- Nickel, ion [water, surface water]: 6.04403e-8 kg; lognormal variance with pedigree 1.76244, pedigree (1,1,5,5,4)
  (same comment as for Aluminium)

## Sampling procedure
For more details about sampling procedures, refer to: Turner, D. & Symeonidis, A. (2020). Life cycle inventories of the treatment of iron and steelmaking by-products, ecoinvent association, Zürich, Switzerland.

## Extrapolations
This dataset has been extrapolated from year 2017 to the year of the calculation (2021). The uncertainty has been adjusted accordingly.
