# uranium hexafluoride production

Dataset: EcoSpold 2, unit process
Geography: US
Time period: 1982-01-01 to 2021-12-31
Technology level: current
Classification: EcoSpold01Categories: nuclear power/production
Classification: ISIC rev.4 ecoinvent: 2011:Manufacture of basic chemicals
Tags: ConvertedDataset
Scenario: Business-as-Usual
System model: Allocation, cut-off by classification
Generated by: Roberto Dones
Published in: Dones, R. 2007
Database: ecoinvent
isCopyrightProtected: true
accessRestrictedTo: 1

## General comment
Data are from old but accurate references. The wet process for converting yellowcake U3O8 to uraniumhexafloride UF6 is described. Data for the Sequoyah facility are used, although it has been shut down at the end of 1992, because the wet process is the mostly used worldwide and because of data availability. Particles have been assumed to be between 2.5 and 10 micrometer. Radioactive solid waste has been accurately accounted. Radioactive waste from decommissioning is taken from an old source, which does not differenciate between dry and wet process, and may not reflect current conditions. The non radioactive solid waste given from the used reference is interpreted as ashes, because most probably incineration occurs internally in the factory. However, the consideration of this waste species as “average incineration residue" should be understood as a guess done to cope with missing information on the specific composition.
[This dataset was already contained in the ecoinvent database version 2. It was not individually updated during the transfer to ecoinvent version 3. Life Cycle Impact Assessment results may still have changed, as they are affected by changes in the supply chain, i.e. in other datasets. This dataset was generated following the ecoinvent quality guidelines for version 2. It may have been subject to central changes described in the ecoinvent version 3 change report (http://www.ecoinvent.org/database/ecoinvent-version-3/reports-of-changes/), and the results of the central updates were reviewed extensively. The changes added e.g. consistent water flows and other information throughout the database. The documentation of this dataset can be found in the ecoinvent reports of version 2, which are still available via the ecoinvent website. The change report linked above covers all central changes that were made during the conversion process.]

## Included activities end
The module includes: input of yellowcake U3O8 from uranium milling; electricity and natural gas used for operation; chemicals for the wet process; water use; cement assumed to be used for conditioning of contaminated sludge; transport requirements of operation materials, industrial wastes, and contaminated waste from operation and decommissioning. Radioactive and non-radioactive emissions to air and to water from the operation are also included. The infrastructure requirements are accounted for, although construction and operation data partially refer to different plants rather than to one single unit.

## Geography
US data.

## Technology
Effluents correspond to operational characteristics in 1980s.

## Parameters
- fraction, water, decarbonised, to air: 0.3875 dimensionless; name fraction_WDC_to_air; = fraction_CW_to_air; lognormal variance with pedigree 0.092025, pedigree (4,4,3,2,4)
  Calculated value. See comments in the other parametres present in this dataset. Decarbonised water is considered to be always used as cooling water, thus cooling water fractions to air are applied to all carbonised water input flows to calculate the amount of water consumed in the processes.
- fraction, cooling water, recirculating system, to air: 0.771 dimensionless; name fraction_CW_R_to_air; lognormal variance with pedigree 0.0413, pedigree (2,3,1,3,1)
  Calculated based on literature value (Scown, C.D., 2011, Water Footprint of U.S. Transportation Fuels and supplying information of the article) (Vionnet, S., Quantis Water Database - Technical Report, 2012).
- fraction, cooling water, to air: 0.3875 dimensionless; name fraction_CW_to_air; = (0.5*fraction_CW_OT_to_air)+(0.5*fraction_CW_R_to_air); lognormal variance with pedigree 0.092025, pedigree (4,4,3,2,4)
  Calculated value based on literature value (see comments of the other parametres present in this dataset) and expert opinion. In the case when no industry/literature data are available about the type of cooling or directly fraction, cooling water, to air specific for the process a default assumption is applied. It is assumed that the once-through cooling system is used in 50% of all cases and recirculating system is used in another 50% of all cases.
- fraction, cooling water, cooling pond system, to air: 0.032 dimensionless; name fraction_CW_CP_to_air; lognormal variance with pedigree 0.0413, pedigree (2,3,1,3,1)
  (same comment as for fraction, cooling water, recirculating system, to air)
- fraction, cooling water, once-through system, to air: 0.004 dimensionless; name fraction_CW_OT_to_air; lognormal variance with pedigree 0.0413, pedigree (2,3,1,3,1)
  (same comment as for fraction, cooling water, recirculating system, to air)

## Reference product
- uranium hexafluoride: 1 kg; CPC 33620: Uranium enriched in U235 and its compounds; plutonium and its compounds; alloys, dispersions, ceramic products[…]; By-product classification allocatable product
  EcoSpold01Location=US
  production volume 1.11727e7 kg
    1.48 kg UF6 per kg U in global mine production (http://www.world-nuclear.org/info/inf23.html), after an assumed 5% loss in yellowcake production. US capacity is 19% of global conversion capacity (http://www.wise-uranium.org/efac.html#CONV) at 87% capacity utilisation (capacity of ConverDyn was 14 million kg in 2005 ; http://www.converdyn.com/metropolis/mtwhistory.html)
  property price 22.9 EUR2005
    Using price 2005 of "Short, Medium, and Long-Term Contracts (Weighted-Average Price)" in http://www.eia.gov/cneaf/nuclear/umar/summarytable1.html and including price increase.
  property carbon content 0
    carbon content on a dry matter basis (reserved; not for manual entry)
  properties: water in wet mass 0 kg, dry mass 1 kg, water content 0, carbon content, non-fossil 0, carbon content, fossil 0, wet mass 1 kg, carbon allocation 0 kg

## Inputs from technosphere
- chemical, inorganic: 0.052 kg; lognormal variance with pedigree 0.08, pedigree (1,1,5,1,1)
  EcoSpold01Location=GLO
  own estimation
  properties: dry mass 1 kg, carbon content, fossil 0.003, wet mass 1 kg
  note on carbon content, fossil: This dataset is an unweighted average of 20 inorganic substances (listed in Tab 88.1, ecoinvent v2.2 report 8, part II), being part of the top100 chemicals included in this database. The C-content has also been calculated as an unweighted average of the C content of the substances composing this dataset.
- low level radioactive waste: -0.00061 m3; lognormal variance with pedigree 0.08, pedigree (1,1,5,1,1)
  own estimation
  EcoSpold01Location=CH
  production volume 6815.37 m3
    Calculated from the production volume of uranium hexafluoride in proportion to the respective output amounts.
  properties: dry mass 2500 kg, wet mass 2500 kg
- heat, district or industrial, natural gas: 665 MJ; lognormal variance with pedigree 0.16, pedigree (1,1,5,1,1)
  own estimation
  EcoSpold01Location=RER
  properties: heating value, net 1 MJ
- ammonia, anhydrous, liquid: 0.25 kg; lognormal variance with pedigree 0.08, pedigree (1,1,5,1,1)
  own estimation
  EcoSpold01Location=RER
  properties: dry mass 1 kg, wet mass 1 kg
- uranium, in yellowcake: 1 kg; lognormal variance with pedigree 0.04, pedigree (1,1,5,1,1)
  range of data
  EcoSpold01Location=RNA
  properties: dry mass 1 kg, wet mass 1 kg
- nitric acid, without water, in 50% solution state: 0.9 kg; lognormal variance with pedigree 0.08, pedigree (1,1,5,1,1)
  EcoSpold01Location=RER
  own estimation
  properties: dry mass 1 kg, wet mass 1 kg
- quicklime, milled, loose: 0.5 kg; lognormal variance with pedigree 0.08, pedigree (1,1,5,1,1)
  own estimation
  EcoSpold01Location=CH
  properties: water content 0.010101, dry mass 0.99 kg, wet mass 1 kg
- uranium conversion facility: 3.13e-9 unit; lognormal variance with pedigree 0.05, pedigree (1,1,5,1,1)
  own estimation;activityLink introduced to establish a direct link to the corresponding regional supply of this product
  EcoSpold01Location=US
- water, decarbonised: 500 kg; name water_decarbonised_input; lognormal variance with pedigree 0.08, pedigree (1,1,5,1,1)
  EcoSpold01Location=RER
  own estimation
  properties: wet mass 1 kg
- cement, unspecified: 0.81 kg; lognormal variance with pedigree 0.16, pedigree (1,1,5,1,1)
  own estimation
  EcoSpold01Location=CH
  properties: wet mass 1 kg, dry mass 1 kg
- average incineration residue: -0.17 kg; lognormal variance with pedigree 0.05, pedigree (1,1,5,1,1)
  EcoSpold01Location=CH
  from interval of available data
  production volume 1.89937e6 kg
    (same comment as for low level radioactive waste)
  properties: carbon content, fossil 0.0325466, dry mass 1 kg, carbon content, non-fossil 0.0511208, wet mass 1 kg
  note on carbon content, fossil: Tab A.1, ecoinvent v2.2 report 13_I. It is considered that 61.1% of the C has a biogenic origin
- hydrogen fluoride: 0.59 kg; lognormal variance with pedigree 0.08, pedigree (1,1,5,1,1)
  own estimation
  EcoSpold01Location=GLO
  properties: heating value, net 6.06 MJ, wet mass 1 kg, dry mass 1 kg
- electricity, medium voltage: 10.3 kWh; lognormal variance with pedigree 0.16, pedigree (1,1,5,1,1)
  EcoSpold01Location=UCTE
  own estimation
- chemical, organic: 0.03 kg; lognormal variance with pedigree 0.08, pedigree (1,1,5,1,1)
  own estimation
  EcoSpold01Location=GLO
  properties: carbon content, fossil 0.628, dry mass 1 kg, wet mass 1 kg, heating value, net 19.03 MJ
  note on carbon content, fossil: This dataset is an unweighted average of 20 organic substances (listed in Tab 88.1, ecoinvent v2.2 report 8, part II), being part of the top100 chemicals included in this database. The C-content has also been calculated as an unweighted average of the C content of the substances composing this dataset.

## Emissions to nature
- COD, Chemical Oxygen Demand [water, surface water]: 0.0017 kg; lognormal variance with pedigree 0.05, pedigree (1,1,5,1,1)
  own estimation
- Protactinium-234 [water, surface water]: 5 kBq; lognormal variance with pedigree 0.34, pedigree (1,1,5,1,1)
  own estimation, uncertainty on radioactivity releases
- Fluoride [water, surface water]: 0.00027 kg; lognormal variance with pedigree 0.05, pedigree (1,1,5,1,1)
  own estimation
- Sulfate [water, surface water]: 0.0028 kg; lognormal variance with pedigree 0.05, pedigree (1,1,5,1,1)
  own estimation
- Nitrogen oxides [air, non-urban air or from high stacks]: 0.025 kg; lognormal variance with pedigree 0.05, pedigree (1,1,5,1,1)
  own estimation
- Uranium-234 [water, surface water]: 5.4 kBq; lognormal variance with pedigree 0.69, pedigree (1,1,5,1,1)
  based on ranges from North American literature
- Thorium-230 [air, non-urban air or from high stacks]: 0.00022 kBq; lognormal variance with pedigree 0.69, pedigree (1,1,5,1,1)
  based on ranges from North American literature
- Particulates, > 2.5 um, and < 10um [air, non-urban air or from high stacks]: 0.00073 kg; lognormal variance with pedigree 0.07, pedigree (1,1,5,1,1)
  own estimation
- Chloride [water, surface water]: 0.0087 kg; lognormal variance with pedigree 0.05, pedigree (1,1,5,1,1)
  own estimation
- Sodium, ion [water, surface water]: 0.0061 kg; lognormal variance with pedigree 0.05, pedigree (1,1,5,1,1)
  own estimation
- Iron, ion [water, surface water]: 0.00017 kg; lognormal variance with pedigree 0.05, pedigree (1,1,5,1,1)
  own estimation
- Titanium, ion [water, surface water]: 1.7e-6 kg; lognormal variance with pedigree 0.05, pedigree (1,1,5,1,1)
  own estimation
- Radium-226 [air, non-urban air or from high stacks]: 3.7e-5 kBq; lognormal variance with pedigree 0.34, pedigree (1,1,5,1,1)
  own estimation, uncertainty on radioactivity releases
- Hydrogen fluoride [air, non-urban air or from high stacks]: 0.00027 kg; lognormal variance with pedigree 0.05, pedigree (1,1,5,1,1)
  own estimation
- Calcium, ion [water, surface water]: 0.0083 kg; lognormal variance with pedigree 0.05, pedigree (1,1,5,1,1)
  own estimation
- Uranium-238 [air, non-urban air or from high stacks]: 0.27 kBq; lognormal variance with pedigree 0.34, pedigree (1,1,5,1,1)
  based on ranges from North American literature
- Uranium-234 [air, non-urban air or from high stacks]: 0.25 kBq; lognormal variance with pedigree 0.34, pedigree (1,1,5,1,1)
  based on ranges from North American literature
- NMVOC, non-methane volatile organic compounds, unspecified origin [air, non-urban air or from high stacks]: 0.00012 kg; lognormal variance with pedigree 0.05, pedigree (1,1,5,1,1)
  own estimation
- Hexane [air, non-urban air or from high stacks]: 0.019 kg
- DOC, Dissolved Organic Carbon [water, surface water]: 0.00017 kg; lognormal variance with pedigree 0.05, pedigree (1,1,5,1,1)
  Calculated as equal to TOC.
- Tin, ion [water, surface water]: 6.9e-6 kg; lognormal variance with pedigree 0.05, pedigree (1,1,5,1,1)
  own estimation
- Potassium, ion [water, surface water]: 0.00017 kg; lognormal variance with pedigree 0.05, pedigree (1,1,5,1,1)
  own estimation
- Uranium-235 [water, surface water]: 0.2 kBq; lognormal variance with pedigree 0.69, pedigree (1,1,5,1,1)
  based on ranges from North American literature
- Magnesium [water, surface water]: 0.00035 kg; lognormal variance with pedigree 0.05, pedigree (1,1,5,1,1)
  own estimation
- Mercury [water, surface water]: 1.7e-7 kg; lognormal variance with pedigree 0.05, pedigree (1,1,5,1,1)
  own estimation
- TOC, Total Organic Carbon [water, surface water]: 0.00017 kg; lognormal variance with pedigree 0.05, pedigree (1,1,5,1,1)
  own estimation
- Protactinium-234 [air, non-urban air or from high stacks]: 0.27 kBq; lognormal variance with pedigree 0.34, pedigree (1,1,5,1,1)
  own estimation, uncertainty on radioactivity releases
- Uranium-235 [air, non-urban air or from high stacks]: 0.013 kBq; lognormal variance with pedigree 0.34, pedigree (1,1,5,1,1)
  based on ranges from North American literature
- Carbon monoxide, fossil [air, non-urban air or from high stacks]: 0.00069 kg; lognormal variance with pedigree 0.05, pedigree (1,1,5,1,1)
  own estimation
- Thorium-230 [water, surface water]: 0.0012 kBq; lognormal variance with pedigree 0.34, pedigree (1,1,5,1,1)
  own estimation, uncertainty on radioactivity releases
- Nitrate [water, surface water]: 0.00061 kg; lognormal variance with pedigree 0.05, pedigree (1,1,5,1,1)
  own estimation
- Aluminium [water, surface water]: 6.9e-5 kg; lognormal variance with pedigree 0.05, pedigree (1,1,5,1,1)
  own estimation
- Suspended solids, unspecified [water, surface water]: 0.0035 kg; lognormal variance with pedigree 0.05, pedigree (1,1,5,1,1)
  own estimation
- Sulfide [water, surface water]: 1.7e-5 kg; lognormal variance with pedigree 0.05, pedigree (1,1,5,1,1)
  own estimation
- Zinc, ion [water, surface water]: 6.9e-6 kg; lognormal variance with pedigree 0.05, pedigree (1,1,5,1,1)
  own estimation
- Thorium-234 [air, non-urban air or from high stacks]: 0.27 kBq; lognormal variance with pedigree 0.34, pedigree (1,1,5,1,1)
  based on ranges from North American literature
- Lead [water, surface water]: 1.7e-6 kg; lognormal variance with pedigree 0.05, pedigree (1,1,5,1,1)
  own estimation
- Phosphate [water, surface water]: 5.2e-5 kg; lognormal variance with pedigree 0.05, pedigree (1,1,5,1,1)
  own estimation
- Uranium-238 [water, surface water]: 5.4 kBq; lognormal variance with pedigree 0.69, pedigree (1,1,5,1,1)
  based on ranges from North American literature
- Chromium, ion [water, surface water]: 1e-5 kg; lognormal variance with pedigree 0.05, pedigree (1,1,5,1,1)
  own estimation
- Water [air, unspecified]: 0.19375 m3; name water_to_air_unspecified; = (water_decarbonised_input/1000*fraction_WDC_to_air); lognormal variance with pedigree 0.0807, pedigree (2,2,5,1,1)
  Calculated value based on literature values and expert opinion. See comments in the parametres' comment field.
  property fraction, origin: unspecified 0; name fraction_origin_unspecified
  property fraction, origin: fresh water 1; name fraction_origin_fresh_water
  property fraction, origin: salt water 0; name fraction_origin_salt_water
- Barium [water, surface water]: 2.2e-5 kg; lognormal variance with pedigree 0.05, pedigree (1,1,5,1,1)
  own estimation
- Radium-226 [water, surface water]: 0.0014 kBq; lognormal variance with pedigree 0.25, pedigree (1,1,5,1,1)
  based on ranges from North American literature
- Water [water, unspecified]: 0.30625 m3; name water_to_water_unspecified; = (water_decarbonised_input/1000)*(1-fraction_WDC_to_air); lognormal variance with pedigree 0.0807, pedigree (2,2,5,1,1)
  (same comment as for Water)
  property fraction, origin: salt water 0; name fraction_origin_salt_water_Ww
  property fraction, origin: unspecified 0; name fraction_origin_unspecified_Ww
  property fraction, origin: fresh water 1; name fraction_origin_fresh_water_Ww
  property carbon content, non-fossil 0; name C_content_non_fossil
  property wet mass 1000 kg; name WM
  property carbon content, fossil 0; name C_content_fossil
  property dry mass 0 kg; name DM
  property water in wet mass 1000 kg; name WWM
- Manganese [water, surface water]: 0.00022 kg; lognormal variance with pedigree 0.05, pedigree (1,1,5,1,1)
  own estimation
- BOD5, Biological Oxygen Demand [water, surface water]: 0.00035 kg; lognormal variance with pedigree 0.05, pedigree (1,1,5,1,1)
  own estimation
- Sulfur dioxide [air, non-urban air or from high stacks]: 0.0055 kg; lognormal variance with pedigree 0.05, pedigree (1,1,5,1,1)
  own estimation
- Thorium-234 [water, surface water]: 5 kBq; lognormal variance with pedigree 0.34, pedigree (1,1,5,1,1)
  own estimation, uncertainty on radioactivity releases
- Cadmium, ion [water, surface water]: 1.7e-6 kg; lognormal variance with pedigree 0.05, pedigree (1,1,5,1,1)
  own estimation
- Copper, ion [water, surface water]: 1.6e-5 kg; lognormal variance with pedigree 0.05, pedigree (1,1,5,1,1)
  own estimation
- Ammonium, ion [water, surface water]: 0.00017 kg; lognormal variance with pedigree 0.05, pedigree (1,1,5,1,1)
  own estimation

## Sampling procedure
Literature

## Extrapolations
This dataset has been extrapolated from year 2000 to the year of the calculation (2021). The uncertainty has been adjusted accordingly.

## Review by Roberto Dones 2003-08-19
passed
for final calculation August 2003
