# treatment of basic oxygen furnace slag, residual material landfill

Dataset: EcoSpold 2, unit process
Geography: GLO
Time period: 1987-01-01 to 2021-12-31
Technology level: current
Classification: ISIC rev.4 ecoinvent: 3821:Treatment and disposal of non-hazardous waste
Scenario: Business-as-Usual
System model: Allocation, cut-off by classification
Generated by: Avraam Symeonidis
Database: ecoinvent
isCopyrightProtected: true
accessRestrictedTo: 1

## General comment
Steelmaking produces large quantities of by-products, with around 450-500 kg of by-products produced per tonne of steel. The main components of these are slags (approximately 80%), along with dusts and sludges from air pollution abatement equipment (flue gas scrubbing) and mill scale. The physical or chemical natures of these by-products means that it can be difficult to find possible uses. Hence, most of these by-products have historically been disposed of in landfills. However, new legislation and financial instruments, such as landfill taxes, mean that landfilling is now a costly and undesirable management solution. Instead, considerable efforts have been made to recover by-products for internal reuse or to sell them to other industries to recover value. The fraction of steelmaking by-products that is sent to landfill has drastically reduced. This activity represents the disposal of 'basic oxygen furnace slag' in a residual material landfill. This type of landfill is designed to receive mostly inorganic (low carbon, <5 w-%) wastes in a physically stable form. Further information is provided in ecoinvent report no. 13, Part II: Landfills – Underground Deposits – Landfarming (Doka, 2009).
References
Doka, G. (2009). Life cycle inventories of waste treatment services. Ecoinvent report no. 13. Swiss Centre for Life Cycle Inventories, Dubendorf, Switzerland.
Inventoried waste contains 100% basic oxygen furnace slag; .
waste composition (wet, in ppm): H2O 5000; O 329260; H n.a.; C 3420; S 1080; N n.a.; P 10200; B n.a.; Cl 100; Br n.a.; F n.a.; I n.a.; Ag 9.1; As 1.9; Ba 75; Cd 2.5; Co 3.8; Cr 2360; Cu 15.5; Hg 0.1; Mn 25100; Mo 20.7; Ni 15; Pb 50; Sb 3.3; Se 15; Sn 6.5; V 5540; Zn 41.3; Be 0.5; Sc n.a.; Sr n.a.; Ti 4500; Tl 7.2; W n.a.; Si 60000; Fe 182000; Ca 325000; Al 10100; K 833; Mg 35000; Na 235;
Share of carbon in waste that is biogenic 0%.
Additional solidification with 0.4 kg of cement. Note that value for oxygen content was calculated by assuming that other elements in the material are present as oxides and that any missing mass (either not reported or not detected) was assumed to be oxygen.

## Included activities start
Activity starts with the reception of the waste.

## Included activities end
Waste-specific short-term emissions to water from leachate. Long-term emissions from landfill to ground water. Expenditures for solidification with cement.

## Technology
Time period based on the range of years of publication from which composition data were taken. Note that the Residual Material Landfill modelling tool was published in 2009.

## Reference product
- basic oxygen furnace slag: -1 kg; name RP; By-product classification Waste; CPC 39310: Slag, dross, scalings and other waste from the manufacture of iron or steel
  production volume 9.91342e10 kg; name PVRP
    Assuming that 78.9% of basic oxygen furnace slag is sent for disposal in landfill (worldsteel, 2010).
    References:
    Worldsteel (2010). Steel industry by-products. World Steel Association: Brussels, Belgium.
  property carbon content, non-fossil 0
    The value of 'carbon content, non-fossil' is documented in Turner & Symeonidis, 2020.
    Reference: Turner David & Symeonidis Avraam, 2020, Life cycle inventories of the treatment of iron and steelmaking by-products, ecoinvent association, Zürich, Switzerland
  property lead content 5.02513e-5
    The value of 'lead content' is documented in Turner & Symeonidis, 2020.
    Reference: Turner David & Symeonidis Avraam, 2020, Life cycle inventories of the treatment of iron and steelmaking by-products, ecoinvent association, Zürich, Switzerland
  property chromium content 0.00237186
    The value of 'chromium content' is documented in Turner & Symeonidis, 2020.
    Reference: Turner David & Symeonidis Avraam, 2020, Life cycle inventories of the treatment of iron and steelmaking by-products, ecoinvent association, Zürich, Switzerland
  property molybdenum content 2.0804e-5
    The value of 'molybdenum content' is documented in Turner & Symeonidis, 2020.
    Reference: Turner David & Symeonidis Avraam, 2020, Life cycle inventories of the treatment of iron and steelmaking by-products, ecoinvent association, Zürich, Switzerland
  property iron content 0.182915
    The value of 'iron content' is documented in Turner & Symeonidis, 2020.
    Reference: Turner David & Symeonidis Avraam, 2020, Life cycle inventories of the treatment of iron and steelmaking by-products, ecoinvent association, Zürich, Switzerland
  property calcium content 0.326633
    The value of 'calcium content' is documented in Turner & Symeonidis, 2020.
    Reference: Turner David & Symeonidis Avraam, 2020, Life cycle inventories of the treatment of iron and steelmaking by-products, ecoinvent association, Zürich, Switzerland
  property sulfur content 0.00108543
    The value of 'sulfur content' is documented in Turner & Symeonidis, 2020.
    Reference: Turner David & Symeonidis Avraam, 2020, Life cycle inventories of the treatment of iron and steelmaking by-products, ecoinvent association, Zürich, Switzerland
  property nickel content 1.50754e-5
    The value of 'nickel content' is documented in Turner & Symeonidis, 2020.
    Reference: Turner David & Symeonidis Avraam, 2020, Life cycle inventories of the treatment of iron and steelmaking by-products, ecoinvent association, Zürich, Switzerland
  property zinc content 4.15075e-5
    The value of 'zinc content' is documented in Turner & Symeonidis, 2020.
    Reference: Turner David & Symeonidis Avraam, 2020, Life cycle inventories of the treatment of iron and steelmaking by-products, ecoinvent association, Zürich, Switzerland
  property carbon content, fossil 0.00343719
    The value of 'carbon content, fossil' is documented in Turner & Symeonidis, 2020.
    Reference: Turner David & Symeonidis Avraam, 2020, Life cycle inventories of the treatment of iron and steelmaking by-products, ecoinvent association, Zürich, Switzerland
  property phosphorus content 0.0102513
    The value of 'phosphorus content' is documented in Turner & Symeonidis, 2020.
    Reference: Turner David & Symeonidis Avraam, 2020, Life cycle inventories of the treatment of iron and steelmaking by-products, ecoinvent association, Zürich, Switzerland
  property copper content 1.55779e-5
    The value of 'copper content' is documented in Turner & Symeonidis, 2020.
    Reference: Turner David & Symeonidis Avraam, 2020, Life cycle inventories of the treatment of iron and steelmaking by-products, ecoinvent association, Zürich, Switzerland
  property magnesium content 0.0351759
    The value of 'magnesium content' is documented in Turner & Symeonidis, 2020.
    Reference: Turner David & Symeonidis Avraam, 2020, Life cycle inventories of the treatment of iron and steelmaking by-products, ecoinvent association, Zürich, Switzerland
  property vanadium content 0.00556784
    The value of 'vanadium content' is documented in Turner & Symeonidis, 2020.
    Reference: Turner David & Symeonidis Avraam, 2020, Life cycle inventories of the treatment of iron and steelmaking by-products, ecoinvent association, Zürich, Switzerland
  property thallium content 7.23618e-6
    The value of 'thallium content' is documented in Turner & Symeonidis, 2020.
    Reference: Turner David & Symeonidis Avraam, 2020, Life cycle inventories of the treatment of iron and steelmaking by-products, ecoinvent association, Zürich, Switzerland
  property tin content 6.53266e-6
    The value of 'tin content' is documented in Turner & Symeonidis, 2020.
    Reference: Turner David & Symeonidis Avraam, 2020, Life cycle inventories of the treatment of iron and steelmaking by-products, ecoinvent association, Zürich, Switzerland
  property manganese content 0.0252261
    The value of 'manganese content' is documented in Turner & Symeonidis, 2020.
    Reference: Turner David & Symeonidis Avraam, 2020, Life cycle inventories of the treatment of iron and steelmaking by-products, ecoinvent association, Zürich, Switzerland
  property chlorine content 0.000100503
    The value of 'chlorine content' is documented in Turner & Symeonidis, 2020.
    Reference: Turner David & Symeonidis Avraam, 2020, Life cycle inventories of the treatment of iron and steelmaking by-products, ecoinvent association, Zürich, Switzerland
  property aluminium content 0.0101508
    The value of 'aluminium content' is documented in Turner & Symeonidis, 2020.
    Reference: Turner David & Symeonidis Avraam, 2020, Life cycle inventories of the treatment of iron and steelmaking by-products, ecoinvent association, Zürich, Switzerland
  property barium content 7.53769e-5
    The value of 'barium content' is documented in Turner & Symeonidis, 2020.
    Reference: Turner David & Symeonidis Avraam, 2020, Life cycle inventories of the treatment of iron and steelmaking by-products, ecoinvent association, Zürich, Switzerland
  property arsenic content 1.90955e-6
    The value of 'arsenic content' is documented in Turner & Symeonidis, 2020.
    Reference: Turner David & Symeonidis Avraam, 2020, Life cycle inventories of the treatment of iron and steelmaking by-products, ecoinvent association, Zürich, Switzerland
  property antimony content 3.31658e-6
    The value of 'antimony content' is documented in Turner & Symeonidis, 2020.
    Reference: Turner David & Symeonidis Avraam, 2020, Life cycle inventories of the treatment of iron and steelmaking by-products, ecoinvent association, Zürich, Switzerland
  property heating value, net 0 MJ
    Non combustible products are assumed to have an LHV equal to zero (0).
  property price 0 EUR2005; name RP_price_EUR2005
    Waste products are assigned a price of zero as they are assumed to require further treatment.
  property titanium content 0.00452261
    The value of 'titanium content' is documented in Turner & Symeonidis, 2020.
    Reference: Turner David & Symeonidis Avraam, 2020, Life cycle inventories of the treatment of iron and steelmaking by-products, ecoinvent association, Zürich, Switzerland
  property oxygen content 0.330919
    The value of 'oxygen content' is documented in Turner & Symeonidis, 2020.
    Reference: Turner David & Symeonidis Avraam, 2020, Life cycle inventories of the treatment of iron and steelmaking by-products, ecoinvent association, Zürich, Switzerland
  property potassium content 0.000837186
    The value of 'potassium content' is documented in Turner & Symeonidis, 2020.
    Reference: Turner David & Symeonidis Avraam, 2020, Life cycle inventories of the treatment of iron and steelmaking by-products, ecoinvent association, Zürich, Switzerland
  property beryllium content 5.02513e-7
    The value of 'beryllium content' is documented in Turner & Symeonidis, 2020.
    Reference: Turner David & Symeonidis Avraam, 2020, Life cycle inventories of the treatment of iron and steelmaking by-products, ecoinvent association, Zürich, Switzerland
  property mercury content 1.00503e-7
    The value of 'mercury content' is documented in Turner & Symeonidis, 2020.
    Reference: Turner David & Symeonidis Avraam, 2020, Life cycle inventories of the treatment of iron and steelmaking by-products, ecoinvent association, Zürich, Switzerland
  property silver content 9.14573e-6
    The value of 'silver content' is documented in Turner & Symeonidis, 2020.
    Reference: Turner David & Symeonidis Avraam, 2020, Life cycle inventories of the treatment of iron and steelmaking by-products, ecoinvent association, Zürich, Switzerland
  property sodium content 0.000236181
    The value of 'sodium content' is documented in Turner & Symeonidis, 2020.
    Reference: Turner David & Symeonidis Avraam, 2020, Life cycle inventories of the treatment of iron and steelmaking by-products, ecoinvent association, Zürich, Switzerland
  property cadmium content 2.51256e-6
    The value of 'cadmium content' is documented in Turner & Symeonidis, 2020.
    Reference: Turner David & Symeonidis Avraam, 2020, Life cycle inventories of the treatment of iron and steelmaking by-products, ecoinvent association, Zürich, Switzerland
  property cobalt content 3.8191e-6
    The value of 'cobalt content' is documented in Turner & Symeonidis, 2020.
    Reference: Turner David & Symeonidis Avraam, 2020, Life cycle inventories of the treatment of iron and steelmaking by-products, ecoinvent association, Zürich, Switzerland
  property silicon content 0.0603015
    The value of 'silicon content' is documented in Turner & Symeonidis, 2020.
    Reference: Turner David & Symeonidis Avraam, 2020, Life cycle inventories of the treatment of iron and steelmaking by-products, ecoinvent association, Zürich, Switzerland
  property selenium content 1.50754e-5
    The value of 'selenium content' is documented in Turner & Symeonidis, 2020.
    Reference: Turner David & Symeonidis Avraam, 2020, Life cycle inventories of the treatment of iron and steelmaking by-products, ecoinvent association, Zürich, Switzerland
  property carbon content 0.00343719
    carbon content on a dry matter basis (reserved; not for manual entry)
  properties: water in wet mass 0.005 kg, water content 0.00502513, wet mass 1 kg, dry mass 0.995 kg, carbon allocation 0.00342 kg

## Inputs from technosphere
- waste cement, hydrated: 0 kg; name BP; pedigree (1,1,1,1,1)
  Hydrated cement for solidification of residual material waste. Uncertainty in mass from solidification recipe.
  production volume 0 kg
    Calculated based on the production volume of the reference product.
  property price 0 EUR2005; name BP_price_EUR2005
  properties: dry mass 1 kg, wet mass 1 kg
- cement, unspecified: 0.4 kg; lognormal variance with pedigree 0.091084, pedigree (1,1,5,5,4)
  Cement for solidification of residual material waste. Uncertainty in mass from solidification recipe.
  properties: dry mass 1 kg, wet mass 1 kg
- process-specific burdens, residual material landfill: 0 kg; pedigree (1,1,1,1,1)
  demands per kilogram waste. uncertainty is heeded in the module
- residual material landfill: 2.08333e-9 unit; lognormal variance with pedigree 0.082, pedigree (1,1,5,5,4)
  demands per kilogram waste. uncertainty is heeded in the module
- waste cement, hydrated: -0.280494, -0.00841689, -0.71109 kg (3 entries); lognormal variance with pedigree 0.091084, pedigree (1,1,5,5,4)
  (same comment as for waste cement, hydrated)
  production volume 9.91342e10 kg
- process-specific burdens, residual material landfill: 0.280494, 0.00841689, 0.71109 kg (3 entries); lognormal variance with pedigree 0.082, pedigree (1,1,5,5,4)
  demands per kilogram waste. uncertainty is heeded in the module

## Emissions to nature
- Silicon [water, surface water]: 0.000134937 kg; lognormal variance with pedigree 0.800059, pedigree (1,1,5,5,4)
  uncertainty is calculated from uncertainties in waste composition and transfer coefficients in residual landfill
- Aluminium [water, ground-, long-term]: 0.00299821 kg; lognormal variance with pedigree 0.816922, pedigree (1,1,5,5,4)
  uncertainty is calculated from uncertainties in waste composition and transfer coefficients in incinerator and landfills.
- Sodium, ion [water, surface water]: 8.81905e-5 kg; lognormal variance with pedigree 0.956825, pedigree (1,1,5,5,4)
  (same comment as for Silicon)
- Cadmium, ion [water, surface water]: 2.83342e-11 kg; lognormal variance with pedigree 2.77556, pedigree (1,1,5,5,4)
  (same comment as for Silicon)
- Silver, ion [water, ground-, long-term]: 3.503e-7 kg; lognormal variance with pedigree 4.01475, pedigree (1,1,5,5,4)
  (same comment as for Aluminium)
- COD, Chemical Oxygen Demand [water, surface water]: 9.32466e-6 kg; lognormal variance with pedigree 1.22458, pedigree (1,1,5,5,4)
  (same comment as for Silicon)
- Manganese [water, surface water]: 3.46132e-7 kg; lognormal variance with pedigree 1.56058, pedigree (1,1,5,5,4)
  (same comment as for Silicon)
- Arsenic, ion [water, surface water]: 1.9e-6 kg; lognormal variance with pedigree 1.568, pedigree (1,1,5,5,4)
  (same comment as for Silicon)
- DOC, Dissolved Organic Carbon [water, ground-, long-term]: 0.00221018 kg; lognormal variance with pedigree 0.629163, pedigree (1,1,5,5,4)
  (same comment as for Aluminium)
- Cadmium, ion [water, ground-, long-term]: 1.69722e-8 kg; lognormal variance with pedigree 7.76335, pedigree (1,1,5,5,4)
  (same comment as for Aluminium)
- Lead [water, surface water]: 4.32981e-10 kg; lognormal variance with pedigree 2.41508, pedigree (1,1,5,5,4)
  (same comment as for Silicon)
- Barium [water, ground-, long-term]: 6.19522e-7 kg; lognormal variance with pedigree 6.83343, pedigree (1,1,5,5,4)
  (same comment as for Aluminium)
- Iron, ion [water, ground-, long-term]: 0.000912179 kg; lognormal variance with pedigree 7.16592, pedigree (1,1,5,5,4)
  (same comment as for Aluminium)
- Calcium, ion [water, surface water]: 4.90257e-5 kg; lognormal variance with pedigree 1.01742, pedigree (1,1,5,5,4)
  (same comment as for Silicon)
- Nickel, ion [water, ground-, long-term]: 5.43056e-6 kg; lognormal variance with pedigree 1.55426, pedigree (1,1,5,5,4)
  (same comment as for Aluminium)
- BOD5, Biological Oxygen Demand [water, surface water]: 3.05007e-6 kg; lognormal variance with pedigree 1.22458, pedigree (1,1,5,5,4)
  (same comment as for Silicon)
- DOC, Dissolved Organic Carbon [water, surface water]: 3.68979e-6 kg; lognormal variance with pedigree 1.22458, pedigree (1,1,5,5,4)
  (same comment as for Silicon)
- Chromium VI [water, ground-, long-term]: 0.000448134 kg; lognormal variance with pedigree 0.635311, pedigree (1,1,5,5,4)
  (same comment as for Aluminium)
- Potassium, ion [water, surface water]: 0.00023481 kg; lognormal variance with pedigree 0.80564, pedigree (1,1,5,5,4)
  (same comment as for Silicon)
- Molybdenum [water, ground-, long-term]: 9.50346e-8 kg; lognormal variance with pedigree 1.27703, pedigree (1,1,5,5,4)
  (same comment as for Aluminium)
- Copper, ion [water, surface water]: 9.96102e-10 kg; lognormal variance with pedigree 2.306, pedigree (1,1,5,5,4)
  (same comment as for Silicon)
- Phosphate [water, ground-, long-term]: 0.00698715 kg; lognormal variance with pedigree 1.00814, pedigree (1,1,5,5,4)
  (same comment as for Aluminium)
- Copper, ion [water, ground-, long-term]: 5.96665e-7 kg; lognormal variance with pedigree 3.94429, pedigree (1,1,5,5,4)
  (same comment as for Aluminium)
- Potassium, ion [water, ground-, long-term]: 0.00059819 kg; lognormal variance with pedigree 0.767335, pedigree (1,1,5,5,4)
  (same comment as for Aluminium)
- Mercury [water, surface water]: 7.88009e-12 kg; lognormal variance with pedigree 2.93298, pedigree (1,1,5,5,4)
  (same comment as for Silicon)
- Magnesium [water, ground-, long-term]: 0.0039768 kg; lognormal variance with pedigree 1.4893, pedigree (1,1,5,5,4)
  (same comment as for Aluminium)
- Mercury [water, ground-, long-term]: 4.72017e-9 kg; lognormal variance with pedigree 4.27656, pedigree (1,1,5,5,4)
  (same comment as for Aluminium)
- Phosphate [water, surface water]: 1.16647e-5 kg; lognormal variance with pedigree 1.22868, pedigree (1,1,5,5,4)
  (same comment as for Silicon)
- Chromium VI [water, surface water]: 0.000141866 kg; lognormal variance with pedigree 0.796368, pedigree (1,1,5,5,4)
  (same comment as for Silicon)
- Molybdenum [water, surface water]: 2.0605e-5 kg; lognormal variance with pedigree 1.25353, pedigree (1,1,5,5,4)
  (same comment as for Silicon)
- Zinc, ion [water, surface water]: 8.4503e-10 kg; lognormal variance with pedigree 2.32725, pedigree (1,1,5,5,4)
  (same comment as for Silicon)
- Nickel, ion [water, surface water]: 9.06605e-9 kg; lognormal variance with pedigree 2.01466, pedigree (1,1,5,5,4)
  (same comment as for Silicon)
- Vanadium, ion [water, surface water]: 1.35963e-5 kg; lognormal variance with pedigree 1.05892, pedigree (1,1,5,5,4)
  (same comment as for Silicon)
- Lead [water, ground-, long-term]: 2.59355e-7 kg; lognormal variance with pedigree 8.05735, pedigree (1,1,5,5,4)
  (same comment as for Aluminium)
- Titanium, ion [water, ground-, long-term]: 0.00133584 kg; lognormal variance with pedigree 0.915835, pedigree (1,1,5,5,4)
  (same comment as for Aluminium)
- Iron, ion [water, surface water]: 1.52284e-6 kg; lognormal variance with pedigree 1.43751, pedigree (1,1,5,5,4)
  (same comment as for Silicon)
- Selenium [water, surface water]: 5.28988e-6 kg; lognormal variance with pedigree 1.32581, pedigree (1,1,5,5,4)
  (same comment as for Silicon)
- Cobalt [water, surface water]: 1.08457e-9 kg; lognormal variance with pedigree 2.29427, pedigree (1,1,5,5,4)
  (same comment as for Silicon)
- Titanium, ion [water, surface water]: 2.23011e-6 kg; lognormal variance with pedigree 1.29153, pedigree (1,1,5,5,4)
  (same comment as for Silicon)
- Manganese [water, ground-, long-term]: 0.000207333 kg; lognormal variance with pedigree 6.09413, pedigree (1,1,5,5,4)
  (same comment as for Aluminium)
- Tin, ion [water, ground-, long-term]: 1.2317e-7 kg; lognormal variance with pedigree 5.33901, pedigree (1,1,5,5,4)
  (same comment as for Aluminium)
- Cobalt [water, ground-, long-term]: 6.4966e-7 kg; lognormal variance with pedigree 2.25725, pedigree (1,1,5,5,4)
  (same comment as for Aluminium)
- Thallium [water, surface water]: 4.3517e-9 kg; lognormal variance with pedigree 2.11169, pedigree (1,1,5,5,4)
  (same comment as for Silicon)
- Magnesium [water, surface water]: 6.63906e-6 kg; lognormal variance with pedigree 1.17767, pedigree (1,1,5,5,4)
  (same comment as for Silicon)
- Zinc, ion [water, ground-, long-term]: 5.06173e-7 kg; lognormal variance with pedigree 6.00556, pedigree (1,1,5,5,4)
  (same comment as for Aluminium)
- Antimony [water, ground-, long-term]: 2.13623e-6 kg; lognormal variance with pedigree 1.50125, pedigree (1,1,5,5,4)
  (same comment as for Aluminium)
- Tin, ion [water, surface water]: 2.05627e-10 kg; lognormal variance with pedigree 2.51467, pedigree (1,1,5,5,4)
  (same comment as for Silicon)
- Calcium, ion [water, ground-, long-term]: 0.0293664 kg; lognormal variance with pedigree 1.56102, pedigree (1,1,5,5,4)
  (same comment as for Aluminium)
- Vanadium, ion [water, ground-, long-term]: 0.00425812 kg; lognormal variance with pedigree 0.538535, pedigree (1,1,5,5,4)
  (same comment as for Aluminium)
- Barium [water, surface water]: 1.03426e-9 kg; lognormal variance with pedigree 2.29988, pedigree (1,1,5,5,4)
  (same comment as for Silicon)
- Sulfate [water, surface water]: 0.000347615 kg; lognormal variance with pedigree 0.843657, pedigree (1,1,5,5,4)
  (same comment as for Silicon)
- Beryllium [water, surface water]: 3.02202e-10 kg; lognormal variance with pedigree 2.45929, pedigree (1,1,5,5,4)
  (same comment as for Silicon)
- Silicon [water, ground-, long-term]: 0.0598651 kg; lognormal variance with pedigree 0.251346, pedigree (1,1,5,5,4)
  (same comment as for Aluminium)
- Chloride [water, surface water]: 2.8601e-5 kg; lognormal variance with pedigree 1.08531, pedigree (1,1,5,5,4)
  (same comment as for Silicon)
- Sulfate [water, ground-, long-term]: 0.00289239 kg; lognormal variance with pedigree 0.730399, pedigree (1,1,5,5,4)
  (same comment as for Aluminium)
- BOD5, Biological Oxygen Demand [water, ground-, long-term]: 0.00182699 kg; lognormal variance with pedigree 0.629163, pedigree (1,1,5,5,4)
  (same comment as for Aluminium)
- Sodium, ion [water, ground-, long-term]: 0.000146809 kg; lognormal variance with pedigree 0.936367, pedigree (1,1,5,5,4)
  (same comment as for Aluminium)
- Beryllium [water, ground-, long-term]: 1.81019e-7 kg; lognormal variance with pedigree 1.99889, pedigree (1,1,5,5,4)
  (same comment as for Aluminium)
- Silver, ion [water, surface water]: 5.84808e-10 kg; lognormal variance with pedigree 2.37647, pedigree (1,1,5,5,4)
  (same comment as for Silicon)
- Arsenic, ion [water, ground-, long-term]: 1.9e-15 kg; lognormal variance with pedigree 1.59163, pedigree (1,1,5,5,4)
  (same comment as for Aluminium)
- TOC, Total Organic Carbon [water, ground-, long-term]: 0.00221018 kg; lognormal variance with pedigree 0.629163, pedigree (1,1,5,5,4)
  (same comment as for Aluminium)
- Antimony [water, surface water]: 1.16377e-6 kg; lognormal variance with pedigree 1.5254, pedigree (1,1,5,5,4)
  (same comment as for Silicon)
- Selenium [water, ground-, long-term]: 9.71012e-6 kg; lognormal variance with pedigree 1.30166, pedigree (1,1,5,5,4)
  (same comment as for Aluminium)
- Chloride [water, ground-, long-term]: 7.1399e-5 kg; lognormal variance with pedigree 1.04797, pedigree (1,1,5,5,4)
  (same comment as for Aluminium)
- Thallium [water, ground-, long-term]: 2.60667e-6 kg; lognormal variance with pedigree 1.65128, pedigree (1,1,5,5,4)
  (same comment as for Aluminium)
- Aluminium [water, surface water]: 5.00536e-6 kg; lognormal variance with pedigree 1.19262, pedigree (1,1,5,5,4)
  (same comment as for Silicon)
- TOC, Total Organic Carbon [water, surface water]: 3.68979e-6 kg; lognormal variance with pedigree 1.22458, pedigree (1,1,5,5,4)
  (same comment as for Silicon)
- COD, Chemical Oxygen Demand [water, ground-, long-term]: 0.00558547 kg; lognormal variance with pedigree 0.629163, pedigree (1,1,5,5,4)
  (same comment as for Aluminium)

## Sampling procedure
For more details about sampling procedures, refer to: Turner, D. & Symeonidis, A. (2020). Life cycle inventories of the treatment of iron and steelmaking by-products, ecoinvent association, Zürich, Switzerland.

## Extrapolations
This dataset has been extrapolated from year 2017 to the year of the calculation (2021). The uncertainty has been adjusted accordingly.
