# catch crop growing, phacelia, September-October, organic fertiliser 40 kg N

Dataset: EcoSpold 2, unit process
Geography: GLO
Time period: 2011-01-01 to 2021-12-31
Technology level: current
Classification: ISIC rev.4 ecoinvent: 0161:Support activities for crop production
Scenario: Business-as-Usual
System model: Allocation, cut-off by classification
Generated by: Thomas Nemecek
Database: ecoinvent
isCopyrightProtected: true
accessRestrictedTo: 1

## General comment
This dataset represents the cultivation of phacelia silage on an area of 1 ha. The dry matter yield is 1404 kg/ha. The moisture content of the silage at storage is 75%.

## Included activities start
This activity starts after the harvest of the previous crop. The input of seeds is included. Farm manure as an organic fertiliser - if applied - is only accounted for in terms of direct field emissions; all pre-processes are included in the animal production systems.

## Included activities end
The dataset includes all machine operations and corresponding machine infrastructure and sheds. Machine operations are: soil cultivation, sowing, manuring - if manure is applied -, mowing, haying, swathing, baling, bale loading and transport of silage bales to the farm. Further, direct field emissions are included. This activity ends after the transport of the bales to the farm at the farm gate.

## Technology
Swiss integrated production

## Reference product
- phacelia silage: 1 kg; name REF_PRODUCT; source Lehmann J. 1991; By-product classification allocatable product; CPC 01919: Forage products, n.e.c.
  Dry matter yield per hectare; calculated based on Lehmann (1991): dry matter yield at 25 kg N/ha; 10% of silage loss are subtracted (Agridea 2007). --- Sources: AGRIDEA (2007) Landwirtschaftliches Handbuch Pflanzen und Tiere. Wirz Kalender, 2007. Ed. AGRIDEA, Lindau (Switzerland).
  production volume 5.00045e9 kg; = 1400*3571750
    Scaled from Swiss production volume, using the share of Swiss area of temporary pastures and meadows (0.55%) on the world area (FAOSTAT, year 2011), scaling factor = 182, factor of 0.5, since 2 inventories implemented.
  property carbon content, non-fossil 0.39688; name REF_PRODUCT_C_content_non_fossil
    Approximation by sunflower: Composition data obtained from 'Sonnenblumenganzpflanze, vor Blüte, Silage' in Swiss Feed Database ('Schweizerische Futtermitteldatenbank. V1.0'; http://www.feed-alp.admin.ch/start.php?action=adv_search&cmd=list_feed). First, composition data were refered to 1 kg dry mass. Then, C-contents were calculated considering a C-content/dry mass of 44% in carbohydrates (including fibres), 53% in proteins and 75% in fats. All data from ecoinvent report, n 15a, pg 40, except C-content in protein, that comes from Determination of protein concentration by total organic carbon analysis, Rouwenhorst et al., 1991, J Biochem and Biophys Methods, 22:119-128.
  property energy content 17.17 MJ
    Approximation by sunflower: Gross calorific value of 'Sonnenblumenganzpflanze, vor Blüte, Silage' in Swiss Feed Database ('Schweizerische Futtermitteldatenbank. V1.0'; http://www.feed-alp.admin.ch/start.php?action=adv_search&cmd=list_feed).
  property price 0.033 EUR2005; name REF_PRODUCT_price_EUR2005
    Assumed the same price of barley silage to phacelia silage, based on data for 2016 in Manitoba (Canada) [https://www.gov.mb.ca/agriculture/business-and-economics/financial-management/pubs/cop_forage_cerealsilage.pdf].
  property dry mass 1 kg; name REF_PRODUCT_DM
  property carbon content 0.39688
    carbon content on a dry matter basis (reserved; not for manual entry)
  properties: wet mass 4 kg, carbon allocation 0.39688 kg

## Inputs from technosphere
- tillage, harrowing, by rotary harrow: 0.000712251 ha; source Boessinger M. 2004; lognormal variance with pedigree 0.0092, pedigree (2,1,4,1,1)
  Assumption based on the number of cuts and current practice in Switzerland (cf. Boessinger et. al 2004)
- sowing: 0.000712251 ha; source Boessinger M. 2004; lognormal variance with pedigree 0.0092, pedigree (2,1,4,1,1)
  (same comment as for tillage, harrowing, by rotary harrow)
- tillage, cultivating, chiselling: 0.000712251 ha; source Boessinger M. 2004; lognormal variance with pedigree 0.0092, pedigree (2,1,4,1,1)
  (same comment as for tillage, harrowing, by rotary harrow)
- transport, tractor and trailer, agricultural: 0 metric ton*km; pedigree (1,1,1,1,1)
  Transport of silage bales to farm; distance 1 km.
- mowing, by rotary mower: 0.000712251 ha; source Boessinger M. 2004; lognormal variance with pedigree 0.0092, pedigree (2,1,4,1,1)
  (same comment as for tillage, harrowing, by rotary harrow)
- swath, by rotary windrower: 0.000712251 ha; source Boessinger M. 2004; lognormal variance with pedigree 0.0092, pedigree (2,1,4,1,1)
  (same comment as for tillage, harrowing, by rotary harrow)
- liquid manure spreading, by vacuum tanker: 0.0219154 m3; source Flisch R. 2009; lognormal variance with pedigree 0.0092, pedigree (2,1,4,1,1)
  Calculated based on the amount of applied nitrogen. Data on nutrient content of slurry from Flisch (2009). Slurry represents the only input of nitrogen.
- tillage, rolling: 0.000712251 ha; source Boessinger M. 2004; lognormal variance with pedigree 0.0092, pedigree (2,1,4,1,1)
  (same comment as for tillage, harrowing, by rotary harrow)
- bale loading: 0.00571432 unit; source Nemecek, T. 2007; lognormal variance with pedigree 0.0092, pedigree (2,1,4,1,1)
  Calculated from fresh matter yield (25% dry matter content) and bale weigth of 700 kg (fresh matter; Nemecek 2007).
- beet seed, Swiss integrated production, for sowing: 0.00569801 kg; name SEED; source Lehmann J. 1991; lognormal variance with pedigree 0.0092, pedigree (2,1,4,1,1)
  Approximation for phacelia seed.
  property energy content 15.3935 MJ; name SEED_energy_content
  property carbon content, non-fossil 0.464601; name SEED_C_content_non_fossil
  property dry mass 0.85 kg; name SEED_DM
  properties: wet mass 1 kg, water content 0.176471
  note on energy content: See "01_crop production - seed production & processing_v1.0.pdf" - pdf-document on the dedicated talk page of ecoinvent (www.ecoinvent.org/documentation)
  note on carbon content, non-fossil: biogene carbon content on a dry matter basis Wheat values are used to model sugar beet seeds. Composition data obtained from Wheat, soft red winter, in (http://www.nal.usda.gov/fnic/foodcomp/search/). First, composition data were refered to 1 kg dry mass. Then, C-contents were calculated considering a C-content/dry mass of 46% in carbohydrates (including fibres), 53% in proteins and 75% in fats. All data from "Evolutionary and Biochemical Aspects", A.D. Kay and T. Vrede (in Global Ecology, 2010, Elsevier B.V., S.E. Jørgensen Ed.).
- baling: 0.00571432 unit; source Nemecek, T. 2007; lognormal variance with pedigree 0.0092, pedigree (2,1,4,1,1)
  (same comment as for bale loading)
- haying, by rotary tedder: 0.0014245 ha; source Boessinger M. 2004; lognormal variance with pedigree 0.0092, pedigree (2,1,4,1,1)
  (same comment as for tillage, harrowing, by rotary harrow)
- transport, tractor and trailer, agricultural: 4.05e-6, 0.00099595 metric ton*km (2 entries); lognormal variance with pedigree 0.1364, pedigree (4,1,4,1,1)
  Transport of silage bales to farm; distance 1 km.

## Inputs from nature
- Energy, gross calorific value, in biomass [natural resource, biotic]: 17.17 MJ; lognormal variance with pedigree 0.0499, pedigree (2,3,4,3,4)
  (same comment as for phacelia silage)
- Carbon dioxide, in air [natural resource, in air]: 1.44698 kg; = 44/12 * (REF_PRODUCT_C_content_non_fossil * REF_PRODUCT * REF_PRODUCT_DM - SEED_C_content_non_fossil * SEED * SEED_DM); lognormal variance with pedigree 0.0498, pedigree (2,2,4,1,1)
  Modelled,see chapter 'CO2 binding' in "01_crop production_direct field emissions and natural resources_v1.0.pdf" - pdf-document on the dedicated talk page of ecoinvent (www.ecoinvent.org/documentation)
- Occupation, annual crop [natural resource, land]: 1.19031 m2*year; lognormal variance with pedigree 0.0109, pedigree (2,1,4,1,1)
  Modelled, see chapter 'Land use' in "01_crop production_direct field emissions and natural resources_v1.0.pdf" - pdf-document on the dedicated talk page of ecoinvent (www.ecoinvent.org/documentation)
- Transformation, from annual crop [natural resource, land]: 7.12251 m2; lognormal variance with pedigree 0.0169, pedigree (2,1,4,1,1)
  (same comment as for Occupation, annual crop)
- Transformation, to annual crop [natural resource, land]: 7.12251 m2; lognormal variance with pedigree 0.0169, pedigree (2,1,4,1,1)
  (same comment as for Occupation, annual crop)

## Emissions to nature
- Ammonia [air, non-urban air or from high stacks]: 0.0137266 kg; lognormal variance with pedigree 0.017, pedigree (2,2,4,1,1)
  Modelled with the 'AGRAMMON model' described in "01_crop production_direct field emissions and natural resources_v1.0.pdf" - pdf-document on the dedicated talk page of ecoinvent (www.ecoinvent.org/documentation)
- Nitrogen oxides [air, non-urban air or from high stacks]: 0.000256175 kg; = 0.21*N2O; lognormal variance with pedigree 0.0498, pedigree (2,2,4,1,1)
  Modelled, see chapter 'Emissions of NOx to the air' in "01_crop production_direct field emissions and natural resources_v1.0.pdf" - pdf-document on the dedicated talk page of ecoinvent (www.ecoinvent.org/documentation)
- Dinitrogen monoxide [air, non-urban air or from high stacks]: 0.00121988 kg; name N2O; lognormal variance with pedigree 0.0498, pedigree (2,2,4,1,1)
  Modelled, see chapter 'Emissions of N2O to the air' in "01_crop production_direct field emissions and natural resources_v1.0.pdf" - pdf-document on the dedicated talk page of ecoinvent (www.ecoinvent.org/documentation)
- Cadmium, ion [water, surface water]: 2.20605e-11 kg; lognormal variance with pedigree 0.0951, pedigree (2,2,4,1,1)
  Modelled, see chapter 'Emissions of heavy metals to agricultural soil, surface water and ground water' in "01_crop production_direct field emissions and natural resources_v1.0.pdf" - pdf-document on the dedicated talk page of ecoinvent (www.ecoinvent.org/documentation)
- Copper, ion [water, surface water]: 1.82457e-9 kg; lognormal variance with pedigree 0.0951, pedigree (2,2,4,1,1)
  (same comment as for Cadmium, ion)
- Cadmium, ion [water, ground-]: 9.26781e-9 kg; lognormal variance with pedigree 0.0951, pedigree (2,2,4,1,1)
  (same comment as for Cadmium, ion)
- Chromium, ion [water, surface water]: 5.25199e-9 kg; lognormal variance with pedigree 0.0951, pedigree (2,2,4,1,1)
  (same comment as for Cadmium, ion)
- Phosphate [water, surface water]: 7.93047e-5 kg; lognormal variance with pedigree 0.0498, pedigree (2,2,4,1,1)
  Modelled, see chapter 'Emissions of phosphorous to the water' in "01_crop production_direct field emissions and natural resources_v1.0.pdf" - pdf-document on the dedicated talk page of ecoinvent (www.ecoinvent.org/documentation)
- Mercury [soil, agricultural]: 3.50064e-7 kg; lognormal variance with pedigree 0.0498, pedigree (2,2,4,1,1)
  (same comment as for Cadmium, ion)
- Chromium, ion [water, ground-]: 9.00664e-6 kg; lognormal variance with pedigree 0.0951, pedigree (2,2,4,1,1)
  (same comment as for Cadmium, ion)
- Mercury [water, ground-]: 7.37892e-9 kg; lognormal variance with pedigree 0.0951, pedigree (2,2,4,1,1)
  (same comment as for Cadmium, ion)
- Zinc, ion [water, ground-]: 1.67488e-5 kg; lognormal variance with pedigree 0.0951, pedigree (2,2,4,1,1)
  (same comment as for Cadmium, ion)
- Zinc, ion [water, surface water]: 1.37984e-8 kg; lognormal variance with pedigree 0.0951, pedigree (2,2,4,1,1)
  (same comment as for Cadmium, ion)
- Copper [soil, agricultural]: 2.7834e-5 kg; lognormal variance with pedigree 0.0498, pedigree (2,2,4,1,1)
  (same comment as for Cadmium, ion)
- Zinc [soil, agricultural]: 0.000120492 kg; lognormal variance with pedigree 0.0498, pedigree (2,2,4,1,1)
  (same comment as for Cadmium, ion)
- Lead [water, surface water]: 3.12194e-12 kg; lognormal variance with pedigree 0.0951, pedigree (2,2,4,1,1)
  (same comment as for Cadmium, ion)
- Nickel, ion [water, surface water]: 5.58134e-11 kg; lognormal variance with pedigree 0.0951, pedigree (2,2,4,1,1)
  (same comment as for Cadmium, ion)
- Nitrate [water, ground-]: 0.09238 kg; lognormal variance with pedigree 0.0498, pedigree (2,2,4,1,1)
  Modelled with the 'SALCA-NO3 model' described in "01_crop production_direct field emissions and natural resources_v1.0.pdf" - pdf-document on the dedicated talk page of ecoinvent (www.ecoinvent.org/documentation)
- Phosphate [water, ground-]: 2.73024e-5 kg; lognormal variance with pedigree 0.0498, pedigree (2,2,4,1,1)
  (same comment as for Phosphate)
- Copper, ion [water, ground-]: 2.44791e-6 kg; lognormal variance with pedigree 0.0951, pedigree (2,2,4,1,1)
  (same comment as for Cadmium, ion)
- Cadmium [soil, agricultural]: 1.40185e-7 kg; lognormal variance with pedigree 0.0498, pedigree (2,2,4,1,1)
  (same comment as for Cadmium, ion)
- Chromium [soil, agricultural]: -5.48875e-6 kg
  (same comment as for Cadmium, ion)
- Lead [water, ground-]: 9.32479e-8 kg; lognormal variance with pedigree 0.0951, pedigree (2,2,4,1,1)
  (same comment as for Cadmium, ion)
- Lead [soil, agricultural]: 3.5088e-6 kg; lognormal variance with pedigree 0.0498, pedigree (2,2,4,1,1)
  (same comment as for Cadmium, ion)
- Nickel [soil, agricultural]: 3.70048e-6 kg; lognormal variance with pedigree 0.0498, pedigree (2,2,4,1,1)
  (same comment as for Cadmium, ion)

## Sampling procedure
Data collected from literature and expert knowledge; some own estimates.

## Extrapolations
This dataset has been extrapolated from year 2011 to the year of the calculation (2021). The uncertainty has been adjusted accordingly.

## Review by Assumpció ANTON 2012-01-26
For further versions it could be advisable to add some of intermediate values considered in the Exchanges properties sheet. (c-season, rain, erosion, and so on)

Regarding GLO datasets, it could also be interesting to add global average production in the world, so it will give an idea of representativeness of production considered and help to decide score for completeness.

In my opinion, and as a general comment, criteria for quality parameters (GLO and specific) will need more discussion
