# diazole-compound production

Dataset: EcoSpold 2, unit process
Geography: RER
Time period: 2000-01-01 to 2021-12-31
Technology level: current
Classification: EcoSpold01Categories: agricultural means of production/pesticides
Classification: ISIC rev.4 ecoinvent: 2021:Manufacture of pesticides and other agrochemical products
Tags: ConvertedDataset
Scenario: Business-as-Usual
System model: Allocation, cut-off by classification
Share of production covered: 100 %
Generated by: Jürgen Sutter
Published in: Nemecek, T. 2007
Database: ecoinvent
isCopyrightProtected: true
accessRestrictedTo: 1

## General comment
This dataset represents the production of diazole-compounds (1 kg of active ingredient). Raw materials are modelled with a stoichiometric calculation. Energy consumption is modelled with data from a similar process. The emissions are estimated. Infrastructure is included with a default value.
[This dataset was already contained in the ecoinvent database version 2. It was not individually updated during the transfer to ecoinvent version 3. Life Cycle Impact Assessment results may still have changed, as they are affected by changes in the supply chain, i.e. in other datasets. This dataset was generated following the ecoinvent quality guidelines for version 2. It may have been subject to central changes described in the ecoinvent version 3 change report (http://www.ecoinvent.org/database/ecoinvent-version-3/reports-of-changes/), and the results of the central updates were reviewed extensively. The changes added e.g. consistent water flows and other information throughout the database. The documentation of this dataset can be found in the ecoinvent reports of version 2, which are still available via the ecoinvent website. The change report linked above covers all central changes that were made during the conversion process.]

## Included activities start
From reception of precursors (acetic anhydride, ammonia, bromine, chlorine, ethylene, ethylene oxide, formaldehyde, hydrochloric acid, hydrogen, nitric acid, oxygen, phenol, phosgene, 1-propanol, sodium hydroxide, sodium hypochlorite, trichloromethane, "water, salt, sole", and xylene) at the factory gate.

## Included activities end
This activity ends with diazole-compounds at the factory gate. The dataset includes the input materials, energy uses, infrastructure and emissions. The dataset doesn't include emulsives, additives etc.

## Geography
The inventory is modelled for Europe.

## Technology
Diazole-compounds are a group of pesticides with a five-membered ring consisting of three carbon atoms and two nitrogen atoms (C3H4N2). Diazoles are produced by adding a diazole ring to a halo-compound.

The dataset diazole-compounds was calculated from the arithmetic mean of all inputs and outputs of the production of prochloraz and metazachlor.

Prochloraz is produced in five steps from phenol:
C6H6O + 3 Cl2 → C6H3Cl3O + 3 HCl
C6H3Cl3O + C2H4Br2 → C8H6Cl3BrO + HBr
C8H6Cl3BrO + C3H9N → C11H14Cl3NO + HBr
C11H14Cl3NO + COCl2 → C12H14Cl4NO2 + HCl
C12H14Cl4NO2 + C3H4N2 → C15H16Cl3N3O2 + HCl
Precursors that are used for the prochloraz production are ethylene bromide (C2H4Br2) and imidazole (C3H4N2).

Ethylene bromide (C2H4Br2) is produced from ethylene and bromine:
C2H6 + 2 Br2 → C2H4Br2 + 2 HBr

Imidazole (C3H4N2) is produced in two steps from ethylene oxide:
C2H4O + O2 → C2H2O + H2O
C2H2O + 2 NH3 + CH2O → C3H4N2 + 3 H2O

Metazachlor is produced in five steps from xylene:
C8H10 + HNO3 → C8H9NO2 + H2O
C6H5N3O4 + H2 → C8H11N + H2O
C8H11N + C2H3Cl2O → C10H14NClO + HCl
3 C10H12NClO + C3H6O3 + 3 HCl → 3 C11H14NCl2O + 3 H2O
C11H14NCl2O + C3H4N2 → C14H16ClN3O + HCl
Precursors that are used for the metazachlor production are chloroacetyl chloride (C2H2Cl2O), paraformaldehyde (C3H6O3), pyrazole (C3H4N2), and thionyl chloride (SOCl2).

Chloroacetyl chloride (C2H2Cl2O) is produced in two steps from acetic acid:
C2H4O2 + Cl2 → C2H3ClO2 + HCl
C2H3ClO2 + SOCl2 → C2H2Cl2O + HCl + SO2

Paraformaldehyde (C3H6O3) is produced from formaldehyde:
3 CH2O → C3H6O3

Pyrazole (C3H4N2) is produced in four steps from sodium hypochlorite:
NaOCl + NH3 → NH2Cl + NaOH
NH2Cl + NaOH + NH3 → N2H4 + NaCl + H2O
N2H4 + CHCl3 → CH2N2 + 3 HCl
CH2N2 + C2H4 → C3H4N2 + H2

Thionyl chloride (SOCl2) is produced in two steps from sulphur:
S + Cl2 → SCl2
SCl2 + SO2 + Cl2 → 2 SOCl2

## Time period
Time of publications

## Parameters
- fraction, cooling water, once-through system, to air: 0.004 dimensionless; name fraction_CW_OT_to_air; lognormal variance with pedigree 0.0413, pedigree (2,3,1,3,1)
  Calculated based on literature value (Scown, C.D., 2011, Water Footprint of U.S. Transportation Fuels and supplying information of the article) (Vionnet, S., Quantis Water Database - Technical Report, 2012).
- fraction, cooling water, recirculating system, to air: 0.771 dimensionless; name fraction_CW_R_to_air; lognormal variance with pedigree 0.0413, pedigree (2,3,1,3,1)
  (same comment as for fraction, cooling water, once-through system, to air)
- fraction, cooling water, cooling pond system, to air: 0.032 dimensionless; name fraction_CW_CP_to_air; lognormal variance with pedigree 0.0413, pedigree (2,3,1,3,1)
  (same comment as for fraction, cooling water, once-through system, to air)
- fraction, process water, to air: 0.205 dimensionless; name fraction_PW_to_air; lognormal variance with pedigree 0.092025, pedigree (4,4,3,2,4)
  Literature value (Statistics Canada, 2007 & Shaffer, K.H., 2008, Consumptive water use in the Great Lakes Basin, USGS) (Vionnet, S., Quantis Water Database - Technical Report, 2012).
- fraction, cooling water, to air: 0.3875 dimensionless; name fraction_CW_to_air; = (0.5*fraction_CW_OT_to_air)+(0.5*fraction_CW_R_to_air); lognormal variance with pedigree 0.092025, pedigree (4,4,3,2,4)
  Calculated value based on literature value (see comments of the other parametres present in this dataset) and expert opinion. In the case when no industry/literature data are available about the type of cooling or directly fraction, cooling water, to air specific for the process a default assumption is applied. It is assumed that the once-through cooling system is used in 50% of all cases and recirculating system is used in another 50% of all cases.

## Reference product
- diazole-compound: 1 kg; CPC 3466: Insecticides, fungicides, herbicides and disinfectants; By-product classification allocatable product; CAS 288-13-1
  Diazoles can have different modes of action. Prochloraz, which is an fungicide, acts in C14- demethylase in sterol biosynthesis (erg11/cyp51); and metazachlor, which is an herbicide, acts as an inhibitor of sythesis of very long fatty acids
  EcoSpold01Location=RER
  production volume 1.26449e6 kg
    Unknown
    The addition of the consumption volumes in the US in 2002 (from USGS, 2002 Pesticide use Maps) of the diazole-compounds imazamox, imazamethabenz, imazapic, imazapyr, imazaquin, imazethapyr, fipronil, difenzoquat, iprodione, triflumizole has been used to estimate the production volumes of this type of pesticide in the Europe. For that, it has been extrapolated to a Global production mix using the ha of Arable land and Permanent crops of US versus the ha of Arable land and Permanent crops in the Europe in 2002 (299/179 million ha; FAOSTAT).
  property price 5.26188 EUR2005
    Calculated based on inputs: The price of the product has been calculated as a sum of the values of the material and energy inputs for this product. This value is therefore a rough estimation. It may underestimate the real price since there are additional expenses when producing any product. These expences can include for example labour costs, treatment of waste materials and profit for the producer. Please consider carefully whether this level of data quality is acceptable for your application.
  property carbon content, fossil 0.541859
    C content was calculated as an unweighted average of the C contents in metazachlor and prochloraz. Those pesticides are classified as diazoles in Tab 2.25 in Sutter 2010
  property carbon content 0.541859
    carbon content on a dry matter basis (reserved; not for manual entry)
  properties: water content 0, water in wet mass 0 kg, wet mass 1 kg, carbon content, non-fossil 0, dry mass 1 kg, carbon allocation 0.541859 kg

## Inputs from technosphere
- sodium hypochlorite, without water, in 15% solution state: 0.25793 kg; source Unger T A 1996; lognormal variance with pedigree 0.044, pedigree (4,5,4,1,1)
  EcoSpold01Location=RER
  Stoichiometric calculation, assuming an efficiency of 95% per reaction step.
  Uncertainty: Stoechiometric calculation
  properties: wet mass 1 kg, dry mass 1 kg
- heat, district or industrial, natural gas: 31.4534 MJ; source Gendorf 2000; lognormal variance with pedigree 0.044, pedigree (4,5,4,1,1)
  Estimation, assuming a default value, originated from calculation of avarage consumption of electricity and heat per kg of product (3.2 MJ kg-1), and a resulting amount of heat of 2 MJ for every reaction step per kg reaction product, considering that the demand is made up of a mix that includes 50% natural gas. Additionally, reaction steps are approximated with energy consumption data, assuming that inventory flows can be estimated using process data for basic operation steps, available for specific organic chemicals.
  Further references:
  Kim S., Overcash M.: Energy in chemical manufacturing processes: gate-to-gate information for life cycle assessment. In: Journal of Chemical Technology & Biotechnology vol. 78, no. 9: 995-1005(11). 2003
  Uncertainty: Estimation
  properties: heating value, net 1 MJ
- phosgene, liquid: 0.14478 kg; source Unger T A 1996; lognormal variance with pedigree 0.044, pedigree (4,5,4,1,1)
  Stoichiometric calculation, assuming an efficiency of 95% per reaction step.
  Assumed to be removed with an efficiency of 100% in the wastewater treatment.
  EcoSpold01Location=RER
  Uncertainty: Stoechiometric calculation
  properties: dry mass 1 kg, heating value, net 3.68 MJ, wet mass 1 kg, carbon content, fossil 0.122449
- acetic anhydride: 0.17543 kg; source Unger T A 1996; lognormal variance with pedigree 0.044, pedigree (4,5,4,1,1)
  Stoichiometric calculation, assuming an efficiency of 95% per reaction step.
  EcoSpold01Location=RER
  Uncertainty: Stoechiometric calculation
  properties: heating value, net 21.38 MJ, carbon content, fossil 0.470588, wet mass 1 kg, dry mass 1 kg
- hydrogen, liquid: 0.010914 kg; source Unger T A 1996; lognormal variance with pedigree 0.044, pedigree (4,5,4,1,1)
  (same comment as for sodium hypochlorite, without water, in 15% solution state)
  properties: dry mass 1 kg, wet mass 1 kg, heating value, net 120.21 MJ
- chemical factory, organics: 3.007e-9 unit; lognormal variance with pedigree 0.448, pedigree (4,5,5,5,5)
  Estimation, based on a production capacity of 50,000 t per year and a plant life time of 50 years, therefore an amount of 4X10-10 units per kg of produced chemical is aded to the unit process of the respective chemical. The amount is accounted for each production step. This might be an overestimation in some multistep syntheses.
  EcoSpold01Location=RER
  Uncertainty: Estimation
- sodium hydroxide, without water, in 50% solution state: 1.1641 kg; source Unger T A 1996; lognormal variance with pedigree 0.044, pedigree (4,5,4,1,1)
  EcoSpold01Location=RER
  Stoichiometric calculation, assuming an efficiency of 100%.
  Uncertainty: Stoechiometric calculation
  properties: heating value, net 3.03 MJ, wet mass 1 kg, dry mass 1 kg
- xylene: 0.7379 kg; source Unger T A 1996; lognormal variance with pedigree 0.044, pedigree (4,5,4,1,1)
  (same comment as for acetic anhydride)
  properties: carbon content, fossil 0.905061, wet mass 1 kg, dry mass 1 kg, heating value, net 38.84 MJ
- 1-propanol: 0.10368 kg; source Unger T A 1996; lognormal variance with pedigree 0.044, pedigree (4,5,4,1,1)
  (same comment as for acetic anhydride)
  properties: heating value, net 34.3 MJ, wet mass 1 kg, dry mass 1 kg, carbon content, fossil 0.6
- ethylene: 0.13537 kg; source Unger T A 1996; lognormal variance with pedigree 0.044, pedigree (4,5,4,1,1)
  (same comment as for acetic anhydride)
  properties: wet mass 1 kg, carbon content, fossil 0.857143, dry mass 1 kg, heating value, net 43.22 MJ
- ethylene oxide: 0.068426 kg; source Unger T A 1996; lognormal variance with pedigree 0.044, pedigree (4,5,4,1,1)
  (same comment as for sodium hypochlorite, without water, in 15% solution state)
  properties: heating value, net 27.53 MJ, carbon content, fossil 0.545455, dry mass 1 kg, wet mass 1 kg
- oxygen, liquid: 0.049764 kg; source Unger T A 1996; lognormal variance with pedigree 0.044, pedigree (4,5,4,1,1)
  Stoichiometric calculation, assuming an efficiency of 100% per reaction step.
  EcoSpold01Location=RER
  Uncertainty: Stoechiometric calculation
  properties: wet mass 1 kg, dry mass 1 kg
- heat, district or industrial, other than natural gas: 17.5559 MJ; source Gendorf 2000; lognormal variance with pedigree 0.044, pedigree (4,5,4,1,1)
  Estimation, assuming a default value, originated from calculation of avarage consumption of electricity and heat per kg of product (3.2 MJ kg-1), and a resulting amount of heat of 2 MJ for every reaction step per kg reaction product, considering that the demand is made up of a mix that inlcudes 12% steam from external energy sources. Additionally, reaction steps are approximated with energy consumption data, assuming that inventory flows can be estimated using process data for basic operation steps, available for specific organic chemicals.
  Further references:
  Kim S., Overcash M.: Energy in chemical manufacturing processes: gate-to-gate information for life cycle assessment. In: Journal of Chemical Technology & Biotechnology vol. 78, no. 9: 995-1005(11). 2003
  Uncertainty: Estimation
  properties: heating value, net 1 MJ
- phenol: 0.23788 kg; source Unger T A 1996; lognormal variance with pedigree 0.044, pedigree (4,5,4,1,1)
  (same comment as for acetic anhydride)
  properties: heating value, net 30.93 MJ, carbon content, fossil 0.765957, wet mass 1 kg, dry mass 1 kg
- nitric acid, without water, in 50% solution state: 0.43856 kg; source Unger T A 1996; lognormal variance with pedigree 0.044, pedigree (4,5,4,1,1)
  (same comment as for sodium hypochlorite, without water, in 15% solution state)
  properties: wet mass 1 kg, dry mass 1 kg
- ammonia, anhydrous, liquid: 0.1936 kg; source Unger T A 1996; lognormal variance with pedigree 0.044, pedigree (4,5,4,1,1)
  (same comment as for sodium hypochlorite, without water, in 15% solution state)
  properties: wet mass 1 kg, dry mass 1 kg
- trichloromethane: 0.37119 kg; source Unger T A 1996; lognormal variance with pedigree 0.044, pedigree (4,5,4,1,1)
  (same comment as for acetic anhydride)
  properties: heating value, net 4.06 MJ, carbon content, fossil 0.101695, wet mass 1 kg, dry mass 1 kg
- hydrochloric acid, without water, in 30% solution state: 0.53355 kg; source Unger T A 1996; lognormal variance with pedigree 0.044, pedigree (4,5,4,1,1)
  (same comment as for sodium hydroxide, without water, in 50% solution state)
  properties: heating value, net 3.32 MJ, dry mass 1 kg, wet mass 1 kg
- formaldehyde: 0.044321 kg; source Unger T A 1996; lognormal variance with pedigree 0.044, pedigree (4,5,4,1,1)
  (same comment as for acetic anhydride)
  properties: dry mass 1 kg, carbon content, fossil 0.4, wet mass 1 kg, heating value, net 20.19 MJ
- electricity, medium voltage: 2.3959 kWh; source Gendorf 2000; lognormal variance with pedigree 0.044, pedigree (4,5,4,1,1)
  EcoSpold01Location=UCTE
  Estimation, assuming a default value, originated from calculation of avarage consumption of electricity and heat per kg of product (3.2 MJ kg-1), and a resulting amount of electricity of 0,333 kW for every reaction step per kg reaction product, considering that the demand is made up of a mix that inlcudes 38% electricity. Additionally, reaction steps are approximated with energy consumption data, assuming that inventory flows can be estimated using process data for basic operation steps, available for specific organic chemicals.
  Further references:
  Kim S., Overcash M.: Energy in chemical manufacturing processes: gate-to-gate information for life cycle assessment. In: Journal of Chemical Technology & Biotechnology vol. 78, no. 9: 995-1005(11). 2003
  Uncertainty: Estimation
- chlorine, liquid: 1.2776 kg; source Unger T A 1996; lognormal variance with pedigree 0.044, pedigree (4,5,4,1,1)
  Stoichiometric calculation, assuming an efficiency of 95% per reaction step.
  Kim et al. 2003. Kim S., Overcash M.: Energy in chemical manufacturing processes: gate-to-gate information for life cycle assessment. In: Journal of Chemical Technology & Biotechnology vol. 78, no. 9: 995-1005(11). 2003
  EcoSpold01Location=RER
  Uncertainty: Stoechiometric calculation
  properties: dry mass 1 kg, wet mass 1 kg

## Inputs from nature
- Bromine, in water [natural resource, in water]: 0.5514 kg; name bromine_input; source Unger T A 1996; lognormal variance with pedigree 0.044, pedigree (4,5,4,1,1)
  0.23% Br in water; Stoichiometric calculation, assuming an efficiency of 95% per reaction step.
  Uncertainty: Stoechiometric calculation
- Water, cooling, unspecified natural origin [natural resource, in water]: 0.18042 m3; name water_cooling_UNO_input; source Gendorf 2000; lognormal variance with pedigree 0.044, pedigree (4,5,4,1,1)
  Estimation (24 kg cooling water per kg produced chemical per step).
  Uncertainty: Estimation
- Water, salt, sole [natural resource, in water]: 0.239739 m3; name water_salt_sole_input; = ((bromine_input/0.0023))/1000; lognormal variance with pedigree 0.044, pedigree (4,5,4,1,1)
  There is an intermediate containing bromine in this process and this input is used as an input in the bromine production.
  The concentration of bromine in water, salt, sole is 0.23% = 0.0023kg/kg. Cross-referenced: 0.25% (Ullmann's encyclopedia), 0.4% (USGS). The concentration of iodine in water, salt, sole is 0.03% = 0.0003kg/kg. Cross-referenced: 0.015% - 0.12% (Ullmann's encyclopedia).
  There is an intermediate containing bromine in this process and this input is used as an input in the bromine production.
  The concentration of bromine in water, salt, sole is 0.23% = 0.0023kg/kg. Cross-referenced: 0.25% (Ullmann's encyclopedia), 0.4% (USGS). The concentration of iodine in water, salt, sole is 0.03% = 0.0003kg/kg. Cross-referenced: 0.015% - 0.12% (Ullmann's encyclopedia).
  Uncertainty: Stoechiometric calculation

## Emissions to nature
- Water [water, unspecified]: 0.3011 m3; name water_to_water_unspecified; = water_cooling_UNO_input*(1-fraction_CW_to_air)+water_salt_sole_input*(1-fraction_PW_to_air); lognormal variance with pedigree 0.0487, pedigree (2,2,4,1,1)
  Calculated value based on literature values and expert opinion. See comments in the parametres' comment field.
  property fraction, origin: fresh water 0; name fraction_origin_fresh_water_Ww
  property fraction, origin: unspecified 0.367012; name fraction_origin_unspecified_Ww
  property fraction, origin: salt water 0.632988; name fraction_origin_salt_water_Ww
  property carbon content, non-fossil 0; name C_content_non_fossil
  property carbon content, fossil 0; name C_content_fossil
  property water in wet mass 1000 kg; name WWM
  property wet mass 1000 kg; name WM
  property dry mass 0 kg; name DM
- Bromide [water, surface water]: 0.41328 kg; lognormal variance with pedigree 0.798, pedigree (4,5,5,5,5)
  Estimation, assuming that the remaining amount of unreacted input materials leave the production process with the wastewater, wich is further treated in an internal wastewater plant.
  Uncertainty: Estimation
- Ethene [water, surface water]: 0.0002883 kg; lognormal variance with pedigree 0.448, pedigree (4,5,5,5,5)
  (same comment as for Bromide)
- Chloroacetic acid [air, urban air close to ground]: 0.00048731 kg; lognormal variance with pedigree 0.188, pedigree (4,5,5,5,5)
  Estimation, based on the assumption that 0.2% of volatile input materials is emitted to air occurring from the purge vent, the destillation vent and fugitive emission sources.
  Uncertainty: Estimation
- Acetic acid [air, urban air close to ground]: 3.9814e-5 kg; lognormal variance with pedigree 0.188, pedigree (4,5,5,5,5)
  (same comment as for Chloroacetic acid)
- Sulfur dioxide [air, urban air close to ground]: 0.17026 kg; lognormal variance with pedigree 0.1786, pedigree (4,5,5,5,5)
  (same comment as for Chloroacetic acid)
- Hydrogen [air, urban air close to ground]: 2.1827e-5 kg; lognormal variance with pedigree 0.188, pedigree (4,5,5,5,5)
  (same comment as for Chloroacetic acid)
- Chloramine [water, surface water]: 0.0030139 kg; lognormal variance with pedigree 0.448, pedigree (4,5,5,5,5)
  Estimation, assuming that the remaining amount of unreacted input materials leave the production process with the wastewater, wich is further treated in an internal wastewater plant. For the nitrogen containing compounds within the wastewater a removal efficiency of 50% was assumed. The nitrogen emitted to air (N2) is neglected.
  Uncertainty: Estimation
- Formaldehyde [air, urban air close to ground]: 0.00021496 kg; lognormal variance with pedigree 0.188, pedigree (4,5,5,5,5)
  (same comment as for Chloroacetic acid)
- Ammonium, ion [water, surface water]: 0.0035414 kg; lognormal variance with pedigree 0.188, pedigree (4,5,5,5,5)
  (same comment as for Chloramine)
- Chlorine [air, urban air close to ground]: 0.0011582 kg; lognormal variance with pedigree 0.188, pedigree (4,5,5,5,5)
  (same comment as for Chloroacetic acid)
- Ethylene oxide [air, urban air close to ground]: 0.00013685 kg; lognormal variance with pedigree 0.188, pedigree (4,5,5,5,5)
  (same comment as for Chloroacetic acid)
- Acetic acid [water, surface water]: 0.0019867 kg; lognormal variance with pedigree 0.448, pedigree (4,5,5,5,5)
  (same comment as for Bromide)
- Nitrate [water, surface water]: 0.02158 kg; lognormal variance with pedigree 0.188, pedigree (4,5,5,5,5)
  (same comment as for Chloramine)
- Propylamine [air, urban air close to ground]: 0.00018351 kg; lognormal variance with pedigree 0.188, pedigree (4,5,5,5,5)
  (same comment as for Chloroacetic acid)
- Propanol [air, urban air close to ground]: 0.00020735 kg; lognormal variance with pedigree 0.188, pedigree (4,5,5,5,5)
  (same comment as for Chloroacetic acid)
- Water [air, unspecified]: 0.119059 m3; name water_to_air_unspecified; = (water_cooling_UNO_input*fraction_CW_to_air)+(water_salt_sole_input*fraction_PW_to_air); lognormal variance with pedigree 0.0487, pedigree (2,2,4,1,1)
  (same comment as for Water)
  property fraction, origin: fresh water 0; name fraction_origin_fresh_water
  property fraction, origin: salt water 0.41279; name fraction_origin_salt_water
  property fraction, origin: unspecified 0.58721; name fraction_origin_unspecified
- Propanol [water, surface water]: 0.001016 kg; lognormal variance with pedigree 0.448, pedigree (4,5,5,5,5)
  (same comment as for Bromide)
- Phenol [air, urban air close to ground]: 0.00047576 kg; lognormal variance with pedigree 0.188, pedigree (4,5,5,5,5)
  (same comment as for Chloroacetic acid)
- Chloride [water, surface water]: 1.0751 kg; lognormal variance with pedigree 0.448, pedigree (4,5,5,5,5)
  (same comment as for Bromide)
- Chloroacetic acid [water, surface water]: 0.0011695 kg; lognormal variance with pedigree 0.448, pedigree (4,5,5,5,5)
  (same comment as for Bromide)
- Chloramine [air, urban air close to ground]: 0.00033775 kg; lognormal variance with pedigree 0.188, pedigree (4,5,5,5,5)
  (same comment as for Chloroacetic acid)
- Ammonia [air, urban air close to ground]: 0.00038721 kg; lognormal variance with pedigree 0.218, pedigree (4,5,5,5,5)
  (same comment as for Chloroacetic acid)
- Ethylene oxide [water, surface water]: 0.00032845 kg; lognormal variance with pedigree 0.448, pedigree (4,5,5,5,5)
  (same comment as for Bromide)
- Propylamine [water, surface water]: 0.00044041 kg; lognormal variance with pedigree 0.448, pedigree (4,5,5,5,5)
  (same comment as for Bromide)
- Phenol [water, surface water]: 0.0011418 kg; lognormal variance with pedigree 0.448, pedigree (4,5,5,5,5)
  (same comment as for Bromide)
- Sodium, ion [water, surface water]: 0.72028 kg; lognormal variance with pedigree 0.798, pedigree (4,5,5,5,5)
  (same comment as for Bromide)
- Formaldehyde [water, surface water]: 0.00033906 kg; lognormal variance with pedigree 0.448, pedigree (4,5,5,5,5)
  (same comment as for Bromide)
- Sulfur [water, surface water]: 0.0021828 kg; lognormal variance with pedigree 0.188, pedigree (4,5,5,5,5)
  (same comment as for Bromide)
- Carbon dioxide, fossil [air, urban air close to ground]: 0.63528 kg; lognormal variance with pedigree 0.1786, pedigree (4,5,5,5,5)
  Estimation, based on the assumption that 0.2% of volatile input materials is emitted to air occurring from the purge vent, the destillation vent and fugitive emission sources. Remaining gases like CH4 or CO are oxidated to CO2. The carbon contained in the removed carbon compounds from wastewater treatment was accounted as CO2 emissions to air (assuming a removal efficiency of 90%).
  Uncertainty: Estimation

## Sampling procedure
Literature data

## Extrapolations
This dataset has been extrapolated from year 2010 to the year of the calculation (2021). The uncertainty has been adjusted accordingly.

## Review by Thomas Nemecek 2010-03-14
automatic validation in Excel
none

## Review by Roland Hischier 2011-11-14
Transfer of documentation done.
