# three and five layered board production

Dataset: EcoSpold 2, unit process
Geography: RoW
Time period: 2012-01-01 to 2021-12-31
Technology level: current
Classification: ISIC rev.4 ecoinvent: 1621:Manufacture of veneer sheets and wood-based panels
Synonyms: 3-Schicht-/5-Schicht Massivholzplatte
Tags: Swiss brush-up completed
Scenario: Business-as-Usual
System model: Allocation, cut-off by classification
Generated by: Frank Werner
Database: ecoinvent
isCopyrightProtected: true
accessRestrictedTo: 1

## General comment
This dataset represents the global production of three-layered and 5-layered laminated board. it was created as copy of the corresponding local datset for Europe. This is a special form of plywood featuring relatively thick layers.
Data are based on a German production sample.
The three-layered/five-layered laminated board are made from logwood: out of rough sawn timber (u=70%) 22 mm lamellas are sawn, which are technically dried, planed, finger-jointed, glued with PVAc-adhesive at their ends to “never-ending” lamellas and finally glued to a bloc. This block is sawn to boards, which are planed.
Reference:
Rüter, S. and S. Diederichs (2012): Ökobilanz-Basisdaten für Bauprodukte aus Holz. Arbeitsbericht aus dem Institut für Holztechnologie und Holzbiologie Nr. 2012/1, Johann Heinrich von Thünen-Institut (vTI), Hamburg.
[This dataset is meant to replace the following datasets:
- three layered laminated board production, GLO, 1997 - 2002]

## Included activities start
From the reception at the factory gate of all materials and fuels used.

## Included activities end
This activity ends with the three layered/five layerd board produced at the factory gate. The dataset includes the inputs to and outputs of the production processes and the available process emissions. Infrastructure is a rough estimate.

## Geography
Data for Germany used for central Europe

## Technology
Technology reflects a sample of German plywood production. The three-layered or 5-layered laminated board is actually a special form of plywood featuring relatively thick layers.

## Parameters
- wood_fuel: 1700.8; lognormal variance with pedigree 0.0256, pedigree (1,3,1,1,1)
  input of wood fuel used in production; value calculated from Rüter et al. 2012

## Reference product
- three and five layered board: 0 m3; By-product classification allocatable product
  Reference product. Plywood produced in Germany by processes representative for European average. The reference product is ready for delivery at the wooden board factory.
  A large number of materials can be produced with differing properties and areas of use. Typical uses are as construction plywood for wall, floor, and ceiling panels and also as panels for concrete shuttering, and decorative covering veneers in interior furnishings (e.g. wall panels or doors).
  production volume 8e6 m3; name layered_board_3_5_pv
    Rough estimate. No data on annual produciton volume were available, therefore a rough estimate was made.
  property heating value, net 5771.53 MJ
    LHV is calculated based on the Carbon content of the product. More details can be found on the respective documentation.The property is based on a value of 12.74MJ/kg
  property carbon content 0.468521
    carbon content on a dry matter basis (reserved; not for manual entry)
  property true value 485
    allocation property applied in "true value" allocation // value calculated from revenue
  properties: dry mass 413.4 kg, carbon content, fossil 0.03537, wet mass 453 kg, price 485 EUR2005, water content 0.095791, carbon content, non-fossil 0.433151, water in wet mass 39.6 kg, carbon allocation 193.687 kg
- wood chips, dry, measured as dry mass: 1 kg; name m_wood_chips; By-product classification allocatable product; CPC 31230: Wood in chips or particles; pedigree (1,1,1,1,1)
  Literature value; sample from Germany
  production volume 5.7984e9 kg; = m_wood_chips*layered_board_3_5_pv
    Calculated from production volume of reference product using the relative outputs.
  property heating value, net 9.99 MJ
    LHV is calculated based on the Carbon content of the product. More details can be found on the respective documentation.
  property price 0.107 EUR2005; name m_wood_chips_price_EUR2005
    Expert judgement (Urs Luginbühl, Swiss Sawmilling industry, personal communication in June 2014). Wood chips from softwood should have a price of 0.101 EUR/kg. Woodchips from hardwood should have a price of 0.112 EUR/kg. Average of these two values is used. Cross-reference; FAOSTAT database; http://faostat.fao.org/site/626/DesktopDefault.aspx?PageID=626#ancor; Average import/export prices of EU for 'chips and particles'. Price: 48.76 Euro/m3. The density of the wood chips is 650 kg/m3. The price is recalculated accordingly.
  property carbon content 0.494
    carbon content on a dry matter basis (reserved; not for manual entry)
  property true value 77.5536; name m_wood_chips_true_value
    allocation property applied in "true value" allocation // value calculated from revenue
  properties: carbon content, fossil 0, dry mass 1 kg, wet mass 1.4 kg, water content 0.4, water in wet mass 0.4 kg, carbon content, non-fossil 0.494, carbon allocation 0.494 kg

## Inputs from technosphere
- electricity, medium voltage: 0 kWh; pedigree (1,1,1,1,1)
  Literature value; sample from Germany
- sawlog and veneer log, softwood, measured as solid wood under bark: 0 m3; pedigree (1,1,1,1,1)
  Literature value; sample from Germany
  properties: carbon content, non-fossil 0.494, wet mass 776.751 kg, water content 0.7, dry mass 456.912 kg, heating value, net 4483.78 MJ, basic wood density 402.083
  note on heating value, net: Value based on the dataset "softwood forestry, mixed species, sustainable forest management"The property is based on a value of 11.58MJ/kg
- diesel, burned in building machine: 0.00748134 MJ; lognormal variance with pedigree 0.0446, pedigree (1,4,5,5,1)
  Literature value; sample from Germany
  properties: heating value, net 1 MJ
- sawnwood, softwood, raw: 1.48359e-5 m3; lognormal variance with pedigree 0.0112, pedigree (2,1,4,5,1)
  Literature value; sample from Germany
  properties: wet mass 659.726 kg, water content 0.7, heating value, net 5130.57 MJ, dry mass 388.074 kg, carbon content, non-fossil 0.494
- waste rubber, unspecified: -2.94816e-5 kg; name w_rubber; = (m_rubber)*-1; lognormal variance with pedigree 0.1786, pedigree (4,5,5,5,5)
  calculated from rubber input
  production volume 1.24e6 kg; = w_rubber*layered_board_3_5_pv
    Calculated from production volume of reference product using the relative outputs.
  property price 0 EUR2005; name w_rubber_price_EUR2005
  property dry mass 1 kg; name w_rubber_DM
  properties: wet mass 1 kg, heating value, net 27.19 MJ, carbon content, fossil 0.853
  note on heating value, net: Value taken from the general comment of the treatment dataset.
- wastewater from particleboard production: -1.68034e-5 m3; name wastewater; lognormal variance with pedigree 0.0446, pedigree (1,4,5,5,1)
  Literature value; sample from Germany
  production volume 706752 m3; = wastewater*layered_board_3_5_pv
    Calculated from production volume of reference product using the relative outputs.
  property price 0 EUR2005; name wastewater_price_EUR2005
  properties: water content 2962.17, wet mass 1000 kg, carbon content, non-fossil 0.377131, dry mass 0.337476 kg
- furnace, wood chips, with silo, 300kW: 5.60464e-9 unit; = 2.31E-08*wood_fuel/1.33333; lognormal variance with pedigree 0.0106, pedigree (1,1,4,5,1)
  Infrastructure factor from DS "Heat, district or industrial, other than natural gas {CH}| heat production, wood chips from industry, at furnace 5000kW | Cut-off, U", multiplied by the input of wood fuel (direct wood fuel plus production residues); correction for assumed efficiency as original value refers to heat output
- synthetic rubber: 2.94816e-5 kg; name m_rubber; lognormal variance with pedigree 0.2106, pedigree (5,5,5,5,5)
  Literature value; sample from Germany
  property carbon content, fossil 0.871949; name C_content_fossil_rubber
  properties: heating value, net 26.42 MJ, dry mass 1 kg, wet mass 1 kg
  note on carbon content, fossil: EPDM (Ethylene-propene-diene terpolymer) rubber is a terpolymer of ethylene, propene, and a diene with the residual unsaturated portion of the diene in the side chain (ecoinvent v2.2 report 7-part XX & Ullmann). Chemical formula (deduced from Evidences of Solvent-Induced Miscibility in Polychloroprene-co-Ethylene-Propene Diene Terpolymer Blends, Dubey et al., Journal of Applied Polymer Science, 2009, 111:1884-1891): C20H35
- wooden board factory, organic bonded boards: 6.3338e-12 unit; lognormal variance with pedigree 0.398, pedigree (4,5,5,5,4)
  Default value from ecoinvent 2.2
- municipal solid waste: 0 kg; name w_MSW; pedigree (1,1,1,1,1)
  Literature value; sample from Germany
  Uncertainty: a
  production volume 0 kg
    Calculated from production volume of reference product using the relative outputs.
  properties: dry mass 0.771 kg, carbon content, fossil 0.171549, wet mass 1 kg, heating value, net 11.74 MJ, carbon content, non-fossil 0.261655, water content 0.297017
  note on carbon content, fossil: MSW composition in tab 4.1, ecoinvent v2.2 report 13_I. C content referred to 1 kg DM
- melamine urea formaldehyde adhesive: 0.0033843 kg; lognormal variance with pedigree 0.0446, pedigree (1,4,5,5,1)
  Literature value; sample from Germany
  properties: heating value, net 14.65 MJ, carbon content, fossil 0.311708, dry mass 1 kg, wet mass 1 kg
- waste wood, post-consumer: 0.00252971 kg; lognormal variance with pedigree 0.0112, pedigree (2,1,4,5,1)
  Literature value; sample from Germany
  properties: wet mass 1.4 kg, water content 0.4, heating value, net 9.99 MJ, carbon content, non-fossil 0.494, dry mass 1 kg
- tap water: 0 kg; name m_tapwater; pedigree (1,1,1,1,1)
  Literature value; sample from Germany
  properties: dry mass 0.000337476 kg, water content 2962.17, wet mass 1 kg, carbon content, fossil 0.00178991
  note on carbon content, fossil: Bicarbonate content is 2.93 mol/m3. CO2 content is 0.1 mol/m3 (ecoinvent v2.2 report 8, Tab 93.1).
- waste mineral oil: -5.592e-5 kg; name w_mineral_oil; = (m_lubricating_oil/DM_oil)*-1; lognormal variance with pedigree 0.0118, pedigree (2,3,4,5,1)
  hydraulic oil and engine oil/grease; adjusted for water content of waste oil
  production volume 2.352e6 kg; = w_mineral_oil*layered_board_3_5_pv
    Calculated from production volume of reference product using the relative outputs.
  property price 0 EUR2005; name w_mineral_oil_price_EUR2005
  properties: wet mass 1 kg, heating value, net 34.7 MJ, carbon content, fossil 0.864444, water content 0.111111, dry mass 0.9 kg
  note on carbon content, fossil: Tab A.6, ecoinvent v2.2 report 13_I. C content has been calculated after data in the tables, and then referred to 1 kg DM
- lubricating oil: 5.592e-5 kg; name m_lubricating_oil; lognormal variance with pedigree 0.0206, pedigree (4,4,4,5,1)
  Literature value; sample from Germany
  property dry mass 1 kg; name DM_oil
  properties: heating value, net 40.2 MJ, carbon content, fossil 0.75, wet mass 1 kg
  note on heating value, net: Literature value, Source: IPCC 2006, 2006 IPCC Guidelines for National Greenhouse Gas Inventories, Prepared by the National Greenhouse Gas Inventories Programme, Eggleston H.S., Buendia L., Miwa K., Ngara T. and Tanabe K. (eds). Published: IGES, Japan
  note on carbon content, fossil: Lubricating oil is produced from diesel. C-content/dry mass of fats and oils considered 75%, from: ecoinvent v2.2 report, n 15a, pg 40
- sawnwood, board, softwood, raw, dried (u=10%): 2.52971e-5 m3; lognormal variance with pedigree 0.0112, pedigree (2,1,4,5,1)
  Literature value; sample from Germany
  property water content 0.1; name water_content
  property wet mass 464.64 kg; name WM
  property dry mass 422.4 kg; name basic_wood_d
  property water in wet mass 42.24 kg; name WWM
  properties: heating value, net 5700.67 MJ, carbon content, non-fossil 0.494
  note on heating value, net: Assumed equal to "sawnwood, softwood, dried (u=10%), planed".The property is based on a value of 13.38MJ/kg
- wood ash mixture, pure: -0.00016175 kg; name w_wood_ash; = (0.000666666666666667*wood_fuel/1.33333)*-1; lognormal variance with pedigree 0.0112, pedigree (1,3,4,5,1)
  Amount derived from DS "Heat, district or industrial, other than natural gas {CH}| heat production, wood chips from industry, at furnace 5000kW | Cut-off, U" on heat generation from industrial residual wood per MJ, multiplied by the input of wood fuel (direct wood fuel plus production residues ) scaled to reflect wood input per generated heat
  production volume 6.80322e6 kg; = w_wood_ash*layered_board_3_5_pv
    Calculated from production volume of reference product using the relative outputs.
  property price 0 EUR2005; name w_wood_ash_price_EUR2005
  properties: dry mass 1 kg, wet mass 1 kg, carbon content, non-fossil 0.012
- electricity, medium voltage: 0.000430237, 8.2501e-5, 0.00138502, 0.0201439, 0.00283929, 0.00925083 kWh (6 entries); lognormal variance with pedigree 0.0446, pedigree (1,4,5,5,1)
  Literature value; sample from Germany
- sawlog and veneer log, softwood, measured as solid wood under bark: 2.2582e-6, 0.00047173 m3 (2 entries); lognormal variance with pedigree 0.0112, pedigree (2,1,4,5,1)
  Literature value; sample from Germany
- municipal solid waste: -1.32822e-7, -3.34678e-8, -4.78275e-8, -9.39369e-5 kg (4 entries); lognormal variance with pedigree 0.1318, pedigree (2,3,4,5,5)
  Literature value; sample from Germany
  Uncertainty: a
  production volume 3.96e6 kg
- tap water: 0.000142464, 1.71488e-5, 2.83413e-5, 0.000714655, 1.85916e-5, 5.28834e-5, 0.00817816 kg (7 entries); lognormal variance with pedigree 0.0118, pedigree (2,3,4,5,1)
  Literature value; sample from Germany

## Inputs from nature
- Carbon dioxide, non-fossil, resource correction [natural resource, in air]: 1.49661 kg; pedigree (1,1,1,1,1)
  This exchange has been added after economic allocation in order to re-balance the non-fossil carbon dioxide resource extraction.
- Water, cooling, unspecified natural origin [natural resource, in water]: 7.65134e-6 m3; name water_cooling_UNO_input; lognormal variance with pedigree 0.0446, pedigree (1,4,5,5,1)
  Literature value; sample from Germany

## Emissions to nature
- Carbon dioxide, non-fossil [air, unspecified]: 0.0346145 kg; = 0.142666666666666*wood_fuel/1.33333; lognormal variance with pedigree 0.0438, pedigree (2,3,5,5,1)
  Emission factor from DS "Heat, district or industrial, other than natural gas {CH}| heat production, wood chips from industry, at furnace 300kW | Cut-off, U" on heat generation from industrial residual wood per MJ, multiplied by the input of wood fuel (direct wood fuel plus production residues ) scaled to reflect wood input per generated heat.
- Water [air, unspecified]: 1.45577e-5 m3; = 0.00006*wood_fuel/1.33333+m_tapwater/1000+water_cooling_UNO_input-(wastewater*-1); lognormal variance with pedigree 0.132, pedigree (4,4,5,5,4)
  Water emissions from the combustion of the wood (emission per MJ, scaled to wood input and extrapolated from wood input to heat generated) plus tap water input plus input of cooling water minus waste water
- m-Xylene [air, unspecified]: 3.882e-8 kg; name mxylene; = 0.00000016*wood_fuel/1.33333; lognormal variance with pedigree 0.0832, pedigree (2,3,5,5,1)
  (same comment as for Carbon dioxide, non-fossil)
- Acetaldehyde [air, unspecified]: 1.97335e-8 kg; = 8.13333333333333E-08*wood_fuel/1.33333; lognormal variance with pedigree 0.0832, pedigree (2,3,5,5,1)
  (same comment as for Carbon dioxide, non-fossil)
- PAH, polycyclic aromatic hydrocarbons [air, unspecified]: 3.59085e-9 kg; name pah; = 0.0000000148*wood_fuel/1.33333; lognormal variance with pedigree 0.3432, pedigree (2,3,5,5,1)
  (same comment as for Carbon dioxide, non-fossil)
- Benzene [air, unspecified]: 2.94385e-7 kg; = 1.21333333333333E-06*wood_fuel/1.33333; lognormal variance with pedigree 0.0832, pedigree (2,3,5,5,1)
  (same comment as for Carbon dioxide, non-fossil)
- Manganese [air, unspecified]: 5.4995e-8 kg; name manganese; = 2.26666666666667E-07*wood_fuel/1.33333; lognormal variance with pedigree 0.6932, pedigree (2,3,5,5,1)
  (same comment as for Carbon dioxide, non-fossil)
- Magnesium [air, unspecified]: 1.1646e-7 kg; name magnesium; = 0.00000048*wood_fuel/1.33333; lognormal variance with pedigree 0.6932, pedigree (2,3,5,5,1)
  (same comment as for Carbon dioxide, non-fossil)
- Phenol, pentachloro- [air, unspecified]: 2.62035e-12 kg; = 0.0000000000108*wood_fuel/1.33333; lognormal variance with pedigree 0.0832, pedigree (2,3,5,5,1)
  (same comment as for Carbon dioxide, non-fossil)
- Potassium [air, unspecified]: 7.5699e-6 kg; = 0.0000312*wood_fuel/1.33333; lognormal variance with pedigree 0.0832, pedigree (2,3,5,5,1)
  (same comment as for Carbon dioxide, non-fossil)
- Particulates, < 2.5 um [air, unspecified]: 2.9115e-5 kg; = 0.00012*wood_fuel/1.33333; lognormal variance with pedigree 0.3432, pedigree (2,3,5,5,1)
  (same comment as for Carbon dioxide, non-fossil)
- Ammonia [air, unspecified]: 5.59655e-7 kg; = 2.30666666666667E-06*wood_fuel/1.33333; lognormal variance with pedigree 0.0832, pedigree (2,3,5,5,1)
  (same comment as for Carbon dioxide, non-fossil)
- Hydrocarbons, aliphatic, unsaturated [air, unspecified]: 1.00285e-6 kg; = 4.13333333333333E-06*wood_fuel/1.33333; lognormal variance with pedigree 0.0832, pedigree (2,3,5,5,1)
  (same comment as for Carbon dioxide, non-fossil)
- Formaldehyde [air, unspecified]: 5.1186e-6 kg; = 1.73333333333334E-07*wood_fuel/1.33333+0.02669; lognormal variance with pedigree 0.1632, pedigree (2,3,5,5,1)
  Emission factor from DS "Heat, district or industrial, other than natural gas {CH}| heat production, wood chips from industry, at furnace 300kW | Cut-off, U" on heat generation from industrial residual wood per MJ, multiplied by the input of wood fuel (direct wood fuel plus production residues ) scaled to reflect wood input per generated heat plus estimated emissions from wood and glue drying processes (according to Rüter & Diederichs 2012).
- Dioxins, measured as 2,3,7,8-tetrachlorodibenzo-p-dioxin [air, unspecified]: 1.00285e-14 kg; = 4.13333333333333E-14*wood_fuel/1.33333; lognormal variance with pedigree 0.3432, pedigree (2,3,5,5,1)
  (same comment as for Carbon dioxide, non-fossil)
- Chlorine [air, unspecified]: 5.823e-8 kg; = 0.00000024*wood_fuel/1.33333; lognormal variance with pedigree 0.6932, pedigree (2,3,5,5,1)
  (same comment as for Carbon dioxide, non-fossil)
- NMVOC, non-methane volatile organic compounds, unspecified origin [air, unspecified]: 2.2645e-6 kg; name nmvoc; = 9.33333333333334E-06*wood_fuel/1.33333; lognormal variance with pedigree 0.0832, pedigree (2,3,5,5,1)
  (same comment as for Carbon dioxide, non-fossil)
- Chromium [air, unspecified]: 1.28106e-9 kg; = 5.28000000000001E-09*wood_fuel/1.33333; lognormal variance with pedigree 0.6932, pedigree (2,3,5,5,1)
  (same comment as for Carbon dioxide, non-fossil)
- Methane, non-fossil [air, unspecified]: 1.45575e-6 kg; = 0.000006*wood_fuel/1.33333; lognormal variance with pedigree 0.0832, pedigree (2,3,5,5,1)
  (same comment as for Carbon dioxide, non-fossil)
- Sodium [air, unspecified]: 4.2055e-7 kg; = 1.73333333333334E-06*wood_fuel/1.33333; lognormal variance with pedigree 0.6932, pedigree (2,3,5,5,1)
  (same comment as for Carbon dioxide, non-fossil)
- Dinitrogen monoxide [air, unspecified]: 8.0875e-7 kg; = 3.33333333333334E-06*wood_fuel/1.33333; lognormal variance with pedigree 0.0832, pedigree (2,3,5,5,1)
  (same comment as for Carbon dioxide, non-fossil)
- Benzo(a)pyrene [air, unspecified]: 1.6175e-10 kg; = 6.66666666666667E-10*wood_fuel/1.33333; lognormal variance with pedigree 0.3432, pedigree (2,3,5,5,1)
  (same comment as for Carbon dioxide, non-fossil)
- Zinc [air, unspecified]: 9.705e-8 kg; = 0.0000004*wood_fuel/1.33333; lognormal variance with pedigree 0.6932, pedigree (2,3,5,5,1)
  (same comment as for Carbon dioxide, non-fossil)
- Carbon monoxide, non-fossil [air, unspecified]: 0.00016175 kg; = 0.000666666666666667*wood_fuel/1.33333; lognormal variance with pedigree 0.6932, pedigree (2,3,5,5,1)
  (same comment as for Carbon dioxide, non-fossil)
- Arsenic [air, unspecified]: 3.235e-10 kg; = 1.33333333333333E-09*wood_fuel/1.33333; lognormal variance with pedigree 0.6932, pedigree (2,3,5,5,1)
  (same comment as for Carbon dioxide, non-fossil)
- Nickel [air, unspecified]: 1.941e-9 kg; name nickel; = 0.000000008*wood_fuel/1.33333; lognormal variance with pedigree 0.6932, pedigree (2,3,5,5,1)
  (same comment as for Carbon dioxide, non-fossil)
- Mercury [air, unspecified]: 9.705e-11 kg; name mercury; = 0.0000000004*wood_fuel/1.33333; lognormal variance with pedigree 0.6932, pedigree (2,3,5,5,1)
  (same comment as for Carbon dioxide, non-fossil)
- Fluorine [air, unspecified]: 1.6175e-8 kg; = 6.66666666666667E-08*wood_fuel/1.33333; lognormal variance with pedigree 0.0832, pedigree (2,3,5,5,1)
  (same comment as for Carbon dioxide, non-fossil)
- Sulfur dioxide [air, unspecified]: 8.0875e-7 kg; = 3.33333333333334E-06*wood_fuel/1.33333; lognormal variance with pedigree 0.0438, pedigree (2,3,5,5,1)
  (same comment as for Carbon dioxide, non-fossil)
- Nitrogen oxides [air, unspecified]: 5.823e-5 kg; = 0.00024*wood_fuel/1.33333; lognormal variance with pedigree 0.0832, pedigree (2,3,5,5,1)
  (same comment as for Carbon dioxide, non-fossil)
- Particulates, > 2.5 um, and < 10um [air, unspecified]: 2.9115e-5 kg; = 0.00012*wood_fuel/1.33333; lognormal variance with pedigree 0.1632, pedigree (2,3,5,5,1)
  (same comment as for Carbon dioxide, non-fossil)
- Lead [air, unspecified]: 8.0875e-9 kg; = 3.33333333333333E-08*wood_fuel/1.33333; lognormal variance with pedigree 0.6932, pedigree (2,3,5,5,1)
  (same comment as for Carbon dioxide, non-fossil)
- Bromine [air, unspecified]: 1.941e-8 kg; = 0.00000008*wood_fuel/1.33333; lognormal variance with pedigree 0.6932, pedigree (2,3,5,5,1)
  (same comment as for Carbon dioxide, non-fossil)
- Calcium [air, unspecified]: 1.89247e-6 kg; = 0.0000078*wood_fuel/1.33333; lognormal variance with pedigree 0.6932, pedigree (2,3,5,5,1)
  (same comment as for Carbon dioxide, non-fossil)
- Toluene [air, unspecified]: 9.705e-8 kg; = 0.0000004*wood_fuel/1.33333; lognormal variance with pedigree 0.0832, pedigree (2,3,5,5,1)
  (same comment as for Carbon dioxide, non-fossil)
- Hydrocarbons, aliphatic, alkanes, unspecified [air, unspecified]: 2.94385e-7 kg; = 1.21333333333333E-06*wood_fuel/1.33333; lognormal variance with pedigree 0.0832, pedigree (2,3,5,5,1)
  (same comment as for Carbon dioxide, non-fossil)
- Benzene, ethyl- [air, unspecified]: 9.705e-9 kg; = 0.00000004*wood_fuel/1.33333; lognormal variance with pedigree 0.0832, pedigree (2,3,5,5,1)
  (same comment as for Carbon dioxide, non-fossil)
- Cadmium [air, unspecified]: 2.2645e-10 kg; = 9.33333333333334E-10*wood_fuel/1.33333; lognormal variance with pedigree 0.6932, pedigree (2,3,5,5,1)
  (same comment as for Carbon dioxide, non-fossil)
- Copper [air, unspecified]: 7.117e-9 kg; = 2.93333333333334E-08*wood_fuel/1.33333; lognormal variance with pedigree 0.6932, pedigree (2,3,5,5,1)
  (same comment as for Carbon dioxide, non-fossil)
- Phosphorus [air, unspecified]: 9.705e-8 kg; = 0.0000004*wood_fuel/1.33333; lognormal variance with pedigree 0.0832, pedigree (2,3,5,5,1)
  (same comment as for Carbon dioxide, non-fossil)
- Chromium VI [air, unspecified]: 1.294e-11 kg; = 5.33333333333334E-11*wood_fuel/1.33333; lognormal variance with pedigree 0.6932, pedigree (2,3,5,5,1)
  (same comment as for Carbon dioxide, non-fossil)
- Benzene, hexachloro- [air, unspecified]: 2.3292e-15 kg; = 9.60000000000001E-15*wood_fuel/1.33333; lognormal variance with pedigree 0.0832, pedigree (2,3,5,5,1)
  (same comment as for Carbon dioxide, non-fossil)

## Sampling procedure
Literature; emissions profile per MJ wood input from PSI (2014)

## Extrapolations
See Geography and Technology
