# sand to generic market for inert filler

Dataset: EcoSpold 2, unit process
Geography: GLO
Time period: 2012-01-01 to 2021-12-31
Technology level: current
Classification: ISIC rev.4 ecoinvent: 2394:Manufacture of cement, lime and plaster
Scenario: Business-as-Usual
System model: Allocation, cut-off by classification
Generated by: Emilia Moreno Ruiz
Database: ecoinvent
isCopyrightProtected: true
accessRestrictedTo: 1

## General comment
This activity links the output of the market for sand to the market for inert filler. The relative use of sand as inert filler has been quantified using information in USGS.

## Included activities start
The activity starts with the input of sand from the market for sand.

## Included activities end
The activity ends with the provision of inert filler to the inert filler market.

## Reference product
- inert filler: 1 kg; name inert_filler; CPC 37410: Plasters; By-product classification allocatable product
  production volume 4.116e11 kg; = 294000000000*0.35*4
    Data from USGS (http://minerals.usgs.gov/minerals/pubs/commodity/sand_&_gravel_construction/sandgmyb05.xls), 2005. From T6, the amount of Concrete aggregates (including concrete sand) used in US were taken. The share sand/gravel was considered 0.35:0.65 (ecoinvent v2 report 7). The US data were upscaled to GLO using the relative GDP (multiplying by 4).
  property price 0.004 EUR2005; name inert_filler_price_EUR2005
    Temporary price data. Calculated as 90% of purchasers price based on: 2004 market prices are estimated to be equal to USA prices, which are given according to http://minerals.usgs.gov/minerals/pubs/commodity/sand_&_gravel_construction/myb1-2007-sandc.xls, table 1, downloaded 21 April 2009. Same price for gravel and sand.
  property carbon content 0
    carbon content on a dry matter basis (reserved; not for manual entry)
  properties: dry mass 1 kg, wet mass 1 kg, carbon content, non-fossil 0, water in wet mass 0 kg, water content 0, carbon content, fossil 0, carbon allocation 0 kg

## Inputs from technosphere
- sand: 0 kg; pedigree (1,1,1,1,1)
  properties: dry mass 1 kg, wet mass 1 kg
- sand: 7.85489e-5, 0.0151302, 0.000181157, 0.98461 kg (4 entries); lognormal variance with pedigree 0.2106, pedigree (5,5,5,5,5)

## Extrapolations
This dataset has been extrapolated from year 2012 to the year of the calculation (2021). The uncertainty has been adjusted accordingly.

## Review by Emilia Moreno Ruiz 2012-04-16
created to allow clinker production submission, by Michael Boesch
