# anchovy, capture by steel purse seiner and landing whole, fresh

Dataset: EcoSpold 2, unit process
Geography: ES
Time period: 2015-01-01 to 2021-12-31
Technology level: current
Classification: ISIC rev.4 ecoinvent: 0311:Marine fishing
Scenario: Business-as-Usual
System model: Allocation, cut-off by classification
Generated by: Ian Vázquez-Rowe
Published in: Avadí, A. 2018
Database: ecoinvent
isCopyrightProtected: false
accessRestrictedTo: 1

## General comment
This activity represents the purse seining operations to capture and land European anchovy (Engraulis encrasicolus) in the region of Cantabria, in northern Spain. All the anchovy is landed fresh, but then only 50% is consumed fresh. An additional 25% is sent to the local industry to produce canned anchovy-based products, whereas the remaining 25% is used to produce salted anchovy. These purse seiners target European anchovy, but they also capture other species, such as mackerel (Scomber spp.), European pilchard (Sardina pilchardus) and, to a lesser extent, some types of tunids. Fishing operations occur in the Bay of Biscay within the Spanish EEZ. A total of 41 vessels belonged in 2015 to this fleet.

## Included activities start
From vessel use and maintenance phases, including all upstream activities.

## Included activities end
Port landing operations are excluded from the system boundary.

## Allocation
The system is unallocated between anchovy landings and the by-catch.

## Geography
European anchovy (Engraulis encrasicolus) is captured in the Spanish EEZ in the Cantabrian Sea.

## Technology
Current technology deployed in Spain includes purse seining and fish detection equipment.

## Time period
Data corresponds to the landings of the average vessel of the Cantabrian purse seining fleet in 2015.

## Parameters
- net calorific value: 42.7 MJ/kg; name net_cal_value; triangular min 41.4, mostLikely 42.7, max 43.3, pedigree (3,5,3,5,5)
  Net calorific value of marine diesel oil (MDO).
  Uncertainty: Most likely value from Wild (2005) Determination of energy cost of electrical energy on board sea-going vessels: "The net calorific value of marine diesel oil (MDO) and marine gas oil (MGO) is 42,700 kJ/kg". Uncertainty data from 2006 IPCC Guidelines for National Greenhouse Gas Inventories, Vol 1, Table 1.2 Default net calorific values (NCVs) and lower and upper limits of the 95 percent confidence intervals (data for Gas/Diesel Oil)
- annual landings per vessel: 451676 kg; name landings_vessel_year; triangular min 451676, mostLikely 451676, max 451676, pedigree (2,1,1,1,1)
  Average annual landings per individual vessel.
  Uncertainty: Based on 32 datapoints on annual landings and fuel consumption from 32 vessels in 2015
- marine fuel use efficiency: 340 kg; name FUE; triangular min 160, mostLikely 340, max 1150, pedigree (2,1,1,1,1)
  Amount of marine fuel consumed per landed unit of fish.
  Uncertainty: Based on 32 datapoints on annual landings and fuel consumption from 32 vessels in 2015.
- lifetime: 35 year; lognormal variance with pedigree 0.308925, pedigree (4,2,2,2,2)
  Average lifetime of purse seiners in Cantabria, Spain.
- average_weight_seiner: 167000 kg; name WeightSeiner; triangular min 73000, mostLikely 167000, max 274000, pedigree (4,2,3,2,2)
  Weight of the average vessel for a sample of 21 purse seiners in Cantabria, Spain.

## Reference product
- landed anchovy, fresh: 1 kg; name landed; source Laso, J. 2018; CPC 04261: Other wild pelagic fish, live, fresh or chilled; By-product classification allocatable product
  Fresh whole European anchovy (Engraulis encrasicolus) captured in the Cantabrian Sea within the Spanish EEZ and landed for fresh consumption and canning.
  production volume 7e6 kg; name ProdVol
    7 thousand tons landed in 2015, substantila increase in landings in the period 2010-2015. The fishery was closed due to overexploitation in the period 2007-2009.
  property price 0.539258 EUR2005; name landed_price_EUR2005
    Calculated value based on data from United Nations Commodity Trade Statistics Database (comtrade.un.org). UN comtrade category: 30242 Fish; fresh or chilled, anchovies (Engraulis spp.), excluding fillets, livers, roes, and other fish meat of heading 0304. Year 2014. Using exchange rate of 1EURO = 1.209 USD. Average of price of import into 3 main markets (EU, US and CN).
  property carbon content, non-fossil 0.481541; = (1-anch_protein-anch_fat-anch_ash)*0.444+anch_protein*0.535+anch_fat*0.774
    Calculated from C_content = polysaccharids*0.444+protein*0.535+lipids*0.774 and polysaccharids = 1-(protein+lipids+ash)
  property protein content 0.191; name anch_protein
    Data for Peruvian anchovies
  property fat content 0.088; name anch_fat
    Data for Peruvian anchovies
  property ash content 0.02 kg; name anch_ash
    http://frida.fooddata.dk/ShowFood.php?foodid=1121&2
  property carbon content 0.481541
    carbon content on a dry matter basis (reserved; not for manual entry)
  property true value 539.258; name landed_true_value
    allocation property applied in "true value" allocation // value calculated from revenue
  properties: wet mass 1 kg, water in wet mass 0.73798 kg, water content 2.81651, energy content 7.9 MJ, dry mass 0.26202 kg, carbon allocation 0.126173 kg

## By-products
- landed anchovy by-catch, fresh: 0 kg; name bycatch; source Laso, J. 2018; By-product classification allocatable product; pedigree (1,1,1,1,1)
  By-catch for European anchovy includes other small-pelagics, such as mackerel (Scomber scombrus) or European pilchard (Sardina pilchardus). Moreover, by-catch includes a small amount of tunids.
  Uncertainty: Data were obtained for 32 different vessels in Cantabria, Spain.
  production volume 9.0811e6 kg; = ProdVol*(bycatch/1000)
    This value should be taken with care given the different fish species that are included in anchovy bycatch.
  property carbon content, non-fossil 0.481541
    Assumed equal value with landed anchovy. Calculated from C_content = polysaccharids*0.444+protein*0.535+lipids*0.774 and polysaccharids = 1-(protein+lipids+ash)
  property price 0.3595 EUR2005; name bycatch_price_EUR2005
    Based on expert judgement, the price of this product is estimated to be circa 2/3 of the price of anchovies. Therefore the price is calculated to be 0.3595 EUR per kg of product
  property carbon content 0.481541
    carbon content on a dry matter basis (reserved; not for manual entry)
  property true value 466.379; name bycatch_true_value
    allocation property applied in "true value" allocation // value calculated from revenue
  properties: wet mass 1 kg, water content 2.81651, water in wet mass 0.73798 kg, dry mass 0.26202 kg, carbon content, fossil 0, carbon allocation 0.126173 kg

## Inputs from technosphere
- lubricating oil: 0.00631095 kg; name oil; source Laso, J. 2018; lognormal variance with pedigree 0.0107, pedigree (4,2,3,1,1)
  Lubricating oil for vessel engine
  Uncertainty: Data from a sample of 32 vessels.
  property carbon content, fossil 0.75; name oil_CCF
  properties: wet mass 1 kg, dry mass 1 kg, heating value, net 40.2 MJ
  note on carbon content, fossil: Lubricating oil is produced from diesel. C-content/dry mass of fats and oils considered 75%, from: ecoinvent v2.2 report, n 15a, pg 40
  note on heating value, net: Literature value, Source: IPCC 2006, 2006 IPCC Guidelines for National Greenhouse Gas Inventories, Prepared by the National Greenhouse Gas Inventories Programme, Eggleston H.S., Buendia L., Miwa K., Ngara T. and Tanabe K. (eds). Published: IGES, Japan
- operation, reefer, freezing: 0.478134 kg*day; source Laso, J. 2018; lognormal variance with pedigree 0.0026, pedigree (1,1,3,1,1)
  Ice consumed for 1000 kg of landed anchovy on board.
  Uncertainty: Data from a sample of 32 vessels.
- antifouling paint emissions: -0.0020326 kg; name antif; source Laso, J. 2018; lognormal variance with pedigree 0.1046, pedigree (4,5,5,4,3)
  Mass of solids from antifouling paint. Two thirds of applied is emitted to ocean.
  Uncertainty: Data adapted from previous literature studies on antifouling emissions in LCA:
  production volume 26533.5 kg; = antif*(ProdVol/1000)
    Amount of antifouling emissions linked to the entire annual extraction of European anchovy.
  property price 0 EUR2005; name antif_price_EUR2005
  properties: wet mass 1 kg, carbon content, fossil 0.21, carbon content, non-fossil 0.21, dry mass 1 kg
- waste mineral oil: -0.00631095 kg; = (oil)*-1; source Laso, J. 2018; lognormal variance with pedigree 0.3507, pedigree (3,3,5,3,3)
  Waste lubricating oil treated inland
  Uncertainty: Data based on reports from port authorities in Cantabria, Spain.
  production volume 8.2383e7 kg; = ProdVol*oil
    Based on GDP to avoid distortions linked to different levels of efficiency in vessels
  properties: carbon content, fossil 0.75, dry mass 0.9 kg, wet mass 1 kg, water content 0.111111, heating value, net 34.7 MJ
  note on carbon content, fossil: Tab A.6, ecoinvent v2.2 report 13_I. C content has been calculated after data in the tables, and then referred to 1 kg DM
  note on heating value, net: Value taken from the general comment of the treatment dataset.
- purse seiner maintenance, steel: 0.0130135 kg; = WeightSeiner/(landings_vessel_year*lifetime)*2297.3; source Pierre Fréon 2014; lognormal variance with pedigree 0.0439, pedigree (2,4,5,3,2)
  Maintenance of a purse seiner, per 1000 kg of light ship weight (LSW) over 35 years lifetime. Regressions based on mainly primary data were created to relate the weight of each inventory item to a purse seiner's LSW. The list of inventory items (granularity) contribute >95% of environmental impacts, as described in the reference publication.
  Uncertainty: Data obtained from laso et al. (2018), but modelled based on calculations available in Fréon et al. (2014)
- purse seiner, steel: 0.0130135 kg; = (WeightSeiner)/(landings_vessel_year*lifetime)*2297.3; source Pierre Fréon 2014; lognormal variance with pedigree 0.0439, pedigree (2,4,5,3,2)
  Construction of a purse seiner, per 1000 kg of light ship weight (LSW). Regressions based on mainly primary data were created to relate the weight of each inventory item to a purse seiner's LSW. The list of inventory items (granularity) contribute >95% of environmental impacts, as described in the reference publication.
  Uncertainty: Data obtained from laso et al. (2018), but modelled based on calculations available in Fréon et al. (2014)
  property lifetime 35 year; name lifetime
  properties: lifetime capacity [h] 56000 hour
- diesel, burned in fishing vessel: 17.8846 MJ; = FUE*net_cal_value*2.2973; source Laso, J. 2018; lognormal variance with pedigree 0.0026, pedigree (1,1,3,1,1)
  Landings-weighted average fuel use efficiency. Uncertainty data for fuel use efficiency described in the parameter definition
  Uncertainty: Data on diesel consumption were collected directly from skippers. Diesel combustion emissions were obtained from the EMEP/EEA air pollutant emission inventory guidebook (formerly called the EMEP CORINAIR emission inventory guidebook) from the European Environment Agency (https://www.eea.europa.eu/themes/air/emep-eea-air-pollutant-emission-inventory-guidebook).

## Inputs from nature
- Fish, pelagic, in ocean [natural resource, biotic]: 1.32622 kg; name captured; = landed+bycatch+discarded; source Laso, J. 2018; lognormal variance with pedigree 0.0032, pedigree (2,1,3,1,1)
  Fish captured, including discards.
  Uncertainty: Data were obtained for 32 vessels in Cantabria, Spain.
  property ash content 0.015 kg; name fishp_ash
  property protein content 0.179; name fishp_protein
  property fat content 0.07; name fishp_fat

## Emissions to nature
- Discarded fish, pelagic, to ocean [water, ocean]: 0.0943237 kg; name discarded; source Vázquez-Rowe, I. 2011; lognormal variance with pedigree 0.049225, pedigree (4,1,5,2,2)
  Pelagic fish discarded by fisheries. Based on Vázquez-Rowe et al. (2011) in Marine Policy, a 3.2% discard rate was assumed for this fishery.
  Uncertainty: Data were extrapolated from purse seining vessels in the neighbouring region of Galicia.
  property fat content 0.07; name discardsp_fat
  property ash content 0.015 kg; name discardsp_ash
  property protein content 0.179; name discardsp_protein

## Extrapolations
Valid for other anchovy-landing purse seining fleets in the Cantabrian Sea in Spain (e.g., Asturias, Basque Country or Galicia). If extrapolated to other geographical locations, uncertainty should be adjusted accordingly.
