# light fuel oil, import from RoW

Dataset: EcoSpold 2, unit process
Geography: ZA
Time period: 2014-01-01 to 2021-12-31
Technology level: current
Classification: ISIC rev.4 ecoinvent: 1920:Manufacture of refined petroleum products
Scenario: Business-as-Usual
System model: Allocation, cut-off by classification
Generated by: Axel Lieblich
Published in: Fehrenbach, H. 2018
Database: ecoinvent
isCopyrightProtected: true
accessRestrictedTo: 1

## General comment
This dataset represents the import of a refined petroleum products of unspecified geographical origin of supply to the domestic/regional market for this product. The transport requirements (expressed in tkm) with tanker ship was assumed to 10'000 km by sea by default. No product losses or other aspects, besides transport requirements have been included. The dataset is only a rough proxy with large uncertainties, and it should hence be revised accordingly if its contribution is expected to be important.

## Included activities start
Activity starts with transport by sea of a refined petroleum product of unspecified geographical origin.

## Included activities end
Activity ends with the refined petroleum product entering the domestic/regional market.

## Reference product
- light fuel oil: 1 kg; CPC 33370: Fuel oils n.e.c.; By-product classification allocatable product
  production volume 1.11e9 kg
    Calculated based on the import share in the JODI-oil database for 2015 (jodidata.org); Annual PV of product-specific import activitiy calculated based on share of import for the product category 'gas/diesel oil'
  property price 0.268 EUR2005
    Temporary price data. Calculated as 90% of purchasers price based on: Source: International Energy Agency (http://wds.iea.org/WDS/TableViewer/tableView.aspx downloaded 4 July 2009) for Germany excl. Taxes, applying fuel oil density of 0.944 kg/litre
  property carbon content 0.862
    carbon content on a dry matter basis (reserved; not for manual entry)
  properties: water content 0, wet mass 1 kg, heating value, net 42.6 MJ, carbon content, non-fossil 0, water in wet mass 0 kg, carbon content, fossil 0.862, dry mass 1 kg, carbon allocation 0.862 kg

## Inputs from technosphere
- transport, freight, sea, tanker for petroleum: 10 metric ton*km; lognormal variance with pedigree 0.33, pedigree (5,5,5,5,5)
  A transport distance of 10'000 km by sea assumed by default.
- light fuel oil: 1 kg
  Unspecified geographical origin of supply assumed due to lack of information on actual origin or missing corresponding supplying activity.
  properties: wet mass 1 kg, carbon content, fossil 0.862, dry mass 1 kg, heating value, net 42.6 MJ

## Extrapolations
This dataset has been extrapolated from year 2017 to the year of the calculation (2021). The uncertainty has been adjusted accordingly.
