# gallium, in Bayer liquor from aluminium production

Dataset: EcoSpold 2, unit process
Geography: GLO
Time period: 2005-01-01 to 2021-12-31
Technology level: current
Classification: EcoSpold01Categories: metals/extraction
Classification: ISIC rev.4 ecoinvent: 2011:Manufacture of basic chemicals
Tags: ConvertedDataset
Scenario: Business-as-Usual
System model: Allocation, cut-off by classification
Generated by: Matthias Tuchschmid (obsolete)
Published in: Classen M. 2009
Database: ecoinvent
isCopyrightProtected: true
accessRestrictedTo: 1

## General comment
This dataset is designed for accounting for resource depletion in the gallium production. As gallium is assumed to be a by-product of the aluminium production, no upstream burden is allocated to the gallium solved in the bayer liquor. Do not use this dataset for the production of gallium.
[This dataset was already contained in the ecoinvent database version 2. It was not individually updated during the transfer to ecoinvent version 3. Life Cycle Impact Assessment results may still have changed, as they are affected by changes in the supply chain, i.e. in other datasets. This dataset was generated following the ecoinvent quality guidelines for version 2. It may have been subject to central changes described in the ecoinvent version 3 change report (http://www.ecoinvent.org/database/ecoinvent-version-3/reports-of-changes/), and the results of the central updates were reviewed extensively. The changes added e.g. consistent water flows and other information throughout the database. The documentation of this dataset can be found in the ecoinvent reports of version 2, which are still available via the ecoinvent website. The change report linked above covers all central changes that were made during the conversion process.]

## Included activities end
This data set describes the simultaneous extraction of gallium together with aluminium in the Bayer process of the aluminium production.

## Geography
Data from Literature

## Technology
dissolution of gallium during the Bayer-Process for aluminium production

## Reference product
- gallium, in Bayer liquor from aluminium production: 1 kg; CPC 14290: Other non-ferrous metal ores and concentrates (other than uranium or thorium ores and concentrates); By-product classification allocatable product; CAS 7440-55-3
  EcoSpold01Location=GLO
  production volume 1 kg
    Unkown
    Dummy value to be replaced by measured, estimated or calculated value
  property price 250 EUR2005
    Literature value. According to literature (USGS, http://minerals.usgs.gov/minerals/pubs/commodity/gallium/myb1-2013-galli.pdf, accessed 20160222) the price of gallium depands on ist grade (how quality it is) and situation on the market. Gallium costs between 250 - 500 USD.
  property carbon content 0
    carbon content on a dry matter basis (reserved; not for manual entry)
  properties: dry mass 1 kg, water in wet mass 0 kg, carbon content, non-fossil 0, water content 0, carbon content, fossil 0, wet mass 1 kg, carbon allocation 0 kg

## Inputs from nature
- Gallium, in ground [natural resource, in ground]: 1 kg; lognormal variance with pedigree 0.04, pedigree (1,1,5,1,1)
  140 ppm Ga in bauxite; Data from literature (Selvi, 2004)
  Uncertainty: data from literature (Selvi, 2004)

## Sampling procedure
estimation

## Extrapolations
This dataset has been extrapolated from year 2005 to the year of the calculation (2021). The uncertainty has been adjusted accordingly.

## Review by Mischa Classen 2007-08-14
Passed.
none
