# ventilation control and wiring production, central unit

Dataset: EcoSpold 2, unit process
Geography: RoW
Time period: 2003-01-01 to 2021-12-31
Technology level: current
Classification: ISIC rev.4 ecoinvent: 2651:Manufacture of measuring, testing, navigating and control equipment
Classification: EcoSpold01Categories: ventilation/production of components
Tags: ConvertedDataset
Scenario: Business-as-Usual
System model: Allocation, cut-off by classification
Generated by: Alex Primas
Published in: Hässig, W. 2007
Database: ecoinvent
isCopyrightProtected: true
accessRestrictedTo: 1

## General comment
Production of a typical component used for a ventilation system in a multi family house. The house considered in the investigation includes 6 flats with 130 m2 floor area each and a ventilation rate of 120 m3/h.
[This dataset was already contained in the ecoinvent database version 2. It was not individually updated during the transfer to ecoinvent version 3. Life Cycle Impact Assessment results may still have changed, as they are affected by changes in the supply chain, i.e. in other datasets. This dataset was generated following the ecoinvent quality guidelines for version 2. It may have been subject to central changes described in the ecoinvent version 3 change report (http://www.ecoinvent.org/database/ecoinvent-version-3/reports-of-changes/), and the results of the central updates were reviewed extensively. The changes added e.g. consistent water flows and other information throughout the database. The documentation of this dataset can be found in the ecoinvent reports of version 2, which are still available via the ecoinvent website. The change report linked above covers all central changes that were made during the conversion process.]

## Included activities end
Materials used for the production. Estimation of electricity use for the different production steps. Energy use for heating of the production building. Transport of raw materials to the plant. Estimation for the Infrastructure of the Production site included.

## Geography
Data for production in Germany used.

## Technology
Basic control unit for central ventilation equipment with 720 m3/h nominal air flow. Electrical wiring for connection of unit and grid connection. Weight of control unit 0.6 kg, weight of wiring 4.2 kg. Electrical wiring for connection of unit

## Time period
Materials investigated in 2003

## Reference product
- ventilation control and wiring, central unit: 1 unit; CPC 44831: Parts of the following appliances: electromechanical domestic appliances, shavers and hairclippers, with self-[…]; By-product classification allocatable product
  EcoSpold01Location=RER
  production volume 2.67763 unit
    This is a placeholder value that does not reflect real-world production volumes. This dataset does not currently require a real-world production volume to work in the database framework, and no actual data were collected yet. This has no negative effect on the results of the ecoinvent database.
  property carbon content, fossil 0.262305
    C content was calculated as an addition of C content in the product components, then it was referred to 1 kg DM
  property carbon content, non-fossil 1.68025e-5
    (same comment as for ventilation control and wiring, central unit)
  property price 35.5359 EUR2005
    Calculated based on inputs: The price of the product has been calculated as a sum of the values of the material and energy inputs for this product. This value is therefore a rough estimation. It may underestimate the real price since there are additional expenses when producing any product. These expences can include for example labour costs, treatment of waste materials and profit for the producer. Please consider carefully whether this level of data quality is acceptable for your application.
  property carbon content 0.262321
    carbon content on a dry matter basis (reserved; not for manual entry)
  properties: water content 0, dry mass 4.8 kg, water in wet mass 0 kg, wet mass 4.8 kg, carbon allocation 1.25914 kg

## Inputs from technosphere
- polyvinylchloride, emulsion polymerised: 0.348512 kg; lognormal variance with pedigree 0.0546, pedigree (2,4,5,5,1)
  EcoSpold01Location=RER
  Questionnaire
  Uncertainty: Questionnaire
  properties: heating value, net 21.5 MJ, dry mass 1 kg, carbon content, fossil 0.387097, wet mass 1 kg
  note on carbon content, fossil: Monomer is vynyl chloride, C2H3Cl (ecoinvent v2.2 report 11_II). MW=62 g/mol
- heat, district or industrial, natural gas: 0 MJ; pedigree (1,1,1,1,1)
  EcoSpold01Location=RER
  Data estimated from related companies
  Uncertainty: Data estimated from related companies
  properties: heating value, net 1 MJ
- heat, district or industrial, other than natural gas: 0 MJ; pedigree (1,1,1,1,1)
  EcoSpold01Location=RER
  4,5,1,1,1,5; Data estimated from related companies
  properties: heating value, net 1 MJ
- electronics, for control units: 0.6 kg; lognormal variance with pedigree 0.074, pedigree (3,4,5,5,3)
  EcoSpold01Location=RER
  Questionnaire, approximation for technology
  Uncertainty: Questionnaire, approximation for technology
  properties: dry mass 1 kg, wet mass 1 kg, carbon content, fossil 0.337146, carbon content, non-fossil 0.00013442
  note on carbon content, fossil: The control unit has a composition of 46% steel (housing), 32% plastics, 14% printed wiring boards and 8% cables (various types).;
- plastic processing factory: 3.56e-9 unit; lognormal variance with pedigree 0.396, pedigree (4,5,5,5,3)
  EcoSpold01Location=RER
  Calculated with data of a similar company
  Uncertainty: Calculated with data of a similar company
- wire drawing, copper: 1.76 kg; lognormal variance with pedigree 0.056, pedigree (3,4,5,5,1)
  Questionnaire, estimations
  EcoSpold01Location=RER
  Uncertainty: Questionnaire, estimations
- copper, cathode: 1.76 kg; lognormal variance with pedigree 0.056, pedigree (3,4,5,5,1)
  EcoSpold01Location=RER
  Questionnaire, estimations
  Uncertainty: Questionnaire, estimations
  properties: wet mass 1 kg, dry mass 1 kg
- polyvinylchloride, suspension polymerised: 2.38149 kg; lognormal variance with pedigree 0.0546, pedigree (2,4,5,5,1)
  EcoSpold01Location=RER
  Questionnaire
  Uncertainty: Questionnaire
  properties: dry mass 1 kg, wet mass 1 kg, heating value, net 21.5 MJ, carbon content, fossil 0.387097
- waste polyvinylchloride: 0 kg; pedigree (1,1,1,1,1)
  EcoSpold01Location=CH
  Estimations on precentage material disposed
  Uncertainty: Estimations on precentage material disposed
  production volume 0 kg
    Calculated from the production volume of ventilation control and wiring, central unit in proportion to the respective output amounts.
  properties: carbon content, fossil 0.440882, water content 0.00200401, wet mass 1 kg, dry mass 0.998 kg, heating value, net 21.51 MJ
  note on carbon content, fossil: C content in 1 kg DM was calculated using data in Tab A.1, ecoinvent v2.2 report 13_I
  note on heating value, net: Value taken from the general comment of the treatment dataset.
- extrusion, plastic pipes: 2.73 kg; lognormal variance with pedigree 0.0546, pedigree (2,4,5,5,1)
  EcoSpold01Location=RER
  Questionnaire
  Uncertainty: Questionnaire
- electricity, medium voltage: 0 kWh; pedigree (1,1,1,1,1)
  EcoSpold01Location=UCTE
  Data estimated from related processes
  Uncertainty: Data estimated from related processes
- heat, district or industrial, natural gas: 0.100358, 6.51164 MJ (2 entries); lognormal variance with pedigree 0.078, pedigree (4,5,5,5,1)
  (same comment as for heat, district or industrial, natural gas)
- heat, district or industrial, other than natural gas: 0.00268014, 6.60932 MJ (2 entries); lognormal variance with pedigree 0.072, pedigree (1,1,5,5,1)
  EcoSpold01Location=RER
  4,5,1,1,1,5; Data estimated from related companies
- waste polyvinylchloride: -0.0159757, -0.00106743, -8.07282e-5, -0.000440888, -0.000178114, -0.000418664, -0.111839 kg (7 entries); lognormal variance with pedigree 0.072, pedigree (4,4,5,5,1)
  (same comment as for waste polyvinylchloride)
  production volume 0.39 kg
- electricity, medium voltage: 0.00665554, 0.00127625, 0.0214255, 0.311615, 0.0439223, 0.143105 kWh (6 entries); lognormal variance with pedigree 0.11, pedigree (3,5,5,5,3)
  (same comment as for electricity, medium voltage)

## Sampling procedure
Questionnaire, technical information of producer and estimations. For control electronic proxy process used.

## Extrapolations
none This dataset has been copied from an original dataset covering the geography RER. The uncertainty has been adjusted accordingly.

## Review by Rolf Frischknecht 2007-08-16
passed
none
