# transport, passenger, bicycle

Dataset: EcoSpold 2, unit process
Geography: CH
Time period: 2005-01-01 to 2021-12-31
Technology level: current
Classification: EcoSpold01Categories: transport systems/road
Classification: ISIC rev.4 ecoinvent: 4922:Other passenger land transport
Synonyms: Citybike
Scenario: Business-as-Usual
System model: Allocation, cut-off by classification
Generated by: Marianne Leuenberger
Published in: M. Leuenberger 2010
Database: ecoinvent
isCopyrightProtected: true
accessRestrictedTo: 1

## General comment
The data set reflects the transport of one person on one kilometer on an bicycle. Capacity utilisation: 1 person

## Included activities end
This data includes the operation and maintenance of a bicycle and the use of the road infrastructure.

## Geography
Data for transport in Switzerland

## Technology
Citybike with racks. Life expectancy: 15000km

## Reference product
- transport, passenger, bicycle: 1 person*km; CPC 64119: Other land transportation services of passengers, n.e.c.; By-product classification allocatable product
  EcoSpold01Location=CH
  production volume 0.0336675 person*km
    This is a placeholder value that does not reflect real-world production volumes. This dataset does not currently require a real-world production volume to work in the database framework, and no actual data were collected yet. This has no negative effect on the results of the ecoinvent database. The placeholder value of this activity was scaled according to the nominal GDP of 2005 (source: United Nations, http://data.un.org/Glossary.aspx?q=GDP+%28current+US%24%29, accessed 20130726) to reflect an appropriate share of the global production volume, which is also a placeholder value.
  property price 0.00626044 EUR2005
    Calculated based on inputs: The price of the product has been calculated as a sum of the values of the material and energy inputs for this product. This value is therefore a rough estimation. It may underestimate the real price since there are additional expenses when producing any product. These expences can include for example labour costs, treatment of waste materials and profit for the producer. Please consider carefully whether this level of data quality is acceptable for your application.

## Inputs from technosphere
- road: 4.9158e-5 m*year; lognormal variance with pedigree 0.428, pedigree (4,1,5,1,4)
  EcoSpold01Location=CH
  activityLink introduced to establish a direct link to the corresponding regional supply of this product
  Uncertainty: allocation of road use according to gross ton kilometre performance
- maintenance, bicycle: 6.6667e-5 unit; lognormal variance with pedigree 0.3086, pedigree (2,1,4,1,1)
  activityLink introduced to establish a direct link to the corresponding regional supply of this product
  Uncertainty: Estimation: Bike 15'000km
- bicycle: 6.6667e-5 unit; lognormal variance with pedigree 0.3086, pedigree (2,1,4,1,1)
  EcoSpold01Location=RER
  Uncertainty: Estimation: Bike 15'000km

## Sampling procedure
Literature

## Extrapolations
This dataset has been extrapolated from year 2009 to the year of the calculation (2021). The uncertainty has been adjusted accordingly.

## Review by Christian Bauer 2010-02-07
29.01.2010
passed
C:\Dokumente und Einstellungen\Marianne\Eigene Dateien\Projekte\277_Mobitool\Ecoinvent\Review\Upload 1\[Ecospold_Transport_ebikes-v1.1.xls]X-Process

## Review by Carl Vadenbo 2012-06-28
In preparation for the release of ecoinvent v3.0, exchange for disposal of used bicycle was moved from the dataset 'transport, passenger, bicycle, CH' to 'bicycle production, RER' The amounts and the uncertainty information of the exchanges were reviewed and the dataset was accepted for inclusion into the ecoinvent database on 2012.07.04.
