# chemical production, organic

Dataset: EcoSpold 2, unit process
Geography: GLO
Time period: 2000-01-01 to 2021-12-31
Technology level: current
Classification: ISIC rev.4 ecoinvent: 201:Manufacture of basic chemicals, fertilizers and nitrogen compounds, plastics
Classification: EcoSpold01Categories: chemicals/organics
Tags: ConvertedDataset
Scenario: Business-as-Usual
System model: Allocation, cut-off by classification
Generated by: Roland Hischier
Published in: Althaus H.-J. 2007
Database: ecoinvent
isCopyrightProtected: true
accessRestrictedTo: 1

## General comment
An unweighted average of the first 20 organic substances, being part of the top100 chemicals and included into this database, is established.
[This dataset was already contained in the ecoinvent database version 2. It was not individually updated during the transfer to ecoinvent version 3. Life Cycle Impact Assessment results may still have changed, as they are affected by changes in the supply chain, i.e. in other datasets. This dataset was generated following the ecoinvent quality guidelines for version 2. It may have been subject to central changes described in the ecoinvent version 3 change report (http://www.ecoinvent.org/database/ecoinvent-version-3/reports-of-changes/), and the results of the central updates were reviewed extensively. The changes added e.g. consistent water flows and other information throughout the database. The documentation of this dataset can be found in the ecoinvent reports of version 2, which are still available via the ecoinvent website. The change report linked above covers all central changes that were made during the conversion process.]

## Included activities end
A general module for organic chemicals is established, based on the modules of several organic substances from the ecoinvent database

## Geography
General module, based on chemicals from Europe, Switzerland and Global level, used as a global average.

## Technology
Present technology for the production of the different included chemicals (for details, see datasets of the respective chemical substance)

## Reference product
- chemical, organic: 1 kg; CPC 341: Basic organic chemicals; By-product classification allocatable product
  EcoSpold01Location=GLO
  production volume 1e11 kg
    Estimated value based on qualitative information.
  property heating value, net 19.03 MJ
    LHV is calculated based on the Carbon content of the product. More details can be found on the respective documentation.
  property carbon content, fossil 0.628
    This dataset is an unweighted average of 20 organic substances (listed in Tab 88.1, ecoinvent v2.2 report 8, part II), being part of the top100 chemicals included in this database. The C-content has also been calculated as an unweighted average of the C content of the substances composing this dataset.
  property carbon content, non-fossil 0
    (same comment as for chemical, organic)
  property carbon content 0.628
    carbon content on a dry matter basis (reserved; not for manual entry)
  properties: price 1.57 EUR2005, water content 0, water in wet mass 0 kg, wet mass 1 kg, dry mass 1 kg, carbon allocation 0.628 kg

## Inputs from technosphere
- ethylene oxide: 0 kg; pedigree (1,1,1,1,1)
  Estimated, based on most produced chemicals
  EcoSpold01Location=RER
  Uncertainty: estimated, based on most produced chemicals
  properties: dry mass 1 kg, wet mass 1 kg, heating value, net 27.53 MJ, carbon content, fossil 0.545455
- propylene: 0 kg; pedigree (1,1,1,1,1)
  EcoSpold01Location=RER
  Estimated, based on most produced chemicals
  Uncertainty: estimated, based on most produced chemicals
  properties: wet mass 1 kg, heating value, net 43.22 MJ, carbon content, fossil 0.857143, dry mass 1 kg
- ethylene dichloride: 0 kg; pedigree (1,1,1,1,1)
  (same comment as for propylene)
  properties: wet mass 1 kg, dry mass 1 kg, heating value, net 12.25 MJ, carbon content, fossil 0.244898
- toluene, liquid: 0 kg; pedigree (1,1,1,1,1)
  (same comment as for propylene)
  properties: carbon content, fossil 0.913043, wet mass 1 kg, dry mass 1 kg, heating value, net 38.17 MJ
- ethylene: 0 kg; pedigree (1,1,1,1,1)
  (same comment as for ethylene oxide)
  properties: carbon content, fossil 0.857143, wet mass 1 kg, dry mass 1 kg, heating value, net 43.22 MJ
- methanol: 0.05 kg; lognormal variance with pedigree 0.1561, pedigree (5,5,5,3,3)
  Estimated, based on most produced chemicals
  EcoSpold01Location=GLO
  Uncertainty: estimated, based on most produced chemicals
  properties: carbon content, fossil 0.375, wet mass 1 kg, dry mass 1 kg, heating value, net 26.49 MJ
- formaldehyde: 0 kg; pedigree (1,1,1,1,1)
  (same comment as for ethylene oxide)
  properties: carbon content, fossil 0.4, wet mass 1 kg, dry mass 1 kg, heating value, net 20.19 MJ
- methyl tert-butyl ether: 0.05 kg; lognormal variance with pedigree 0.1561, pedigree (5,5,5,3,3)
  (same comment as for ethylene oxide)
  properties: wet mass 1 kg, carbon content, fossil 0.681818, dry mass 1 kg, heating value, net 37.14 MJ
- ethylene glycol: 0.05 kg; lognormal variance with pedigree 0.1561, pedigree (5,5,5,3,3)
  (same comment as for propylene)
  properties: heating value, net 23.44 MJ, carbon content, fossil 0.387097, dry mass 1 kg, wet mass 1 kg
- phenol: 0 kg; pedigree (1,1,1,1,1)
  (same comment as for propylene)
  properties: heating value, net 30.93 MJ, carbon content, fossil 0.765957, wet mass 1 kg, dry mass 1 kg
- acetic acid, without water, in 98% solution state: 0.05 kg; lognormal variance with pedigree 0.1561, pedigree (5,5,5,3,3)
  (same comment as for propylene)
  properties: wet mass 1 kg, heating value, net 14.6 MJ, carbon content, fossil 0.400016, dry mass 1 kg
  note on heating value, net: Based on literature, page 10, Althaus H.-J., Chudacoff M., Hischier R., Jungbluth N., Osses M. and Primas A. (2007) Life Cycle Inventories of Chemicals. Final report ecoinvent data v2.0 No. 8. EMPA, Swiss Centre for Life Cycle Inventories, Dübendorf, CH, Online-Version under: www.ecoinvent.org.
- urea: 0 kg; pedigree (1,1,1,1,1)
  EcoSpold01Location=RER
  The exchange has been updated from 'urea, as N' into 'urea' and therefore its amount has been scaled (multiplied) from 0.05 kg by 2.1438 kg of 'urea' per kg of 'urea, as N'. Original comment of the exchange is: Estimated, based on most produced chemicals
  Uncertainty: estimated, based on most produced chemicals
  properties: carbon content, fossil 0.2, wet mass 1 kg, dry mass 1 kg
- vinyl acetate: 0.05 kg; lognormal variance with pedigree 0.1561, pedigree (5,5,5,3,3)
  (same comment as for propylene)
  properties: dry mass 1 kg, wet mass 1 kg, heating value, net 25.35 MJ, carbon content, fossil 0.55814
  note on carbon content, fossil: Vinyl acetate (CH3CO2CH=CH2) (ecoinvent v2.2 report 11_II), C4H6O2. MW=86 g/mol
- acetone, liquid: 0 kg; pedigree (1,1,1,1,1)
  (same comment as for ethylene oxide)
  properties: heating value, net 31.32 MJ, wet mass 1 kg, dry mass 1 kg, carbon content, fossil 0.62069
- benzene: 0.05 kg; lognormal variance with pedigree 0.1561, pedigree (5,5,5,3,3)
  (same comment as for ethylene oxide)
  properties: carbon content, fossil 0.923077, dry mass 1 kg, wet mass 1 kg, heating value, net 42.5 MJ
- xylene: 0 kg; pedigree (1,1,1,1,1)
  (same comment as for ethylene oxide)
  properties: heating value, net 38.84 MJ, carbon content, fossil 0.905061, dry mass 1 kg, wet mass 1 kg
- styrene: 0.05 kg; lognormal variance with pedigree 0.1561, pedigree (5,5,5,3,3)
  (same comment as for propylene)
  properties: carbon content, fossil 0.923077, heating value, net 37.26 MJ, dry mass 1 kg, wet mass 1 kg
  note on carbon content, fossil: Styrene chemical formula is C(C6H5)H-CH2 (C8H8) (ecoinvent v2.2 report 11_II). MW=104.
- butadiene: 0 kg; pedigree (1,1,1,1,1)
  (same comment as for ethylene oxide)
  properties: carbon content, fossil 0.857143, wet mass 1 kg, dry mass 1 kg, heating value, net 40.35 MJ
- ethyl benzene: 0 kg; pedigree (1,1,1,1,1)
  (same comment as for ethylene oxide)
  properties: heating value, net 38.84 MJ, carbon content, fossil 0.90566, dry mass 1 kg, wet mass 1 kg
- vinyl chloride: 0 kg; pedigree (1,1,1,1,1)
  (same comment as for ethylene oxide)
  properties: carbon content, fossil 0.387097, dry mass 1 kg, wet mass 1 kg, heating value, net 17.46 MJ
- ethylene oxide: 0.0165296, 0.0334704 kg (2 entries); lognormal variance with pedigree 0.1561, pedigree (5,5,5,3,3)
  (same comment as for ethylene oxide)
- propylene: 0.0116755, 0.000720244, 0.0376042 kg (3 entries); lognormal variance with pedigree 0.1561, pedigree (5,5,5,3,3)
  (same comment as for propylene)
- ethylene dichloride: 0.0165296, 0.0334704 kg (2 entries); lognormal variance with pedigree 0.1561, pedigree (5,5,5,3,3)
  (same comment as for propylene)
- toluene, liquid: 0.00588235, 0.0441176 kg (2 entries); lognormal variance with pedigree 0.1561, pedigree (5,5,5,3,3)
  (same comment as for propylene)
- ethylene: 0.0171313, 0.000519043, 0.0323497 kg (3 entries); lognormal variance with pedigree 0.1561, pedigree (5,5,5,3,3)
  (same comment as for ethylene oxide)
- formaldehyde: 0.00965049, 0.0403495 kg (2 entries); lognormal variance with pedigree 0.1561, pedigree (5,5,5,3,3)
  (same comment as for ethylene oxide)
- phenol: 0.00868077, 0.0413192 kg (2 entries); lognormal variance with pedigree 0.1561, pedigree (5,5,5,3,3)
  (same comment as for propylene)
- urea: 0.00786342, 0.00634317, 0.0428286, 0.0501548 kg (4 entries); lognormal variance with pedigree 0.1561, pedigree (5,5,5,3,3)
  (same comment as for urea)
- acetone, liquid: 0.0132837, 0.0367163 kg (2 entries); lognormal variance with pedigree 0.1561, pedigree (5,5,5,3,3)
  (same comment as for ethylene oxide)
- xylene: 0.00764643, 0.0423536 kg (2 entries); lognormal variance with pedigree 0.1561, pedigree (5,5,5,3,3)
  (same comment as for ethylene oxide)
- butadiene: 0.0165296, 0.0334704 kg (2 entries); lognormal variance with pedigree 0.1561, pedigree (5,5,5,3,3)
  (same comment as for ethylene oxide)
- ethyl benzene: 0.0165296, 0.0334704 kg (2 entries); lognormal variance with pedigree 0.1561, pedigree (5,5,5,3,3)
  (same comment as for ethylene oxide)
- vinyl chloride: 0.00953177, 0.0404682 kg (2 entries); lognormal variance with pedigree 0.1561, pedigree (5,5,5,3,3)
  (same comment as for ethylene oxide)

## Extrapolations
This dataset has been extrapolated from year 2000 to the year of the calculation (2021). The uncertainty has been adjusted accordingly.

## Review by Heiko Kunst 2003-06-20
Passed
Passed
