# building construction, hall, steel construction

Dataset: EcoSpold 2, unit process
Geography: RoW
Time period: 2000-01-01 to 2021-12-31
Technology level: current
Classification: ISIC rev.4 ecoinvent: 4100:Construction of buildings
Classification: EcoSpold01Categories: construction processes/buildings
Tags: ConvertedDataset
Scenario: Business-as-Usual
System model: Allocation, cut-off by classification
Generated by: Daniel Kellenberger (obsolete)
Published in: Kellenberger D. 2007
Database: ecoinvent
isCopyrightProtected: true
accessRestrictedTo: 1

## General comment
The module is based on a fictitious building hall with size: length 50 m, width 30 m, height 7 m, daylight opening 110 m2. The service life is assumed to be 50 years. This module should not be used if its relative importance would be high in a certain environmental inventory.
[This dataset was already contained in the ecoinvent database version 2. It was not individually updated during the transfer to ecoinvent version 3. Life Cycle Impact Assessment results may still have changed, as they are affected by changes in the supply chain, i.e. in other datasets. This dataset was generated following the ecoinvent quality guidelines for version 2. It may have been subject to central changes described in the ecoinvent version 3 change report (http://www.ecoinvent.org/database/ecoinvent-version-3/reports-of-changes/), and the results of the central updates were reviewed extensively. The changes added e.g. consistent water flows and other information throughout the database. The documentation of this dataset can be found in the ecoinvent reports of version 2, which are still available via the ecoinvent website. The change report linked above covers all central changes that were made during the conversion process.]

## Included activities end
Includes the most important materials used and their disposal, the transportation of the parts to the building site and to the final disposal at the end of life. Also included is the requirement of electricity for construction, maintenance and demolition. Operation is not included.

## Geography
Certain elementary flows or intermediate product flows are RER or GLO modules

## Technology
Example representing current metal industrial structures in Switzerland

## Reference product
- building, hall, steel construction: 1 m2; By-product classification allocatable product; CPC 531: Buildings
  production volume 3.96633 m2
    This is a placeholder value that does not reflect real-world production volumes. This dataset does not currently require a real-world production volume to work in the database framework, and no actual data were collected yet. This has no negative effect on the results of the ecoinvent database.
  property price 134.837 EUR2005
    Calculated based on inputs: The price of the product has been calculated as a sum of the values of the material and energy inputs for this product. This value is therefore a rough estimation. It may underestimate the real price since there are additional expenses when producing any product. These expences can include for example labour costs, treatment of waste materials and profit for the producer. Please consider carefully whether this level of data quality is acceptable for your application.

## Inputs from technosphere
- polystyrene foam slab: 5.4 kg; lognormal variance with pedigree 0.288, pedigree (4,5,5,5,5)
  properties: wet mass 1 kg, dry mass 1 kg, carbon content, fossil 0.859091, heating value, net 38.67 MJ
  note on carbon content, fossil: XPS consists in 91% of polystyrene, 7% of blowing agent and the re-maining 2% are flame retardants (bromine compounds) and other additives (ecoinvent v2.2 report 7, part XIV, pg69). The chemical formula of polystyrene is (C8H8)n. Here, the blowing agent is CO2.
- waste reinforced concrete: 0 kg; pedigree (1,1,1,1,1)
  production volume 0 kg
    Calculated from the production volume of building, hall, steel construction in proportion to the respective output amounts.
  properties: wet mass 1 kg, dry mass 0.99418 kg, water content 0.00585407
- cement mortar: 0 kg; pedigree (1,1,1,1,1)
  properties: dry mass 1 kg, wet mass 1 kg
- stone wool, packed: 13.2 kg; lognormal variance with pedigree 0.288, pedigree (4,5,5,5,5)
  properties: carbon content, fossil 0.015401, wet mass 1 kg, dry mass 1 kg
  note on carbon content, fossil: The chemical composition of the glass fibres used in the rock wool production is similar to the composition of naturally cooled volcano basalt and has a composition listed in Tab. 3.1 and 3.2 in ecoinvent v2.2 report 16, part XIV. Rock wool contains: a minimum of 96% mineral fibres,between 0.5 and 3.0 weight percent of phenolic resin depending on the specific product characteristics, and about 0.2 percent mineral oil (ecoinvent v2.2 report 16, part XIV). An average composition of 1.8% phenolic resin, 0.2% mineral oil, and 98% mineral fibres has been assumed and used to calculate C content of the rock wool
- waste bulk iron, excluding reinforcement: 0 kg; pedigree (1,1,1,1,1)
  production volume 0 kg
    (same comment as for waste reinforced concrete)
  properties: dry mass 1 kg, wet mass 1 kg
- diesel, burned in building machine: 238 MJ; lognormal variance with pedigree 0.288, pedigree (4,5,5,5,5)
  properties: heating value, net 1 MJ
- waste cement in concrete and mortar: 0 kg; pedigree (1,1,1,1,1)
  production volume 0 kg
    (same comment as for waste reinforced concrete)
  properties: wet mass 1 kg, dry mass 0.995 kg, water content 0.00502513
- waste glass sheet: 0 kg; pedigree (1,1,1,1,1)
  production volume 0 kg
    (same comment as for waste reinforced concrete)
  properties: wet mass 1 kg, dry mass 1 kg
- fibre cement corrugated slab: 33 kg; lognormal variance with pedigree 0.288, pedigree (4,5,5,5,5)
  properties: carbon content, non-fossil 0.01656, dry mass 1 kg, wet mass 1 kg, carbon content, fossil 0.00981818
  note on carbon content, non-fossil: Tab 5.1, ecoinvent v2.2 report 7, part IX. Fibres (pulp) 3.6%. Fibres (polyvinyl alcohol) 1.8%. C-content/dry mass of natural fibres was considered 46% (from 'Evolutionary and Biochemical Aspects', A.D. Kay and T. Vrede (in Global Ecology, 2010, Elsevier B.V., S.E. Jørgensen Ed.)). C-content/dry mass of polyvinyl alcohol ((C2H4O)x) was considered =24/44.
- aluminium, wrought alloy: 3 kg; lognormal variance with pedigree 0.288, pedigree (4,5,5,5,5)
  properties: wet mass 1 kg, dry mass 1 kg
- electricity, medium voltage: 0 kWh; pedigree (1,1,1,1,1)
- waste brick: 0 kg; pedigree (1,1,1,1,1)
  production volume 0 kg
    (same comment as for waste reinforced concrete)
  properties: dry mass 1 kg, wet mass 1 kg
- reinforcing steel: 33.4 kg; lognormal variance with pedigree 0.288, pedigree (4,5,5,5,5)
  properties: carbon content, fossil 0.004, wet mass 1 kg, dry mass 1 kg
- waste cement-fibre slab: -33 kg; lognormal variance with pedigree 0.288, pedigree (4,5,5,5,5)
  production volume 99 kg
    (same comment as for waste reinforced concrete)
  properties: carbon content, non-fossil 0.153912, wet mass 1 kg, dry mass 0.9356 kg, water content 0.0688328
  note on carbon content, non-fossil: The waste contains 0.64kg inert material (Tab A.3 ecoinvent v2.2 report 13_I for details) and 0.36kg untreated wood (Tab A.4 ecoinvent v2.2 report 13_I for details). C content is referred to 1 kg DM
- sheet rolling, steel: 3.2 kg; lognormal variance with pedigree 0.288, pedigree (4,5,5,5,5)
- waste mineral wool: 0 kg; pedigree (1,1,1,1,1)
  production volume 0 kg
    (same comment as for waste reinforced concrete)
  properties: dry mass 1 kg, wet mass 1 kg
- clay brick: 107 kg; lognormal variance with pedigree 0.288, pedigree (4,5,5,5,5)
  properties: wet mass 1 kg, dry mass 1 kg
- concrete, normal: 0 m3; pedigree (1,1,1,1,1)
  properties: water content 0.086758, wet mass 2380 kg, dry mass 2190 kg
- zinc coat, coils: 5.33 m2; lognormal variance with pedigree 0.288, pedigree (4,5,5,5,5)
- waste polystyrene isolation, flame-retardant: 0 kg; pedigree (1,1,1,1,1)
  production volume 0 kg
    (same comment as for waste reinforced concrete)
  properties: carbon content, fossil 0.918145, dry mass 0.998012 kg, heating value, net 38.67 MJ, wet mass 1 kg, water content 0.00199232
  note on carbon content, fossil: Polystyrene isolation (EPS) is flame-retarded with hexa-bromo-cyclo-dodecan (C12H18Br6) and contains 0.67 w% bromine (ecoinvent v2.2 report 13_I, pg 39). The rest is polystyrene: (C8H8)n.
- flat glass, uncoated: 4.5 kg; lognormal variance with pedigree 0.288, pedigree (4,5,5,5,5)
  properties: dry mass 1 kg, wet mass 1 kg
- waste reinforced concrete: -49.5687, -707.431 kg (2 entries); lognormal variance with pedigree 0.288, pedigree (4,5,5,5,5)
  production volume 2271 kg
- cement mortar: 0.105131, 20.8949 kg (2 entries); lognormal variance with pedigree 0.288, pedigree (4,5,5,5,5)
- waste bulk iron, excluding reinforcement: -10.7811, -22.4189 kg (2 entries); lognormal variance with pedigree 0.288, pedigree (4,5,5,5,5)
  production volume 99.6 kg
- waste cement in concrete and mortar: -5.94036, -15.0596 kg (2 entries); lognormal variance with pedigree 0.288, pedigree (4,5,5,5,5)
  production volume 63 kg
- waste glass sheet: -0.927191, -3.57281 kg (2 entries); lognormal variance with pedigree 0.288, pedigree (4,5,5,5,5)
  production volume 13.5 kg
- electricity, medium voltage: 0.106802, 0.0204799, 0.470252, 1.55692, 0.343816, 5.00049, 0.704822, 2.29642 kWh (8 entries); lognormal variance with pedigree 0.288, pedigree (4,5,5,5,5)
- waste brick: -1.39061, -105.609 kg (2 entries); lognormal variance with pedigree 0.288, pedigree (4,5,5,5,5)
  production volume 321 kg
- waste mineral wool: -3.83878, -9.36122 kg (2 entries); lognormal variance with pedigree 0.288, pedigree (4,5,5,5,5)
  production volume 39.6 kg
- concrete, normal: 0.00684665, 0.000713411, 0.00577557, 0.00324876, 0.0137576, 0.000464035, 0.271914 m3 (7 entries); lognormal variance with pedigree 0.288, pedigree (4,5,5,5,5)
- waste polystyrene isolation, flame-retardant: -1.52752, -3.87248 kg (2 entries); lognormal variance with pedigree 0.288, pedigree (4,5,5,5,5)
  production volume 16.2 kg

## Sampling procedure
most data obtained by personal communication

## Extrapolations
See geography This dataset has been copied from an original dataset covering the geography CH. The uncertainty has been adjusted accordingly.

## Review by Roberto Dones 2003-09-12
passed
