# planing, beam, hardwood, u=20%

Dataset: EcoSpold 2, unit process
Geography: CH
Time period: 2011-01-01 to 2021-12-31
Technology level: current
Classification: ISIC rev.4 ecoinvent: 1610:Sawmilling and planing of wood
Tags: Swiss brush-up completed
Scenario: Business-as-Usual
System model: Allocation, cut-off by classification
Share of production covered: 100 %
Generated by: Frank Werner
Published in: BFS 2013
Database: ecoinvent
isCopyrightProtected: true
accessRestrictedTo: 1

## General comment
This dataset represents the planing of one m3 hardwood beam that has been air dried or kiln dried to 20% moisture content. The ratio of kiln dried to air dried raw beam input corresponds to the estimated market mix. The planing mill is assumed to be located on the sawmill site. The emissions during the planing are excluded due to lack of data. The suction of the shavings is modeled in a separate activity.
The data was provided by and approved by the Swiss forest industry (Holzindustrie Schweiz HIS).
Within ecoinvent, three products - boards, beams and laths - are distinguished:

## Included activities start
Planing process starting from air dried respectively kiln dried hardwood beam, at sawmill site.

## Included activities end
This activity ends with planed hardwood beam, at plant. The dataset includes the planing process at the sawmill site and input of wood. The dataset does not include dust emissions.

## Geography
Represents average Swiss conditions.

## Parameters
- wood density, apparent: 706.56 kg/m3; name wood_d_apparent_1; = (1+moisture_beam/100)* basic_wood_d
  kg wet matter/wet volume
- shrinkage ratio (u=30% - 0%): 0.004 dimensionless; name shrinkage_ratio
  shrinkage of volume in % per change (%) in moisture content, relevant between u=30% to 0%
- wood density, dry: 640 kg/m3; name dry_wood_d
  kg oven-dry matter/oven-dry volume
- wood density, basic: 588.8 kg/m3; name basic_wood_d; = dry_wood_d*(1-moisture_beam*shrinkage_ratio)
  kg oven-dry matter/wet volume
- share of shaving: 6 dimensionless; name share_shaving
  share of shaving production from volume of sawnwood input
- share of beam: 94 dimensionless; name share_beam
  share of beam production per volume
- moisture content beam: 20 dimensionless; name moisture_beam
  moisture content of beam
- share of kiln dried wood: 0.8 dimensionless; name share_kiln_dried
  share of kiln dried sawnwood input (as part of input is air dried)

## Reference product
- sawnwood, beam, hardwood, dried (u=20%), planed: 0 m3; name beam_planed; source BFS 2013; CPC 31102: Wood, sawn or chipped lengthwise, sliced or peeled, of a thickness exceeding 6 mm, of non-coniferous wood; By-product classification allocatable product
  production volume 2904.62 m3; name p_sawnwood_planed; = 4468.64*0.5+1340.592*0.5
    estimated to be 50% of respective air dried and kiln dried sawn timber product
  property heating value, net 8524.3 MJ
    LHV is calculated based on the Carbon content of the product. More details can be found on the respective documentation.The property is based on a value of 12.06MJ/kg
  property water in wet mass 117.76 kg; name beam_planed_WWM; = beam_planed_DM* beam_planed_water_content
  property dry mass 588.8 kg; name beam_planed_DM; = basic_wood_d
  property water content 0.2; name beam_planed_water_content
  property price 265 EUR2005
    Expert judgement (Urs Luginbühl, Swiss Sawmilling industry, personal communication in June 2014). Cross-reference; FAOSTAT (accessed 20140428). The price is calculated by using data on total world import quantity (m3) and import value (1000 USD), year 2005. 25656806 m3 of Sawnwood (NC) - coniferous was imported in the world in 2005. The import value was 9652714000 USD. The calculated price is thus (9652714000/25656806=376*0.8=) 303 Euro.
  property wet mass 706.56 kg; name beam_planed_WM; = beam_planed_DM*(1+ beam_planed_water_content)
  property carbon content 0.494
    carbon content on a dry matter basis (reserved; not for manual entry)
  property true value 265; name beam_planed_true_value
    allocation property applied in "true value" allocation // value calculated from revenue
  properties: carbon content, fossil 0, carbon content, non-fossil 0.494, carbon allocation 290.867 kg
- shavings, hardwood, loose, measured as dry mass: 1 kg; name m_shavings; = (beam_raw_u20_kd+beam_raw_u20_ad)* share_shaving/100* basic_wood_d; source BFS 2013; By-product classification allocatable product; CPC 39283: Non-agglomerated wood waste and scrap; pedigree (1,1,1,1,1)
  calculated as dry mass
  production volume 109164 kg; = m_shavings*p_sawnwood_planed
    Calculated from production volume of reference product using the relative outputs.
  property price 0.113 EUR2005
    Calculated based on data from FAOSTAT (accessed 20140429). The price is calculated by using data on total world import quantity (m3) and import value (1000 USD), year 2005. 40461924 m3 of Chips and Particles was imported in the world in 2005. The import value was 3022227000 USD. The calculated price is thus (3022227000/40461924=74.7*0.8=) 62.2 Euro/m3. It is estimated, that the chips and particles are half hardwood (of density 650 kg/m3) and half softwood (of density 450 kg/m3), thus the remaining mixture has a density of 550 kg/m3. The recalculated price is (1/550*62.2=) 0.11 Euro/kg. Using the same approach the calculated price for 2010 was 0.123 Euro/kg.
  property heating value, net 12.61 MJ
    LHV is calculated based on the Carbon content of the product. More details can be found on the respective documentation.
  property carbon content 0.494
    carbon content on a dry matter basis (reserved; not for manual entry)
  property true value 4.24688; name m_shavings_true_value
    allocation property applied in "true value" allocation // value calculated from revenue
  properties: carbon content, non-fossil 0.494, dry mass 1 kg, water content 0.15, wet mass 1.15 kg, water in wet mass 0.15 kg, carbon content, fossil 0, carbon allocation 0.494 kg

## Inputs from technosphere
- planing mill: 2.97354e-10 unit; name planemill; source BFS 2013; lognormal variance with pedigree 0.5586, pedigree (2,1,4,1,1)
  data taken from ecoinvent 2.2 dataset; source: Werner, F., T. Künniger, H.-J. Althaus and K. Richter (2007): Life cycle inventories of wood as fuel and construction material, Duebendorf, November 2002. Centre for life cycle inventories in the ETH domain, Duebendorf.
  properties: UVEK_relative_amount_1 1, UVEK_link_1 3514
  note on UVEK_relative_amount_1: to be used only in special submissions in coordination with ecoinvent and the Swiss FOEN
- sawnwood, beam, hardwood, raw, dried (u=20%): 0.000357182 m3; name beam_raw_u20_kd; = 1/(1-share_shaving/100)*share_kiln_dried; source BFS 2013; lognormal variance with pedigree 0.033, pedigree (1,1,4,1,1)
  input of raw sawn wood to be planed; usually processes within the sawmill that produces the raw sawn wood
  property water content 0.2; name water_content
  properties: carbon content, non-fossil 0.494, wet mass 706.56 kg, dry mass 588.8 kg, heating value, net 8524.3 MJ
  note on heating value, net: Assumed equal to "sawnwood, beam, hardwood, dried (u=20%), planed".The property is based on a value of 12.06MJ/kg
- electricity, medium voltage: 0.00370544 kWh; name elec_medvol; source BFS 2013; lognormal variance with pedigree 0.0336, pedigree (2,1,4,1,1)
  electricity consumed for the planing; the suction of the shavings in covered in a separate dataset; data from Swiss industry
  properties: UVEK_link_1 1710, UVEK_relative_amount_1 1
- sawnwood, beam, hardwood, raw, dried (u=20%): 8.92956e-5 m3; name beam_raw_u20_ad; = 1/(1-share_shaving/100)*(1-share_kiln_dried); source BFS 2013; lognormal variance with pedigree 0.033, pedigree (1,1,4,1,1)
  (same comment as for sawnwood, beam, hardwood, raw, dried (u=20%))
  properties: water content 0.2, carbon content, non-fossil 0.494, dry mass 588.8 kg, wet mass 706.56 kg, heating value, net 8524.3 MJ

## Inputs from nature
- Carbon dioxide, non-fossil, resource correction [natural resource, in air]: 1.33516 kg; pedigree (1,1,1,1,1)
  This exchange has been added after economic allocation in order to re-balance the non-fossil carbon dioxide resource extraction.

## Sampling procedure
complementary literature and sampling from sawmills
