# anhydrite production, burned

Dataset: EcoSpold 2, unit process
Geography: CH
Time period: 1997-01-01 to 2021-12-31
Technology level: current
Classification: ISIC rev.4 ecoinvent: 2394:Manufacture of cement, lime and plaster
Classification: EcoSpold01Categories: construction materials/binder
Synonyms: Kalziumsulfat; calcium sulphate
Tags: ConvertedDataset
Scenario: Business-as-Usual
System model: Allocation, cut-off by classification
Generated by: Hans-Jörg Althaus
Published in: Kellenberger D. 2007
Database: ecoinvent
isCopyrightProtected: true
accessRestrictedTo: 1

## General comment
used in cement industry and cast plaster floor; the dust emission is included in the estimated emission inventoried in the "mining Gypsum" process
[This dataset was already contained in the ecoinvent database version 2. It was not individually updated during the transfer to ecoinvent version 3. Life Cycle Impact Assessment results may still have changed, as they are affected by changes in the supply chain, i.e. in other datasets. This dataset was generated following the ecoinvent quality guidelines for version 2. It may have been subject to central changes described in the ecoinvent version 3 change report (http://www.ecoinvent.org/database/ecoinvent-version-3/reports-of-changes/), and the results of the central updates were reviewed extensively. The changes added e.g. consistent water flows and other information throughout the database. The documentation of this dataset can be found in the ecoinvent reports of version 2, which are still available via the ecoinvent website. The change report linked above covers all central changes that were made during the conversion process.]

## Included activities end
burning of gypsum mineral and milling of anhydrite

## Geography
data for Switzerland

## Technology
Assumed average technology for Switzerland

## Reference product
- anhydrite, burned: 1 kg; CPC 15200: Gypsum; anhydrite; limestone flux; limestone and other calcareous stone, of a kind used for the manufacture of[…]; By-product classification allocatable product
  EcoSpold01Location=CH
  production volume 0.0336675 kg
    This is a placeholder value that does not reflect real-world production volumes. This dataset does not currently require a real-world production volume to work in the database framework, and no actual data were collected yet. This has no negative effect on the results of the ecoinvent database. The placeholder value of this activity was scaled according to the nominal GDP of 2005 (source: United Nations, http://data.un.org/Glossary.aspx?q=GDP+%28current+US%24%29, accessed 20130726) to reflect an appropriate share of the global production volume, which is also a placeholder value.
  property price 0.19 EUR2005
    Calculated value based on data from United Nations Commodity Trade Statistics Database (comtrade.un.org). UN comtrade category: 252020 Plasters (calcined gypsum or calcium sulphate) etc. Year 2005. Using exchange rate of 1EURO = 1.209 USD. Average of price of import into 5 main markets (EU, US, JP, IN and CN).
  property carbon content 0
    carbon content on a dry matter basis (reserved; not for manual entry)
  properties: water content 0, carbon content, non-fossil 0, carbon content, fossil 0, water in wet mass 0 kg, wet mass 1 kg, dry mass 1 kg, carbon allocation 0 kg

## Inputs from technosphere
- industrial machine, heavy, unspecified: 0.000139 kg; lognormal variance with pedigree 0.372, pedigree (3,4,5,1,3)
  EcoSpold01Location=RER
  activityLink introduced to establish a direct link to the corresponding regional supply of this product
- heat, district or industrial, natural gas: 0.894 MJ; lognormal variance with pedigree 0.0406, pedigree (2,1,5,1,1)
  EcoSpold01Location=RER
  properties: heating value, net 1 MJ
- gypsum, mineral: 1.2 kg; lognormal variance with pedigree 0.066, pedigree (4,5,5,1,1)
  EcoSpold01Location=CH
  properties: wet mass 1 kg, dry mass 1 kg
- electricity, medium voltage: 0.027 kWh; lognormal variance with pedigree 0.062, pedigree (3,4,5,1,3)
  EcoSpold01Location=CH
- heat, district or industrial, other than natural gas: 0.224 MJ; lognormal variance with pedigree 0.0406, pedigree (2,1,5,1,1)
  EcoSpold01Location=CH
  properties: heating value, net 1 MJ

## Sampling procedure
environmental report, personal communication

## Extrapolations
This dataset has been extrapolated from year 2003 to the year of the calculation (2021). The uncertainty has been adjusted accordingly.

## Review by Roberto Dones 2003-07-04
Passed
