# maize grain production

Dataset: EcoSpold 2, unit process
Geography: US
Time period: 2004-01-01 to 2021-12-31
Technology level: current
Classification: ISIC rev.4 ecoinvent: 0111:Growing of cereals (except rice), leguminous crops and oil seeds
Synonyms: Zea mays L.; corn
Scenario: Business-as-Usual
System model: Allocation, cut-off by classification
Share of production covered: 100 %
Generated by: Thomas Nemecek
Published in: Jungbluth N. 2007
Database: ecoinvent
isCopyrightProtected: true
accessRestrictedTo: 1

## General comment
This dataset represents the production of 1 kg of maize grain (fresh matter). The yield is 9315 kg/ha at a moisture content at storage of 14%.
[This dataset was already contained in the ecoinvent database version 2. It was not individually updated during the transfer to ecoinvent version 3. Life Cycle Impact Assessment results may still have changed, as they are affected by changes in the supply chain, i.e. in other datasets. This dataset was generated following the ecoinvent quality guidelines for version 2. It may have been subject to central changes described in the ecoinvent version 3 change report (http://www.ecoinvent.org/database/ecoinvent-version-3/reports-of-changes/), and the results of the central updates were reviewed extensively. The changes added e.g. consistent water flows and other information throughout the database. The documentation of this dataset can be found in the ecoinvent reports of version 2, which are still available via the ecoinvent website. The change report linked above covers all central changes that were made during the conversion process.]

## Included activities start
This activity starts after the harvest of the previous crop. The inputs of seeds, mineral fertilisers, pesticides and irrigation water are considered. It is assumed that no organic fertilisers are applied.

## Included activities end
The dataset includes all machine operations and corresponding machine infrastructure and sheds. Machine operations are: soil cultivation, transport of seeds, fertilisers and pesticides to the field (15), sowing, fertilisation, irrigation, weed control, pest and pathogen control, combine-harvest, transport from field to farm (15 km) and drying of grains. Further, direct field emissions are included. This activity ends after harvest and drying of grains at the farm gate.

## Geography
The inventory is modelled for the USA

## Technology
Cultivation of corn.

## Time period
Time of publications

## Parameters
- fraction, irrigation water, to ground water: 0.8 dimensionless; name fraction_IW_to_ground_water; lognormal variance with pedigree 0.0886, pedigree (4,3,1,1,4)
  Literature value (Döll, 2011) cross referenced with expert opinion.
- LUC_crop_specific: 1 dimensionless
  This parameter allows to switch between a "crop specific" and a "country specific" approach when calculating the LUC of a crop. By default, the chosen approach is "crop specific", so the value of the parameter is 1. If you want to apply a "country specific" approach, turn the parameter to 0.
- fraction, irrigation water, to air: 0.6949 dimensionless; name fraction_IW_to_air; lognormal variance with pedigree 0.0409, pedigree (2,2,2,1,1)
  Literature value (Siebert, 2010) (Vionnet, S., Quantis Water Database - Technical Report, 2012).
- fraction, irrigation water to surface water: 0.2 dimensionless; name fraction_IW_to_surface_water; lognormal variance with pedigree 0.0886, pedigree (4,3,1,1,4)
  Literature value (Döll, 2011) cross referenced with expert opinion.

## Reference product
- maize grain: 1 kg; name REF_PRODUCT; By-product classification allocatable product; CPC 01122: Maize (corn), other
  EcoSpold01Location=US
  production volume 2.82261e11 kg
    Total production in the USA is around 280 Million tons.
    FAOSTAT maize for 2005
  property price 0.12 EUR2005; name REF_PRODUCT_price_EUR2005
    Literature value. Based on SAFEX price of R 2,025 per tonne (average yellow and white). Source: SAGIS, 2018. Retrieved from: http://www.sagis.org.za/safex_historic.html, accessed 28May2018.
  property energy content 15.9272 MJ; name REF_PRODUCT_energy_content
    See chapter 'Product Properties' in "01_crop production - yields & inputs US_v1.0.pdf" - pdf-document on the dedicated talk page of ecoinvent (www.ecoinvent.org/documentation)
  property carbon content, non-fossil 0.46957; name REF_PRODUCT_C_content_non_fossil
    biogene carbon content on a dry matter basis
    Composition data obtained from Corn Grain Whole, in (http://beefmagazine.com/images/2009%20feed%20table.pdf). First, composition data were refered to 1 kg dry mass. Then, C-contents were calculated considering a C-content/dry mass of 46% in carbohydrates (including fibres), 53% in proteins and 75% in fats. All data from "Evolutionary and Biochemical Aspects", A.D. Kay and T. Vrede (in Global Ecology, 2010, Elsevier B.V., S.E. Jørgensen Ed.). Finally, C-content in kg was multiplied by kg dry mass in the exchange.
  property dry mass 0.86 kg; name REF_PRODUCT_DM
  property carbon content 0.46957
    carbon content on a dry matter basis (reserved; not for manual entry)
  properties: water content 0.162791, carbon content, fossil 0, water in wet mass 0.14 kg, wet mass 1 kg, carbon allocation 0.40383 kg

## Inputs from technosphere
- benzoic-compound: 1.7327e-6 kg; lognormal variance with pedigree 0.0401, pedigree (1,2,5,1,1)
  EcoSpold01Location=RER
  See chapter 'Yields and Inputs of Arable Crop Production' in "01_crop production - yields & inputs US_v1.0.pdf" - pdf-document on the dedicated talk page of ecoinvent (www.ecoinvent.org/documentation)
  Uncertainty: NASS 2004
  properties: carbon content, fossil 0.405853, wet mass 1 kg, dry mass 1 kg
  note on carbon content, fossil: C content estimated after the pesticides Dicamba (C8H6Cl2O3) and Clopyralid (C6H3Cl2NO2) (Tab 1.5, Sutter 2010), classified in ecoinvent v2.2 report 15a, Tab 10.3 as benzoic compounds
- irrigation: 0.244743 m3; name water_irrigation_input; source Siebert, S. 2010; lognormal variance with pedigree 0.0427, pedigree (2,2,5,1,1)
  Calculated based on literature values (Döll, 2010) and partially modelled at ETH (Pfister, S.).
  properties: water content 9089.91, wet mass 1000 kg, dry mass 0.11 kg
- bipyridylium-compound: 6.1367e-7 kg; lognormal variance with pedigree 0.0401, pedigree (1,2,5,1,1)
  (same comment as for benzoic-compound)
  properties: wet mass 1 kg, carbon content, fossil 0.418929, dry mass 1 kg
  note on carbon content, fossil: C content was calculated after C content of Diquat (C12H12Br2N2). The herbicide Diquat is classified as a bipyridylium-compound in Tab 10.3 in ecoinvent v2.2 report 15a
- inorganic phosphorus fertiliser, as P2O5: 0.005848 kg; lognormal variance with pedigree 0.0401, pedigree (1,2,5,1,1)
  See chapter 'Yields and Inputs of Arable Crop Production' in "01_crop production - yields & inputs US_v1.0.pdf" - pdf-document on the dedicated talk page of ecoinvent (www.ecoinvent.org/documentation)
  EcoSpold01Location=RER
  Uncertainty: NREL 2006
  properties: wet mass 1 kg, dry mass 1 kg
- potassium chloride: 0.0113858 kg; lognormal variance with pedigree 0.0401, pedigree (1,2,5,1,1)
  The exchange has been updated from 'potassium chloride, as K2O' into 'potassium chloride' and therefore its amount has been scaled (multiplied) from 0.0072 kg by 1.5829 kg of 'potassium chloride' per kg of 'potassium chloride, as K2O'. Original comment of the exchange is: See chapter 'Yields and Inputs of Arable Crop Production' in "01_crop production - yields & inputs US_v1.0.pdf" - pdf-document on the dedicated talk page of ecoinvent (www.ecoinvent.org/documentation)
  EcoSpold01Location=RER
  Uncertainty: NREL 2006
  properties: dry mass 1 kg, wet mass 1 kg
- tillage, cultivating, chiselling: 0.00012603 ha; lognormal variance with pedigree 0.0581, pedigree (1,2,5,1,3)
  EcoSpold01Location=CH
  See chapter 'Yields and Inputs of Arable Crop Production' in "01_crop production - yields & inputs US_v1.0.pdf" - pdf-document on the dedicated talk page of ecoinvent (www.ecoinvent.org/documentation)
  Uncertainty: NREL 2006, KTBL 2004
- cyclic N-compound: 5.7757e-7 kg; lognormal variance with pedigree 0.0401, pedigree (1,2,5,1,1)
  (same comment as for benzoic-compound)
  properties: wet mass 1 kg, dry mass 1 kg, carbon content, fossil 0.641962
  note on carbon content, fossil: Calculated as an unweigthed average of the C content of the cyclic N-compounds where information was avaliable in Sutter, 2010, following the classification in Tab 2.25 in Sutter 2010: Difenoconazole (C19H17Cl2N3O3), Fenpropidin (C19H31N), Fenpropimorph (C20H33NO), Flusilazole (C16H15F2N3Si), Metconazole (C17H22ClN3O), Penconazole (C13H15Cl2N3), Propiconazole (C15H17Cl2N3O2), Tebuconazole (C16H22ClN3O)
- ammonia, anhydrous, liquid: 0.0084357 kg; lognormal variance with pedigree 0.0401, pedigree (1,2,5,1,1)
  EcoSpold01Location=RER
  See chapter 'Yields and Inputs of Arable Crop Production' in "01_crop production - yields & inputs US_v1.0.pdf" - pdf-document on the dedicated talk page of ecoinvent (www.ecoinvent.org/documentation)
  Uncertainty: NREL 2006
  properties: dry mass 1 kg, wet mass 1 kg
- dinitroaniline-compound: 2.4787e-6 kg; lognormal variance with pedigree 0.0401, pedigree (1,2,5,1,1)
  See chapter 'Yields and Inputs of Arable Crop Production' in "01_crop production - yields & inputs US_v1.0.pdf" - pdf-document on the dedicated talk page of ecoinvent (www.ecoinvent.org/documentation)
  EcoSpold01Location=RER
  Uncertainty: NASS 2004
  properties: wet mass 1 kg, carbon content, fossil 0.55516, dry mass 1 kg
  note on carbon content, fossil: C content of dinitroaniline-compound was calculated after the C content of the herbicide pendimethalin, classified as dinitroaniline-compound in Tab 2.25 of Sutter 2010
- fertilising, by broadcaster: 5.4916e-5 ha; lognormal variance with pedigree 0.0581, pedigree (1,2,5,1,3)
  See chapter 'Yields and Inputs of Arable Crop Production' in "01_crop production - yields & inputs US_v1.0.pdf" - pdf-document on the dedicated talk page of ecoinvent (www.ecoinvent.org/documentation)
  EcoSpold01Location=CH
  Uncertainty: NREL 2006, KTBL 2004
- tillage, harrowing, by spring tine harrow: 0.00024863 ha; lognormal variance with pedigree 0.0581, pedigree (1,2,5,1,3)
  (same comment as for tillage, cultivating, chiselling)
- glyphosate: 1.9662e-5 kg; lognormal variance with pedigree 0.0401, pedigree (1,2,5,1,1)
  (same comment as for dinitroaniline-compound)
  properties: carbon content, fossil 0.214286, dry mass 1 kg, wet mass 1 kg
- maize seed, for sowing: 0.00322061 kg; name SEED; lognormal variance with pedigree 0.0401, pedigree (1,2,5,1,1)
  The amount of maize seeds needed as input to this dataset was adjusted. The value chosen is 30 kg of maize seeds per ha meant to correspond similar conditions as the respective Canadian dataset. 30 kg/ha correspond to circa 35000 seeds per acre. The value was chosen after consulting the data provider.
  Initial comment:
  See chapter 'Yields and Inputs of Arable Crop Production' in "01_crop production - yields & inputs US_v1.0.pdf" - pdf-document on the dedicated talk page of ecoinvent (www.ecoinvent.org/documentation)
  Uncertainty: NREL 2006
  property water content 0.162791; name maize_seed_sowing_water_content
  property dry mass 0.86 kg; name SEED_DM
  property carbon content, non-fossil 0.436047; name SEED_C_content_non_fossil
  property energy content 15.9272 MJ; name SEED_energy_content
  property wet mass 1 kg; name maize_seed_sowing_WM
  property water in wet mass 0.14 kg; name maize_seed_sowing_WWM
  note on carbon content, non-fossil: biogene carbon content on a dry matter basis; Composition data obtained from Corn Grain Whole, in (http://beefmagazine.com/images/2009%20feed%20table.pdf). First, composition data were refered to 1 kg dry mass. Then, C-contents were calculated considering a C-content/dry mass of 44% in carbohydrates (including fibres), 53% in proteins and 75% in fats. All data from ecoinvent report, n 15a, pg 40, except C-content in protein, that comes from Determination of protein concentration by total organic carbon analysis, Rouwenhorst et al., 1991, J Biochem and Biophys Methods, 22:119-128.
  note on energy content: See chapter 'Product Properties' in "01_crop production - yields & inputs US_v1.0.pdf" - pdf-document on the dedicated talk page of ecoinvent (www.ecoinvent.org/documentation)
- tillage, currying, by weeder: 0.00019972 ha; lognormal variance with pedigree 0.0581, pedigree (1,2,5,1,3)
  (same comment as for tillage, cultivating, chiselling)
- [sulfonyl]urea-compound: 5.6313e-7 kg; lognormal variance with pedigree 0.0401, pedigree (1,2,5,1,1)
  (same comment as for benzoic-compound)
  properties: carbon content, fossil 0.540853, wet mass 1 kg, dry mass 1 kg
  note on carbon content, fossil: Approximated as an unweighted average of the C-content of the [sulfonyl]urea-compounds (Tab 2.25 Sutter, 2010) chlorotoluron, Diuron, Linuron and Isoproturon.
- organophosphorus-compound, unspecified: 9.7104e-6 kg; lognormal variance with pedigree 0.0401, pedigree (1,2,5,1,1)
  (same comment as for dinitroaniline-compound)
  properties: wet mass 1 kg, dry mass 1 kg, carbon content, fossil 0.260898
  note on carbon content, fossil: C content was calculated as an unweighted average of glyphosate, parathion, and fosetyl-Al. Those substances are classified as organo-phosphorous compounds in Tab 2.25, Sutter 2010
- nitrile-compound: 9.3855e-7 kg; lognormal variance with pedigree 0.0401, pedigree (1,2,5,1,1)
  (same comment as for benzoic-compound)
  properties: carbon content, fossil 0.344995, dry mass 1 kg, wet mass 1 kg
  note on carbon content, fossil: An unweighted average of the C content in chlorothalonil, dichlobenil, bromoxynil, ioxynil, substances classified as nitrile-compounds in Tab 2.25, Sutter 2010
- application of plant protection product, by field sprayer: 8.253e-5 ha; lognormal variance with pedigree 0.0581, pedigree (1,2,5,1,3)
  (same comment as for fertilising, by broadcaster)
- lime: 0.030409 kg; lognormal variance with pedigree 0.0401, pedigree (1,2,5,1,1)
  EcoSpold01Location=CH
  See chapter 'Yields and Inputs of Arable Crop Production' in "01_crop production - yields & inputs US_v1.0.pdf" - pdf-document on the dedicated talk page of ecoinvent (www.ecoinvent.org/documentation)
  Uncertainty: NREL 2006
  properties: dry mass 1 kg, carbon content, fossil 0.120005, wet mass 1 kg
- sowing: 3.8024e-5 ha; lognormal variance with pedigree 0.0581, pedigree (1,2,5,1,3)
  (same comment as for tillage, cultivating, chiselling)
- pyrethroid-compound: 1.2297e-6 kg; lognormal variance with pedigree 0.0401, pedigree (1,2,5,1,1)
  EcoSpold01Location=CH
  See chapter 'Yields and Inputs of Arable Crop Production' in "01_crop production - yields & inputs US_v1.0.pdf" - pdf-document on the dedicated talk page of ecoinvent (www.ecoinvent.org/documentation)
  Uncertainty: NASS 2004
  properties: wet mass 1 kg, carbon content, fossil 0.623, dry mass 1 kg
  note on carbon content, fossil: C content of pyrethroid-compounds was calculated as an unweigthed average of C content of the substances: cypermethrin, alpha-cypermethrin,beta-cyfluthrin, lambdacyhalothrin. Those substances are classified as pyrethroid-compounds in Tab 2.25, Sutter 2010
- drying of maize straw and whole-plant: 0.40984 l; lognormal variance with pedigree 0.0401, pedigree (1,1,5,3,1)
  See chapter 'Yields and Inputs of Arable Crop Production' in "01_crop production - yields & inputs US_v1.0.pdf" - pdf-document on the dedicated talk page of ecoinvent (www.ecoinvent.org/documentation)
  EcoSpold01Location=CH
  Uncertainty: Nemecek 2004
- tillage, ploughing: 8.6042e-5 ha; lognormal variance with pedigree 0.0581, pedigree (1,2,5,1,3)
  (same comment as for fertilising, by broadcaster)
- atrazine: 9.246e-5 kg; lognormal variance with pedigree 0.0401, pedigree (1,2,5,1,1)
  (same comment as for benzoic-compound)
  properties: carbon content, fossil 0.446512, dry mass 1 kg, wet mass 1 kg
- diphenylether-compound: 1.9252e-7 kg; lognormal variance with pedigree 0.0401, pedigree (1,2,5,1,1)
  (same comment as for benzoic-compound)
  properties: carbon content, fossil 0.560061, wet mass 1 kg, dry mass 1 kg
  note on carbon content, fossil: C content of diphenylether-compounds was calculated after the C content of thepesticides aclonifen and diflufenican classified as diphenylether-compound in Tab 2.25 of Sutter 2010
- triazine-compound, unspecified: 2.4306e-6 kg; lognormal variance with pedigree 0.0401, pedigree (1,2,5,1,1)
  (same comment as for dinitroaniline-compound)
  properties: carbon content, fossil 0.475616, dry mass 1 kg, wet mass 1 kg
  note on carbon content, fossil: An unweighted average of the C content in Atrazine, Cyanazine, metamitron, simazine, and terbuthylazine. Those substances are classified as triazine-compounds in Tab 2.25, Sutter 2010
- ammonium nitrate: 0.01398 kg; lognormal variance with pedigree 0.0401, pedigree (1,2,5,1,1)
  The exchange has been updated from 'ammonium nitrate, as N' into 'ammonium nitrate' and therefore its amount has been scaled (multiplied) from 0.0049 kg by 2.8573 kg of 'ammonium nitrate' per kg of 'ammonium nitrate, as N'. Original comment of the exchange is: See chapter 'Yields and Inputs of Arable Crop Production' in "01_crop production - yields & inputs US_v1.0.pdf" - pdf-document on the dedicated talk page of ecoinvent (www.ecoinvent.org/documentation)
  EcoSpold01Location=RER
  Uncertainty: NREL 2006
  properties: dry mass 1 kg, wet mass 1 kg
- urea: 0.00759548 kg; lognormal variance with pedigree 0.0401, pedigree (1,2,5,1,1)
  EcoSpold01Location=RER
  The exchange has been updated from 'urea, as N' into 'urea' and therefore its amount has been scaled (multiplied) from 0.0035 kg by 2.1438 kg of 'urea' per kg of 'urea, as N'. Original comment of the exchange is: See chapter 'Yields and Inputs of Arable Crop Production' in "01_crop production - yields & inputs US_v1.0.pdf" - pdf-document on the dedicated talk page of ecoinvent (www.ecoinvent.org/documentation)
  Uncertainty: NREL 2006
  properties: dry mass 1 kg, wet mass 1 kg, carbon content, fossil 0.2
- acetamide-anillide-compound, unspecified: 1.01797e-5 kg; lognormal variance with pedigree 0.0401, pedigree (1,2,5,1,1)
  (same comment as for dinitroaniline-compound)
  properties: carbon content, fossil 0.659175, wet mass 1 kg, dry mass 1 kg
  note on carbon content, fossil: Approximated as an unweighted average of the C-content of the acetamide-anillide-compound (Tab 2.25 Sutter, 2010) alachor, metolachlor, propachlor and teflubenzuron
- pesticide, unspecified: 6.2763e-5 kg; lognormal variance with pedigree 0.0401, pedigree (1,2,5,1,1)
  (same comment as for benzoic-compound)
  properties: dry mass 1 kg, carbon content, fossil 0.486978, wet mass 1 kg
  note on carbon content, fossil: Mean of C content in all pesticides whose formula has been documented in Sutter 2010
- combine harvesting: 9.5933e-6 ha; lognormal variance with pedigree 0.0581, pedigree (1,2,5,1,3)
  (same comment as for tillage, cultivating, chiselling)
- packaging, for pesticides: 0.000501811 kg; lognormal variance with pedigree 0.0912, pedigree (4,3,5,5,4)
  Total amount of active substance/s of pesticides needed for the production of maize grain is calculated to be circa 2.51E-04 kg. Pesticide/s used in this dataset is/are: '[sulfonyl]urea-compound', 'acetamide-anillide-compound, unspecified', 'atrazine', 'benzoic-compound', 'bipyridylium-compound', 'cyclic N-compound', 'dinitroaniline-compound', 'diphenylether-compound', 'glyphosate', 'metolachlor', 'nitrile-compound', 'organophosphorus-compound, unspecified', 'pesticide, unspecified', 'phenoxy-compound', 'pyrethroid-compound', 'triazine-compound, unspecified'. The total amount of active substance/s is doubled in order to account for the packaging of the dilluted product of pesticide/s that is/are applied. Therefore, 5.02E-04 kg of packaging for pesticides is justified with this exchange.
  properties: dry mass 1 kg, wet mass 1 kg, heating value, net 25.97 MJ, carbon content, fossil 0.85714, price 0.0642 EUR2005
- phenoxy-compound: 2.48836e-6 kg; lognormal variance with pedigree 0.0401, pedigree (1,2,5,1,1)
  (same comment as for benzoic-compound)
  properties: carbon content, fossil 0.532559, wet mass 1 kg, dry mass 1 kg
  note on carbon content, fossil: An unweighted average of the C content in mCPA, mCPB, mecoprop, fluazifop-P-butyl, and 2,4-D. Those substances are classified as phenoxy-compounds in Tab 2.25, Sutter 2010
- packaging, for fertilisers: 0.120643 kg; lognormal variance with pedigree 0.0912, pedigree (4,3,5,5,4)
  Total amount of active substance/s of fertilisers needed for the production of 'maize grain' is calculated to be circa 6.03E-02 kg. Fertiliser/s used in this dataset is/are: 'ammonia, liquid', 'ammonium nitrate, as N', 'lime', 'phosphate fertiliser, as P2O5', 'potassium chloride, as K2O', 'urea, as N'. The total amount of active substance/s is doubled in order to account for the packaging of the dilluted product of fertiliser/s that is/are applied. Therefore, 1.21E-01 kg of packaging for fertilisers is justified with this exchange.
  properties: price 0.0642 EUR2005, dry mass 1 kg, wet mass 1 kg, heating value, net 25.01 MJ, carbon content, fossil 0.825301
  note on carbon content, fossil: Considering a chemical formula (C2H4)n for polyethylene, carbon content-fossil is calculated to be 0.856286 kg of Carbon per kg of dry mass.
- transport, tractor and trailer, agricultural: 0.0028578 metric ton*km; lognormal variance with pedigree 0.268, pedigree (4,5,5,5,5)
  EcoSpold01Location=CH
  See chapter 'Yields and Inputs of Arable Crop Production' in "01_crop production - yields & inputs US_v1.0.pdf" - pdf-document on the dedicated talk page of ecoinvent (www.ecoinvent.org/documentation)
  Uncertainty: Standard Distances
- metolachlor: 4.2885e-5 kg; lognormal variance with pedigree 0.0401, pedigree (1,2,5,1,1)
  (same comment as for dinitroaniline-compound)
  properties: dry mass 1 kg, wet mass 1 kg, carbon content, fossil 0.633803

## Inputs from nature
- Carbon dioxide, in air [natural resource, in air]: 1.47628 kg; = 44/12*(0.46957*REF_PRODUCT*0.86-0.43605*SEED*0.86); lognormal variance with pedigree 0.0586, pedigree (4,3,5,1,1)
  Modelled,see chapter 'CO2 binding' in "01_crop production_direct field emissions and natural resources_v1.0.pdf" - pdf-document on the dedicated talk page of ecoinvent (www.ecoinvent.org/documentation)
  Uncertainty: calculated from the carbon balance
- Energy, gross calorific value, in biomass [natural resource, biotic]: 15.91 MJ; lognormal variance with pedigree 0.0517684, pedigree (4,3,5,1,1)
- Transformation, from annual crop [natural resource, land]: 1.0735 m2; lognormal variance with pedigree 0.16, pedigree (1,1,5,1,1)
  Modelled, see chapter 'Land use' in "01_crop production_direct field emissions and natural resources_v1.0.pdf" - pdf-document on the dedicated talk page of ecoinvent (www.ecoinvent.org/documentation)
  Uncertainty: NASS 2005
- Occupation, annual crop [natural resource, land]: 0.62623 m2*year; lognormal variance with pedigree 0.08, pedigree (1,1,5,1,1)
  (same comment as for Transformation, from annual crop)
- Transformation, to annual crop [natural resource, land]: 1.0735 m2; lognormal variance with pedigree 0.16, pedigree (1,1,5,1,1)
  (same comment as for Transformation, from annual crop)

## Emissions to nature
- 2,4-D [soil, agricultural]: 3.0443e-6 kg; lognormal variance with pedigree 0.0686, pedigree (4,3,5,1,1)
  Modelled, see chapter 'Emissions of pesticides to agricultural soil' in "01_crop production_direct field emissions and natural resources_v1.0.pdf" - pdf-document on the dedicated talk page of ecoinvent (www.ecoinvent.org/documentation)
  Uncertainty: Calculated from the pesticide application
- Chlorpyrifos [soil, agricultural]: 4.8131e-6 kg; lognormal variance with pedigree 0.0686, pedigree (4,3,5,1,1)
  (same comment as for 2,4-D)
- Acetochlor [soil, agricultural]: 5.9442e-5 kg; lognormal variance with pedigree 0.0686, pedigree (4,3,5,1,1)
  (same comment as for 2,4-D)
- Flumetsulam [soil, agricultural]: 3.3692e-7 kg; lognormal variance with pedigree 0.0686, pedigree (4,3,5,1,1)
  (same comment as for 2,4-D)
- Imazethapyr [soil, agricultural]: 1.6846e-8 kg; lognormal variance with pedigree 0.0686, pedigree (4,3,5,1,1)
  (same comment as for 2,4-D)
- Isoxaflutole [soil, agricultural]: 5.7757e-7 kg; lognormal variance with pedigree 0.0686, pedigree (4,3,5,1,1)
  (same comment as for 2,4-D)
- Acetamide [soil, agricultural]: 1.0108e-6 kg; lognormal variance with pedigree 0.0686, pedigree (4,3,5,1,1)
  (same comment as for 2,4-D)
- Nickel [soil, agricultural]: -3.2894e-7 kg
  Modelled, see chapter 'Emissions of heavy metals to agricultural soil, surface water and ground water' in "01_crop production_direct field emissions and natural resources_v1.0.pdf" - pdf-document on the dedicated talk page of ecoinvent (www.ecoinvent.org/documentation)
- Cypermethrin [soil, agricultural]: 3.6098e-8 kg; lognormal variance with pedigree 0.0686, pedigree (4,3,5,1,1)
  (same comment as for 2,4-D)
- Nicosulfuron [soil, agricultural]: 2.6472e-7 kg; lognormal variance with pedigree 0.0686, pedigree (4,3,5,1,1)
  (same comment as for 2,4-D)
- Dinitrogen monoxide [air, non-urban air or from high stacks]: 0.000397702 kg; name N2O; lognormal variance with pedigree 0.0986, pedigree (4,3,5,1,1)
  Modelled, see chapter 'Emissions of N2O to the air' in "01_crop production_direct field emissions and natural resources_v1.0.pdf" - pdf-document on the dedicated talk page of ecoinvent (www.ecoinvent.org/documentation)
  Uncertainty: Calculated with standard method
- Cadmium [soil, agricultural]: -1.8835e-8 kg
  (same comment as for Nickel)
- Primisulfuron [soil, agricultural]: 1.2033e-7 kg; lognormal variance with pedigree 0.0686, pedigree (4,3,5,1,1)
  (same comment as for 2,4-D)
- Lead [soil, agricultural]: 2.6437e-7 kg; lognormal variance with pedigree 0.0986, pedigree (4,3,5,1,1)
  Modelled, see chapter 'Emissions of heavy metals to agricultural soil, surface water and ground water' in "01_crop production_direct field emissions and natural resources_v1.0.pdf" - pdf-document on the dedicated talk page of ecoinvent (www.ecoinvent.org/documentation)
  Uncertainty: Calculated from the fertilizer application
- Dicamba [soil, agricultural]: 1.7327e-6 kg; lognormal variance with pedigree 0.0686, pedigree (4,3,5,1,1)
  (same comment as for 2,4-D)
- Nitrate [water, ground-]: 0.0116391 kg; lognormal variance with pedigree 0.0986, pedigree (4,3,5,1,1)
  Modelled with the 'SQCB-NO3 model' described in "01_crop production_direct field emissions and natural resources_v1.0.pdf" - pdf-document on the dedicated talk page of ecoinvent (www.ecoinvent.org/documentation)
  Uncertainty: Calculated with standard method
- Paraquat [soil, agricultural]: 6.1367e-7 kg; lognormal variance with pedigree 0.0686, pedigree (4,3,5,1,1)
  (same comment as for 2,4-D)
- Nitrogen oxides [air, non-urban air or from high stacks]: 8.35174e-5 kg; = 0.21 * N2O; lognormal variance with pedigree 0.0986, pedigree (4,3,5,1,1)
  Modelled, see chapter 'Emissions of NOx to the air' in "01_crop production_direct field emissions and natural resources_v1.0.pdf" - pdf-document on the dedicated talk page of ecoinvent (www.ecoinvent.org/documentation)
  Uncertainty: Calculated with standard method
- Imazapyr [soil, agricultural]: 4.8131e-9 kg; lognormal variance with pedigree 0.0686, pedigree (4,3,5,1,1)
  (same comment as for 2,4-D)
- Bromoxynil [soil, agricultural]: 6.4977e-7 kg; lognormal variance with pedigree 0.0686, pedigree (4,3,5,1,1)
  (same comment as for 2,4-D)
- Copper [soil, agricultural]: -1.5041e-6 kg
  (same comment as for Nickel)
- Foramsulfuron [soil, agricultural]: 3.6098e-8 kg; lognormal variance with pedigree 0.0686, pedigree (4,3,5,1,1)
  (same comment as for 2,4-D)
- Rimsulfuron [soil, agricultural]: 1.2033e-7 kg; lognormal variance with pedigree 0.0686, pedigree (4,3,5,1,1)
  (same comment as for 2,4-D)
- Pendimethalin [soil, agricultural]: 2.4787e-6 kg; lognormal variance with pedigree 0.0686, pedigree (4,3,5,1,1)
  (same comment as for 2,4-D)
- Permethrin [soil, agricultural]: 1.0829e-7 kg; lognormal variance with pedigree 0.0686, pedigree (4,3,5,1,1)
  (same comment as for 2,4-D)
- Tebupirimphos [soil, agricultural]: 1.0108e-6 kg; lognormal variance with pedigree 0.0686, pedigree (4,3,5,1,1)
  (same comment as for 2,4-D)
- Prosulfuron [soil, agricultural]: 2.1659e-8 kg; lognormal variance with pedigree 0.0686, pedigree (4,3,5,1,1)
  (same comment as for 2,4-D)
- Tefluthrin [soil, agricultural]: 7.9416e-7 kg; lognormal variance with pedigree 0.0686, pedigree (4,3,5,1,1)
  (same comment as for 2,4-D)
- Beta-cyfluthrin [soil, agricultural]: 5.0538e-8 kg; lognormal variance with pedigree 0.0686, pedigree (4,3,5,1,1)
  (same comment as for 2,4-D)
- Dimethenamid [soil, agricultural]: 5.0297e-6 kg; lognormal variance with pedigree 0.0686, pedigree (4,3,5,1,1)
  (same comment as for 2,4-D)
- Water [water, surface water]: 0.0149342 m3; name water_to_water_surface; = water_irrigation_input*(1-fraction_IW_to_air)*fraction_IW_to_surface_water; lognormal variance with pedigree 0.1286, pedigree (4,3,5,1,4)
  Calculated value. See the parameters and their comments to understand the calculation.
  property fraction, origin: salt water 0; name fraction_origin_salt_water_Wsw
  property fraction, origin: fresh water 1; name fraction_origin_fresh_water_Wsw
- Diflufenzopyr-sodium [soil, agricultural]: 1.9252e-7 kg; lognormal variance with pedigree 0.0686, pedigree (4,3,5,1,1)
  (same comment as for 2,4-D)
- Zinc [soil, agricultural]: -5.9001e-6 kg
  (same comment as for Nickel)
- Mesotrione [soil, agricultural]: 1.5643e-6 kg; lognormal variance with pedigree 0.0686, pedigree (4,3,5,1,1)
  (same comment as for 2,4-D)
- Lambda-cyhalothrin [soil, agricultural]: 2.4065e-8 kg; lognormal variance with pedigree 0.0686, pedigree (4,3,5,1,1)
  (same comment as for 2,4-D)
- Water [water, ground-]: 0.0597369 m3; name water_to_water_ground; = water_irrigation_input*(1-fraction_IW_to_air)*fraction_IW_to_ground_water; lognormal variance with pedigree 0.1286, pedigree (4,3,5,1,4)
  Calculated value. See the parameters and their comments to understand the calculation.
  property fraction, origin: unspecified 0; name fraction_origin_unspecified_Wgw
  property fraction, origin: salt water 0; name fraction_origin_salt_water_Wgw
  property fraction, origin: fresh water 1; name fraction_origin_fresh_water_Wgw
- Terbufos [soil, agricultural]: 2.6953e-6 kg; lognormal variance with pedigree 0.0686, pedigree (4,3,5,1,1)
  (same comment as for 2,4-D)
- Water [air, unspecified]: 0.170072 m3; name water_to_air_unspecified; = (water_irrigation_input*fraction_IW_to_air); lognormal variance with pedigree 0.0807, pedigree (2,2,5,1,1)
  Calculated value based on literature values and expert opinion. See comments in the parametres' comment field.
  property fraction, origin: salt water 0; name fraction_origin_salt_water
  property fraction, origin: unspecified 0; name fraction_origin_unspecified
  property fraction, origin: fresh water 1; name fraction_origin_fresh_water
- Alachlor [soil, agricultural]: 4.1393e-6 kg; lognormal variance with pedigree 0.0686, pedigree (4,3,5,1,1)
  (same comment as for 2,4-D)
- Chromium [soil, agricultural]: 4.4455e-8 kg; lognormal variance with pedigree 0.0986, pedigree (4,3,5,1,1)
  (same comment as for Lead)
- Bifenthrin [soil, agricultural]: 2.1659e-7 kg; lognormal variance with pedigree 0.0686, pedigree (4,3,5,1,1)
  (same comment as for 2,4-D)
- Metolachlor [soil, agricultural]: 4.2885e-5 kg; lognormal variance with pedigree 0.0686, pedigree (4,3,5,1,1)
  (same comment as for 2,4-D)
- Phosphorus [water, surface water]: 9.7542e-5 kg; lognormal variance with pedigree 0.0986, pedigree (4,3,5,1,1)
  Modelled, see chapter 'Emissions of phosphorous to the water' in "01_crop production_direct field emissions and natural resources_v1.0.pdf" - pdf-document on the dedicated talk page of ecoinvent (www.ecoinvent.org/documentation)
  Uncertainty: Calculated with standard method
- Phosphate [water, surface water]: 7.5148e-6 kg
  property dry mass 1 kg; name DM
  property carbon content, non-fossil 0; name C_content_non_fossil
  property water content 0; name water_content
  property carbon content, fossil 0; name C_content_fossil
  property water in wet mass 0 kg; name WWM
  property wet mass 1 kg; name WM
- Simazine [soil, agricultural]: 2.4306e-6 kg; lognormal variance with pedigree 0.0686, pedigree (4,3,5,1,1)
  (same comment as for 2,4-D)
- Ammonia [air, non-urban air or from high stacks]: 0.00101823 kg; lognormal variance with pedigree 0.0686, pedigree (4,3,5,1,1)
  Modelled with the 'AGRAMMON model' described in "01_crop production_direct field emissions and natural resources_v1.0.pdf" - pdf-document on the dedicated talk page of ecoinvent (www.ecoinvent.org/documentation)
  Uncertainty: Calculated with standard method
- Atrazine [soil, agricultural]: 9.246e-5 kg; lognormal variance with pedigree 0.0686, pedigree (4,3,5,1,1)
  (same comment as for 2,4-D)
- Fipronil [soil, agricultural]: 2.8879e-7 kg; lognormal variance with pedigree 0.0686, pedigree (4,3,5,1,1)
  (same comment as for 2,4-D)
- Glyphosate [soil, agricultural]: 1.9662e-5 kg; lognormal variance with pedigree 0.0686, pedigree (4,3,5,1,1)
  (same comment as for 2,4-D)
- Glufosinate [soil, agricultural]: 1.1912e-6 kg; lognormal variance with pedigree 0.0686, pedigree (4,3,5,1,1)
  (same comment as for 2,4-D)

## Sampling procedure
Literature data

## Extrapolations
This dataset has been extrapolated from year 2006 to the year of the calculation (2021). The uncertainty has been adjusted accordingly.

## Review by Niels Jungbluth 2006-10-17
Passed.
none

## Review by Emilia Moreno Ruiz 2018-01-19
The input of "maize seed, for sowing" has been adjusted to 30 kg/ha.
