# hard coal, import from RNA

Dataset: EcoSpold 2, unit process
Geography: RLA
Time period: 2015-01-01 to 2021-12-31
Technology level: current
Classification: ISIC rev.4 ecoinvent: 0510:Mining of hard coal
Scenario: Business-as-Usual
System model: Allocation, cut-off by classification
Generated by: Florentine Brunner
Database: ecoinvent
isCopyrightProtected: true
accessRestrictedTo: 1

## General comment
This dataset describes the transport needed for an average export of hard coal from USA/Canada to Latin America. It is assumed that the average transport distances within the USA/Canada are the same for domestically used and exported coal and are therefore covered in the market for hard coal, RNA. Here transport via transoceanic freight ship is covered. Average coal losses and related emissions during transport and storage are included. The latter are based on generic estimates as no geography-specific data was available. Trade volumes are based on 2015 import data according to the United Nations (comtrade.org).
Note: Discrepancies of hard coal trade volumes between different statistical sources as well as between import and export statistics of the same source are primarily due to differences in coal classification methodologies, which are not uniform on a global basis. They also occur because of coal in-transit, coal that is unaccounted for, and reporting discrepancies by importing and exporting countries.

## Included activities start
Starting at the gate of the hard coal mine, this dataset includes the transport, re-loading and storage specific to coal exports/imports in the respective geographies. This means it includes 1.) any transport between the hard coal mine and the border of the exporting country which is required in addition to the transport needs of the domestic “market for hard coal”, 2.) the transport through transit countries (if applicable), 3.) the transoceanic freight shipping (if applicable) and 4.) any transport between the border of the importing country and the consumers which is required in addition to the transport needs of the domestic coal market.

## Included activities end
The activity ends with the delivery of hard coal to the domestic market of the importing country.

## Geography
This datasets models the import of hard coal from North America to Latin America.

## Technology
Transport of hard coal by train and transoceanic ship.

## Time period
The trade volumes represented in this dataset are based on 2015 UN trade statistics retrieved online from comtrade.org.

## Reference product
- hard coal: 1 kg; CPC 11010: Hard coal; By-product classification allocatable product
  production volume 1.3e10 kg
    This is reported by the United Nations as the hard coal imports from North America to Latin America in 2015 (commodity codes 270111 (Coal; anthracite, whether or not pulverised, but not agglomerated), 270112 (Coal; bituminous, whether or not pulverised, but not agglomerated), 270119 (Coal; (other than anthracite and bituminous), whether or not pulverised but not agglomerated.). Validated with cross-references (where available): VDKI (2017). IEA (2017), and others more.
    Note: Discrepancies of hard coal trade volumes between different statistical sources as well as between import and export statistics of the same source are primarily due to differences in coal classification methodologies, which are not uniform on a global basis. They also occur because of coal in-transit, coal that is unaccounted for, and reporting discrepancies by importing and exporting countries.
    Reference(s):
    United Nations. 2017. Online from https://comtrade.un.org/, accessed 10 November 2017.
    Verein der Kohlenimporteure (VDKI). 2017, Jahresbericht 2017. Retrieved from <http://www.kohlenimporteure.de/publikationen/jahresbericht-2017.html>, 10 November 2017.
    IEA. 2017. Coal Information: Overview, 2017. Accessed online at <https://www.iea.org/publications/freepublications/publication/CoalInformation2017Overview.pdf>, 10 November 2017.
  property price 0.036 EUR2005
    Steam coal import costs in EU in IEA key world energy statistics 2003-2004.
  property carbon content, fossil 0.845
    C content 75-94% (specified in Tab 1.1, report 6, part VI). A mean content of 0.845 kg C/ kg dry hard coal was considered
  property heating value, net 27.91 MJ
    Based on the Characterization factor of Hard coal in the CED method
  property carbon content 0.845
    carbon content on a dry matter basis (reserved; not for manual entry)
  properties: wet mass 1 kg, water content 0.0638298, water in wet mass 0.06 kg, carbon content, non-fossil 0, dry mass 0.94 kg, carbon allocation 0.7943 kg

## Inputs from technosphere
- transport, freight, sea, bulk carrier for dry goods: 9 metric ton*km; lognormal variance with pedigree 0.1246, pedigree (3,3,3,1,1)
  Rough estimate using Google Earth and freight shipping maps. In the US coal exported both from the East Coast and the West Coast with the main ports being New Orleans, Hampton Roads and Long Beach. Also Canada exports coal from both the East Coast and the West Coast whereby the most important international coal terminals are in Vancouver and the International Coal pier of Canada at Nova Scotia (opensea.org, 2017)
  Reference(s):
  opensea.org. 2017. Blog: COAL: THE “BLACK GOLD” OF DRY BULK SHIPPING. Accessed online at: https://opensea.pro/blog/shipping-coal, 13 November 2017.
- hard coal: 1.002 kg; name transportation_losses; lognormal variance with pedigree 0.0532, pedigree (3,5,5,5,2)
  Compensation for product losses. For a lack of more recent or specific data this value is based on the estimation by Dones et al. (2007) that generally 0.2% of losses occure during coal transport. It is assumed that these losses are released to the environment in the form of particulate matter > 10 micrometer. Reference(s): Dones, R., Bauer, C., Röder, A. (2007) Kohle. In: Dones, R. (Ed.) et al., Sachbilanzen
  von Energiesystemen: Grundlagen für den ökologischen Vergleich von
  Energiesystemen und den Einbezug von Energiesystemen in Ökobilanzen für die
  Schweiz. Final report ecoinvent No. 6-VI, Paul Scherrer Institut Villigen, Swiss Centre
  for Life Cycle Inventories, Dübendorf, CH.
  properties: heating value, net 27.91 MJ, wet mass 1 kg, carbon content, fossil 0.845, dry mass 0.94 kg, water content 0.0638298
  note on heating value, net: Based on the Characterization factor of Hard coal in the CED method
  note on carbon content, fossil: C content 75-94% (specified in Tab 1.1, report 6, part VI). A mean content of 0.845 kg C/ kg dry hard coal was considered

## Emissions to nature
- Particulates, > 10 um [air, unspecified]: 0.002 kg; = transportation_losses-1; lognormal variance with pedigree 0.0912, pedigree (2,5,5,5,2)
  For a lack of more recent or specific data this value is based on the estimation by Dones et al. (2007) that generally 0.2% of losses occure during coal transport. It is assumed that these losses are released to the environment in the form of particulate matter > 10 micrometer. Reference(s): Dones, R., Bauer, C., Röder, A. (2007) Kohle. In: Dones, R. (Ed.) et al., Sachbilanzen
  von Energiesystemen: Grundlagen für den ökologischen Vergleich von
  Energiesystemen und den Einbezug von Energiesystemen in Ökobilanzen für die
  Schweiz. Final report ecoinvent No. 6-VI, Paul Scherrer Institut Villigen, Swiss Centre
  for Life Cycle Inventories, Dübendorf, CH.

## Sampling procedure
Literature research. The trade volumes were retrieved from UN statistics at comtrade.org for the commodity codes 270111 (Coal; anthracite, whether or not pulverised, but not agglomerated), 270112 (Coal; bituminous, whether or not pulverised, but not agglomerated), 270119 (Coal; (other than anthracite and bituminous), whether or not pulverised but not agglomerated.

## Extrapolations
This dataset has been extrapolated from year 2016 to the year of the calculation (2021). The uncertainty has been adjusted accordingly.
