# grape production

Dataset: EcoSpold 2, unit process
Geography: RoW
Time period: 2010-01-01 to 2021-12-31
Technology level: current
Classification: ISIC rev.4 ecoinvent: 0121:Growing of grapes
Scenario: Business-as-Usual
System model: Allocation, cut-off by classification
Generated by: Franziska Stössel
Published in: Stoessel, Franziska; 2012
Database: ecoinvent
isCopyrightProtected: false
accessRestrictedTo: 1

## General comment
This dataset represents table grape production.

Yield: 30 t / ha.
Duration of one cycle: 12 months in permanent culture.
Field production.
The LCA study, from which this LCI has been derived, contains detailed descriptions of the system boundaries and the data sources used (Stoessel et al. 2012). The publication is published and freely available with comprehensive supporting information:
http://pubs.acs.org/doi/pdf/10.1021/es2030577
Franziska Stoessel, Ronnie Juraske, Stephan Pfister, Stefanie Hellweg. (2012) Life Cycle Inventory and Carbon and Water FoodPrint of Fruits and Vegetables: Application to a Swiss Retailer. Environmental Science & Technology 6(46) 3253-3262.
This activity was adapted to include the global average land use change (LUC) emissions according 2nd edition of the Quantis-modified tool developed by Blonk Consultants 'WFLDB-adapted-Blonk 2014 direct-land-use-change-assessment-tool_2015-05-18a.xlsx', tab. 'Country & land use unknown'. The size of the emission depends on (i) the relative crop expansion in all countries of the crop during the last 20 years and (ii) the corresponding, country specific land transformations. The current results are based on the average FAOSTAT data (harvested area) of 2009-2011 and 1989-1991. The weighted average is used which takes into account relative difference in crop expansion into primary forest, secondary forest, grassland, perennial and annual land.

## Included activities start
From maintenance of the vineyard after harvest of the previous crop.

## Included activities end
This activity ends with harvest and storage.
The dataset includes a storage period of 2 months and it's use of electricity. The pesticide inputs are classified according to their chemical classes and the emmssions are assigned to the soil (100%). Mercury emissions are neglected due to a lack of data while other heavy metal emissions are included. The dataset doesn't include infrastructure for production and storage facilities. No transports for agricultural means of production from the regional storage to the farm are included.

## Technology
Production without production standard, but according to GAP

## Parameters
- fraction, irrigation water, to ground water: 0.8 dimensionless; name fraction_IW_to_ground_water; lognormal variance with pedigree 0.0886, pedigree (4,3,1,1,4)
  Literature value (Doll, 2011) cross referenced with expert opinion.
- fraction, irrigation water, to air: 0.586986 dimensionless; name fraction_IW_to_air; lognormal variance with pedigree 0.0409, pedigree (2,2,2,1,1)
  Literature value (Siebert, 2010) (Vionnet, S., Quantis Water Database - Technical Report, 2012).
- fraction, irrigation water to surface water: 0.2 dimensionless; name fraction_IW_to_surface_water; lognormal variance with pedigree 0.0886, pedigree (4,3,1,1,4)
  Literature value (Doll, 2011) cross referenced with expert opinion.

## Reference product
- grape: 1 kg; source Stoessel, Franziska; 2012; By-product classification allocatable product; CPC 01330: Grapes
  production volume 7.14401e10 kg
    in kg / year (2010) including table grapes, grapes for grape juice and marc of grapes
  property price 0.775 EUR2005
    Calculated from the trade statistics for the year 2005 published by the UN (COMTRADE database, accessed 20151105) as an average of 5 biggest importers of grape in the world; JP, NL, FR, BL and DE. Comtrade cathegory: 80540: Grapefruit, fresh or dried.
  property carbon content 0.0896616
    carbon content on a dry matter basis (reserved; not for manual entry)
  properties: water in wet mass 0.811 kg, wet mass 1 kg, carbon content, non-fossil 0.0896616, dry mass 0.189 kg, carbon content, fossil 0, water content 4.29101, carbon allocation 0.016946 kg

## Inputs from technosphere
- pesticide, unspecified: 0.0005 kg; source Stoessel, Franziska; 2012; lognormal variance with pedigree 0.0439, pedigree (3,3,5,3,2)
  properties: wet mass 1 kg, carbon content, fossil 0.486978, dry mass 1 kg
  note on carbon content, fossil: Mean of C content in all pesticides whose formula has been documented in Sutter 2010
- electricity, low voltage: 0 kWh; source Stoessel, Franziska; 2012; pedigree (1,1,1,1,1)
- inorganic phosphorus fertiliser, as P2O5: 0 kg; source Stoessel, Franziska; 2012; pedigree (1,1,1,1,1)
  properties: wet mass 1 kg, dry mass 1 kg
- fertilising, by broadcaster: 0.000733 ha; source Stoessel, Franziska; 2012; lognormal variance with pedigree 0.0439, pedigree (3,3,5,3,2)
  Fertilizing by broadcaster is used as a proxy for all the machinery work done in horticultural processes.
- ammonium nitrate: 0 kg; source Stoessel, Franziska; 2012; pedigree (1,1,1,1,1)
  The exchange has been updated from 'ammonium nitrate, as N' into 'ammonium nitrate' and therefore its amount has been scaled (multiplied) from 0.002 kg by 2.8573 kg of 'ammonium nitrate' per kg of 'ammonium nitrate, as N'.
  properties: wet mass 1 kg, dry mass 1 kg
- packaging, for fertilisers: 0.01532 kg; lognormal variance with pedigree 0.0592, pedigree (4,3,4,5,4)
  Total amount of active substance/s of fertilisers needed for the production of 'grape' is calculated to be circa 7.66E-03 kg. Fertiliser/s used in this dataset is/are: 'ammonium nitrate, as N', 'phosphate fertiliser, as P2O5', 'potassium sulfate, as K2O'. The total amount of active substance/s is doubled in order to account for the packaging of the dilluted product of fertiliser/s that is/are applied. Therefore, 1.53E-02 kg of packaging for fertilisers is justified with this exchange.
  properties: dry mass 1 kg, wet mass 1 kg, price 0.0642 EUR2005, heating value, net 25.01 MJ, carbon content, fossil 0.825301
  note on carbon content, fossil: Considering a chemical formula (C2H4)n for polyethylene, carbon content-fossil is calculated to be 0.856286 kg of Carbon per kg of dry mass.
- irrigation: 0 m3; name water_irrigation_input; source Stoessel, Franziska; 2012; pedigree (1,1,1,1,1)
  Average France, Greece, Italy, Egypt, Spain, South Africa and Brazil
  properties: wet mass 1000 kg, dry mass 0.11 kg, water content 9089.91
- potassium sulfate: 0.00801034 kg; source Stoessel, Franziska; 2012; lognormal variance with pedigree 0.0439, pedigree (3,3,5,3,2)
  The exchange has been updated from 'potassium sulfate, as K2O' into 'potassium sulfate' and therefore its amount has been scaled (multiplied) from 0.0043 kg by 1.85 kg of 'potassium sulfate' per kg of 'potassium sulfate, as K2O'.
  properties: dry mass 1 kg, wet mass 1 kg
- packaging, for pesticides: 0.001 kg; lognormal variance with pedigree 0.0592, pedigree (4,3,4,5,4)
  Total amount of active substance/s of pesticides needed for the production of grape is calculated to be circa 5.00E-04 kg. Pesticide/s used in this dataset is/are: 'pesticide, unspecified'. The total amount of active substance/s is doubled in order to account for the packaging of the dilluted product of pesticide/s that is/are applied. Therefore, 1.00E-03 kg of packaging for pesticides is justified with this exchange.
  properties: dry mass 1 kg, price 0.0642 EUR2005, wet mass 1 kg, heating value, net 25.97 MJ, carbon content, fossil 0.85714
- electricity, low voltage: 0.00176356, 0.000321111, 0.00724869, 0.00517029, 0.0257774, 0.0128424, 0.0368766 kWh (7 entries); source Stoessel, Franziska; 2012; lognormal variance with pedigree 0.0439, pedigree (3,3,5,3,2)
- inorganic phosphorus fertiliser, as P2O5: 1.01618e-5, 1.31841e-5, 1.0557e-5, 8.26607e-5, 1.74175e-5, 7.17667e-7, 1.89174e-6, 0.000195144, 3.51738e-6, 3.83831e-7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 kg (29 entries); source Stoessel, Franziska; 2012; lognormal variance with pedigree 0.0439, pedigree (3,3,5,3,2)
- ammonium nitrate: 0.000754733, 0.00141586, 0.000981948, 0.0025621 kg (4 entries); source Stoessel, Franziska; 2012; lognormal variance with pedigree 0.0439, pedigree (3,3,5,3,2)
  (same comment as for ammonium nitrate)
- irrigation: 0.0035658, 0.000151357, 6.0543e-6, 0.0318759, 0.000522361, 2.61202e-5, 0.00148317, 0.000241413, 0.00117747, 0.000402433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 m3 (16 entries); source Stoessel, Franziska; 2012; lognormal variance with pedigree 0.0198, pedigree (2,4,4,4,3)
  Average France, Greece, Italy, Egypt, Spain, South Africa and Brazil

## Inputs from nature
- Transformation, to permanent crop, irrigated, intensive [natural resource, land]: 0.333 m2; source Stoessel, Franziska; 2012; lognormal variance with pedigree 0.0453, pedigree (3,3,5,3,2)
- Transformation, from permanent crop, irrigated, intensive [natural resource, land]: 0.333 m2; source Stoessel, Franziska; 2012; lognormal variance with pedigree 0.0453, pedigree (3,3,5,3,2)
- Occupation, permanent crop, irrigated, intensive [natural resource, land]: 0.333 m2*year; source Stoessel, Franziska; 2012; lognormal variance with pedigree 0.0453, pedigree (3,3,5,3,2)
- Energy, gross calorific value, in biomass [natural resource, biotic]: 3.66983 MJ; lognormal variance with pedigree 0.0099, pedigree (2,3,4,3,1)
  Calculated value based on literature. The gross energy is calculated using following formula; gross energy (MJ) = crude protein (kg)*23.04 (MJ/kg)+crude fat (kg)*38.96 (MJ/kg)+crude fibre (kg)*17.95 (MJ/kg)+carbohydrates (kg)*17.17 (MJ/kg) (formula based on expert opinion, cross referenced; Diepenbrock, 2012, Energy Balance in Crop Production). The product composition of fruits and vegetables is extracted from the USDA National Nutrient Database for Standard Reference (http://ndb.nal.usda.gov/, accessed 20131114). Crude protein (g)= 6.3, crude fat (g)= 1, crude fibre (g)= 11, ash (g)= 3.1, water (g)= 908.9, carbohydrates (g)= 80.8. The gross energy per kg of DM is 9.36MJ. The calculated gross energy per kg of reference product is thus 3.67MJ.

## Emissions to nature
- Nitrogen oxides [air, non-urban air or from high stacks]: 8.217e-6 kg; source Thomas Nemecek 2011; lognormal variance with pedigree 0.0747, pedigree (3,4,5,3,2)
- Cadmium [soil, agricultural]: 5.21275e-8 kg; source Thomas Nemecek 2011; lognormal variance with pedigree 0.0847, pedigree (3,4,5,3,2)
  property dry mass 1 kg; name DM
  property carbon content, non-fossil 0; name C_content_non_fossil
  property water in wet mass 0 kg; name WWM
  property water content 0; name water_content
  property wet mass 1 kg; name WM
  property carbon content, fossil 0; name C_content_fossil
- Water [water, ground-]: 0.0583837 m3; name water_to_water_ground; = water_irrigation_input*(1-fraction_IW_to_air)*fraction_IW_to_ground_water; lognormal variance with pedigree 0.0966, pedigree (4,3,4,1,4)
  Calculated value. See the parameters and their comments to understand the calculation.
  property fraction, origin: salt water 0; name fraction_origin_salt_water_Wgw
  property fraction, origin: unspecified 0; name fraction_origin_unspecified_Wgw
  property fraction, origin: fresh water 1; name fraction_origin_fresh_water_Wgw
- Water [water, surface water]: 0.0145959 m3; name water_to_water_surface; = water_irrigation_input*(1-fraction_IW_to_air)*fraction_IW_to_surface_water; lognormal variance with pedigree 0.0966, pedigree (4,3,4,1,4)
  Calculated value. See the parameters and their comments to understand the calculation.
  property fraction, origin: fresh water 1; name fraction_origin_fresh_water_Wsw
  property fraction, origin: salt water 0; name fraction_origin_salt_water_Wsw
- Copper [soil, agricultural]: -1.19678e-6 kg; source Thomas Nemecek 2011
- Pesticides, unspecified [soil, agricultural]: 0.0005 kg; source Stoessel, Franziska; 2012; lognormal variance with pedigree 0.0777, pedigree (3,4,5,3,2)
- Nickel [soil, agricultural]: -3.31033e-8 kg; source Thomas Nemecek 2011
- Phosphorus [water, surface water]: 1.74e-6 kg; source Stoessel, Franziska; 2012; lognormal variance with pedigree 0.0847, pedigree (3,4,5,3,2)
- Chromium [soil, agricultural]: -3.92804e-7 kg; source Thomas Nemecek 2011
- Nitrate [water, ground-]: 0.00265714 kg; source Thomas Nemecek 2011; lognormal variance with pedigree 0.0847, pedigree (3,4,5,3,2)
- Phosphate [water, ground-]: 4.96e-7 kg; source Stoessel, Franziska; 2012; lognormal variance with pedigree 0.0847, pedigree (3,4,5,3,2)
- Ammonia [air, non-urban air or from high stacks]: 4.85714e-5 kg; source Thomas Nemecek 2011; lognormal variance with pedigree 0.0527, pedigree (3,4,5,3,2)
- Carbon dioxide, from soil or biomass stock [air, non-urban air or from high stacks]: 0.00130455 kg; normal variance with pedigree 0.5452, pedigree (3,3,5,5,2)
  Global average LUC emissions according 2nd edition of the Quantis-modified tool developed by Blonk Consultants 'WFLDB-adapted-Blonk 2014 direct-land-use-change-assessment-tool_2015-05-18a.xlsx', tab. 'Country & land use unknown'. The emission are based on the relative change in production areas in all countries for a given crop. The weighted average is used which takes into acount relative difference in crop expansion into primary forest, secondary forest, grassland, perennial and annual land.
  Uncertainty: Uncertainty estimated based on IPCC 2006
- Lead [soil, agricultural]: 5.87101e-7 kg; source Thomas Nemecek 2011; lognormal variance with pedigree 0.0847, pedigree (3,4,5,3,2)
- Water [air, unspecified]: 0.10372 m3; name water_to_air_unspecified; = water_irrigation_input*fraction_IW_to_air; lognormal variance with pedigree 0.0487, pedigree (2,2,4,1,1)
  Calculated value based on literature values and expert opinion. See comments in the parametres' comment field.
  property fraction, origin: fresh water 1; name fraction_origin_fresh_water
  property fraction, origin: unspecified 0; name fraction_origin_unspecified
  property fraction, origin: salt water 0; name fraction_origin_salt_water
- Zinc [soil, agricultural]: -8.1429e-7 kg; source Thomas Nemecek 2011
- Dinitrogen monoxide [air, non-urban air or from high stacks]: 3.91286e-5 kg; source Thomas Nemecek 2011; lognormal variance with pedigree 0.0747, pedigree (3,4,5,3,2)

## Sampling procedure
The LCI is based on table grape production information from different sources (peer reviewed journals, books, extension leaflets, personal information) and is well representative for a conventional production in their main production countries. Most probably it is representative for productions in other countries or farms which produces similarly.
Please refer to Stoessel et al. (2012) for more information: http://pubs.acs.org/doi/pdf/10.1021/es2030577
Franziska Stoessel, Ronnie Juraske, Stephan Pfister, Stefanie Hellweg. (2012) Life Cycle Inventory and Carbon and Water FoodPrint of Fruits and Vegetables: Application to a Swiss Retailer. Environmental Science & Technology 6(46) 3253-3262.

## Extrapolations
The dataset is extrapolated to global production.

## Review by Bo Weidema 2011-12-31
Infrastructure missing. Includes only table grapes.

## Review by Gregor Wernet 2011-12-31
The documentation on this dataset is quite poor. The dataset has been temporarily accepted since the data provider promised to provide more detailed information within the dataset and in a general document in the editorial section of the ecoinvent homepage.
