# treatment of rainwater mineral oil storage, in wastewater treatment plant, capacity 1.1E10l/year

Dataset: EcoSpold 2, unit process
Geography: Europe without Switzerland
Time period: 1994-01-01 to 2021-12-31
Technology level: current
Classification: ISIC rev.4 ecoinvent: 3700:Sewerage
Classification: EcoSpold01Categories: waste management/wastewater treatment
Tags: Treatment
Scenario: Business-as-Usual
System model: Allocation, cut-off by classification
Generated by: [System]
Database: ecoinvent
isCopyrightProtected: true
accessRestrictedTo: 1

## General comment
Wastewater purified in a moderatly large municipal wastewater treatment plant (capacity class 2), with an average capacity size of 71100 per-captia-equivalents PCE.
Wastewater contains (in kg/m3): COD: 0.07 (GSD=136%); SO4-S: 0.011 (GSD=136%); NH4-N: 0.00028 (GSD=136%); NO3-N: 0.001 (GSD=136%); Ptot.: 0.00066 (GSD=136%); B: 0.000016 (GSD=231%); Cl: 0.34 (GSD=231%); Ba: 0.00003 (GSD=231%); Cd: 0.0000005 (GSD=231%); Cr: 0.000008 (GSD=231%); Cu: 0.000015 (GSD=231%); Mn: 0.00012 (GSD=231%); Ni: 0.000005 (GSD=231%); Pb: 0.0000025 (GSD=231%); Zn: 0.00028 (GSD=231%); Sr: 0.00021 (GSD=231%); Fe: 0.0014 (GSD=231%); Ca: 0.036 (GSD=231%); Al: 0.00035 (GSD=231%); K: 0.004 (GSD=231%); Mg: 0.0022 (GSD=231%); Na: 0.212 (GSD=231%);

## Included activities end
Infrastructure materials for municipal wastewater treatment plant, transports, dismantling. Land use burdens.

## Geography
Specific to the technology mix encountered in Switzerland in 2000. Well applicable to modern treatment practices in Europe, North America or Japan.
This dataset has been extrapolated from the global dataset.

## Technology
Three stage wastewater treatment (mechanical, biological, chemical) including sludge digestion (fermentation) according to the average technology in Switzerland

## Parameters
- fraction, process water, to air: 0.1 dimensionless; name fraction_PW_to_air; lognormal variance with pedigree 0.092025, pedigree (4,4,3,2,4)

## Reference product
- rainwater mineral oil storage: -1 m3; name RP; CPC 94110: Sewerage and sewage treatment services; By-product classification Waste
  production volume 1.288 m3; name RP_PV; = 4*0.322
    This is a placeholder value that does not reflect real-world production volumes. This dataset does not currently require a real-world production volume to work in the database framework, and no actual data were collected yet. This has no negative effect on the results of the ecoinvent database.
    The GDP of Europe without Switzerland in 2005 was 32.2% of the global GDP.
  property price 0.0929599 EUR2005
    Waste products are assigned a price of zero as they are assumed to require further treatment.
  property carbon content, fossil 0.0457865
    COD= 0.07 kg/m3 (Tab A.19, ecoinvent v2.2 report 13_I). COD was converted to TOC, using conversion factors in Tab 4.10 (ecoinvent v2.2 report 13_IV). TOC was considered as Total Carbon.
  property carbon content 0.0457865
    carbon content on a dry matter basis (reserved; not for manual entry)
  properties: water content 1509.95, water in wet mass 999.338 kg, carbon content, non-fossil 0, dry mass 0.661834 kg, wet mass 1000 kg, carbon allocation 0.030303 kg

## Inputs from technosphere
- municipal waste incineration facility: 1.1256e-11 unit; lognormal variance with pedigree 0.052, pedigree (1,1,5,5,1)
  burden from sludge incineration. Uncertainty calculated from wastewater composition and treatment model
- slag landfill: 1.145e-11 unit; lognormal variance with pedigree 0.072, pedigree (1,1,5,5,1)
  (same comment as for municipal waste incineration facility)
- process-specific burdens, residual material landfill: 0.0010451 kg; lognormal variance with pedigree 0.072, pedigree (1,1,5,5,1)
  burden from sludge incineration. Uncertainty calculated from wastewater composition and treatment model;activityLink introduced to establish a direct link to the corresponding regional supply of this product
- iron sulfate: 0.0029934 kg; lognormal variance with pedigree 0.152, pedigree (1,1,5,5,1)
  direct wastewater treatment plant burden. Uncertainty calculated from wastewater composition and treatment model
  properties: dry mass 1 kg, wet mass 1 kg
- liquid manure spreading, by vacuum tanker: 0.00012095 m3; lognormal variance with pedigree 0.042, pedigree (1,1,5,5,1)
  burden from sludge spreading. Uncertainty calculated from wastewater composition and treatment model
- aluminium sulfate, powder: 0.00080902 kg; lognormal variance with pedigree 0.152, pedigree (1,1,5,5,1)
  (same comment as for iron sulfate)
  properties: wet mass 1 kg, dry mass 1 kg
- process-specific burdens, municipal waste incineration: 0.045023 kg; lognormal variance with pedigree 0.052, pedigree (1,1,5,5,1)
  (same comment as for process-specific burdens, residual material landfill)
- residual material landfill: 2.1774e-12 unit; lognormal variance with pedigree 0.072, pedigree (1,1,5,5,1)
  (same comment as for municipal waste incineration facility)
- chemical, inorganic: 1.2058e-7 kg; lognormal variance with pedigree 0.402, pedigree (1,1,5,5,1)
  (same comment as for municipal waste incineration facility)
  properties: wet mass 1 kg, dry mass 1 kg, carbon content, fossil 0.003
  note on carbon content, fossil: This dataset is an unweighted average of 20 inorganic substances (listed in Tab 88.1, ecoinvent v2.2 report 8, part II), being part of the top100 chemicals included in this database. The C-content has also been calculated as an unweighted average of the C content of the substances composing this dataset.
- electricity, low voltage: 0.051434 kWh; lognormal variance with pedigree 0.062, pedigree (1,1,5,5,1)
  (same comment as for iron sulfate)
- chromium oxide, flakes: 4.3428e-10 kg; lognormal variance with pedigree 0.582, pedigree (1,1,5,5,1)
  (same comment as for municipal waste incineration facility)
  properties: wet mass 1 kg, dry mass 1 kg
- ammonia, anhydrous, liquid: 7.434e-7 kg; lognormal variance with pedigree 0.262, pedigree (1,1,5,5,1)
  (same comment as for municipal waste incineration facility)
  properties: dry mass 1 kg, wet mass 1 kg
- iron (III) chloride, without water, in 40% solution state: 0.0041056 kg; lognormal variance with pedigree 0.152, pedigree (1,1,5,5,1)
  direct wastewater treatment plant burden plus burden from sludge incineration. Uncertainty calculated from wastewater composition and treatment model
  properties: dry mass 1 kg, wet mass 1 kg
- chemical, organic: 4.6881e-7 kg; lognormal variance with pedigree 0.772, pedigree (1,1,5,5,1)
  (same comment as for municipal waste incineration facility)
  properties: heating value, net 19.03 MJ, wet mass 1 kg, dry mass 1 kg, carbon content, fossil 0.628
  note on carbon content, fossil: This dataset is an unweighted average of 20 organic substances (listed in Tab 88.1, ecoinvent v2.2 report 8, part II), being part of the top100 chemicals included in this database. The C-content has also been calculated as an unweighted average of the C content of the substances composing this dataset.
- quicklime, milled, packed: 1.2627e-7 kg; lognormal variance with pedigree 0.162, pedigree (1,1,5,5,1)
  (same comment as for municipal waste incineration facility)
  properties: water content 0.010101, dry mass 0.99 kg, wet mass 1 kg
- waste graphical paper: -0.0155 kg; name ByP_03; lognormal variance with pedigree 0.042, pedigree (1,1,5,5,1)
  (same comment as for iron sulfate)
  production volume 0.019964 kg; = ABS(ByP_03/ RP)* RP_PV
    Calculated from the production volume of rainwater mineral oil storage in proportion to the respective output amounts.
  property price 0 EUR2005; name ByP_03_price_EUR2005
  properties: dry mass 0.888 kg, carbon content, non-fossil 0.454955, water content 0.126126, wet mass 1 kg, heating value, net 14.12 MJ
  note on heating value, net: Value taken from the general comment of the treatment dataset.
- heat, district or industrial, other than natural gas: 0.03776 MJ; lognormal variance with pedigree 0.052, pedigree (1,1,5,5,1)
  (same comment as for municipal waste incineration facility)
  properties: heating value, net 1 MJ
- waste cement, hydrated: -0.0010451 kg; name ByP_02; lognormal variance with pedigree 0.082, pedigree (1,1,5,5,1)
  (same comment as for municipal waste incineration facility)
  production volume 0.00134609 kg; = ABS(ByP_02/ RP)* RP_PV
    (same comment as for waste graphical paper)
  property price 0 EUR2005; name ByP_02_price_EUR2005
  properties: wet mass 1 kg, dry mass 1 kg
- titanium dioxide: 2.128e-8 kg; lognormal variance with pedigree 0.582, pedigree (1,1,5,5,1)
  (same comment as for municipal waste incineration facility)
  properties: wet mass 1 kg, dry mass 1 kg
- waste plastic, mixture: -0.0155 kg; name ByP_01; lognormal variance with pedigree 0.042, pedigree (1,1,5,5,1)
  (same comment as for iron sulfate)
  production volume 0.019964 kg; = ABS(ByP_01/ RP)* RP_PV
    (same comment as for waste graphical paper)
  property price 0 EUR2005; name ByP_01_price_EUR2005
  properties: wet mass 1 kg, carbon content, fossil 0.747344, water content 0.180638, dry mass 0.847 kg, heating value, net 30.79 MJ
  note on carbon content, fossil: C content in 1 kg DM was calculated using data in Tab A.2, ecoinvent v2.2 report 13_I
- process-specific burdens, slag landfill: 0.0064405 kg; lognormal variance with pedigree 0.072, pedigree (1,1,5,5,1)
  (same comment as for process-specific burdens, residual material landfill)
- sewer grid, 1.1E10l/year, 242 km: 1.6832e-7 km; lognormal variance with pedigree 0.042, pedigree (1,1,5,5,1)
  uncertainty heeded in exchanges of the module
- sodium hydroxide, without water, in 50% solution state: 6.9648e-7 kg; lognormal variance with pedigree 0.162, pedigree (1,1,5,5,1)
  (same comment as for municipal waste incineration facility)
  properties: dry mass 1 kg, wet mass 1 kg, heating value, net 3.03 MJ
- cement, unspecified: 0.00041806 kg; lognormal variance with pedigree 0.082, pedigree (1,1,5,5,1)
  (same comment as for municipal waste incineration facility)
  properties: dry mass 1 kg, wet mass 1 kg
- wastewater treatment facility, capacity 1.1E10l/year: 1.9883e-9 unit; lognormal variance with pedigree 0.042, pedigree (1,1,5,5,1)
  uncertainty heeded in exchanges of the module
- heat, district or industrial, natural gas: 6.52482e-5 MJ; lognormal variance with pedigree 0.262, pedigree (1,1,5,5,1)
  (same comment as for municipal waste incineration facility)
  properties: heating value, net 1 MJ
- hydrochloric acid, without water, in 30% solution state: 7.2347e-8 kg; lognormal variance with pedigree 0.402, pedigree (1,1,5,5,1)
  (same comment as for municipal waste incineration facility)
  properties: wet mass 1 kg, dry mass 1 kg, heating value, net 3.32 MJ
- electricity, high voltage: 0.0064729 kWh; lognormal variance with pedigree 0.492, pedigree (1,1,5,5,1)
  (same comment as for municipal waste incineration facility)

## Emissions to nature
- Dinitrogen monoxide [air, urban air close to ground]: 3.5836e-6 kg; lognormal variance with pedigree 0.092, pedigree (1,1,5,5,1)
  direct wastewater treatment plant emission plus direct digester gas emission plus emission from sludge incineration plus emission from sludge spreading. Uncertainty calculated from wastewater composition and treatment model
- Magnesium [water, ground-, long-term]: 0.00012218 kg; lognormal variance with pedigree 0.762, pedigree (1,1,5,5,1)
  emission from sludge incineration. Uncertainty calculated from wastewater composition and treatment model
- Boron [soil, agricultural]: 3.0475e-6 kg; lognormal variance with pedigree 0.762, pedigree (1,1,5,5,1)
  emission from sludge spreading. Uncertainty calculated from wastewater composition and treatment model
- Manganese [water, ground-, long-term]: 3.121e-5 kg; lognormal variance with pedigree 0.922, pedigree (1,1,5,5,1)
  (same comment as for Magnesium)
- Iron [soil, agricultural]: 0.0012375 kg; lognormal variance with pedigree 0.172, pedigree (1,1,5,5,1)
  (same comment as for Boron)
- Ammonium, ion [water, surface water]: 0.00011526 kg; lognormal variance with pedigree 0.142, pedigree (1,1,5,5,1)
  direct wastewater treatment plant emission. Uncertainty calculated from wastewater composition and treatment model
- Cyanide [air, urban air close to ground]: 1.3262e-8 kg; lognormal variance with pedigree 0.282, pedigree (1,1,5,5,1)
  (same comment as for Magnesium)
- Boron [water, ground-, long-term]: 3.1851e-6 kg; lognormal variance with pedigree 0.762, pedigree (1,1,5,5,1)
  (same comment as for Magnesium)
- Sodium, ion [water, surface water]: 0.212 kg; lognormal variance with pedigree 0.722, pedigree (1,1,5,5,1)
  sewer overload discharge plus direct wastewater treatment plant emission plus emission from sludge incineration. Uncertainty calculated from wastewater composition and treatment model
- Boron [air, urban air close to ground]: 5.799e-7 kg; lognormal variance with pedigree 0.762, pedigree (1,1,5,5,1)
  direct digester gas emission plus emission from sludge incineration. Uncertainty calculated from wastewater composition and treatment model
- Zinc [soil, agricultural]: 7.4816e-5 kg; lognormal variance with pedigree 0.762, pedigree (1,1,5,5,1)
  (same comment as for Boron)
- Carbon monoxide, fossil [air, urban air close to ground]: 7.6552e-5 kg; lognormal variance with pedigree 0.202, pedigree (1,1,5,5,1)
  (same comment as for Magnesium)
- Chromium [soil, agricultural]: 1.5238e-6 kg; lognormal variance with pedigree 0.762, pedigree (1,1,5,5,1)
  (same comment as for Boron)
- Manganese [water, surface water]: 6.0902e-5 kg; lognormal variance with pedigree 0.712, pedigree (1,1,5,5,1)
  (same comment as for Sodium, ion)
- Zinc, ion [water, ground-, long-term]: 1.8393e-6 kg; lognormal variance with pedigree 5.562, pedigree (1,1,5,5,1)
  (same comment as for Magnesium)
- Chromium [air, urban air close to ground]: 1.7866e-13 kg; lognormal variance with pedigree 0.852, pedigree (1,1,5,5,1)
  (same comment as for Boron)
- Phosphorus [air, urban air close to ground]: 2.6309e-7 kg; lognormal variance with pedigree 0.162, pedigree (1,1,5,5,1)
  (same comment as for Boron)
- Zinc, ion [water, surface water]: 8.657e-5 kg; lognormal variance with pedigree 0.702, pedigree (1,1,5,5,1)
  (same comment as for Sodium, ion)
- Barium [air, urban air close to ground]: 1.7294e-8 kg; lognormal variance with pedigree 0.782, pedigree (1,1,5,5,1)
  (same comment as for Boron)
- Strontium [water, surface water]: 0.00010661 kg; lognormal variance with pedigree 0.712, pedigree (1,1,5,5,1)
  (same comment as for Sodium, ion)
- Nitrogen [water, surface water]: 1.1316e-5 kg; lognormal variance with pedigree 0.112, pedigree (1,1,5,5,1)
  (same comment as for Ammonium, ion)
- Barium [water, surface water]: 1.8016e-6 kg; lognormal variance with pedigree 0.612, pedigree (1,1,5,5,1)
  (same comment as for Sodium, ion)
- Strontium [air, urban air close to ground]: 6.3426e-9 kg; lognormal variance with pedigree 0.792, pedigree (1,1,5,5,1)
  (same comment as for Boron)
- Magnesium [air, urban air close to ground]: 1.8225e-7 kg; lognormal variance with pedigree 0.782, pedigree (1,1,5,5,1)
  (same comment as for Boron)
- Phosphate [water, ground-, long-term]: 3.0812e-5 kg; lognormal variance with pedigree 4.312, pedigree (1,1,5,5,1)
  (same comment as for Magnesium)
- Barium [water, ground-, long-term]: 1.5354e-5 kg; lognormal variance with pedigree 0.862, pedigree (1,1,5,5,1)
  (same comment as for Magnesium)
- Calcium, ion [water, surface water]: 0.032477 kg; lognormal variance with pedigree 0.722, pedigree (1,1,5,5,1)
  (same comment as for Sodium, ion)
- Chloride [water, surface water]: 0.34268 kg; lognormal variance with pedigree 0.712, pedigree (1,1,5,5,1)
  (same comment as for Sodium, ion)
- Lead [water, ground-, long-term]: 9.7227e-8 kg; lognormal variance with pedigree 6.972, pedigree (1,1,5,5,1)
  (same comment as for Magnesium)
- TOC, Total Organic Carbon [water, ground-, long-term]: 4.76e-5 kg; lognormal variance with pedigree 0.172, pedigree (1,1,5,5,1)
  (same comment as for Magnesium)
- Calcium [soil, agricultural]: 0.0013658 kg; lognormal variance with pedigree 0.762, pedigree (1,1,5,5,1)
  (same comment as for Boron)
- DOC, Dissolved Organic Carbon [water, surface water]: 0.0033947 kg; lognormal variance with pedigree 0.122, pedigree (1,1,5,5,1)
  (same comment as for Sodium, ion)
- Carbon [soil, agricultural]: 0.0030741 kg; lognormal variance with pedigree 0.162, pedigree (1,1,5,5,1)
  (same comment as for Boron)
- Nitrate [water, surface water]: 0.0042698 kg; lognormal variance with pedigree 0.112, pedigree (1,1,5,5,1)
  (same comment as for Sodium, ion)
- Chromium VI [water, ground-, long-term]: 2.5578e-7 kg; lognormal variance with pedigree 1.142, pedigree (1,1,5,5,1)
  (same comment as for Magnesium)
- Aluminium [air, urban air close to ground]: 4.3758e-7 kg; lognormal variance with pedigree 0.562, pedigree (1,1,5,5,1)
  (same comment as for Boron)
- Strontium [water, ground-, long-term]: 6.3343e-5 kg; lognormal variance with pedigree 0.762, pedigree (1,1,5,5,1)
  (same comment as for Magnesium)
- Chromium VI [water, surface water]: 4.1387e-6 kg; lognormal variance with pedigree 0.692, pedigree (1,1,5,5,1)
  (same comment as for Sodium, ion)
- Carbon dioxide, fossil [air, urban air close to ground]: 0.086458 kg; lognormal variance with pedigree 0.082, pedigree (1,1,5,5,1)
  (same comment as for Magnesium)
- Calcium [air, urban air close to ground]: 3.6104e-6 kg; lognormal variance with pedigree 0.782, pedigree (1,1,5,5,1)
  (same comment as for Boron)
- Nickel, ion [water, ground-, long-term]: 1.13e-6 kg; lognormal variance with pedigree 0.762, pedigree (1,1,5,5,1)
  (same comment as for Magnesium)
- BOD5, Biological Oxygen Demand [water, ground-, long-term]: 3.9347e-5 kg; lognormal variance with pedigree 0.172, pedigree (1,1,5,5,1)
  (same comment as for Magnesium)
- Phosphate [water, ground-]: 2.8981e-6 kg; lognormal variance with pedigree 0.192, pedigree (1,1,5,5,1)
  (same comment as for Boron)
- Calcium, ion [water, ground-, long-term]: 0.0018847 kg; lognormal variance with pedigree 0.762, pedigree (1,1,5,5,1)
  (same comment as for Magnesium)
- Nickel, ion [water, surface water]: 3.0328e-6 kg; lognormal variance with pedigree 0.712, pedigree (1,1,5,5,1)
  (same comment as for Sodium, ion)
- Cadmium, ion [water, surface water]: 2.5382e-7 kg; lognormal variance with pedigree 0.712, pedigree (1,1,5,5,1)
  (same comment as for Sodium, ion)
- Copper [soil, agricultural]: 4.2965e-6 kg; lognormal variance with pedigree 0.762, pedigree (1,1,5,5,1)
  (same comment as for Boron)
- Aluminium [water, ground-, long-term]: 0.00020729 kg; lognormal variance with pedigree 0.552, pedigree (1,1,5,5,1)
  (same comment as for Magnesium)
- Copper, ion [water, ground-, long-term]: 5.5071e-6 kg; lognormal variance with pedigree 0.782, pedigree (1,1,5,5,1)
  (same comment as for Magnesium)
- Lead [soil, agricultural]: 8.606e-7 kg; lognormal variance with pedigree 0.762, pedigree (1,1,5,5,1)
  (same comment as for Boron)
- Boron [water, surface water]: 8.8758e-6 kg; lognormal variance with pedigree 0.632, pedigree (1,1,5,5,1)
  (same comment as for Sodium, ion)
- Sulfate [water, surface water]: 0.036177 kg; lognormal variance with pedigree 0.122, pedigree (1,1,5,5,1)
  (same comment as for Sodium, ion)
- Zinc [air, urban air close to ground]: 1.9381e-9 kg; lognormal variance with pedigree 0.812, pedigree (1,1,5,5,1)
  (same comment as for Boron)
- Chromium, ion [water, surface water]: 7.7008e-9 kg; lognormal variance with pedigree 0.772, pedigree (1,1,5,5,1)
  (same comment as for Magnesium)
- DOC, Dissolved Organic Carbon [water, ground-, long-term]: 4.76e-5 kg; lognormal variance with pedigree 0.172, pedigree (1,1,5,5,1)
  (same comment as for Magnesium)
- Iron [air, urban air close to ground]: 6.5509e-8 kg; lognormal variance with pedigree 0.222, pedigree (1,1,5,5,1)
  (same comment as for Boron)
- Cadmium [air, urban air close to ground]: 8.4265e-12 kg; lognormal variance with pedigree 0.792, pedigree (1,1,5,5,1)
  (same comment as for Boron)
- Copper [air, urban air close to ground]: 5.0291e-11 kg; lognormal variance with pedigree 0.822, pedigree (1,1,5,5,1)
  (same comment as for Boron)
- Manganese [air, urban air close to ground]: 1.9735e-13 kg; lognormal variance with pedigree 0.882, pedigree (1,1,5,5,1)
  (same comment as for Boron)
- Cadmium, ion [water, ground-, long-term]: 1.5153e-9 kg; lognormal variance with pedigree 6.952, pedigree (1,1,5,5,1)
  (same comment as for Magnesium)
- Iron, ion [water, ground-, long-term]: 0.00091913 kg; lognormal variance with pedigree 1.002, pedigree (1,1,5,5,1)
  (same comment as for Magnesium)
- NMVOC, non-methane volatile organic compounds, unspecified origin [air, urban air close to ground]: 1.0487e-6 kg; lognormal variance with pedigree 0.312, pedigree (1,1,5,5,1)
  direct digester gas emission. Uncertainty calculated from wastewater composition and treatment model
- COD, Chemical Oxygen Demand [water, surface water]: 0.013565 kg; lognormal variance with pedigree 0.122, pedigree (1,1,5,5,1)
  (same comment as for Sodium, ion)
- BOD5, Biological Oxygen Demand [water, surface water]: 0.0044548 kg; lognormal variance with pedigree 0.052, pedigree (1,1,5,5,1)
  (same comment as for Sodium, ion)
- Magnesium [water, surface water]: 0.0019846 kg; lognormal variance with pedigree 0.722, pedigree (1,1,5,5,1)
  (same comment as for Sodium, ion)
- Potassium, ion [water, surface water]: 0.004 kg; lognormal variance with pedigree 0.722, pedigree (1,1,5,5,1)
  (same comment as for Sodium, ion)
- Water [air, unspecified]: 0.1 m3; name water_to_air_unspecified; lognormal variance with pedigree 0.0827, pedigree (2,2,5,5,1)
  Calculated value based on water balance.
  property fraction, origin: fresh water 0; name fraction_origin_fresh_water
  property fraction, origin: unspecified 1; name fraction_origin_unspecified
  property fraction, origin: salt water 0; name fraction_origin_salt_water
- Nickel [air, urban air close to ground]: 5.2088e-14 kg; lognormal variance with pedigree 0.862, pedigree (1,1,5,5,1)
  (same comment as for Boron)
- Lead [water, surface water]: 2.7479e-7 kg; lognormal variance with pedigree 0.652, pedigree (1,1,5,5,1)
  (same comment as for Sodium, ion)
- Water [water, unspecified]: 0.9 m3; name water_to_water_unspecified; lognormal variance with pedigree 0.0827, pedigree (2,2,5,5,1)
  Calculated value based on water balance.
  property wet mass 1000 kg; name WM
  property water in wet mass 1000 kg; name WWM
  property fraction, origin: fresh water 1; name fraction_origin_fresh_water_Ww
  property fraction, origin: salt water 0; name fraction_origin_salt_water_Ww
  property dry mass 0 kg; name DM
  property fraction, origin: unspecified 0; name fraction_origin_unspecified_Ww
  property carbon content, fossil 0; name C_content_fossil
  property carbon content, non-fossil 0; name C_content_non_fossil
- Cadmium [soil, agricultural]: 9.5235e-8 kg; lognormal variance with pedigree 0.762, pedigree (1,1,5,5,1)
  (same comment as for Boron)
- COD, Chemical Oxygen Demand [water, ground-, long-term]: 0.00012029 kg; lognormal variance with pedigree 0.172, pedigree (1,1,5,5,1)
  (same comment as for Magnesium)
- Ammonia [air, urban air close to ground]: 3.6741e-6 kg; lognormal variance with pedigree 0.312, pedigree (1,1,5,5,1)
  direct digester gas emission plus emission from sludge incineration plus emission from sludge spreading. Uncertainty calculated from wastewater composition and treatment model
- Manganese [soil, agricultural]: 2.2856e-5 kg; lognormal variance with pedigree 0.762, pedigree (1,1,5,5,1)
  (same comment as for Boron)
- Nitrogen oxides [air, urban air close to ground]: 7.221e-6 kg; lognormal variance with pedigree 0.122, pedigree (1,1,5,5,1)
  (same comment as for Boron)
- Nitrate [water, ground-, long-term]: 5.2934e-7 kg; lognormal variance with pedigree 0.122, pedigree (1,1,5,5,1)
  (same comment as for Magnesium)
- Phosphate [water, surface water]: 0.00069119 kg; lognormal variance with pedigree 0.132, pedigree (1,1,5,5,1)
  sewer overload discharge plus direct wastewater treatment plant emission plus emission from sludge incineration plus emission from sludge spreading. Uncertainty calculated from wastewater composition and treatment model
- Strontium [soil, agricultural]: 3.9999e-5 kg; lognormal variance with pedigree 0.762, pedigree (1,1,5,5,1)
  (same comment as for Boron)
- Barium [soil, agricultural]: 1.0906e-5 kg; lognormal variance with pedigree 0.762, pedigree (1,1,5,5,1)
  (same comment as for Boron)
- Lead [air, urban air close to ground]: 5.0736e-11 kg; lognormal variance with pedigree 0.802, pedigree (1,1,5,5,1)
  (same comment as for Boron)
- Magnesium [soil, agricultural]: 8.3467e-5 kg; lognormal variance with pedigree 0.762, pedigree (1,1,5,5,1)
  (same comment as for Boron)
- Aluminium [water, surface water]: 2.1015e-5 kg; lognormal variance with pedigree 0.592, pedigree (1,1,5,5,1)
  (same comment as for Sodium, ion)
- Aluminium [soil, agricultural]: 0.00017664 kg; lognormal variance with pedigree 0.542, pedigree (1,1,5,5,1)
  (same comment as for Boron)
- Copper, ion [water, surface water]: 3.8909e-6 kg; lognormal variance with pedigree 0.702, pedigree (1,1,5,5,1)
  (same comment as for Sodium, ion)
- Iron, ion [water, surface water]: 0.00071117 kg; lognormal variance with pedigree 0.712, pedigree (1,1,5,5,1)
  (same comment as for Sodium, ion)
- Methane, fossil [air, urban air close to ground]: 0.00023089 kg; lognormal variance with pedigree 0.192, pedigree (1,1,5,5,1)
  (same comment as for Magnesium)
- Nickel [soil, agricultural]: 7.6111e-7 kg; lognormal variance with pedigree 0.762, pedigree (1,1,5,5,1)
  (same comment as for Boron)
- TOC, Total Organic Carbon [water, surface water]: 0.0036344 kg; lognormal variance with pedigree 0.042, pedigree (1,1,5,5,1)
  (same comment as for Sodium, ion)

## Extrapolations
This dataset has been extrapolated from year 2000 to the year of the calculation (2021). The uncertainty has been adjusted accordingly.
