# packaging glass sorting facility construction

Dataset: EcoSpold 2, unit process
Geography: RoW
Time period: 1994-01-01 to 2021-12-31
Technology level: current
Classification: EcoSpold01Categories: glass/packaging
Classification: ISIC rev.4 ecoinvent: 4290:Construction of other civil engineering projects
Tags: ConvertedDataset
Scenario: Business-as-Usual
System model: Allocation, cut-off by classification
Generated by: Roland Hischier
Published in: Hischier R. 2007
Database: ecoinvent
isCopyrightProtected: true
accessRestrictedTo: 1

## General comment
A production site with a sorting capacity of 100 kt per year and a total life span of 50 a is assumed.
[This dataset was already contained in the ecoinvent database version 2. It was not individually updated during the transfer to ecoinvent version 3. Life Cycle Impact Assessment results may still have changed, as they are affected by changes in the supply chain, i.e. in other datasets. This dataset was generated following the ecoinvent quality guidelines for version 2. It may have been subject to central changes described in the ecoinvent version 3 change report (http://www.ecoinvent.org/database/ecoinvent-version-3/reports-of-changes/), and the results of the central updates were reviewed extensively. The changes added e.g. consistent water flows and other information throughout the database. The documentation of this dataset can be found in the ecoinvent reports of version 2, which are still available via the ecoinvent website. The change report linked above covers all central changes that were made during the conversion process.]

## Included activities end
This module includes the land-use, the material and construction efforts of the machineries the buildings. Dismantling of the machineries and the buildings are accounted for as well.

## Geography
european sorting site, based on few information from different Swiss sorting sites

## Technology
Assumptions based on few information about the technology in Switzerland in the mid 90's

## Reference product
- packaging glass sorting facility: 1 unit; CPC 53290: Other civil engineering works; By-product classification allocatable product
  production volume 2.67763 unit
    This is a placeholder value that does not reflect real-world production volumes. This dataset does not currently require a real-world production volume to work in the database framework, and no actual data were collected yet. This has no negative effect on the results of the ecoinvent database.
  property price 1.66936e7 EUR2005
    Convert from EU 27 price to the world by currency exchange rate.

## Inputs from technosphere
- steel, chromium steel 18/8, hot rolled: 125000 kg; lognormal variance with pedigree 0.194, pedigree (5,4,5,5,4)
  Own estimation
  Uncertainty: o
  properties: dry mass 1 kg, carbon content, fossil 0.0008, wet mass 1 kg
  note on carbon content, fossil: Stainless steel model is the grade 304 steel (18/8 stainless, 18% chromium 8% nickel; max. 0.08% C)
- concrete, normal: 0 m3; pedigree (1,1,1,1,1)
  Own estimation
  Uncertainty: o
  properties: water content 0.086758, wet mass 2380 kg, dry mass 2190 kg
- waste polyethylene: 0 kg; pedigree (1,1,1,1,1)
  Own estimation
  Uncertainty: o
  production volume 0 kg
    Calculated from the production volume of packaging glass sorting facility in proportion to the respective output amounts.
  properties: heating value, net 42.47 MJ, carbon content, fossil 0.825301, wet mass 1 kg, water content 0.00401606, dry mass 0.996 kg
  note on heating value, net: Value taken from the general comment of the treatment dataset.
  note on carbon content, fossil: C content in 1 kg DM was calculated using data in Tab A.1, ecoinvent v2.2 report 13_I
- polyethylene, high density, granulate: 10000 kg; lognormal variance with pedigree 0.194, pedigree (5,4,5,5,4)
  Own estimation
  Uncertainty: o
  properties: heating value, net 42.47 MJ, wet mass 1 kg, carbon content, fossil 0.857143, dry mass 1 kg
  note on carbon content, fossil: Polyethylene is formed out of a huge amount of ethylene monomers (C2H4) (ecoinvent v2.2 report 11_II). MW=28 g/mol
- electronics, for control units: 2500 kg; lognormal variance with pedigree 0.194, pedigree (5,4,5,5,4)
  Own estimation
  Uncertainty: o
  properties: carbon content, non-fossil 0.00013442, wet mass 1 kg, carbon content, fossil 0.337146, dry mass 1 kg
  note on carbon content, non-fossil: The control unit has a composition of 46% steel (housing), 32% plastics, 14% printed wiring boards and 8% cables (various types).;
- electronics scrap from control units: -2500 kg; lognormal variance with pedigree 0.194, pedigree (5,4,5,5,4)
  Own estimation
  Uncertainty: o
  production volume 7500 kg
    (same comment as for waste polyethylene)
  properties: wet mass 1 kg, dry mass 1 kg, carbon content, non-fossil 0.00013442, carbon content, fossil 0.337146
- waste concrete, not reinforced: -100000 kg; lognormal variance with pedigree 0.194, pedigree (5,4,5,5,4)
  Own estimation
  Uncertainty: o
  production volume 300000 kg
    (same comment as for waste polyethylene)
  properties: wet mass 1 kg, dry mass 1 kg
- building, hall, steel construction: 4560 m2; lognormal variance with pedigree 0.494, pedigree (5,4,5,5,4)
  Own estimation
  Uncertainty: o
- steel, low-alloyed, hot rolled: 112000 kg; lognormal variance with pedigree 0.194, pedigree (5,4,5,5,4)
  Own estimation
  Uncertainty: o
  properties: carbon content, fossil 0.005, wet mass 1 kg, dry mass 1 kg
  note on carbon content, fossil: Low alloyed steel composition given in Tab. 3.2 ecoinvent v2.2 report 10_partII. Steel assumed to have a C content of 0.5%
- concrete, normal: 0.945395, 0.0985088, 0.797498, 0.448593, 1.89966, 0.0640745, 37.5463 m3 (7 entries); lognormal variance with pedigree 0.194, pedigree (5,4,5,5,4)
  Own estimation
  Uncertainty: o
- waste polyethylene: -1228.9, -82.1102, -6.20986, -33.9144, -13.7011, -32.2049, -8602.96 kg (7 entries); lognormal variance with pedigree 0.194, pedigree (5,4,5,5,4)
  Own estimation
  Uncertainty: o
  production volume 30000 kg

## Inputs from nature
- Occupation, construction site [natural resource, land]: 12500 m2*year; lognormal variance with pedigree 0.1006, pedigree (4,3,5,5,1)
  Based on data from 3 sites
  Uncertainty: b
- Occupation, industrial area [natural resource, land]: 313500 m2*year; lognormal variance with pedigree 0.1006, pedigree (4,3,5,5,1)
  Based on data from 3 sites
  Uncertainty: b
- Transformation, from unspecified [natural resource, land]: 6270 m2; lognormal variance with pedigree 0.1806, pedigree (4,3,5,5,1)
  Based on data from 3 sites
  Uncertainty: b
- Transformation, to industrial area [natural resource, land]: 6270 m2; lognormal variance with pedigree 0.1806, pedigree (4,3,5,5,1)
  Based on data from 3 sites
  Uncertainty: b

## Extrapolations
This dataset has been copied from an original dataset covering the geography RER. The uncertainty has been adjusted accordingly.

## Review by Hans-Jörg Althaus 2003-08-20
passed
