# aluminium, ingot, primary, import from Asia (excluding China)

Dataset: EcoSpold 2, unit process
Geography: IAI Area, North America
Time period: 2016-01-01 to 2021-12-31
Technology level: current
Classification: ISIC rev.4 ecoinvent: 2420:Manufacture of basic precious and other non-ferrous metals
Classification: EcoSpold01Categories: metals/extraction
Scenario: Business-as-Usual
System model: Allocation, cut-off by classification
Generated by: François Saunier
Published in: Bushi Lindita 2018
Database: ecoinvent
isCopyrightProtected: true
accessRestrictedTo: 1

## General comment
This dataset represents the amount of imported primary aluminium from Asia (excluding China) to North America. The import value is valid for 2016 and includes all imports, independently whether used within the importing region, or re-exported. AA and AAC statistics

## Included activities start
This activity represents the point of "handing over" the primary aluminium ingot from one country to the other at the border.

## Reference product
- aluminium, primary, ingot: 1 kg; CPC 41431: Unwrought aluminium; By-product classification allocatable product; ISIC rev.4 ecoinvent 242:Manufacture of basic precious and other non-ferrous metals; CAS 7429-90-5
  production volume 3.1972e7 kg
    In 2016, North America imported 930941 tonnes of primary aluminium. 3% are imported from Asia without China on average. (Source : AA and AAC)
  properties: price 3.67 EUR2005, water content 0, wet mass 1 kg, water in wet mass 0 kg, dry mass 1 kg, carbon content, non-fossil 0, carbon content, fossil 0, carbon content 0, carbon allocation 0 kg

## Inputs from technosphere
- aluminium, primary, ingot: 1 kg; source Bushi, L. 2018; lognormal variance with pedigree 0.0026, pedigree (1,1,3,1,1)
  activityLink added to better reflect the reality of the supply chain
  properties: dry mass 1 kg, wet mass 1 kg

## Extrapolations
This dataset has been extrapolated from year 2016 to the year of the calculation (2021). The uncertainty has been adjusted accordingly.
