# potassium nitrate production

Dataset: EcoSpold 2, unit process
Geography: RNA
Time period: 2013-01-01 to 2021-12-31
Technology level: current
Classification: ISIC rev.4 ecoinvent: 2012:Manufacture of fertilizers and nitrogen compounds
Synonyms: Nitrate of potash, Saltpeter, Saltpetre
Scenario: Business-as-Usual
System model: Allocation, cut-off by classification
Generated by: Anna Kounina
Database: ecoinvent
isCopyrightProtected: true
accessRestrictedTo: 1

## General comment
This dataset represents the production of 1 kg of potassium nitrate, with 14% N and 44% K2O, from potassium chloride and nitric acid. Potassium nitrate (formula KNO3) is an ionic salt of potassium ions K+ and nitrate ions NO3-. Potassium nitrate is found in nature as a mineral called niter. For industrial applications, potassium nitrate is produced by neutralizing nitric acid with potassium hydroxide derived from potassium chloride. This reaction is highly exothermic: KOH + HNO3 → KNO3 + H2O
Potassium nitrate is used as compound fertiliser to enrich the soil in nitrogen (N), and potassium (K), two of the main macronutrients needed to support plant growth. It is also used in tree stump removal, rocket propellants and fireworks and is one of the major constituents of gunpowder (black powder). In processed meats, potassium nitrate reacts with hemoglobin and generates a pink color.
The main data sources for this dataset ia Althaus et al (2007).
References:
Althaus H.-J., Chudacoff M., Hischier R., Jungbluth N., Osses M. and Primas A. (2007) Life Cycle Inventories of Chemicals. ecoinvent report No. 8, v2.0. EMPA Dübendorf, Swiss Centre for Life Cycle Inventories, Dübendorf, CH.

## Included activities start
The activity includes all the raw and processed materials necessary to produce this product. Nitric acid, potassium chloride and heat (as natural gas) are included. No direct emissions are included.

## Included activities end
The activity ends with the final product being ready for transportation at the production site.

## Geography
The dataset is representative of potassium nitrate production in North America

## Technology
This datasets corresponds to the technology used in Chinese fertiliser plants. The production of potassium nitrate involves potassium chloride and nitric acid using heat.

## Time period
Primary data were collected on fertiliser production for the year 2007. These data were based on annual average data for the year 2007.

## Reference product
- potassium nitrate: 1 kg; name RP; By-product classification allocatable product; CPC 34646: Potassium nitrate; CAS 7757-79-1
  production volume 1.03096e9 kg; name PVRP
    Kg/y, estimated based on the production capacity. International Fertilizers Association (average 2012-2018). The PV was scaled according to the nominal GDP in 2014 of the given region and the global nominal GDP in 2014 (retrieved from: https://unstats.un.org/unsd/snaama/Basic, accessed 20200512). The nominal GDP corresponds to GDP at current price-US Dollars (source: United Nations, http://data.un.org/Glossary.aspx?q=GDP+%28current+US%24%29, accessed 20200512).
  property price 0.34 EUR2005; name RP_price_EUR2005
    Calculated value based on data from United Nations Commodity Trade Statistics Database (comtrade.un.org). UN comtrade category: 283421 Potassium nitrate. Year 2005. Using exchange rate of 1EURO = 1.209 USD. Average of price of import into 5 main markets (EU, US, JP, IN and CN).
  property carbon content, fossil 0
    Carbon content, fossil is calculated based on the chemical formula of the substance.
  property nitrogen content 0.138539
    Nitrogen content (on a dry matter basis) of potassium nitrate is calculated from the molecular formula of the substance (KNO3).
  property oxygen content 0.474745
    Oxygen content (on a dry matter basis) of potassium nitrate is calculated from the molecular formula of the substance (KNO3).
  property potassium content 0.386717
    Potassium content (on a dry matter basis) of potassium nitrate is calculated from the molecular formula of the substance (KNO3).
  property carbon content 0
    carbon content on a dry matter basis (reserved; not for manual entry)
  properties: water in wet mass 0 kg, dry mass 1 kg, carbon content, non-fossil 0, water content 0, wet mass 1 kg, carbon allocation 0 kg

## Inputs from technosphere
- chemical factory, organics: 4e-10 unit; lognormal variance with pedigree 0.344, pedigree (3,4,5,1,1)
  Estimation, based on various data sources (Althaus et al. 2007).
- potassium chloride: 1 kg; lognormal variance with pedigree 0.0446, pedigree (3,4,5,1,1)
  Estimation, based on various data sources (Althaus et al. 2007).
  properties: wet mass 1 kg, dry mass 1 kg
- heat, district or industrial, natural gas: 4.56 MJ; lognormal variance with pedigree 0.0446, pedigree (3,4,5,1,1)
  Estimation, based on various data sources (Althaus et al. 2007).
  properties: heating value, net 1 MJ
- nitric acid, without water, in 50% solution state: 0.643 kg; lognormal variance with pedigree 0.0446, pedigree (3,4,5,1,1)
  Estimation, based on various data sources (Althaus et al. 2007).
  properties: hydrogen content 0.0159952, nitrogen content 0.222283, oxygen content 0.761721, dry mass 1 kg, wet mass 1 kg
  note on hydrogen content: Hydrogen content (on a dry matter basis) of nitric acid, without water, in 50% solution state is calculated from the molecular formula of the substance (HNO3).
  note on nitrogen content: Nitrogen content (on a dry matter basis) of nitric acid, without water, in 50% solution state is calculated from the molecular formula of the substance (HNO3).
  note on oxygen content: Oxygen content (on a dry matter basis) of nitric acid, without water, in 50% solution state is calculated from the molecular formula of the substance (HNO3).

## Extrapolations
This dataset has been extrapolated from year 2014 to the year of the calculation (2021). The uncertainty has been adjusted accordingly.
