# fibreboard production, soft, from wet & dry processes

Dataset: EcoSpold 2, unit process
Geography: CA-QC
Time period: 2012-01-01 to 2021-12-31
Technology level: current
Classification: EcoSpold01Categories: wooden materials/processing
Classification: ISIC rev.4 ecoinvent: 1621:Manufacture of veneer sheets and wood-based panels
Synonyms: wood insulation board; softboard
Tags: Recontextualization
Scenario: Business-as-Usual
System model: Allocation, cut-off by classification
Generated by: Hugues Imbeault-Tétreault
Database: ecoinvent
isCopyrightProtected: true
accessRestrictedTo: 1

## General comment
This dataset represents soft wood fibreboard production as the weighted average of soft wood fibreboards produced by the members of the European Panel Federation (EPF)
Soft fibreboard, also called softboard or wood insulation board is an engineered wood product in conformity with the standard EN 13171.
Soft fibreboard consists of up to 85% of wood fibres which have been produced in either the dry or the wet process from wood residues from sawmills (e.g. sidings) and from wood chips. When pro-duced in the dry process, it is also called low density fibre board.
Softwood is preferred due to its higher fibre quality.
Typical thickness is in a range 4 - 32 mm.
The composition of the inventoried softboard is as follows:
The dataset covers both products produced in the wet process (roughly 69% of the covered production volume) and in the dry process (roughly 31% of the covered production volume); due to the limited number of data sources, no distinction of the different production technologies could be made for the reason of data confidentiality.
Softboard is applied for building shell like roofs, walls and floors, acting as thermal and acoustic insu-lating material. Softboard regulates moisture balance permitting fully vapour permeable construction which avoids the risk of interstitial condensation or rot without the use of membranes or vented cavities.

## Included activities start
From the reception at the factory gate of all materials and fuels used.

## Included activities end
Activity ends with the soft wood fibreboard at the factory gate.

## Geography
Representation of the production of the member companies of the European Panel Federation (EPF).

## Technology
In the wet process, the raw material is grinded and then mixed into a mash with up to 98% water. This mash is then formed into a so-called fibre cake. After pressing most water out of the mat, the fibre cake is the cut and dried in the drying channel with temperatures between 160 to 220 °C. The addition of binders is usually not required, as the heating of the liquid lignin as part of the wood bonds the fibres during cooling. For special purposes (higher strength, hydrophobic properties), resins or bitumen-containing agents can be added. Thicker board are produced from gluing together several standard boards.
In the dry process, the fibres are dried directly after grinding and mixed with up to 4% resin, (e.g. PUR resin). For the production of flexible insulation boards, synthetic textile fibres or fibres from corn starch are added to the wood fibres. Subsequently, the fibres are sprinkled in desired thickness, pressed, hardened with a mixture of vapour and air and then cut, stacked and packed.
Production is subject to the regulations of the Industrial Emissions Directive (EU-IED, 2011) if the production capacity exceeds 600 m3 per day where one or more of the following wood-based panels are produced: fibreboard, particleboard or oriented strand board.

## Parameters
- input wood fuel: 575.612 MJ; name wood_fuel; = 30.2*19.06
  input of wood fuel used in production, i.e. wood fuel from forestry, internal wood residues, post-consumer wood used for energy purposes, etc; expressed in MJ of absolutely dry mass (lower heating value at humidity u=0%)
- world gross domestic product 2011: 7e13 USD(2011); name worldGDP2011; lognormal variance with pedigree 0.0006, pedigree (1,1,1,1,1)
  World Gross domestic product for 2011, expressed in 2011 USD. Source: World Bank.
- Quebec gross domestic product 2011: 3.11e11 USD(2011); name quebecGDP2011; lognormal variance with pedigree 0.0006, pedigree (1,1,1,1,1)
  Quebec Gross domestic product for 2011, expressed in 2011 USD. Source: Institut de la statistique du Québec. Converted from CAD to USD using a yearly average exchange rate of 0.989 CAD/USD (Source: bank of Canada).

## Reference product
- fibreboard, soft: 0 m3; name RP_amount_1; By-product classification allocatable product; CPC 31449: Other fibreboard
  production volume 41940.6 m3; name p_board
    Gross approximation of Quebec production volume using relative value of Quebec GDP to world GDP
  property water in wet mass 8.38 kg; name WiWM_FB
  property carbon content, non-fossil 0.461793; = 140.8*0.494/DM_FB
    wood content converted to carbon, divided by dry mass
  property dry mass 150.62 kg; name DM_FB; = WM_FB - WiWM_FB
  property water content 0.0556367; = WiWM_FB/DM_FB
  property price 148 EUR2005
    Export prices for the World+ according to: http://faostat.fao.org/site/626/DesktopDefault.aspx?PageID=626#ancor downloaded 28 April 2009; calculated as export value divided by export volume.
  property wet mass 159 kg; name WM_FB
  property heating value, net 1954.67 MJ
    Assumed equal to "fiberboard, hard".The property is based on a value of 13.96MJ/kg
  property carbon content 0.475101
    carbon content on a dry matter basis (reserved; not for manual entry)
  property true value 148; name RP_amount_1_true_value
    allocation property applied in "true value" allocation // value calculated from revenue
  properties: carbon content, fossil 0.0133086, carbon allocation 71.5597 kg
- bark chips, wet, measured as dry mass: 1 kg; name w_bark; CPC 31230: Wood in chips or particles; By-product classification allocatable product; pedigree (1,1,1,1,1)
  bark from debarking of logs, not used energetically
  production volume 67104.9 kg
    (same comment as for fibreboard, soft)
  property price 0.034 EUR2005; name w_bark_price_EUR2005
    Expert judgement (Urs Luginbühl, Swiss Sawmilling industry, personal communication in June 2014). Cross-reference; FAOSTAT database; http://faostat.fao.org/site/626/DesktopDefault.aspx?PageID=626#ancor; Average import/export prices of EU for 'chips and particles'. Price: 48.76 Euro/m3. The density of the wood chips is 650 kg/m3. The price is calculated to be 0.075 EUR/kg.
  property heating value, net 4.81 MJ
    LHV is calculated based on the Carbon content of the product. More details can be found on the respective documentation.
  property carbon content 0.494
    carbon content on a dry matter basis (reserved; not for manual entry)
  property true value 0.0544; name w_bark_true_value
    allocation property applied in "true value" allocation // value calculated from revenue
  properties: dry mass 1 kg, carbon content, non-fossil 0.494, wet mass 2.4 kg, water in wet mass 1.4 kg, water content 1.4, carbon content, fossil 0, carbon allocation 0.494 kg

## By-products
- residual wood, dry: 0 m3; name w_chips; CPC 39283: Non-agglomerated wood waste and scrap; By-product classification allocatable product; pedigree (1,1,1,1,1)
  Emission factor from DS on heat generation from industrial residual wood mulitplied by the input of wood fuel (direct wood fuel plus production residues)
  production volume 1435.88 m3
    (same comment as for fibreboard, soft)
  property price 26.9 EUR2005; name w_chips_price_EUR2005
    Temporary price data. Calculated as 90% of purchasers price based on: 2004 prices for World Import/Export (USD/cubicmeter) from FaoStat (http://faostat.fao.org/site/626/default.aspx#ancor, [accessed 10th June 2010]) Commodity: 'Chips and Particles' assuming this is for air-dry chips (10% water on a dry matter basis at 650 kg/m3) and no price difference for water content (i.e. assuming air-drying).
  property heating value, net 8030.06 MJ
    LHV is calculated based on the Carbon content of the product. More details can be found on the respective documentation.The property is based on a value of 12.7MJ/kg
  property carbon content 0.494
    carbon content on a dry matter basis (reserved; not for manual entry)
  property true value 0.920948; name w_chips_true_value
    allocation property applied in "true value" allocation // value calculated from revenue
  properties: water in wet mass 82.5 kg, dry mass 550 kg, carbon content, fossil 0, carbon content, non-fossil 0.494, water content 0.15, wet mass 632.5 kg, carbon allocation 271.7 kg

## Inputs from technosphere
- pulpwood, softwood, measured as solid wood under bark: 5.1864e-5 m3; = 85.9/378; lognormal variance with pedigree 0.043, pedigree (1,5,4,5,1)
  input in kg divided by the basic wood density of 378 kg/m3
  properties: wet mass 1056 kg, water content 1.4, dry mass under bark 387.2 kg, heating value, net 4483.78 MJ, carbon content, non-fossil 0.494, dry mass 440 kg
  note on heating value, net: Value based on "softwood forestry, mixed species, sustainable forest management"The property is based on a value of 11.58MJ/kg
- waste paper, sorted: 0.000136023 kg; lognormal variance with pedigree 0.043, pedigree (1,5,4,5,1)
  fibre input
  properties: dry mass 0.9 kg, carbon content, non-fossil 0.448889, wet mass 1 kg, water content 0.111111, heating value, net 14.11 MJ
- potato starch: 0.000292129 kg; lognormal variance with pedigree 0.043, pedigree (1,5,4,5,1)
  additive
  properties: carbon content, non-fossil 0.46, wet mass 1 kg, dry mass 0.8 kg, water content 0.25, heating value, net 10.66 MJ
  note on carbon content, non-fossil: C-content of starch is considered 46% on dry mass basis (from "Evolutionary and Biochemical Aspects", A.D. Kay and T. Vrede (in Global Ecology, 2010, Elsevier B.V., S.E. Jørgensen Ed.)).
- diesel, burned in building machine: 0.00184863 MJ; lognormal variance with pedigree 0.043, pedigree (1,5,4,5,1)
  for internal transport
  properties: heating value, net 1 MJ
- sodium hydroxide, without water, in 50% solution state: 6.21915e-6 kg; = 0.0545*0.5; lognormal variance with pedigree 0.043, pedigree (1,5,4,5,1)
  50% concentration
  properties: wet mass 1 kg, heating value, net 3.03 MJ, dry mass 1 kg
- biowaste: -3.61783e-5 kg; name w_biowaste; lognormal variance with pedigree 0.0436, pedigree (2,5,4,5,1)
  sludges from chip washing etc.
  production volume 6648.42 kg
    (same comment as for fibreboard, soft)
  property price 0 EUR2005; name w_biowaste_price_EUR2005
  properties: heating value, net 4.29 MJ, dry mass 0.4 kg, water content 1.5, wet mass 1 kg, carbon content, non-fossil 0.1624
  note on heating value, net: Value taken from the general comment of the treatment dataset.
- heat, district or industrial, other than natural gas: 0.00580345 MJ; = 26.7/1.05; lognormal variance with pedigree 0.043, pedigree (1,5,4,5,1)
  Fuel input, converted to heat output
  properties: heating value, net 1 MJ
- aluminium sulfate, powder: 0.000174798 kg; = 0.709+0.0569; lognormal variance with pedigree 0.043, pedigree (1,5,4,5,1)
  aluminium sulfate plus input of unspecified hardeners
  properties: dry mass 1 kg, wet mass 1 kg
- wooden board factory, organic bonded boards: 8.69431e-12 unit; = 1/(525000*50); lognormal variance with pedigree 0.043, pedigree (1,5,4,5,1)
  estimated based on an assumed yearly production volume o 525,000 m3/year and a life time of infrastructure of 50 years
- nylon 6: 0.000149488 kg; lognormal variance with pedigree 0.043, pedigree (1,5,4,5,1)
  reinforcement
  properties: dry mass 1 kg, wet mass 1 kg, heating value, net 30.9 MJ, carbon content, fossil 0.637168
  note on heating value, net: Assumed equal to Nylon-66. Reference: Walters, R. N., Hackett, S. M. and Lyon, R. E. (2000) ‘Heats of combustion of high temperature polymers’, Fire and Materials, 24(5), pp. 245–252. doi: 10.1002/1099-1018(200009/10)24:5<245::AID-FAM744>3.0.CO;2-7.
  note on carbon content, fossil: It is a chain of caprolactam molecules, originating from aminocarboxylic acids - here caproic acid or caprolactam. The structure of nylon 6 is -(NH-(CH2)5-CO)n-, C6H11NO (ecoinvent v2.2 report 11_II). MW=113 g/mol
- slab and siding, softwood, wet, measured as dry mass: 0.00871822 kg; lognormal variance with pedigree 0.0146, pedigree (1,3,4,5,1)
  input of industrial residual wood
  properties: wet mass 1.7 kg, heating value, net 7.79 MJ, dry mass 1 kg, water content 0.7, carbon content, non-fossil 0.494
- tap water: 0.0474709 kg; lognormal variance with pedigree 0.043, pedigree (1,5,4,5,1)
  properties: water content 2962.17, dry mass 0.000337476 kg, wet mass 1 kg, carbon content, fossil 0.00178991
  note on carbon content, fossil: Bicarbonate content is 2.93 mol/m3. CO2 content is 0.1 mol/m3 (ecoinvent v2.2 report 8, Tab 93.1).
- chemical, organic: 0.000528228 kg; lognormal variance with pedigree 0.043, pedigree (1,5,4,5,1)
  input of unspecified additives, dyes, flame redardants, etc.
  properties: dry mass 1 kg, wet mass 1 kg, heating value, net 19.03 MJ, carbon content, fossil 0.628
  note on carbon content, fossil: This dataset is an unweighted average of 20 organic substances (listed in Tab 88.1, ecoinvent v2.2 report 8, part II), being part of the top100 chemicals included in this database. The C-content has also been calculated as an unweighted average of the C content of the substances composing this dataset.
- latex: 0.000178472 kg; lognormal variance with pedigree 0.043, pedigree (1,5,4,5,1)
  additive
  properties: wet mass 1 kg, dry mass 1 kg, carbon content, fossil 0.872983, heating value, net 26.45 MJ
  note on carbon content, fossil: The Styrene-butadiene dispersion is based on styrene and 1,3-butadiene plus co-monomers like i.e. ac-rylonitrile or (meth-)acrylic acid (ecoinvent v2.2 report 11_III). Following specifications in US Patent 3,875,101 (1971), the dispersion was considered as: 52.5% 1.3-butadiene (0.8571 kg C/kg dry mass); 43% styrene (0.9231 kg C/kg dry mass); 2% acrylic acid (0.5 kg C/kg dry mass); 2.5% acrolein (C3H4O, MW=56; 0.6429 kg C/kg dry mass)
- hazardous waste, for incineration: -7.61292e-6 kg; name w_HW; lognormal variance with pedigree 0.043, pedigree (1,5,4,5,1)
  Output of minor quantities of waste resins, oily filters and rags
  production volume 1399.01 kg
    (same comment as for fibreboard, soft)
  property price 0 EUR2005; name w_HW_price_EUR2005
  properties: heating value, net 17 MJ, carbon content, fossil 0.554667, dry mass 0.75 kg, wet mass 1 kg, water content 0.333333
  note on carbon content, fossil: Tab A.6, ecoinvent v2.2 report 13_I. C content has been calculated after data in the tables, and then referred to 1 kg DM
- wood chips, wet, measured as dry mass: 0.00652725 kg; lognormal variance with pedigree 0.268, pedigree (1,5,4,5,1)
  input of wood chips from forestry
  properties: dry mass 1 kg, wet mass 2.1 kg, heating value, net 10.84 MJ, carbon content, non-fossil 0.494, water content 1.1
  note on heating value, net: Value based on the dataset 'softwood forestry, mixed species, sustainable forest management'
- heat, district or industrial, other than natural gas: 0.00434716 MJ; = 20/1.05; lognormal variance with pedigree 0.043, pedigree (1,5,4,5,1)
  Fuel input, converted to heat output; proxy for animal grease
- methylene diphenyl diisocyanate: 6.52725e-5 kg; lognormal variance with pedigree 0.043, pedigree (1,5,4,5,1)
  part of glueing system (inventoried as averaged production average in Europe)
  properties: heating value, net 26.66 MJ, carbon content, fossil 0.72, wet mass 1 kg, dry mass 1 kg
- paraffin: 0.000417653 kg; lognormal variance with pedigree 0.043, pedigree (1,5,4,5,1)
  hydrophobing agent
  properties: wet mass 1 kg, carbon content, fossil 0.847059, dry mass 1 kg, heating value, net 41.5 MJ
  note on heating value, net: Indicative value. Reference: Fuels - Higher and Lower Calorific Values, available at: https://www.engineeringtoolbox.com/fuels-higher-calorific-values-d_169.html
- lubricating oil: 1.56745e-5 kg; = 0.00278+0.0659; lognormal variance with pedigree 0.043, pedigree (1,5,4,5,1)
  input of lubricating oils plus mineral oils, incl. thermooil
  properties: carbon content, fossil 0.75, heating value, net 40.2 MJ, wet mass 1 kg, dry mass 1 kg
  note on carbon content, fossil: Lubricating oil is produced from diesel. C-content/dry mass of fats and oils considered 75%, from: ecoinvent v2.2 report, n 15a, pg 40
  note on heating value, net: Literature value, Source: IPCC 2006, 2006 IPCC Guidelines for National Greenhouse Gas Inventories, Prepared by the National Greenhouse Gas Inventories Programme, Eggleston H.S., Buendia L., Miwa K., Ngara T. and Tanabe K. (eds). Published: IGES, Japan
- vinyl acetate: 0.00017756 kg; lognormal variance with pedigree 0.043, pedigree (1,5,4,5,1)
  for the glueing of several layers of mats
  properties: heating value, net 25.35 MJ, dry mass 1 kg, wet mass 1 kg, carbon content, fossil 0.55814
- furnace, wood chips, with silo, 1000kW: 8.68352e-10 unit; = 6.61E-09*wood_fuel; lognormal variance with pedigree 0.5586, pedigree (1,3,4,1,1)
  Infrastructure factor from DS "Heat, district or industrial, other than natural gas {CH}| heat production, wood chips from industry, at furnace 1000kW | Cut-off, U", multiplied by the input of wood fuel (direct wood fuel plus production residues); correction for assumed efficiency as original value refers to heat output
- electricity, medium voltage: 0.0182124 kWh; lognormal variance with pedigree 0.043, pedigree (1,5,4,5,1)
- pulpwood, hardwood, measured as solid wood under bark: 1.61194e-7 m3; = 0.404/572; lognormal variance with pedigree 0.043, pedigree (1,5,4,5,1)
  input in kg divided by the basic wood density of 572 kg/m3
  properties: dry mass 625.778 kg, wet mass 1126.4 kg, water content 0.8, dry mass under bark 563.2 kg, carbon content, non-fossil 0.494, heating value, net 6071.3 MJ
  note on heating value, net: Value based on "hardwood forestry, mixed species, sustainable forest management"The property is based on a value of 11.58MJ/kg
- wood chips, dry, measured as dry mass: 0.00652725 kg; lognormal variance with pedigree 0.043, pedigree (1,5,4,5,1)
  input of chips from sawmills
  properties: wet mass 1.4 kg, water content 0.4, dry mass 1 kg, carbon content, non-fossil 0.494, heating value, net 9.99 MJ
  note on carbon content, non-fossil: C content of dry mass is 0.494 kgC/kg dry wood (ecoinvent v2.2 report 9).
- ammonia, anhydrous, liquid: 5.43177e-6 kg; = 0.119*0.2; lognormal variance with pedigree 0.043, pedigree (1,5,4,5,1)
  20% concentration
  properties: wet mass 1 kg, dry mass 1 kg
- glass wool mat: 0.000151314 kg; lognormal variance with pedigree 0.043, pedigree (1,5,4,5,1)
  glass fibres used as reinforcement
  properties: carbon content, fossil 0.0107327, wet mass 1 kg, dry mass 1 kg
  note on carbon content, fossil: A share of 16 w-% for the binders is taken into account. The binder used in this study is a mixture of phenol, formaldehyde and urea resins (ecoinvent v2.2 report 16_part XIV), and the C content was calculated as a weigthed average of phenol, formaldehyde and urea C content.
- phenolic resin: 0.000101332 kg; lognormal variance with pedigree 0.043, pedigree (1,5,4,5,1)
  part of glueing system (inventoried as averaged production average in Europe)
  properties: carbon content, fossil 0.772277, heating value, net 33.57 MJ, wet mass 1 kg, dry mass 1 kg
- heat, district or industrial, natural gas: 0.032821 MJ; = 151/1.05; lognormal variance with pedigree 0.043, pedigree (1,5,4,5,1)
  input of natural gas, converted to heat output
  properties: heating value, net 1 MJ
- wastewater from soft fibreboard production: -1.73223e-5 m3; name w_WW; lognormal variance with pedigree 0.043, pedigree (1,5,4,5,1)
  production volume 3183.29 m3
    (same comment as for fibreboard, soft)
  property price 0 EUR2005; name w_WW_price_EUR2005
  properties: water content 22.098, carbon content, non-fossil 0.999914, dry mass 43.2938 kg, wet mass 1000 kg
- heat, district or industrial, other than natural gas: 0.0906382 MJ; = 417/1.05; lognormal variance with pedigree 0.043, pedigree (1,5,4,5,1)
  Fuel input, converted to heat output
- wood ash mixture, pure: -8.34092e-5 kg; name w_wood_ash; = (0.000666666666666667*wood_fuel/1.05)*-1; lognormal variance with pedigree 0.043, pedigree (1,5,4,5,1)
  Emission factor from DS on heat generation from industrial residual wood mulitplied by the input of wood fuel (direct wood fuel plus production residues), scaled to convert wood input to resulting heat.
  production volume 15327.9 kg
    (same comment as for fibreboard, soft)
  property price 0 EUR2005; name w_wood_ash_price_EUR2005
  properties: wet mass 1 kg, carbon content, non-fossil 0.012, dry mass 1 kg

## Inputs from nature
- Carbon dioxide, non-fossil, resource correction [natural resource, in air]: 1.62789 kg; pedigree (1,1,1,1,1)
  This exchange has been added after economic allocation in order to re-balance the non-fossil carbon dioxide resource extraction.
- Water, cooling, unspecified natural origin [natural resource, in water]: 9.12903e-5 m3; lognormal variance with pedigree 0.042, pedigree (1,5,4,5,1)
- Water, river [natural resource, in water]: 1.11146e-5 m3; lognormal variance with pedigree 0.043, pedigree (1,5,4,5,1)

## Emissions to nature
- PAH, polycyclic aromatic hydrocarbons [air, urban air close to ground]: 1.85168e-9 kg; = 0.0000000148*wood_fuel/1.05; lognormal variance with pedigree 0.4806, pedigree (2,5,5,5,1)
  Emission factor from DS "Heat, district or industrial, other than natural gas {CH}| heat production, wood chips from industry, at furnace 1000kW | Cut-off, U" on heat generation from industrial residual wood per MJ, multiplied by the input of wood fuel (direct wood fuel plus production residues ) scaled to reflect wood input per generated heat.
- Benzene [air, urban air close to ground]: 1.51805e-7 kg; = 1.21333333333333E-06*wood_fuel/1.05; lognormal variance with pedigree 0.4806, pedigree (2,5,5,5,1)
  (same comment as for PAH, polycyclic aromatic hydrocarbons)
- Particulates, > 2.5 um, and < 10um [air, unspecified]: 4.17046e-7 kg; = 3.33333333333334E-06*wood_fuel/1.05
  (same comment as for PAH, polycyclic aromatic hydrocarbons)
- Particulates, > 10 um [air, unspecified]: 1.5816e-6 kg; lognormal variance with pedigree 0.45, pedigree (3,5,4,5,1)
  dust emissions
- Lead [air, urban air close to ground]: 4.17046e-9 kg; = 3.33333333333333E-08*wood_fuel/1.05; lognormal variance with pedigree 0.4806, pedigree (2,5,5,5,1)
  (same comment as for PAH, polycyclic aromatic hydrocarbons)
- NMVOC, non-methane volatile organic compounds, unspecified origin [air, urban air close to ground]: 2.87674e-5 kg; = 9.33333333333334E-06*wood_fuel/1.05 + 0.134 - (0.00368+0.0000887+0.00465+0.00465); lognormal variance with pedigree 0.2106, pedigree (2,5,5,5,1)
  Emission factor from DS "Heat, district or industrial, other than natural gas {CH}| heat production, wood chips from industry, at furnace 1000kW | Cut-off, U" on heat generation from industrial residual wood per MJ, multiplied by the input of wood fuel (direct wood fuel plus production residues ) scaled to reflect wood input per generated heat plus estimated emissions from wood and glue drying processes (based on Albrecht et al. 2009), minus VOC emissions that are inventoried specifically.
- Magnesium [air, urban air close to ground]: 6.00546e-8 kg; = 0.00000048*wood_fuel/1.05; lognormal variance with pedigree 0.4806, pedigree (2,5,5,5,1)
  (same comment as for PAH, polycyclic aromatic hydrocarbons)
- Chlorine [air, urban air close to ground]: 3.00273e-8 kg; = 0.00000024*wood_fuel/1.05; lognormal variance with pedigree 0.4806, pedigree (2,5,5,5,1)
  (same comment as for PAH, polycyclic aromatic hydrocarbons)
- Methane, non-fossil [air, urban air close to ground]: 5.00455e-7 kg; = 0.000004*wood_fuel/1.05; lognormal variance with pedigree 0.4806, pedigree (2,5,5,5,1)
  (same comment as for PAH, polycyclic aromatic hydrocarbons)
- Nitrogen oxides [air, urban air close to ground]: 3.75341e-5 kg; = 0.0003*wood_fuel/1.05; lognormal variance with pedigree 0.1206, pedigree (2,5,5,5,1)
  (same comment as for PAH, polycyclic aromatic hydrocarbons)
- Arsenic [air, urban air close to ground]: 1.66818e-10 kg; = 1.33333333333333E-09*wood_fuel/1.05; lognormal variance with pedigree 0.4806, pedigree (2,5,5,5,1)
  (same comment as for PAH, polycyclic aromatic hydrocarbons)
- Benzene, hexachloro- [air, urban air close to ground]: 1.20109e-15 kg; = 9.60000000000001E-15*wood_fuel/1.05; lognormal variance with pedigree 0.4806, pedigree (2,5,5,5,1)
  (same comment as for PAH, polycyclic aromatic hydrocarbons)
- Benzene, ethyl- [air, urban air close to ground]: 5.00455e-9 kg; = 0.00000004*wood_fuel/1.05; lognormal variance with pedigree 0.4806, pedigree (2,5,5,5,1)
  (same comment as for PAH, polycyclic aromatic hydrocarbons)
- Phosphorus [air, urban air close to ground]: 5.00455e-8 kg; = 0.0000004*wood_fuel/1.05; lognormal variance with pedigree 0.4806, pedigree (2,5,5,5,1)
  (same comment as for PAH, polycyclic aromatic hydrocarbons)
- Cadmium [air, urban air close to ground]: 1.16773e-10 kg; = 9.33333333333334E-10*wood_fuel/1.05; lognormal variance with pedigree 0.4806, pedigree (2,5,5,5,1)
  (same comment as for PAH, polycyclic aromatic hydrocarbons)
- Zinc [air, urban air close to ground]: 5.00455e-8 kg; = 0.0000004*wood_fuel/1.05; lognormal variance with pedigree 0.4806, pedigree (2,5,5,5,1)
  (same comment as for PAH, polycyclic aromatic hydrocarbons)
- Manganese [air, urban air close to ground]: 2.83591e-8 kg; = 2.26666666666667E-07*wood_fuel/1.05; lognormal variance with pedigree 0.4806, pedigree (2,5,5,5,1)
  (same comment as for PAH, polycyclic aromatic hydrocarbons)
- Copper [air, urban air close to ground]: 3.67e-9 kg; = 2.93333333333334E-08*wood_fuel/1.05; lognormal variance with pedigree 0.4806, pedigree (2,5,5,5,1)
  (same comment as for PAH, polycyclic aromatic hydrocarbons)
- Dinitrogen monoxide [air, urban air close to ground]: 3.83682e-7 kg; = 3.06666666666667E-06*wood_fuel/1.05; lognormal variance with pedigree 0.4806, pedigree (2,5,5,5,1)
  (same comment as for PAH, polycyclic aromatic hydrocarbons)
- Mercury [air, urban air close to ground]: 5.00455e-11 kg; = 0.0000000004*wood_fuel/1.05; lognormal variance with pedigree 0.4806, pedigree (2,5,5,5,1)
  (same comment as for PAH, polycyclic aromatic hydrocarbons)
- Hydrocarbons, aliphatic, unsaturated [air, urban air close to ground]: 5.17137e-7 kg; = 4.13333333333333E-06*wood_fuel/1.05; lognormal variance with pedigree 0.4806, pedigree (2,5,5,5,1)
  (same comment as for PAH, polycyclic aromatic hydrocarbons)
- Bromine [air, urban air close to ground]: 1.00091e-8 kg; = 0.00000008*wood_fuel/1.05; lognormal variance with pedigree 0.4806, pedigree (2,5,5,5,1)
  (same comment as for PAH, polycyclic aromatic hydrocarbons)
- Calcium [air, urban air close to ground]: 9.75887e-7 kg; = 0.0000078*wood_fuel/1.05; lognormal variance with pedigree 0.4806, pedigree (2,5,5,5,1)
  (same comment as for PAH, polycyclic aromatic hydrocarbons)
- Sulfur dioxide [air, urban air close to ground]: 4.17046e-7 kg; = 3.33333333333334E-06*wood_fuel/1.05; lognormal variance with pedigree 0.4806, pedigree (2,5,5,5,1)
  (same comment as for PAH, polycyclic aromatic hydrocarbons)
- Carbon monoxide, non-fossil [air, urban air close to ground]: 5.00455e-5 kg; = 0.0004*wood_fuel/1.05; lognormal variance with pedigree 0.0706, pedigree (2,5,5,5,1)
  (same comment as for PAH, polycyclic aromatic hydrocarbons)
- Potassium [air, urban air close to ground]: 3.90355e-6 kg; = 0.0000312*wood_fuel/1.05; lognormal variance with pedigree 0.4786, pedigree (2,5,5,1,1)
  (same comment as for PAH, polycyclic aromatic hydrocarbons)
- Chromium [air, urban air close to ground]: 6.60601e-10 kg; = 5.28000000000001E-09*wood_fuel/1.05; lognormal variance with pedigree 0.4806, pedigree (2,5,5,5,1)
  (same comment as for PAH, polycyclic aromatic hydrocarbons)
- Dioxins, measured as 2,3,7,8-tetrachlorodibenzo-p-dioxin [air, urban air close to ground]: 5.17137e-15 kg; = 4.13333333333333E-14*wood_fuel/1.05; lognormal variance with pedigree 0.4806, pedigree (2,5,5,5,1)
  (same comment as for PAH, polycyclic aromatic hydrocarbons)
- Fluorine [air, urban air close to ground]: 8.34092e-9 kg; = 6.66666666666667E-08*wood_fuel/1.05; lognormal variance with pedigree 0.4806, pedigree (2,5,5,5,1)
  (same comment as for PAH, polycyclic aromatic hydrocarbons)
- Carbon dioxide, non-fossil [air, urban air close to ground]: 0.0178496 kg; = 0.142666666666666*wood_fuel/1.05; lognormal variance with pedigree 0.0506, pedigree (2,5,5,5,1)
  (same comment as for PAH, polycyclic aromatic hydrocarbons)
- Formaldehyde [air, urban air close to ground]: 8.61557e-7 kg; = 1.73333333333334E-07*wood_fuel/1.05+0.00368; lognormal variance with pedigree 0.4806, pedigree (2,5,5,5,1)
  Emission factor from DS "Heat, district or industrial, other than natural gas {CH}| heat production, wood chips from industry, at furnace 1000kW | Cut-off, U" on heat generation from industrial residual wood per MJ, multiplied by the input of wood fuel (direct wood fuel plus production residues ) scaled to reflect wood input per generated heat plus estimated emissions from wood and glue drying processes (based on Albrecht et al. 2009).
- Ammonia [air, urban air close to ground]: 2.88596e-7 kg; = 2.30666666666667E-06*wood_fuel/1.05; lognormal variance with pedigree 0.4806, pedigree (2,5,5,5,1)
  (same comment as for PAH, polycyclic aromatic hydrocarbons)
- Particulates, < 2.5 um [air, urban air close to ground]: 7.50683e-6 kg; = 0.0000600000000000001*wood_fuel/1.05; lognormal variance with pedigree 0.1206, pedigree (2,5,5,5,1)
  (same comment as for PAH, polycyclic aromatic hydrocarbons)
- m-Xylene [air, urban air close to ground]: 2.00182e-8 kg; = 0.00000016*wood_fuel/1.05; lognormal variance with pedigree 0.4806, pedigree (2,5,5,5,1)
  (same comment as for PAH, polycyclic aromatic hydrocarbons)
- Acetaldehyde [air, urban air close to ground]: 3.04195e-8 kg; = 8.13333333333333E-08*wood_fuel/1.05+0.0000887; lognormal variance with pedigree 0.4806, pedigree (2,5,5,5,1)
  (same comment as for Formaldehyde)
- Methanol [air, non-urban air or from high stacks]: 1.06125e-6 kg; lognormal variance with pedigree 0.482, pedigree (3,5,5,5,1)
  Estimated emissions from wood and glue drying processes
- Toluene [air, urban air close to ground]: 5.00455e-8 kg; = 0.0000004*wood_fuel/1.05; lognormal variance with pedigree 0.4806, pedigree (2,5,5,5,1)
  (same comment as for PAH, polycyclic aromatic hydrocarbons)
- Benzo(a)pyrene [air, urban air close to ground]: 8.34092e-11 kg; = 6.66666666666667E-10*wood_fuel/1.05; lognormal variance with pedigree 0.4806, pedigree (2,5,5,5,1)
  (same comment as for PAH, polycyclic aromatic hydrocarbons)
- Sodium [air, urban air close to ground]: 2.16864e-7 kg; = 1.73333333333334E-06*wood_fuel/1.05; lognormal variance with pedigree 0.4806, pedigree (2,5,5,5,1)
  (same comment as for PAH, polycyclic aromatic hydrocarbons)
- Chromium VI [air, urban air close to ground]: 6.67273e-12 kg; = 5.33333333333334E-11*wood_fuel/1.05; lognormal variance with pedigree 0.5306, pedigree (2,5,5,5,1)
  (same comment as for PAH, polycyclic aromatic hydrocarbons)
- Hydrocarbons, aliphatic, alkanes, unspecified [air, urban air close to ground]: 1.51805e-7 kg; = 1.21333333333333E-06*wood_fuel/1.05; lognormal variance with pedigree 0.4806, pedigree (2,5,5,5,1)
  (same comment as for PAH, polycyclic aromatic hydrocarbons)
- Nickel [air, urban air close to ground]: 1.00091e-9 kg; = 0.000000008*wood_fuel/1.05; lognormal variance with pedigree 0.4806, pedigree (2,5,5,5,1)
  (same comment as for PAH, polycyclic aromatic hydrocarbons)
- Phenol, pentachloro- [air, urban air close to ground]: 1.35123e-12 kg; = 0.0000000000108*wood_fuel/1.05; lognormal variance with pedigree 0.4806, pedigree (2,5,5,5,1)
  (same comment as for PAH, polycyclic aromatic hydrocarbons)

## Sampling procedure
Survey among member companies of the European Panel Federation; emissions profile per MJ wood input from PSI (2014)
