# diode production, glass-, for surface-mounting

Dataset: EcoSpold 2, unit process
Geography: GLO
Time period: 1994-01-01 to 2021-12-31
Technology level: current
Classification: EcoSpold01Categories: electronics/component
Classification: ISIC rev.4 ecoinvent: 2610:Manufacture of electronic components and boards
Tags: ConvertedDataset
Scenario: Business-as-Usual
System model: Allocation, cut-off by classification
Generated by: Roland Hischier
Published in: Hischier R. 2007
Database: ecoinvent
isCopyrightProtected: true
accessRestrictedTo: 1

## General comment
This dataset represents the production of 1 kg of a typical SMD type diode for surface mounting. It is based on the assumption that a typical SMD diode in electronic modules has an average weight of 32 mg. The data represent a typical SMD type diode for surface mounting used in the information and communication technology. Material data are taken from datasheets of producers of such diodes and from the literature. Infrastructure and production efforts are based on own assumptions. The production efforts represent not a specific diode type and have thus, accordingly higher uncertainties.
[This dataset was already contained in the ecoinvent database version 2. It was not individually updated during the transfer to ecoinvent version 3. Life Cycle Impact Assessment results may still have changed, as they are affected by changes in the supply chain, i.e. in other datasets. This dataset was generated following the ecoinvent quality guidelines for version 2. It may have been subject to central changes described in the ecoinvent version 3 change report (http://www.ecoinvent.org/database/ecoinvent-version-3/reports-of-changes/), and the results of the central updates were reviewed extensively. The changes added e.g. consistent water flows and other information throughout the database. The documentation of this dataset can be found in the ecoinvent reports of version 2, which are still available via the ecoinvent website. The change report linked above covers all central changes that were made during the conversion process.]

## Included activities start
From reception of metals and plastics at the factory gate.

## Included activities end
This dataset includes raw material input and production efforts for the production of currently used SMD diodes for surface mounting technology.

## Geography
Data represent a global valuable composition of SMD type diodes.

## Technology
average production composed of the diode wafer production (cleaing, masking, etching, doping, oxidising, metal deposition) and the final assembly of the diode (wafer sawing, die bonding, moulding, trimming and forming)

## Reference product
- diode, glass-, for surface-mounting: 1 kg; CPC 47150: Diodes, transistors and similar semi-conductor devices; photosensitive semi-conductor devices; light emitting […]; By-product classification allocatable product
  A diode is “a component that restricts the direction of movement of charge carriers. Essentially, it allows an electric current to flow in one direction, but blocks it in the opposite direction.”
  Hence, a diode can be seen as an electronic version of a check valve. A circuit that requires current flow in only one direction will consequently include at least one diode in its circuit design. Currently most of the diodes are made from traditional semiconductor materials like silicium or germanium.
  Currently, there is a huge variety of different types of diodes on the market.
  EcoSpold01Location=GLO
  production volume 1 kg
    Dummy value to be replaced by measured, estimated or calculated value
  property price 91.29 EUR2005
    Calculated value based on data from United Nations Commodity Trade Statistics Database (comtrade.un.org). UN comtrade category: 854110 Diodes, except photosensitive and light emitting. Year 2005. Using exchange rate of 1EURO = 1.209 USD. Average of price of import into 5 main markets (EU, US, JP, IN and CN).
  property carbon content, fossil 0.00928779
    Calculated as the addition of C contents in the product composition
  property carbon content 0.00928779
    carbon content on a dry matter basis (reserved; not for manual entry)
  properties: water content 0, carbon content, non-fossil 0, dry mass 1 kg, water in wet mass 0 kg, wet mass 1 kg, carbon allocation 0.00928779 kg

## Inputs from technosphere
- aluminium oxide, non-metallurgical: 0 kg; pedigree (1,1,1,1,1)
  Calculated Value. The production of 1 kg of diodes lead to a waste amount of 0.37 kg - whereof 0.04 kg are calculated to be unused raw materials. Hence, this dataset here has an input of 1.04 kg of raw materials per kg of diode. The split to the different raw materials (metals, plastics) is based on the reported material specifications.
  Further references:
  Philips Semiconductors (2002) Chemical Content of Semiconductor Devices 2002/2003. Philips Semiconductors, Austin / Zoetermeer / Hong Kong / Tokyo
  ST Microelectronics (2004) Chemical Content of Semiconductor Packaging. PDF from <http://www.stmicroelectronics.com/stonline/company/environm/report03/envi03.pdf>.
  EcoSpold01Location=RER
  Uncertainty: average from literature & company information
  properties: dry mass 1 kg, wet mass 1 kg
- funnel glass, for cathode ray tube display: 0.26104 kg; lognormal variance with pedigree 0.042, pedigree (1,4,5,1,1)
  EcoSpold01Location=GLO
  Calculated Value. The production of 1 kg of diodes lead to a waste amount of 0.37 kg - whereof 0.04 kg are calculated to be unused raw materials. Hence, this dataset here has an input of 1.04 kg of raw materials per kg of diode. The split to the different raw materials (metals, plastics) is based on the reported material specifications.
  Further references:
  Philips Semiconductors (2002) Chemical Content of Semiconductor Devices 2002/2003. Philips Semiconductors, Austin / Zoetermeer / Hong Kong / Tokyo
  ST Microelectronics (2004) Chemical Content of Semiconductor Packaging. PDF from <http://www.stmicroelectronics.com/stonline/company/environm/report03/envi03.pdf>.
  Uncertainty: average from literature & company information
  properties: dry mass 1 kg, wet mass 1 kg
- diode, auxilliaries and energy use: 1 kg; lognormal variance with pedigree 0.134, pedigree (3,4,5,1,4)
  EcoSpold01Location=GLO
  Estimation - details see this other activity dataset
  Uncertainty: rough estimation
- lead: 0.008216 kg; source Behrendt S 1998; lognormal variance with pedigree 0.042, pedigree (1,4,5,1,1)
  (same comment as for aluminium oxide, non-metallurgical)
  properties: wet mass 1 kg, dry mass 1 kg
- molybdenum: 0.16068 kg; lognormal variance with pedigree 0.042, pedigree (1,4,5,1,1)
  (same comment as for aluminium oxide, non-metallurgical)
  properties: dry mass 1 kg, wet mass 1 kg
- copper, cathode: 0.24991 kg; lognormal variance with pedigree 0.042, pedigree (1,4,5,1,1)
  (same comment as for aluminium oxide, non-metallurgical)
  properties: dry mass 1 kg, wet mass 1 kg
- epoxy resin, liquid: 0 kg; pedigree (1,1,1,1,1)
  EcoSpold01Location=RER
  Calculated Value. The production of 1 kg of diodes lead to a waste amount of 0.37 kg - whereof 0.04 kg are calculated to be unused raw materials. Hence, this dataset here has an input of 1.04 kg of raw materials per kg of diode. The split to the different raw materials (metals, plastics) is based on the reported material specifications.
  Further references:
  Philips Semiconductors (2002) Chemical Content of Semiconductor Devices 2002/2003. Philips Semiconductors, Austin / Zoetermeer / Hong Kong / Tokyo
  ST Microelectronics (2004) Chemical Content of Semiconductor Packaging. PDF from <http://www.stmicroelectronics.com/stonline/company/environm/report03/envi03.pdf>.
  Uncertainty: average from literature & company information
  properties: wet mass 1 kg, dry mass 1 kg, heating value, net 12.82 MJ, carbon content, fossil 0.42325
- tin: 0.015288 kg; lognormal variance with pedigree 0.042, pedigree (1,4,5,1,1)
  (same comment as for aluminium oxide, non-metallurgical)
  properties: dry mass 1 kg, wet mass 1 kg
- silicon, electronics grade: 0.004784 kg; lognormal variance with pedigree 0.042, pedigree (1,4,5,1,1)
  EcoSpold01Location=DE
  Calculated Value. The production of 1 kg of diodes lead to a waste amount of 0.37 kg - whereof 0.04 kg are calculated to be unused raw materials. Hence, this dataset here has an input of 1.04 kg of raw materials per kg of diode. The split to the different raw materials (metals, plastics) is based on the reported material specifications.
  Further references:
  Philips Semiconductors (2002) Chemical Content of Semiconductor Devices 2002/2003. Philips Semiconductors, Austin / Zoetermeer / Hong Kong / Tokyo
  ST Microelectronics (2004) Chemical Content of Semiconductor Packaging. PDF from <http://www.stmicroelectronics.com/stonline/company/environm/report03/envi03.pdf>.
  Uncertainty: average from literature & company information
  properties: dry mass 1 kg, wet mass 1 kg
- aluminium oxide, non-metallurgical: 0.272608, 0.0461523 kg (2 entries); lognormal variance with pedigree 0.042, pedigree (1,4,5,1,1)
  (same comment as for aluminium oxide, non-metallurgical)
- epoxy resin, liquid: 0.00381826, 0.0181257 kg (2 entries); lognormal variance with pedigree 0.042, pedigree (1,4,5,1,1)
  (same comment as for epoxy resin, liquid)

## Sampling procedure
literature

## Extrapolations
This dataset has been extrapolated from year 2007 to the year of the calculation (2021). The uncertainty has been adjusted accordingly.

## Review by Roland Hischier 2011-09-20
Transfer of documentation done.

## Review by Rolf Frischknecht 2007-11-15
passed.
