# treatment of used air filter, decentralized unit, 250 m3/h

Dataset: EcoSpold 2, unit process
Geography: RoW
Time period: 2000-01-01 to 2021-12-31
Technology level: current
Classification: EcoSpold01Categories: waste management/building demolition
Classification: ISIC rev.4 ecoinvent: 3830:Materials recovery
Tags: Treatment; ConvertedDataset
Scenario: Business-as-Usual
System model: Allocation, cut-off by classification
Generated by: Alex Primas
Published in: Hässig, W. 2007
Database: ecoinvent
isCopyrightProtected: true
accessRestrictedTo: 1

## General comment
Disposal of a mat filter made of polyester fleece, frame cardboard. Total weight per element 0.05 kg
[This dataset was already contained in the ecoinvent database version 2. It was not individually updated during the transfer to ecoinvent version 3. Life Cycle Impact Assessment results may still have changed, as they are affected by changes in the supply chain, i.e. in other datasets. This dataset was generated following the ecoinvent quality guidelines for version 2. It may have been subject to central changes described in the ecoinvent version 3 change report (http://www.ecoinvent.org/database/ecoinvent-version-3/reports-of-changes/), and the results of the central updates were reviewed extensively. The changes added e.g. consistent water flows and other information throughout the database. The documentation of this dataset can be found in the ecoinvent reports of version 2, which are still available via the ecoinvent website. The change report linked above covers all central changes that were made during the conversion process.]

## Included activities end
Transport to dismantling facilities, machines for handling in sorting plant, electricity demand for sorting plant, final disposal of waste material. Cut-off to recycling for metals.

## Geography
Specific to the technology mix encountered in sorting plants in Switzerland

## Technology
Disposal to a sorting plant assumed. Metal pieces and copper in cables and electronic devices are recycled, plastic parts are incinerated, inert wastes (e.g. rock wool) are landfilled.

## Time period
Amount of material investigated in 2003. Disposal technology mix as used in late 1990ies

## Reference product
- used air filter decentralized unit, 250 m3/h: -1 unit; CPC 39990: Other wastes n.e.c.; By-product classification Waste
  EcoSpold01Location=CH
  production volume 3.96633 unit
    This is a placeholder value that does not reflect real-world production volumes. This dataset does not currently require a real-world production volume to work in the database framework, and no actual data were collected yet. This has no negative effect on the results of the ecoinvent database.
  property price 0 EUR2005
    Waste products are assigned a price of zero as they are assumed to require further treatment.
  property carbon content 0.537989
    carbon content on a dry matter basis (reserved; not for manual entry)
  properties: carbon content, non-fossil 0.136255, water content 0, wet mass 0.05 kg, water in wet mass 0 kg, carbon content, fossil 0.401734, dry mass 0.05 kg, carbon allocation 0.0268995 kg

## Inputs from technosphere
- waste paperboard: 0 kg; pedigree (1,1,1,1,1)
  Estimation based on data of Questionnaire
  EcoSpold01Location=CH
  Uncertainty: Estimation based on data of Questionnaire
  production volume 0 kg
    Calculated from the production volume of used air filter decentralized unit, 250 m3/h in proportion to the respective output amounts.
  properties: water content 0.243781, dry mass 0.804 kg, wet mass 1 kg, carbon content, non-fossil 0.483259, heating value, net 15.92 MJ
  note on carbon content, non-fossil: C content was calculated for 1 kg DM, using data in Tab A.3, ecoinvent v2.2 report 13_I.
  note on heating value, net: Value taken from the general comment of the treatment dataset.
- waste polyethylene terephthalate: 0 kg; pedigree (1,1,1,1,1)
  EcoSpold01Location=CH
  Estimation based on data of Questionnaire
  Uncertainty: Estimation based on data of Questionnaire
  production volume 0 kg
    (same comment as for waste paperboard)
  properties: water content 0.00200401, dry mass 0.998 kg, carbon content, fossil 0.554108, wet mass 1 kg, heating value, net 22.95 MJ
  note on carbon content, fossil: C content in 1 kg DM was calculated using data in Tab A.1, ecoinvent v2.2 report 13_I
- waste paperboard: -0.000874876, -0.000133598, -1.16819e-5, -0.000482744, -4.70716e-5, -8.71344e-5, -0.00211065, -0.0162522 kg (8 entries); lognormal variance with pedigree 0.074, pedigree (3,4,5,5,3)
  (same comment as for waste paperboard)
  production volume 0.06 kg
- waste polyethylene terephthalate: -0.00333726, -0.000222983, -1.68638e-5, -9.20998e-5, -3.72073e-5, -8.74574e-5, -0.0028435, -0.0233626 kg (8 entries); lognormal variance with pedigree 0.074, pedigree (3,4,5,5,3)
  (same comment as for waste polyethylene terephthalate)
  production volume 0.09 kg

## Sampling procedure
Questionnaire and assumptions.

## Extrapolations
none This dataset has been copied from an original dataset covering the geography CH. The uncertainty has been adjusted accordingly.

## Review by Rolf Frischknecht 2007-08-16
passed
none
