# cyclohexane production

Dataset: EcoSpold 2, unit process
Geography: RER
Time period: 1975-01-01 to 2021-12-31
Technology level: current
Classification: ISIC rev.4 ecoinvent: 2011:Manufacture of basic chemicals
Synonyms: Cykloheksan; Hexanaphthene; Hexahydrobenzene; Cyclohexan; Hexamethylene
Scenario: Business-as-Usual
System model: Allocation, cut-off by classification
Share of production covered: 10 %
Generated by: Jürgen Sutter
Published in: Althaus H.-J. 2007
Database: ecoinvent
isCopyrightProtected: true
accessRestrictedTo: 1

## General comment
This dataset represents the production of 1 kg of cyclohexane by hydrogenation of benzene. Cyclohexane (C6H12) is a clear liquid with a pungent petroleum-like odor. It is essentially insoluble in water but miscible in most organic liquids, and is noncorrosive, easily flammable, and considered to be much less toxic than benzene. Over 98 % of the cyclohexane produced is used to make nylon intermediates: adipic acid, caprolactam, and hexamethylenediamine, with the first two consuming ca. 95 % of the cyclohexane used in nylon manufacture. Minor miscellaneous uses, such as solvents and polymer reaction diluents, consume the remainder of the cyclohexane produced (Campbell 2011).
In this dataset, the raw materials, auxiliaries and energy consumption are modelled with data from literature sources. The emissions are estimated and the infrastructure is included with a default value.
References:
Sutter, J. (2007) Life Cycle Inventories of Petrochemical Solvents. ecoinvent report No. 22. Swiss Centre for Life Cycle Inventories, Dübendorf, 2007.
Campbell, M. L. 2011. Cyclohexane. Ullmann's Encyclopedia of Industrial Chemistry.

## Included activities start
From the reception of benzene at the factory gate.

## Included activities end
This activity ends with the production of cyclohexane. The dataset includes the consumption of input materials, the energy uses, infrastructure use and emissions.

## Geography
The inventory is modelled for Europe.

## Technology
Over 90 % of all cyclohexane is produced commercially by hydrogenation of benzene. A small amount is produced by superfractionation of the naphtha fraction from crude oil. Naturally occurring cyclohexane can be supplemented by fractionating methylcyclopentane from naphtha and isomerizing it to cyclohexane.
Hydrogenation of benzene:
Benzene can be hydrogenated catalytically to cyclohexane in either the liquid or the vapor phase in the presence of hydrogen. Several cyclohexane processes, which use nickel, platinum, or palladium as the catalyst, have been developed. Usually, the catalyst is supported, e.g., on alumina, but at least one commercial process utilizes Raney nickel.
Hydrogenation proceeds readily and is highly exothermic (Δ H500K = – 216.37 kJ/mol). From an equilibrium standpoint, the reaction temperature should not exceed 300 °C. Above this, the equilibrium begins to shift in favor of benzene so that high-purity cyclohexane cannot be produced. As a result of these thermodynamic considerations, temperature control of the reaction is critical to obtaining essentially complete conversion of benzene to cyclohexane.
Temperature control requires economic and efficient heat removal. This has been addressed in a number of ways by commercial processes. The earlier vapor-phase processes used multistage reactors with recycle of cyclohexane as a diluent to provide a heat sink, staged injection of benzene feed between reactors, and interstage steam generators to absorb the exothermic heat of hydrogenation. In the 1970s processes have been developed that use only one reactor or a combination of a liquid-and a vaporphase reactor. The objectives of the later processes were to reduce capital cost and improve energy utilization. However, all of the commercial processes have comparably low capital cost and good energy efficiency.
In the vapor-phase process with multistage reactors in series, the benzene feed is divided and fed to each of the first two reactors. Recycled cyclohexane is introduced to the first reactor along with hydrogen. The recycled cyclohexane enables higher conversion in the reactors by absorbing part of the heat of hydrogenation. Steam generators between the reactors remove the heat of hydrogenation. The outlet temperature of the last reactor is controlled to achieve essentially 100 % conversion of benzene to cyclohexane. The effluent from the last reactor is cooled, and the vapor and liquid are separated. Part of the hydrogen-rich vapor is recycled to the first reactor, and the rest is purged to fuel gas or hydrogen recovery facilities. The liquid from the separator goes to a stabilizer where the overhead gas is sent to fuel gas; the remaining material is cyclohexane product, part of which is recycled to the first reactor.
In the process with liquid- and vapor-phase reactors, benzene and hydrogen are fed to the liquid-phase reactor, which contains a slurry of finely divided Raney nickel. Temperature is maintained at 180 – 190 °C by pumping the slurry through a steam generator and by vaporization in the reactor. Roughly 95 % of the benzene is converted in this reactor. The vapor is fed to a fixed-bed reactor where the conversion of benzene is completed. The effluent from the fixed-bed reactor is processed as described previously for the vapor-phase process.
Benzene hydrogenation is done typically at 20 – 30 MPa. The maximum reactor temperature is limited to ca. 300 °C so that a typical specification of < 500 mg/kg benzene and < 200 mg/kg methylcyclopentane in the product can be achieved. This is necessary because of the thermodynamic equilibrium between cyclohexane – benzene and cyclohexane – methylcyclopentane. Actually, equilibrium strongly favors methylcyclopentane, but the isomerization reaction is slow enough with the catalysts employed to avoid a problem if the temperature is controlled.
The hydrogen content of the makeup hydrogen has no effect on product purity but it does determine the makeup, recycle, and purge gas rates. Streams with as low as 65 vol % hydrogen can be used.
Carbon monoxide and sulfur compounds are catalyst deactivators. Both can be present in the hydrogen from catalytic naphtha reformers or ethylene units, which are typical sources of makeup hydrogen. Therefore, the hydrogen-containing stream is usually passed through a methanator to convert carbon monoxide to methane and water. Prior to methanation, hydrogen-containing gas can be scrubbed with caustic to remove sulfur compounds. Commercial benzene contains less than 1 mg/kg sulfur. In some cases, the recycle gas is also scrubbed with caustic to prevent buildup of hydrogen sulfide from the small amount of sulfur in the benzene. With properly treated hydrogen and specification benzene, a catalyst life in excess of three years can be achieved easily in fixed-bed reactors that use noble-metal catalysts supported on a base. The catalyst in the process that uses Raney nickel in suspension is reported to have a typical life of about six months before it must be replaced.
Reference:
Campbell, M. L. 2011. Cyclohexane. Ullmann's Encyclopedia of Industrial Chemistry.

## Time period
Time of publications.

## Parameters
- fraction, cooling water, once-through system, to air: 0.004 dimensionless; name fraction_CW_OT_to_air; lognormal variance with pedigree 0.0413, pedigree (2,3,1,3,1)
  Calculated based on literature value (Scown, C.D., 2011, Water Footprint of U.S. Transportation Fuels and supplying information of the article) (Vionnet, S., Quantis Water Database - Technical Report, 2012).
- fraction, cooling water, cooling pond system, to air: 0.032 dimensionless; name fraction_CW_CP_to_air; lognormal variance with pedigree 0.0413, pedigree (2,3,1,3,1)
  (same comment as for fraction, cooling water, once-through system, to air)
- fraction, water, deionised, to air: 0.205 dimensionless; name fraction_WDI_to_air; = fraction_PW_to_air; lognormal variance with pedigree 0.092025, pedigree (4,4,3,2,4)
  Calculated value. See comment in the other parametres present in this dataset. Deionised water is considered to be always used as process water, thus process water fractions to air are applied to all deionised water input flows to calculate the amount of water consumed in the processes.
- fraction, cooling water, recirculating system, to air: 0.771 dimensionless; name fraction_CW_R_to_air; lognormal variance with pedigree 0.0413, pedigree (2,3,1,3,1)
  (same comment as for fraction, cooling water, once-through system, to air)
- fraction, process water, to air: 0.205 dimensionless; name fraction_PW_to_air; lognormal variance with pedigree 0.092025, pedigree (4,4,3,2,4)
  Literature value (Statistics Canada, 2007 & Shaffer, K.H., 2008, Consumptive water use in the Great Lakes Basin, USGS) (Vionnet, S., Quantis Water Database - Technical Report, 2012).
- fraction, cooling water, to air: 0.3875 dimensionless; name fraction_CW_to_air; = (0.5*fraction_CW_OT_to_air)+(0.5*fraction_CW_R_to_air); lognormal variance with pedigree 0.092025, pedigree (4,4,3,2,4)
  Calculated value based on literature value (see comments of the other parametres present in this dataset) and expert opinion. In the case when no industry/literature data are available about the type of cooling or directly fraction, cooling water, to air specific for the process a default assumption is applied. It is assumed that the once-through cooling system is used in 50% of all cases and recirculating system is used in another 50% of all cases.

## Reference product
- cyclohexane: 1 kg; name RP; source Campbell, M. L. 2001; By-product classification allocatable product; CPC 34110: Hydrocarbons and their halogenated, sulphonated, nitrated or nitrosated derivatives; CAS 110-82-7
  Cyclohexane is a clear liquid with a pungent petroleum-like odor. It is essentially insoluble in water but miscible in most organic liquids, and is noncorrosive, easily flammable, and considered to be much less toxic than benzene.
  Cyclohexane can exist in two conformations, the chair and boat forms.
  Transformation from one isomer to the other involves rotation about carbon-carbon single bonds. The energy barriers associated with the transformation are low, but the boat form is estimated to have a potential energy 21 - 25 kJ/mol higher than the chair form. As a result, cyclohexane is almost exclusively in the chair form at room temperature. Stereochemistry has no influence on its use as a raw material for nylon manufacture or in other applications.
  Over 98 % of the cyclohexane produced is used to make nylon intermediates: adipic acid, caprolactam, and hexamethylenediamine, with the first two consuming ca. 95 % of the cyclohexane used in nylon manufacture. Minor miscellaneous uses, such as solvents and polymer reaction diluents, consume the remainder of the cyclohexane produced.
  production volume 8.874e8 kg; name RP_PV
    Estimated value. The European production volume is extrapolated from the global production volume based on reports from Cefic (European Chemical Industry Council), and the American Chemistry Council.
    According to Cefic (2016) the Global sales of chemicals in the year 2015 was 3 534 billion euros. The reported share of sales per regions are: EU28 14.7%; Other Europe (Switzerland, Norway, Turkey, Russia and Ukraine) 2.7%; NAFTA (US, Canada and Mexico) 16.5%; Latin America 3.8%; China 39.9%; Japan 3.9%; Republic of Korea 3.2%; India 2.2%; Rest of Asia 11.9%; Rest of the World 1.3%. Cefic also reports the US total sales, 518.7 billion euros of the global 3 534 billion euros (14.7%). The same share is reported from the American Chemistry Council (2016), according to this source the USA sales account for 15% of global sales for the year 2016.
    According to 'Ullmann's encyclopedia of industrial chemistry' the global cyclohexane production capacity in year 1995 was 5100 000 000 kg (Campbell 2011). Since no data were found for the European production this value was scaled accordingly.
    Reference(s):
    Cefic 2016. Facts and figures 2016 of the European chemical industry. Accessible at: http://www.cefic.org/Facts-and-Figures/Chemicals-Industry-Profile/
    American Chemistry Council 2016. Outlook: U.S. Chemical Industry Continues to Outpace Industrial Output; Accounts for More Than One-Half of Construction Spending by Manufacturing Sector. Accessible at: https://www.americanchemistry.com/Media/PressReleasesTranscripts/ACC-news-releases/US-Chemical-Industry-Continues-to-Outpace-Industrial-Output.html
    Campbell, M. L. 2011. Cyclohexane. Ullmann's Encyclopedia of Industrial Chemistry.
  property price 0.76 EUR2005
    Calculated value based on data from United Nations Commodity Trade Statistics Database (comtrade.un.org). UN comtrade category: 290211 Cyclohexane. Year 2005. Using exchange rate of 1EURO = 1.209 USD. Average of price of import into 5 main markets (EU, US, JP, IN and CN).
  property heating value, net 43.22 MJ
    LHV is calculated based on the elemental composition of the substance. Based on the CAS number of the substance (000110-82-7), the chemical formula of the substance is found to be: C6H12, (PubChem 2020).
    Reference: Kim, S., Chen, J., Cheng, T., Gindulyte, A., He, J., He, S., Li, Q., Shoemaker, B. A., Thiessen, P. A., Yu, B., Zaslavsky, L., Zhang, J., & Bolton, E. E. (2019). PubChem 2019 update: improved access to chemical data. Nucleic acids research, 47(D1), D1102–D1109. https://doi.org/10.1093/nar/gky1033
  property carbon content 0.857143
    carbon content on a dry matter basis (reserved; not for manual entry)
  properties: wet mass 1 kg, water content 0, water in wet mass 0 kg, dry mass 1 kg, carbon content, non-fossil 0, carbon content, fossil 0.857143, carbon allocation 0.857143 kg

## Inputs from technosphere
- water, deionised: 0 kg; name water_deionised_input; source Chauvel, A. 1989; pedigree (1,1,1,1,1)
  Estimated.
  Further references:
  Marcel, R. L.: Cyclohexane. In: Encyclopedia of Chemical Processing and Design (ed. Mc Ketta, J. J., Cunningham, W. A.) Volume 14. Marcel Dekker Inc., New York, Basel 1982
  Uncertainty: C
  properties: wet mass 1 kg
- benzene: 0.937 kg; source Chauvel, A. 1989; lognormal variance with pedigree 0.0701, pedigree (1,2,5,1,1)
  Estimated.
  Further references:
  Marcel, R. L.: Cyclohexane. In: Encyclopedia of Chemical Processing and Design (ed. Mc Ketta, J. J., Cunningham, W. A.) Volume 14. Marcel Dekker Inc., New York, Basel 1982
  Faith, W. L., Keyes, D. B., Clark, R. L.: Industrial chemicals. Ed.4 by F. A. Lowenheim, M. K. Moran. Wiley, New York 1975
  Wells, G. Margaret: Handbook of petrochemicals and processes. Aldershot, Hampshire 1991
  Uncertainty: S
  properties: wet mass 1 kg, carbon content, fossil 0.923077, dry mass 1 kg, heating value, net 42.5 MJ
- heat, district or industrial, other than natural gas: 1.57187 MJ; source Chauvel, A. 1989; lognormal variance with pedigree 0.0402, pedigree (1,2,5,3,1)
  Estimated.
  Further references:
  U.S Department of Energy, Office of Energy Efficency and Renewable Energy: Steam system opportunity assessment for the pulp and paper, chemical manufacturing, and petroleum refining industries. Main report. Washington DC 2002
  Energy and Environmental Profile of the U.S. Chemical Industry. Prepared by Energetics Incorporated. Prepared for U.S. Department of Energy, Office of Industrial Technologies Columbia/Maryland 2000
  Uncertainty: D
  properties: heating value, net 1 MJ
- nickel, class 1: 3.1e-5 kg; source Campbell, M. L. 2001; lognormal variance with pedigree 0.0701, pedigree (1,2,5,1,1)
  Estimated.
  Further references:
  Faith, W. L., Keyes, D. B., Clark, R. L.: Industrial chemicals. Ed.4 by F. A. Lowenheim, M. K. Moran. Wiley, New York 1975
  Uncertainty: F
  properties: wet mass 1 kg, dry mass 1 kg
- aluminium, wrought alloy: 2.108e-5 kg; source Campbell, M. L. 2001; lognormal variance with pedigree 0.0701, pedigree (1,2,5,1,1)
  (same comment as for nickel, class 1)
  properties: dry mass 1 kg, wet mass 1 kg
- chemical factory, organics: 4e-10 unit; lognormal variance with pedigree 0.349225, pedigree (2,3,5,2,3)
  Calculated based on literature data published by the industry. For this activity, no information was readily available concerning infrastructure and land-use. Therefore, the infrastructure is estimated based on data from two chemical factories, the BASF site of Ludwigshafen and the chemical factory in Gendorf (which are both located in Germany), which produce a wide range of chemical substances. Based on this data, the following assumptions are made: the built area amounts to about 4.2 ha, the plant has an average output of 50'000 t/a and a lifespan of fifty years. The estimated infrastructure amount is therefore 4.00 E-10 units per kg of produced chemical.
  References:
  Althaus H.-J., Chudacoff M., Hischier R., Jungbluth N., Osses M. and Primas A. (2007) Life Cycle Inventories of Chemicals. ecoinvent report No. 8, v2.0. EMPA Dübendorf, Swiss Centre for Life Cycle Inventories, Dübendorf, CH.
  Gendorf (2000) Umwelterklärung 2000, Werk Gendorf. Werk Gendorf, Burgkirchen.
- hydrogen, liquid: 0.07 kg; source Wells, M. 1991; lognormal variance with pedigree 0.0701, pedigree (1,2,5,1,1)
  Estimated.
  Further references:
  Faith, W. L., Keyes, D. B., Clark, R. L.: Industrial chemicals. Ed.4 by F. A. Lowenheim, M. K. Moran. Wiley, New York 1975
  Uncertainty: S
  properties: heating value, net 120.21 MJ, wet mass 1 kg, dry mass 1 kg
- aluminium, cast alloy: 9.92e-6 kg; source Campbell, M. L. 2001; lognormal variance with pedigree 0.0701, pedigree (1,2,5,1,1)
  (same comment as for nickel, class 1)
  properties: dry mass 1 kg, wet mass 1 kg
- electricity, medium voltage: 0.12684 kWh; source Chauvel, A. 1989; lognormal variance with pedigree 0.0402, pedigree (1,2,5,3,1)
  (same comment as for heat, district or industrial, other than natural gas)
- heat, district or industrial, natural gas: 2.81618 MJ; source Chauvel, A. 1989; lognormal variance with pedigree 0.0402, pedigree (1,2,5,3,1)
  (same comment as for heat, district or industrial, other than natural gas)
  properties: heating value, net 1 MJ
- water, deionised: 0.946593, 0.0034075 kg (2 entries); source Chauvel, A. 1989; lognormal variance with pedigree 0.04, pedigree (1,1,5,1,1)
  (same comment as for water, deionised)

## Inputs from nature
- Water, cooling, unspecified natural origin [natural resource, in water]: 0.008 m3; name water_cooling_UNO_input; source Chauvel, A. 1989; lognormal variance with pedigree 0.0408, pedigree (2,2,5,3,1)
  (same comment as for water, deionised)

## Emissions to nature
- TOC, Total Organic Carbon [water, unspecified]: 0.000690932 kg; lognormal variance with pedigree 0.218, pedigree (4,5,5,5,5)
  Calculated value. The BOD, COD, TOC and BOD5 are calculated based on the amount and type of emissions released to water in the same activity.
- COD, Chemical Oxygen Demand [water, unspecified]: 0.00221098 kg; lognormal variance with pedigree 0.218, pedigree (4,5,5,5,5)
  (same comment as for TOC, Total Organic Carbon)
- Carbon dioxide, fossil [air, urban air close to ground]: 0.023 kg; lognormal variance with pedigree 0.1786, pedigree (4,5,5,5,5)
  Estimated. Air emissions occurring from the purge vent, the distillation vent and fugitive emission sources were estimated to 0.2% of the raw material input.
  The carbon contained in the removed benzene during wastewater treatment was accounted for as CO2 emissions to air.
  It is assumed that the manufacturing plants are located in an urban/industrial area and consequently the emissions are categorised as emanating in a high population density area.
  Uncertainty: C
- Water [water, unspecified]: 0.00565525 m3; = (water_deionised_input/1000)*(1-fraction_WDI_to_air)+water_cooling_UNO_input*(1-fraction_CW_to_air); lognormal variance with pedigree 0.0807, pedigree (2,2,5,1,1)
  Calculated as a fraction of the input of water. For more details, refer to the mathematical relation and the parameters.
  property fraction, origin: unspecified 0.866452; name fraction_origin_unspecified_Ww
  property water in wet mass 1000 kg; name WWM
  property carbon content, non-fossil 0; name C_content_non_fossil
  property dry mass 0 kg; name DM
  property fraction, origin: fresh water 0.133548; name fraction_origin_fresh_water_Ww
  property fraction, origin: salt water 0; name fraction_origin_salt_water_Ww
  property wet mass 1000 kg; name WM
  property carbon content, fossil 0; name C_content_fossil
- BOD5, Biological Oxygen Demand [water, unspecified]: 0.00221098 kg; lognormal variance with pedigree 0.218, pedigree (4,5,5,5,5)
  (same comment as for TOC, Total Organic Carbon)
- Benzene [water, surface water]: 0.0007496 kg; lognormal variance with pedigree 0.448, pedigree (4,5,5,5,5)
  Estimated. Water emissions were estimated to 0.8 % of the benzene input. The carbon contained in the removed benzene was accounted as CO2 emissions to air.
  It is assumed that the manufacturing plants are located in an urban/industrial area and consequently the emissions are categorised as emanating in a high population density area.
  The emissions into water are assumed to be emitted into rivers.
  Uncertainty: C
- Water [air, unspecified]: 0.00329475 m3; = (water_deionised_input/1000*fraction_WDI_to_air)+(water_cooling_UNO_input*fraction_CW_to_air); lognormal variance with pedigree 0.0807, pedigree (2,2,5,1,1)
  (same comment as for Water)
  property fraction, origin: salt water 0; name fraction_origin_salt_water
  property fraction, origin: fresh water 0.0591092; name fraction_origin_fresh_water
  property fraction, origin: unspecified 0.940891; name fraction_origin_unspecified
- DOC, Dissolved Organic Carbon [water, unspecified]: 0.000690932 kg; lognormal variance with pedigree 0.218, pedigree (4,5,5,5,5)
  (same comment as for TOC, Total Organic Carbon)
- Benzene [air, urban air close to ground]: 0.001874 kg; lognormal variance with pedigree 0.188, pedigree (4,5,5,5,5)
  Estimated. The air emissions occurring from the purge vent, the distillation vent and fugitive emission sources were estimated to 0.2% of the benzene input, and 1 % of the H2 input.
  It is assumed that the manufacturing plants are located in an urban/industrial area and consequently the emissions are categorised as emanating in a high population density area.
  Uncertainty: E
- Hydrogen [air, urban air close to ground]: 0.0007 kg; lognormal variance with pedigree 0.188, pedigree (4,5,5,5,5)
  (same comment as for Benzene)

## Sampling procedure
Literature data

## Extrapolations
This dataset has been extrapolated from year 2006 to the year of the calculation (2021). The uncertainty has been adjusted accordingly.

## Review by Gregor Wernet 2017-08-04
This dataset was additionally reviewed in a separate review process by Eric Johnson of Atlantic Consulting as well as Emilia Moreno Ruiz and Gregor Wernet of ecoinvent.
