# cross-laminated timber production

Dataset: EcoSpold 2, unit process
Geography: RoW
Time period: 2012-01-01 to 2021-12-31
Technology level: current
Classification: ISIC rev.4 ecoinvent: 1621:Manufacture of veneer sheets and wood-based panels
Synonyms: Brettsperrholz
Tags: Swiss brush-up completed
Scenario: Business-as-Usual
System model: Allocation, cut-off by classification
Generated by: Frank Werner
Database: ecoinvent
isCopyrightProtected: true
accessRestrictedTo: 1

## General comment
This datasets represents the global production of Cross-laminated timber (CLT). Data are based on a sample of German Cross-laminated timber (CLT) produciton.
Cross-laminated timber (CLT) is a wood panel product made from gluing layers of solid-sawn timber together. Each layer of boards is oriented perpendicular to adjacent layers and glued on the wide faces of each board, usually in a symmetric way so that the outer layers have the same orientation. An odd number of layers is most common, but there are configurations with even numbers as well (which are then arranged to give a symmetric configuration).
Regular timber is an anisotropic material, meaning that the physical properties change depending on the direction at which the force is applied. By gluing layers of wood at perpendicular angles, the panel is able to achieve better structural rigidity in both directions. It is similar to plywood but with distinctively thicker laminations.
CLT is distinct to glued laminated timber, a product with all laminations orientated in the same way.
CLT production is geographically much focused on Alpine Europe, where the technology was originally developed. For example, Austria, Germany, and Switzerland together had almost 80% of global production capacity in 2015, whereby Austria alone holds 60% of global capacity (Muszynski et al., 2017). Other producing regions include France, the UK, Finland, Latvia, Japan, and the US.
The global annual production of CLT was estimated between 600,000 m3 in 2013 and one million m3 in 2015 (Muszynski et al., 2017). A future projection estimates that global production would reach three million m3 by 2025 (Muszynski et al., 2017). The global production volume for 2020 is therefore estimated to be roughly t wo million m3.
Reference(s):
Muszynski, Lech & Hansen, Eric & Fernando, Shanuka & Schwarzman, G. & Rainer, Jasmin. (2017). Insights into the Global Cross-Laminated Timber Industry.. BioProducts Business. 22. 77-92. https://www.researchgate.net/publication/321849166_Insights_into_the_Global_Cross-Laminated_Timber_Industry, accessed March 2020
Rüter, S. and S. Diederichs (2012): Ökobilanz-Basisdaten für Bauprodukte aus Holz. Arbeitsbericht aus dem Institut für Holztechnologie und Holzbiologie Nr. 2012/1, Johann Heinrich von Thünen-Institut (vTI), Hamburg.
[This dataset is meant to replace the following datasets:]

## Included activities start
From the reception at the factory gate of all materials and fuels used.

## Included activities end
This activity ends with the standard forms of glued laminated timber produced at the factory gate. The dataset includes the inputs to and outputs of the production processes and the available process emissions. Infrastructure is a rough estimate.

## Geography
Data for Germany used for central Europe

## Technology
Technology reflects a sample of German cross-laminated timber production.

## Parameters
- wood_fuel: 844.9; lognormal variance with pedigree 0.0256, pedigree (1,3,1,1,1)
  input of wood fuel used in production; value calculated from Rüter et al. 2012

## Reference product
- wood chips, dry, measured as dry mass: 1 kg; name m_wood_chips; By-product classification allocatable product; CPC 31230: Wood in chips or particles
  Literature value; sample form Germany
  production volume 4.766e7 kg; = m_wood_chips*CLT_pv
    Calculated from production volume of reference product using the relative outputs.
  property heating value, net 9.99 MJ
    LHV is calculated based on the Carbon content of the product. More details can be found on the respective documentation.
  property price 0.107 EUR2005; name m_wood_chips_price_EUR2005
    Expert judgement (Urs Luginbühl, Swiss Sawmilling industry, personal communication in June 2014). Wood chips from softwood should have a price of 0.101 EUR/kg. Woodchips from hardwood should have a price of 0.112 EUR/kg. Average of these two values is used. Cross-reference; FAOSTAT database; http://faostat.fao.org/site/626/DesktopDefault.aspx?PageID=626#ancor; Average import/export prices of EU for 'chips and particles'. Price: 48.76 Euro/m3. The density of the wood chips is 650 kg/m3. The price is recalculated accordingly.
  property carbon content 0.494
    carbon content on a dry matter basis (reserved; not for manual entry)
  property true value 25.4981; name m_wood_chips_true_value
    allocation property applied in "true value" allocation // value calculated from revenue
  properties: dry mass 1 kg, water in wet mass 0.4 kg, carbon content, non-fossil 0.494, water content 0.4, carbon content, fossil 0, wet mass 1.4 kg, carbon allocation 0.494 kg
- cross-laminated timber: 0 m3; By-product classification allocatable product
  Reference product. Plywood produced in Germany by processes representative for global average. The reference product is ready for delivery at the wooden board factory.
  A large number of materials can be produced with differing properties and areas of use. Typical uses are as construction plywood for wall, floor, and ceiling panels and also as panels for concrete shuttering, and decorative covering veneers in interior furnishings (e.g. wall panels or doors).
  production volume 200000 m3; name CLT_pv
    The global annual production of CLT was estimated between 600,000 m3 in 2013 and one million m3 in 2015 (Muszynski et al., 2017). A future projection estimates that global production would reach three million m3 by 2025. The production volume used here is an estimate of two million m3 in 2020.
    Reference(s):
    Muszynski, Lech & Hansen, Eric & Fernando, Shanuka & Schwarzman, G. & Rainer, Jasmin. (2017). Insights into the Global Cross-Laminated Timber Industry.. BioProducts Business. 22. 77-92. https://www.researchgate.net/publication/321849166_Insights_into_the_Global_Cross-Laminated_Timber_Industry
  property heating value, net 5502.97 MJ
    LHV is calculated based on the Carbon content of the product. More details can be found on the respective documentation.The property is based on a value of 12.42MJ/kg
  property carbon content 0.458565
    carbon content on a dry matter basis (reserved; not for manual entry)
  property true value 298
    allocation property applied in "true value" allocation // value calculated from revenue
  properties: price 298 EUR2005, dry mass 403.1 kg, wet mass 443 kg, carbon content, non-fossil 0.443229, water in wet mass 39.9 kg, carbon content, fossil 0.015336, water content 0.0989829, carbon allocation 184.848 kg

## Inputs from technosphere
- melamine urea formaldehyde adhesive: 0.00131741 kg; lognormal variance with pedigree 0.0446, pedigree (1,4,5,5,1)
  Literature value; sample from Germany
  properties: wet mass 1 kg, heating value, net 14.65 MJ, dry mass 1 kg, carbon content, fossil 0.311708
- ammonium sulfate: 5.58903e-6 kg; lognormal variance with pedigree 0.0112, pedigree (1,3,4,5,1)
  hardener for MUF adhesive
  properties: wet mass 1 kg, dry mass 1 kg
- wastewater from particleboard production: -3.78643e-5 m3; name wastewater; lognormal variance with pedigree 0.069, pedigree (1,4,5,5,1)
  Literature value; sample form Germany
  production volume 22895.4 m3; = wastewater*CLT_pv
    Calculated from production volume of reference product using the relative outputs.
  property price 0 EUR2005; name wastewater_price_EUR2005
  properties: carbon content, non-fossil 0.377131, dry mass 0.337476 kg, water content 2962.17, wet mass 1000 kg
- wooden board factory, organic bonded boards: 1.10143e-11 unit; lognormal variance with pedigree 0.398, pedigree (4,5,5,5,4)
  Default value from ecoinvent 2.2
- sawlog and veneer log, softwood, measured as solid wood under bark: 0 m3; pedigree (1,1,1,1,1)
  Literature value; sample from Germany
  properties: wet mass 776.751 kg, heating value, net 4483.78 MJ, water content 0.7, dry mass 456.912 kg, basic wood density 402.083, carbon content, non-fossil 0.494
  note on heating value, net: Value based on the dataset "softwood forestry, mixed species, sustainable forest management"The property is based on a value of 11.58MJ/kg
- lubricating oil: 0.000118412 kg; name m_lubricating_oil; lognormal variance with pedigree 0.0206, pedigree (4,4,4,5,1)
  Literature value; sample from Germany
  property dry mass 1 kg; name DM_oil
  properties: heating value, net 40.2 MJ, wet mass 1 kg, carbon content, fossil 0.75
  note on heating value, net: Literature value, Source: IPCC 2006, 2006 IPCC Guidelines for National Greenhouse Gas Inventories, Prepared by the National Greenhouse Gas Inventories Programme, Eggleston H.S., Buendia L., Miwa K., Ngara T. and Tanabe K. (eds). Published: IGES, Japan
  note on carbon content, fossil: Lubricating oil is produced from diesel. C-content/dry mass of fats and oils considered 75%, from: ecoinvent v2.2 report, n 15a, pg 40
- synthetic rubber: 2.01763e-5 kg; name m_rubber; lognormal variance with pedigree 0.2106, pedigree (5,5,5,5,5)
  Literature value; sample from Germany
  property carbon content, fossil 0.871949; name C_content_fossil_rubber
  properties: heating value, net 26.42 MJ, wet mass 1 kg, dry mass 1 kg
  note on carbon content, fossil: EPDM (Ethylene-propene-diene terpolymer) rubber is a terpolymer of ethylene, propene, and a diene with the residual unsaturated portion of the diene in the side chain (ecoinvent v2.2 report 7-part XX & Ullmann). Chemical formula (deduced from Evidences of Solvent-Induced Miscibility in Polychloroprene-co-Ethylene-Propene Diene Terpolymer Blends, Dubey et al., Journal of Applied Polymer Science, 2009, 111:1884-1891): C20H35
- diesel, burned in building machine: 0.0256091 MJ; lognormal variance with pedigree 0.0446, pedigree (1,4,5,5,1)
  Literature value; sample from Germany
  properties: heating value, net 1 MJ
- furnace, wood chips, with silo, 300kW: 4.84163e-9 unit; = 2.31E-08*wood_fuel/1.33333; lognormal variance with pedigree 0.0106, pedigree (1,1,4,5,1)
  Infrastructure factor from DS "Heat, district or industrial, other than natural gas {CH}| heat production, wood chips from industry, at furnace 5000kW | Cut-off, U", multiplied by the input of wood fuel (direct wood fuel plus production residues); correction for assumed efficiency as original value refers to heat output
- waste rubber, unspecified: -2.01763e-5 kg; name w_rubber; = (m_rubber)*-1; lognormal variance with pedigree 0.203, pedigree (4,5,5,5,5)
  calculated from rubber input
  production volume 12200 kg; = w_rubber*CLT_pv
    Calculated from production volume of reference product using the relative outputs.
  property dry mass 1 kg; name w_rubber_DM
  property price 0 EUR2005; name w_rubber_price_EUR2005
  properties: heating value, net 27.19 MJ, wet mass 1 kg, carbon content, fossil 0.853
  note on heating value, net: Value taken from the general comment of the treatment dataset.
- electricity, medium voltage: 0 kWh; pedigree (1,1,1,1,1)
  Literature value; sample from Germany
- municipal solid waste: 0 kg; name w_MSW; pedigree (1,1,1,1,1)
  Literature value; sample form Germany
  Uncertainty: a
  production volume 0 kg
    Calculated from production volume of reference product using the relative outputs.
  properties: dry mass 0.771 kg, carbon content, fossil 0.171549, wet mass 1 kg, heating value, net 11.74 MJ, carbon content, non-fossil 0.261655, water content 0.297017
  note on carbon content, fossil: MSW composition in tab 4.1, ecoinvent v2.2 report 13_I. C content referred to 1 kg DM
- waste mineral oil: -0.000118412 kg; name w_mineral_oil; = (m_lubricating_oil/DM_oil)*-1; lognormal variance with pedigree 0.0362, pedigree (2,3,4,5,1)
  hydraulic oil and engine oil/grease; adjusted for water content of waste oil
  production volume 71600 kg; = w_mineral_oil*CLT_pv
    Calculated from production volume of reference product using the relative outputs.
  property price 0 EUR2005; name w_mineral_oil_price_EUR2005
  properties: wet mass 1 kg, carbon content, fossil 0.864444, heating value, net 34.7 MJ, dry mass 0.9 kg, water content 0.111111
  note on carbon content, fossil: Tab A.6, ecoinvent v2.2 report 13_I. C content has been calculated after data in the tables, and then referred to 1 kg DM
- polyurethane adhesive: 0.00118114 kg; lognormal variance with pedigree 0.0112, pedigree (1,3,4,5,1)
  part of glueing system (inventoried as averaged production average in Europe)
  properties: carbon content, fossil 0.72, dry mass 1 kg, wet mass 1 kg, heating value, net 30.67 MJ
- tap water: 0 kg; name m_tapwater; pedigree (1,1,1,1,1)
  Literature value; sample from Germany
  properties: water content 2962.17, carbon content, fossil 0.00178991, dry mass 0.000337476 kg, wet mass 1 kg
  note on carbon content, fossil: Bicarbonate content is 2.93 mol/m3. CO2 content is 0.1 mol/m3 (ecoinvent v2.2 report 8, Tab 93.1).
- sawnwood, board, softwood, raw, dried (u=10%): 0.000315875 m3; lognormal variance with pedigree 0.0112, pedigree (2,1,4,5,1)
  Literature value; sample from Germany
  property wet mass 418.67 kg; name WM
  property dry mass 418.176 kg; name basic_wood_d
  property water content 0.00118132; name water_content
  property water in wet mass 0.494 kg; name WWM
  properties: heating value, net 5700.67 MJ, carbon content, non-fossil 0.494
  note on heating value, net: Assumed equal to "sawnwood, softwood, dried (u=10%), planed".The property is based on a value of 13.38MJ/kg
- wood ash mixture, pure: -0.000177434 kg; name w_wood_ash; = (0.000666666666666667*wood_fuel/1.05)*-1; lognormal variance with pedigree 0.0356, pedigree (1,3,4,5,1)
  Amount derived from DS "Heat, district or industrial, other than natural gas {CH}| heat production, wood chips from industry, at furnace 300kW | Cut-off, U" on heat generation from industrial residual wood per MJ, multiplied by the input of wood fuel (direct wood fuel plus production residues ) scaled to reflect wood input per generated heat
  production volume 312477 kg; = w_wood_ash*CLT_pv
    Calculated from production volume of reference product using the relative outputs.
  property price 0 EUR2005; name w_wood_ash_price_EUR2005
  properties: wet mass 1 kg, dry mass 1 kg, carbon content, non-fossil 0.012
- sawlog and veneer log, softwood, measured as solid wood under bark: 9.97493e-7, 0.000208373 m3 (2 entries); lognormal variance with pedigree 0.0112, pedigree (2,1,4,5,1)
  Literature value; sample from Germany
- electricity, medium voltage: 0.000424333, 8.13688e-5, 0.00136601, 0.0198674, 0.00280032, 0.00912388 kWh (6 entries); lognormal variance with pedigree 0.0446, pedigree (1,4,5,5,1)
  Literature value; sample from Germany
- municipal solid waste: -2.02977e-7, -5.1145e-8, -7.30893e-8, -0.000143553 kg (4 entries); lognormal variance with pedigree 0.1562, pedigree (2,3,4,5,5)
  Literature value; sample form Germany
  Uncertainty: a
  production volume 87000 kg
- tap water: 0.000458174, 5.51519e-5, 9.11476e-5, 0.00229838, 5.97918e-5, 0.000170077, 0.0263015 kg (7 entries); lognormal variance with pedigree 0.0118, pedigree (2,3,4,5,1)
  Literature value; sample from Germany

## Inputs from nature
- Carbon dioxide, non-fossil, resource correction [natural resource, in air]: 1.53684 kg; pedigree (1,1,1,1,1)
  This exchange has been added after economic allocation in order to re-balance the non-fossil carbon dioxide resource extraction.
- Water, cooling, unspecified natural origin [natural resource, in water]: 8.43006e-6 m3; name water_cooling_UNO_input; lognormal variance with pedigree 0.0446, pedigree (1,4,5,5,1)
  Literature value; sample from Germany

## Emissions to nature
- Water [air, unspecified]: 5.044e-5 m3; = 0.00006*wood_fuel/1.33333+m_tapwater/1000+water_cooling_UNO_input; lognormal variance with pedigree 0.132, pedigree (4,4,5,5,4)
  Water emissions from the combustion of the wood (emission per MJ, scaled to wood input and extrapolated from wood input to heat generated) plus tap water input plus input of cooling water
- Cadmium [air, unspecified]: 1.95621e-10 kg; = 9.33333333333334E-10*wood_fuel/1.33333; lognormal variance with pedigree 0.6932, pedigree (2,3,5,5,1)
  Emission factor from DS "Heat, district or industrial, other than natural gas {CH}| heat production, wood chips from industry, at furnace 300kW | Cut-off, U" on heat generation from industrial residual wood per MJ, multiplied by the input of wood fuel (direct wood fuel plus production residues ) scaled to reflect wood input per generated heat.
- Nickel [air, unspecified]: 1.67676e-9 kg; name nickel; = 0.000000008*wood_fuel/1.33333; lognormal variance with pedigree 0.6932, pedigree (2,3,5,5,1)
  (same comment as for Cadmium)
- Dioxins, measured as 2,3,7,8-tetrachlorodibenzo-p-dioxin [air, unspecified]: 8.66324e-15 kg; = 4.13333333333333E-14*wood_fuel/1.33333; lognormal variance with pedigree 0.3432, pedigree (2,3,5,5,1)
  (same comment as for Cadmium)
- Benzene, hexachloro- [air, unspecified]: 2.01211e-15 kg; = 9.60000000000001E-15*wood_fuel/1.33333; lognormal variance with pedigree 0.0832, pedigree (2,3,5,5,1)
  (same comment as for Cadmium)
- Nitrogen oxides [air, unspecified]: 5.03027e-5 kg; = 0.00024*wood_fuel/1.33333; lognormal variance with pedigree 0.0832, pedigree (2,3,5,5,1)
  (same comment as for Cadmium)
- Benzo(a)pyrene [air, unspecified]: 1.3973e-10 kg; = 6.66666666666667E-10*wood_fuel/1.33333; lognormal variance with pedigree 0.3432, pedigree (2,3,5,5,1)
  (same comment as for Cadmium)
- PAH, polycyclic aromatic hydrocarbons [air, unspecified]: 3.102e-9 kg; name pah; = 0.0000000148*wood_fuel/1.33333; lognormal variance with pedigree 0.3432, pedigree (2,3,5,5,1)
  (same comment as for Cadmium)
- Chlorine [air, unspecified]: 5.03027e-8 kg; = 0.00000024*wood_fuel/1.33333; lognormal variance with pedigree 0.6932, pedigree (2,3,5,5,1)
  (same comment as for Cadmium)
- Particulates, < 2.5 um [air, unspecified]: 2.51513e-5 kg; = 0.00012*wood_fuel/1.33333; lognormal variance with pedigree 0.3432, pedigree (2,3,5,5,1)
  (same comment as for Cadmium)
- Phosphorus [air, unspecified]: 8.38378e-8 kg; = 0.0000004*wood_fuel/1.33333; lognormal variance with pedigree 0.0832, pedigree (2,3,5,5,1)
  (same comment as for Cadmium)
- Acetaldehyde [air, unspecified]: 1.7047e-8 kg; = 8.13333333333333E-08*wood_fuel/1.33333; lognormal variance with pedigree 0.0832, pedigree (2,3,5,5,1)
  (same comment as for Cadmium)
- Fluorine [air, unspecified]: 1.3973e-8 kg; = 6.66666666666667E-08*wood_fuel/1.33333; lognormal variance with pedigree 0.0832, pedigree (2,3,5,5,1)
  (same comment as for Cadmium)
- m-Xylene [air, unspecified]: 3.35351e-8 kg; name mxylene; = 0.00000016*wood_fuel/1.33333; lognormal variance with pedigree 0.0832, pedigree (2,3,5,5,1)
  (same comment as for Cadmium)
- Bromine [air, unspecified]: 1.67676e-8 kg; = 0.00000008*wood_fuel/1.33333; lognormal variance with pedigree 0.6932, pedigree (2,3,5,5,1)
  (same comment as for Cadmium)
- Chromium [air, unspecified]: 1.10666e-9 kg; = 5.28000000000001E-09*wood_fuel/1.33333; lognormal variance with pedigree 0.6932, pedigree (2,3,5,5,1)
  (same comment as for Cadmium)
- NMVOC, non-methane volatile organic compounds, unspecified origin [air, unspecified]: 1.95621e-6 kg; name nmvoc; = 9.33333333333334E-06*wood_fuel/1.33333; lognormal variance with pedigree 0.0832, pedigree (2,3,5,5,1)
  (same comment as for Cadmium)
- Sodium [air, unspecified]: 3.63297e-7 kg; = 1.73333333333334E-06*wood_fuel/1.33333; lognormal variance with pedigree 0.6932, pedigree (2,3,5,5,1)
  (same comment as for Cadmium)
- Mercury [air, unspecified]: 8.38378e-11 kg; name mercury; = 0.0000000004*wood_fuel/1.33333; lognormal variance with pedigree 0.6932, pedigree (2,3,5,5,1)
  (same comment as for Cadmium)
- Phenol, pentachloro- [air, unspecified]: 2.26362e-12 kg; = 0.0000000000108*wood_fuel/1.33333; lognormal variance with pedigree 0.0832, pedigree (2,3,5,5,1)
  (same comment as for Cadmium)
- Arsenic [air, unspecified]: 2.79459e-10 kg; = 1.33333333333333E-09*wood_fuel/1.33333; lognormal variance with pedigree 0.6932, pedigree (2,3,5,5,1)
  (same comment as for Cadmium)
- Carbon monoxide, non-fossil [air, unspecified]: 0.00013973 kg; = 0.000666666666666667*wood_fuel/1.33333; lognormal variance with pedigree 0.6932, pedigree (2,3,5,5,1)
  (same comment as for Cadmium)
- Potassium [air, unspecified]: 6.53935e-6 kg; = 0.0000312*wood_fuel/1.33333; lognormal variance with pedigree 0.0832, pedigree (2,3,5,5,1)
  (same comment as for Cadmium)
- Particulates, > 2.5 um, and < 10um [air, unspecified]: 2.51513e-5 kg; = 0.00012*wood_fuel/1.33333; lognormal variance with pedigree 0.1632, pedigree (2,3,5,5,1)
  (same comment as for Cadmium)
- Formaldehyde [air, unspecified]: 2.01262e-6 kg; = 1.73333333333334E-07*wood_fuel/1.33333+0.005975; lognormal variance with pedigree 0.1632, pedigree (2,3,5,5,1)
  Emission factor from DS "Heat, district or industrial, other than natural gas {CH}| heat production, wood chips from industry, at furnace 300kW | Cut-off, U" on heat generation from industrial residual wood per MJ, multiplied by the input of wood fuel (direct wood fuel plus production residues ) scaled to reflect wood input per generated heat plus estimated emissions from wood and glue drying processes (according to Rüter & Diederichs 2012).
- Zinc [air, unspecified]: 8.38378e-8 kg; = 0.0000004*wood_fuel/1.33333; lognormal variance with pedigree 0.6932, pedigree (2,3,5,5,1)
  (same comment as for Cadmium)
- Hydrocarbons, aliphatic, unsaturated [air, unspecified]: 8.66324e-7 kg; = 4.13333333333333E-06*wood_fuel/1.33333; lognormal variance with pedigree 0.0832, pedigree (2,3,5,5,1)
  (same comment as for Cadmium)
- Dinitrogen monoxide [air, unspecified]: 6.98648e-7 kg; = 3.33333333333334E-06*wood_fuel/1.33333; lognormal variance with pedigree 0.0832, pedigree (2,3,5,5,1)
  (same comment as for Cadmium)
- Lead [air, unspecified]: 6.98648e-9 kg; = 3.33333333333333E-08*wood_fuel/1.33333; lognormal variance with pedigree 0.6932, pedigree (2,3,5,5,1)
  (same comment as for Cadmium)
- Carbon dioxide, non-fossil [air, unspecified]: 0.0299021 kg; = 0.142666666666666*wood_fuel/1.33333; lognormal variance with pedigree 0.0438, pedigree (2,3,5,5,1)
  (same comment as for Cadmium)
- Copper [air, unspecified]: 6.1481e-9 kg; = 2.93333333333334E-08*wood_fuel/1.33333; lognormal variance with pedigree 0.6932, pedigree (2,3,5,5,1)
  (same comment as for Cadmium)
- Magnesium [air, unspecified]: 1.00605e-7 kg; name magnesium; = 0.00000048*wood_fuel/1.33333; lognormal variance with pedigree 0.6932, pedigree (2,3,5,5,1)
  (same comment as for Cadmium)
- Benzene, ethyl- [air, unspecified]: 8.38378e-9 kg; = 0.00000004*wood_fuel/1.33333; lognormal variance with pedigree 0.0832, pedigree (2,3,5,5,1)
  (same comment as for Cadmium)
- Ammonia [air, unspecified]: 4.83464e-7 kg; = 2.30666666666667E-06*wood_fuel/1.33333; lognormal variance with pedigree 0.0832, pedigree (2,3,5,5,1)
  (same comment as for Cadmium)
- Chromium VI [air, unspecified]: 1.11784e-11 kg; = 5.33333333333334E-11*wood_fuel/1.33333; lognormal variance with pedigree 0.6932, pedigree (2,3,5,5,1)
  (same comment as for Cadmium)
- Toluene [air, unspecified]: 8.38378e-8 kg; = 0.0000004*wood_fuel/1.33333; lognormal variance with pedigree 0.0832, pedigree (2,3,5,5,1)
  (same comment as for Cadmium)
- Manganese [air, unspecified]: 4.75081e-8 kg; name manganese; = 2.26666666666667E-07*wood_fuel/1.33333; lognormal variance with pedigree 0.6932, pedigree (2,3,5,5,1)
  (same comment as for Cadmium)
- Acetone [air, unspecified]: 5.59314e-5 kg; lognormal variance with pedigree 0.2106, pedigree (2,5,5,5,4)
  Estimation: emissions from PUR adhesives
  Uncertainty: e
- Sulfur dioxide [air, unspecified]: 6.98648e-7 kg; = 3.33333333333334E-06*wood_fuel/1.33333; lognormal variance with pedigree 0.0438, pedigree (2,3,5,5,1)
  (same comment as for Cadmium)
- Benzene [air, unspecified]: 2.54308e-7 kg; = 1.21333333333333E-06*wood_fuel/1.33333; lognormal variance with pedigree 0.0832, pedigree (2,3,5,5,1)
  (same comment as for Cadmium)
- Calcium [air, unspecified]: 1.63484e-6 kg; = 0.0000078*wood_fuel/1.33333; lognormal variance with pedigree 0.6932, pedigree (2,3,5,5,1)
  (same comment as for Cadmium)
- Methane, non-fossil [air, unspecified]: 1.25757e-6 kg; = 0.000006*wood_fuel/1.33333; lognormal variance with pedigree 0.0832, pedigree (2,3,5,5,1)
  (same comment as for Cadmium)
- Hydrocarbons, aliphatic, alkanes, unspecified [air, unspecified]: 2.54308e-7 kg; = 1.21333333333333E-06*wood_fuel/1.33333; lognormal variance with pedigree 0.0832, pedigree (2,3,5,5,1)
  (same comment as for Cadmium)

## Sampling procedure
Literature; emissions profile per MJ wood input from PSI (2014)

## Extrapolations
See Geography and Technology
