# municipal waste collection service by 21 metric ton lorry

Dataset: EcoSpold 2, unit process
Geography: CH
Time period: 1991-01-01 to 2021-12-31
Technology level: current
Classification: EcoSpold01Categories: waste management/others
Classification: ISIC rev.4 ecoinvent: 3811:Collection of non-hazardous waste
Scenario: Business-as-Usual
System model: Allocation, cut-off by classification
Generated by: Gabor Doka (obsolete)
Published in: Doka G. 2007
Database: ecoinvent
isCopyrightProtected: true
accessRestrictedTo: 1

## General comment
based on a vehicle lifetime of 540'000 vehicle-kilometers

## Included activities end
Diesel fuel consumption, air emissions from fuel combustion for Stop&Go driving, tyre abrasion, brake lining abrasion, road abrasion and re-suspended road dust.

## Geography
Fuel consumption and uncertainty derived from literature values for settlement structure in Swiss and German municipalities.

## Technology
Waste collection and hydraulic compression vehicle. Gross load capactity 8.2 tons. Load factor 50%. Average load 4.1 tons. Emissions extrapolated from data for lorry 16t class (ecoinvent 2000 report No. 14). Adaptations for air emissions to Stop&Go driving from average driving emission factors.

## Reference product
- municipal waste collection service by 21 metric ton lorry: 1 metric ton*km; By-product classification allocatable product; CPC 94231: General waste collection services, residential
  EcoSpold01Location=CH
  production volume 0.0336675 metric ton*km
    This is a placeholder value that does not reflect real-world production volumes. This dataset does not currently require a real-world production volume to work in the database framework, and no actual data were collected yet. This has no negative effect on the results of the ecoinvent database. The placeholder value of this activity was scaled according to the nominal GDP of 2005 (source: United Nations, http://data.un.org/Glossary.aspx?q=GDP+%28current+US%24%29, accessed 20130726) to reflect an appropriate share of the global production volume, which is also a placeholder value.
  property price 0.142645 EUR2005
    Calculated based on inputs: The price of the product has been calculated as a sum of the values of the material and energy inputs for this product. This value is therefore a rough estimation. It may underestimate the real price since there are additional expenses when producing any product. These expences can include for example labour costs, treatment of waste materials and profit for the producer. Please consider carefully whether this level of data quality is acceptable for your application.

## Inputs from technosphere
- road: 0.000641 m*year; lognormal variance with pedigree 0.042, pedigree (3,1,5,1,1)
  Road infrastructure maintenance.
  EcoSpold01Location=CH
  Uncertainty: basic uncertainty of 1
- waste collection lorry, 21 metric ton: 4.52e-7 unit; lognormal variance with pedigree 0.042, pedigree (3,1,5,1,1)
  EcoSpold01Location=CH
  Lorry infrastructure.
- diesel: 0.336 kg; lognormal variance with pedigree 0.05, pedigree (1,1,5,1,1)
  EcoSpold01Location=CH
  literature average for various Swiss and German municipalities. uncertainty from range in literature data
  properties: dry mass 1 kg, wet mass 1 kg, carbon content, fossil 0.865, heating value, net 42.8 MJ
  note on carbon content, fossil: C-content of diesel is 86.5% (ecoinvent v2.2 report 6_IV, Tab 3.14)

## Emissions to nature
- Benzene [air, urban air close to ground]: 6.77e-5 kg; lognormal variance with pedigree 0.0806, pedigree (2,1,5,1,1)
  Fuel emissions for stop&go operation.. data from environmental agency
  Uncertainty: basic uncertainty of 1.5. data from environmental agency
- Sulfur dioxide [air, urban air close to ground]: 0.000202 kg; lognormal variance with pedigree 0.0406, pedigree (2,1,5,1,1)
  Fuel emissions.. data from published expert estimate
  Uncertainty: basic uncertainty of 1.05. data from published expert estimate
- Dinitrogen monoxide [air, urban air close to ground]: 5.25e-5 kg; lognormal variance with pedigree 0.0806, pedigree (2,1,5,1,1)
  Fuel emissions.. data from environmental agency
  Uncertainty: basic uncertainty of 1.5. data from environmental agency
- Particulates, > 10 um [air, urban air close to ground]: 0.000175 kg; lognormal variance with pedigree 0.180025, pedigree (3,5,5,2,1)
  Fuel emissions for stop&go operation, abrasion of tyres, brake lining, road surface and road dust re-emission.. data from environmental agency
  Uncertainty: basic uncertainty of 2. data from environmental agency
- Toluene [air, urban air close to ground]: 2.71e-5 kg; lognormal variance with pedigree 0.0806, pedigree (2,1,5,1,1)
  Fuel emissions for stop&go operation.. data from published expert estimate
  Uncertainty: basic uncertainty of 1.5. data from published expert estimate
- Chromium [air, urban air close to ground]: 1.69e-8 kg; lognormal variance with pedigree 0.716025, pedigree (4,5,5,2,1)
  Fuel emissions. data from published expert estimate
  Uncertainty: basic uncertainty of 5. data from published expert estimate
- Selenium [air, urban air close to ground]: 3.36e-9 kg; lognormal variance with pedigree 0.716025, pedigree (4,5,5,2,1)
  (same comment as for Chromium)
- NMVOC, non-methane volatile organic compounds, unspecified origin [air, urban air close to ground]: 0.00345 kg; lognormal variance with pedigree 0.0806, pedigree (2,1,5,1,1)
  (same comment as for Benzene)
- Ammonia [air, urban air close to ground]: 7.95e-6 kg; lognormal variance with pedigree 0.0806, pedigree (2,1,5,1,1)
  (same comment as for Dinitrogen monoxide)
- Lead [air, urban air close to ground]: 4.87e-9 kg; lognormal variance with pedigree 0.716025, pedigree (4,5,5,2,1)
  Tyre abrasion. data from published expert estimate
  Uncertainty: basic uncertainty of 5. data from published expert estimate
- Nickel [air, urban air close to ground]: 2.35e-8 kg; lognormal variance with pedigree 0.716025, pedigree (4,5,5,2,1)
  (same comment as for Chromium)
- Particulates, > 2.5 um, and < 10um [air, urban air close to ground]: 0.000105 kg; lognormal variance with pedigree 0.162625, pedigree (3,3,5,2,1)
  (same comment as for Particulates, > 10 um)
- Methane, fossil [air, urban air close to ground]: 8.46e-5 kg; lognormal variance with pedigree 0.0806, pedigree (2,1,5,1,1)
  (same comment as for Benzene)
- Carbon dioxide, fossil [air, urban air close to ground]: 1.06 kg; lognormal variance with pedigree 0.0406, pedigree (2,1,5,1,1)
  Fuel emissions.. data from environmental agency
  Uncertainty: basic uncertainty of 1.05. data from environmental agency
- Copper [air, urban air close to ground]: 5.71e-7 kg; lognormal variance with pedigree 0.716025, pedigree (4,5,5,2,1)
  (same comment as for Chromium)
- Particulates, < 2.5 um [air, urban air close to ground]: 0.000615 kg; lognormal variance with pedigree 0.1607, pedigree (2,2,5,1,1)
  (same comment as for Particulates, > 10 um)
- Zinc [air, urban air close to ground]: 3.33e-6 kg; lognormal variance with pedigree 0.716025, pedigree (4,5,5,2,1)
  Fuel emissions and tyre abrasion. data from published expert estimate
  Uncertainty: basic uncertainty of 5. data from published expert estimate
- Carbon monoxide, fossil [air, urban air close to ground]: 0.00273 kg; lognormal variance with pedigree 0.6906, pedigree (2,1,5,1,1)
  Fuel emissions for stop&go operation. data from environmental agency
  Uncertainty: basic uncertainty of 5. data from environmental agency
- Cadmium [air, urban air close to ground]: 4.48e-9 kg; lognormal variance with pedigree 0.716025, pedigree (4,5,5,2,1)
  (same comment as for Zinc)
- Nitrogen oxides [air, urban air close to ground]: 0.00758 kg; lognormal variance with pedigree 0.0806, pedigree (2,1,5,1,1)
  (same comment as for Benzene)
- Xylene [air, urban air close to ground]: 2.71e-5 kg; lognormal variance with pedigree 0.0806, pedigree (2,1,5,1,1)
  (same comment as for Toluene)

## Sampling procedure
fuel consumption from specific literature data. Rest extrapolated from lorry 16t class (ecoinvent report No. 14).

## Extrapolations
This dataset has been extrapolated from year 1996 to the year of the calculation (2021). The uncertainty has been adjusted accordingly.

## Review by Niels Jungbluth 2005-07-19
Passed.

## Review by Bo Weidema 2012-06-28
road infrastructure corrected
