# natural gas, burned in gas turbine, for compressor station

Dataset: EcoSpold 2, unit process
Geography: CA-AB
Time period: 2010-01-01 to 2021-12-31
Technology level: current
Classification: ISIC rev.4 ecoinvent: 3510:Electric power generation, transmission and distribution
Classification: EcoSpold01Categories: natural gas/power plants
Scenario: Business-as-Usual
System model: Allocation, cut-off by classification
Generated by: Pablo Tirado
Published in: Faist Emmenegger, M. 2007
Database: ecoinvent
isCopyrightProtected: true
accessRestrictedTo: 1

## General comment
This dataset describes the production of electricity from natural gas for a compressor station in Alberta (Canada) in 2010. A part of the natural gas transported by pipeline is used in gas turbines located in compressor stations (along the pipeline route) to produce electricity that compress the gas and enable its transport.
The electricity generated in by this gas turbine is only used by the corresponding natural market activity (through a direct link), so it does not contribute to the electricity market.The dataset is an adaptation of the dataset describing the average burning of gas for a compressor station in Germany in 1990-2000 period.

Main emissions have been adapted using local data provided by the Canadian Association of Petroleum Producers.

## Included activities start
This activity starts at the reception of the natural gas in the turbine

## Included activities end
The activity ends with the production of electricity.
The activity includes fuel input, infrastructure, and emissions to air.

## Geography
Infrastructure, amount of gas and some emissions derived from german dataset.
The uncertainty has been adjusted accordingly.

## Technology
For infrastructure, a 10MWe gas turbine was assumed. Technology and emissions data corresponding to 2000 technologies. Uncertainty has been adjusted accordingly.

## Reference product
- electricity, medium voltage: 1 kWh; CPC 17100: Electrical energy; By-product classification allocatable product
  EcoSpold01Location=DE
  production volume 1.88036e8 kWh; = (37643285000+10177689000)* 2e-5*0.092*2137
    Total natural gas produced is assumed as transported:
    Annual gas combined production: 37643285000 m3
    Annual gas independent production: 10177689000 m3
    Km of pipeline: 2137 km (pipelines licensed by the National Energy Board)
    Natural gas used as fuel for compressors: 2e-5m3/m3 per Km transported
    Kwh/m3= 0,092
  property price 0.1 EUR2005
    Calculated to be between the price of electricity, high voltage and electricity, low voltage.
  properties: Corresponding fuel use 1 MJ

## Inputs from technosphere
- gas turbine, 10MW electrical: 1.25e-9 unit; lognormal variance with pedigree 0.18, pedigree (3,5,5,5,3)
  EcoSpold01Location=RER
  Estimated value. As german dataset (uncertainty of lifetime)
  property Corresponding fuel use 3.01404 MJ; name FuelUseTurbine; = (amountGas* NHVNaturalGas)/(3.6*0.092)
- natural gas, high pressure: 0.298913 m3; name amountGas; lognormal variance with pedigree 0.0606, pedigree (3,5,5,5,3)
  EcoSpold01Location=DE
  Estimated value. As german dataset
  property heating value, net 36.3 MJ; name NHVNaturalGas

## Emissions to nature
- Sulfur dioxide [air, urban air close to ground]: 5.97826e-6 kg; lognormal variance with pedigree 0.1, pedigree (3,5,5,5,3)
  Estimated value. As german dataset (composition of natural gas)
  Uncertainty: Variance from default table. DQP adapted considering the original source of data
- Mercury [air, urban air close to ground]: 1.63043e-9 kg; lognormal variance with pedigree 0.71, pedigree (3,5,5,5,3)
  Estimated value. As german dataset (basic uncertainty for heavy metal; trace element in natural gas)
  Uncertainty: DQP adapted considering the original source of data
- Carbon monoxide, fossil [air, urban air close to ground]: 0.00160588 kg; = 0.000148* amountGas* NHVNaturalGas; source Canadian Association of Petroleum Produc 2004; lognormal variance with pedigree 0.3501, pedigree (3,2,5,1,3)
  Measured value. Amount per MJ burned. Data for 2010
  Source: Canadian Association of Petroleum producers
  Uncertainty: DQP adapted considering the original source of data
- NMVOC, non-methane volatile organic compounds, unspecified origin [air, urban air close to ground]: 0.00181204 kg; = .000167* amountGas* NHVNaturalGas; source Canadian Association of Petroleum Produc 2004; lognormal variance with pedigree 0.7001, pedigree (3,2,5,1,3)
  (same comment as for Carbon monoxide, fossil)
- Carbon dioxide, fossil [air, urban air close to ground]: 0.130207 kg; = .012* amountGas* NHVNaturalGas; source Canadian Association of Petroleum Produc 2004; lognormal variance with pedigree 0.0507, pedigree (3,2,5,1,3)
  Measured value. Amount per MJ burned. Data for 2010
  Source: Canadian Association of Petroleum producers
  Uncertainty: Variance from default table. DQP adapted considering the original source of data
- Nitrogen oxides [air, urban air close to ground]: 0.00185544 kg; = .000171* amountGas* NHVNaturalGas; source Canadian Association of Petroleum Produc 2004; lognormal variance with pedigree 0.3501, pedigree (3,2,5,1,3)
  (same comment as for Carbon monoxide, fossil)
- Methane, fossil [air, urban air close to ground]: 0.000271264 kg; = 2.5e-5* amountGas* NHVNaturalGas; source Canadian Association of Petroleum Produc 2004; lognormal variance with pedigree 0.7001, pedigree (3,2,5,1,3)
  Measured value. Amount per MJ burned. Data for 2010
  Source: Canadian Association of Petroleum producers
- Dioxins, measured as 2,3,7,8-tetrachlorodibenzo-p-dioxin [air, urban air close to ground]: 0 kg; pedigree (1,1,1,1,1)
  Estimated value. As german dataset (rough estimate, high uncertainty)
  Uncertainty: DQP adapted considering the original source of data
- Dinitrogen monoxide [air, urban air close to ground]: 1.25866e-5 kg; = 1.16e-6* amountGas* NHVNaturalGas; source Canadian Association of Petroleum Produc 2004; lognormal variance with pedigree 0.3501, pedigree (3,2,5,1,3)
  (same comment as for Carbon monoxide, fossil)

## Sampling procedure
Literature

## Extrapolations
This dataset has been extrapolated from year 2010 to the year of the calculation (2021). The uncertainty has been adjusted accordingly.

## Review by Emilia Moreno Ruiz 2015-09-17
broken formula fixed

## Review by Christian Bauer 2014-02-28
These datasets were thoroughfully reviewed and comply with the Data Quality Guidelines.
