# ventilation system production, central, 1 x 720 m3/h, polyethylene ducts, with earth tube heat exchanger

Dataset: EcoSpold 2, unit process
Geography: RoW
Time period: 2003-01-01 to 2021-12-31
Technology level: current
Classification: ISIC rev.4 ecoinvent: 4322:Plumbing, heat and air-conditioning installation
Classification: EcoSpold01Categories: ventilation/ventilation systems
Tags: ConvertedDataset
Scenario: Business-as-Usual
System model: Allocation, cut-off by classification
Generated by: Alex Primas
Published in: Hässig, W. 2007
Database: ecoinvent
isCopyrightProtected: true
accessRestrictedTo: 1

## General comment
Ventilation system for a multi family house. The house considered in the investigation includes 6 flats with 130 m2 floor area each and a ventilation rate of 120 m3/h. The influence of a smaller concrete demand due to embedment of ventilation tubes in the concrete of the floor (-4.86 kg concrete per m2 floor area) is not included.
[This dataset was already contained in the ecoinvent database version 2. It was not individually updated during the transfer to ecoinvent version 3. Life Cycle Impact Assessment results may still have changed, as they are affected by changes in the supply chain, i.e. in other datasets. This dataset was generated following the ecoinvent quality guidelines for version 2. It may have been subject to central changes described in the ecoinvent version 3 change report (http://www.ecoinvent.org/database/ecoinvent-version-3/reports-of-changes/), and the results of the central updates were reviewed extensively. The changes added e.g. consistent water flows and other information throughout the database. The documentation of this dataset can be found in the ecoinvent reports of version 2, which are still available via the ecoinvent website. The change report linked above covers all central changes that were made during the conversion process.]

## Included activities end
Materials used for the ventilation system. Transport of the components to the construction site. Disposal of the components included. Influence of ventilation ducts on building construction not included. No materials for renwal of components included. Operation of system not included.

## Geography
Data representative for a building in Zurich, Switzerland

## Technology
Central ventilation system including 4 parallel polyethylene ground heat exchanger tubes (200 mm diameter). Air distribution from the central ventilation unit with a galvanised steel tube (400 mm diameter) to the distribution housings in the 6 flats. Distribution of fresh- and exhaust-air within the flat with polyethylene tubes (75 mm diameter). Exhaust air from the air collection housings in the 6 flats with a galvanised steel tube (400 mm diameter) to the central ventilation unit. Exhaust air from the ventilation unit to the outside air with a galvanised steel tube (400 mm diameter).

## Time period
Amount of material investigated in 2003

## Reference product
- ventilation system, central, 1 x 720 m3/h, polyethylene ducts, with earth tube heat exchanger: 1 unit; name vent_sys_RP; CPC 44815: Fans and ventilating or recycling hoods of the domestic type; By-product classification allocatable product
  EcoSpold01Location=CH
  production volume 3.96633 unit; name vent_sys_RP_PV
    This is a placeholder value that does not reflect real-world production volumes. This dataset does not currently require a real-world production volume to work in the database framework, and no actual data were collected yet. This has no negative effect on the results of the ecoinvent database.
  property price 3798.08 EUR2005
    Calculated based on inputs: The price of the product has been calculated as a sum of the values of the material and energy inputs for this product. This value is therefore a rough estimation. It may underestimate the real price since there are additional expenses when producing any product. These expences can include for example labour costs, treatment of waste materials and profit for the producer. Please consider carefully whether this level of data quality is acceptable for your application.

## Inputs from technosphere
- used ventilation control and wiring central unit: -1 unit; name byP_3; lognormal variance with pedigree 0.0446, pedigree (2,4,5,5,1)
  EcoSpold01Location=CH
  Questionnaire, Data related to building considered
  Uncertainty: Questionnaire, Data related to building considered
  production volume 3.96633 unit; = byP_3/ vent_sys_RP* vent_sys_RP_PV
    Calculated from the production volume of ventilation system, central, 1 x 720 m3/h, polyethylene ducts, with earth tube heat exchanger in proportion to the respective output amounts.
  property price 0 EUR2005; name byP_3_price_EUR2005
  properties: carbon content, fossil 0.262305, dry mass 4.8 kg, wet mass 4.8 kg, carbon content, non-fossil 1.68025e-5
- used outside air intake stainless steel, DN 370: -1 unit; name byP_14; lognormal variance with pedigree 0.0446, pedigree (2,4,5,5,1)
  Questionnaire, Data related to building considered
  EcoSpold01Location=CH
  Uncertainty: Questionnaire, Data related to building considered
  production volume 3.96633 unit; = byP_14/ vent_sys_RP* vent_sys_RP_PV
    (same comment as for used ventilation control and wiring central unit)
  property price 0 EUR2005; name byP_14_price_EUR2005
  properties: carbon content, fossil 0.0520342, wet mass 32 kg, dry mass 32 kg
- blower and heat exchange unit, central, 600-1200 m3/h: 1 unit; lognormal variance with pedigree 0.0446, pedigree (2,4,5,5,1)
  EcoSpold01Location=RER
  Questionnaire, Data related to building considered
  Uncertainty: Questionnaire, Data related to building considered
  properties: wet mass 143 kg, carbon content, non-fossil 5.13903e-7, carbon content, fossil 0.00852676, dry mass 143 kg
  note on carbon content, non-fossil: C content was calculated as an addition of C content in the product components
- sealing tape, aluminium/PE, 50 mm wide: 200 m; lognormal variance with pedigree 0.0446, pedigree (2,4,5,5,1)
  Questionnaire, Data related to building considered
  EcoSpold01Location=RER
  Uncertainty: Questionnaire, Data related to building considered
  properties: wet mass 0.057 kg, dry mass 0.057 kg, carbon content, fossil 0.707644
  note on carbon content, fossil: C content calculated as the addition of the C contents in the final product components (Tape made of Polyethylene, laminated with aluminium foil and acrylic glue as adherent layer)
- used exhaust air roof hood steel, DN 400: -1 unit; name byP_1; lognormal variance with pedigree 0.0446, pedigree (2,4,5,5,1)
  (same comment as for used outside air intake stainless steel, DN 370)
  production volume 3.96633 unit; = byP_1/ vent_sys_RP* vent_sys_RP_PV
    (same comment as for used ventilation control and wiring central unit)
  property price 0 EUR2005; name byP_1_price_EUR2005
  properties: dry mass 17 kg, carbon content, fossil 0.00377059, wet mass 17 kg
- used silencer steel, DN 125: -12 unit; name byP_12; lognormal variance with pedigree 0.0446, pedigree (2,4,5,5,1)
  (same comment as for used ventilation control and wiring central unit)
  production volume 47.596 unit; = byP_12/ vent_sys_RP* vent_sys_RP_PV
    (same comment as for used ventilation control and wiring central unit)
  property price 0 EUR2005; name byP_12_price_EUR2005
  properties: dry mass 8.3 kg, carbon content, fossil 0.00483456, wet mass 8.3 kg
- silencer, steel, DN 125: 12 unit; lognormal variance with pedigree 0.0446, pedigree (2,4,5,5,1)
  (same comment as for used ventilation control and wiring central unit)
  properties: wet mass 8.3 kg, carbon content, fossil 0.00483456, dry mass 8.3 kg
- supply air inlet, steel/SS, DN 75: 30 unit; lognormal variance with pedigree 0.0446, pedigree (2,4,5,5,1)
  (same comment as for sealing tape, aluminium/PE, 50 mm wide)
  properties: carbon content, fossil 0.00337682, dry mass 2.2 kg, wet mass 2.2 kg
- used room-connecting overflow element steel, approx. 40 m3/h: -18 unit; name byP_7; lognormal variance with pedigree 0.0446, pedigree (2,4,5,5,1)
  (same comment as for used ventilation control and wiring central unit)
  production volume 71.394 unit; = byP_7/ vent_sys_RP* vent_sys_RP_PV
    (same comment as for used ventilation control and wiring central unit)
  property price 0 EUR2005; name byP_7_price_EUR2005
  properties: wet mass 1.1 kg, dry mass 1.1 kg, carbon content, fossil 0.211386
- used air distribution terminal panel steel, 120 m3/h: -12 unit; name byP_11; lognormal variance with pedigree 0.0446, pedigree (2,4,5,5,1)
  (same comment as for used ventilation control and wiring central unit)
  production volume 47.596 unit; = byP_11/ vent_sys_RP* vent_sys_RP_PV
    (same comment as for used ventilation control and wiring central unit)
  property price 0 EUR2005; name byP_11_price_EUR2005
  properties: dry mass 9.5 kg, wet mass 9.5 kg, carbon content, fossil 0.0166978
- used flexible duct aluminium/PET, DN of 125: -10 m; name byP_4; lognormal variance with pedigree 0.0446, pedigree (2,4,5,5,1)
  (same comment as for used ventilation control and wiring central unit)
  production volume 39.6633 m; = byP_4/ vent_sys_RP* vent_sys_RP_PV
    (same comment as for used ventilation control and wiring central unit)
  property price 0 EUR2005; name byP_4_price_EUR2005
  properties: carbon content, fossil 0.436512, dry mass 0.205 kg, wet mass 0.205 kg
- air filter, in exhaust air valve: 18 unit; lognormal variance with pedigree 0.0446, pedigree (2,4,5,5,1)
  (same comment as for blower and heat exchange unit, central, 600-1200 m3/h)
  properties: dry mass 0.04 kg, wet mass 0.04 kg, carbon content, fossil 0.65625
  note on carbon content, fossil: C content was calculated as an addition of C content in the product components (Mat filter made of polyester fleece). Then, it was referred to 1 kg DM
- used sealing tape aluminium/PE, 50 mm wide: -200 m; name byP_15; lognormal variance with pedigree 0.0446, pedigree (2,4,5,5,1)
  (same comment as for used ventilation control and wiring central unit)
  production volume 793.266 m; = byP_15/ vent_sys_RP* vent_sys_RP_PV
    (same comment as for used ventilation control and wiring central unit)
  property price 0 EUR2005; name byP_15_price_EUR2005
  properties: carbon content, fossil 0.707644, wet mass 0.057 kg, dry mass 0.057 kg
- used insulation spiral-seam duct rockwool, DN 400: -20 m; name byP_16; lognormal variance with pedigree 0.0446, pedigree (2,4,5,5,1)
  (same comment as for used outside air intake stainless steel, DN 370)
  production volume 79.3266 m; = byP_16/ vent_sys_RP* vent_sys_RP_PV
    (same comment as for used ventilation control and wiring central unit)
  property price 0 EUR2005; name byP_16_price_EUR2005
  properties: carbon content, fossil 0.00924113, wet mass 3.3 kg, dry mass 3.3 kg
- insulation spiral-seam duct, rockwool, DN 400, 30 mm: 20 m; lognormal variance with pedigree 0.0446, pedigree (2,4,5,5,1)
  (same comment as for sealing tape, aluminium/PE, 50 mm wide)
  properties: carbon content, fossil 0.00924113, wet mass 3.3 kg, dry mass 3.3 kg
  note on carbon content, fossil: C content calculated as the addition of the C contents in the final product components (Insulation made of rock wool with 0.2 mm aluminium foil cover. Protected with a net made of galvanised steel wire)
- room-connecting overflow element, steel, approx. 40 m3/h: 18 unit; lognormal variance with pedigree 0.0446, pedigree (2,4,5,5,1)
  (same comment as for blower and heat exchange unit, central, 600-1200 m3/h)
  properties: wet mass 1.1 kg, dry mass 1.1 kg, carbon content, fossil 0.211386
- spiral-seam duct, steel, DN 125: 12 m; lognormal variance with pedigree 0.0446, pedigree (2,4,5,5,1)
  (same comment as for sealing tape, aluminium/PE, 50 mm wide)
  properties: dry mass 1.9 kg, carbon content, fossil 0.00377105, wet mass 1.9 kg
  note on carbon content, fossil: Tube made of galvanised steel, 2.6 m electric welded seam per m tube.
- spiral-seam duct, steel, DN 400: 45 m; lognormal variance with pedigree 0.0446, pedigree (2,4,5,5,1)
  (same comment as for blower and heat exchange unit, central, 600-1200 m3/h)
  properties: dry mass 6 kg, wet mass 6 kg, carbon content, fossil 0.00376667
  note on carbon content, fossil: Tube made of galvanised steel, 3.2 m electric welded seam per m tube.
- waste polyethylene/polypropylene product: 0 kg; name byP_9; pedigree (1,1,1,1,1)
  (same comment as for used ventilation control and wiring central unit)
  production volume 0 kg
    (same comment as for used ventilation control and wiring central unit)
  property price 0 EUR2005; name byP_9_price_EUR2005
  properties: dry mass 0.847 kg, wet mass 1 kg, water content 0.180638, carbon content, fossil 0.748045, heating value, net 42.47 MJ
  note on carbon content, fossil: Mixed various plastics was used to estimate the C content of this waste (Tab A.2, ecoinvent v2.2 report 13_I)
- used air filter in exhaust air valve: -18 unit; name byP_6; lognormal variance with pedigree 0.0446, pedigree (2,4,5,5,1)
  (same comment as for used ventilation control and wiring central unit)
  production volume 71.394 unit; = byP_6/ vent_sys_RP* vent_sys_RP_PV
    (same comment as for used ventilation control and wiring central unit)
  property price 0 EUR2005; name byP_6_price_EUR2005
  properties: dry mass 0.04 kg, wet mass 0.04 kg, carbon content, fossil 0.65625
- waste bulk iron, excluding reinforcement: 0 kg; name byP_2; pedigree (1,1,1,1,1)
  (same comment as for used ventilation control and wiring central unit)
  production volume 0 kg
    (same comment as for used ventilation control and wiring central unit)
  property price 0 EUR2005; name byP_2_price_EUR2005
  properties: wet mass 1 kg, dry mass 1 kg
- outside air intake, stainless steel, DN 370: 1 unit; lognormal variance with pedigree 0.0446, pedigree (2,4,5,5,1)
  (same comment as for sealing tape, aluminium/PE, 50 mm wide)
  properties: dry mass 32 kg, wet mass 32 kg, carbon content, fossil 0.0520342
- silencer, steel, DN 315, 50 mm: 2 unit; lognormal variance with pedigree 0.0446, pedigree (2,4,5,5,1)
  (same comment as for used outside air intake stainless steel, DN 370)
  properties: dry mass 20 kg, wet mass 20 kg, carbon content, fossil 0.00451943
- used blower and heat exchange unit central, 600-1200 m3/h: -1 unit; name byP_10; lognormal variance with pedigree 0.0446, pedigree (2,4,5,5,1)
  (same comment as for used ventilation control and wiring central unit)
  production volume 3.96633 unit; = byP_10/ vent_sys_RP* vent_sys_RP_PV
    (same comment as for used ventilation control and wiring central unit)
  property price 0 EUR2005; name byP_10_price_EUR2005
  properties: carbon content, fossil 0.00852676, carbon content, non-fossil 5.13903e-7, dry mass 143 kg, wet mass 143 kg
- air filter, central unit, 600 m3/h: 2 unit; lognormal variance with pedigree 0.0446, pedigree (2,4,5,5,1)
  (same comment as for blower and heat exchange unit, central, 600-1200 m3/h)
  properties: carbon content, fossil 0.085325, dry mass 0.4 kg, wet mass 0.4 kg
  note on carbon content, fossil: C content was calculated as an addition of C content in the product components (Bag filter made of polyester fleece, frame galvanised steel). Then, it was referred to 1 kg DM
- used exhaust air valve in-wall housing, plastic/steel: -18 unit; name byP_8; lognormal variance with pedigree 0.0446, pedigree (2,4,5,5,1)
  (same comment as for used ventilation control and wiring central unit)
  production volume 71.394 unit; = byP_8/ vent_sys_RP* vent_sys_RP_PV
    (same comment as for used ventilation control and wiring central unit)
  property price 0 EUR2005; name byP_8_price_EUR2005
  properties: wet mass 0.5 kg, carbon content, fossil 0.0797702, dry mass 0.5 kg
- polyethylene pipe, DN 200, SDR 41: 120 m; lognormal variance with pedigree 0.0446, pedigree (2,4,5,5,1)
  (same comment as for blower and heat exchange unit, central, 600-1200 m3/h)
  properties: carbon content, fossil 0.857143, heating value, net 127.41 MJ, dry mass 3 kg, wet mass 3 kg
- flexible duct, aluminium/PET, DN of 125: 10 m; lognormal variance with pedigree 0.0446, pedigree (2,4,5,5,1)
  (same comment as for blower and heat exchange unit, central, 600-1200 m3/h)
  properties: dry mass 0.205 kg, wet mass 0.205 kg, carbon content, fossil 0.436512
  note on carbon content, fossil: C content was calculated as an addition of C content in the product components (Flexible tube made of PET, laminated with aluminium foil and strengthened with galvanised steel spiral wire)
- used silencer steel, DN 315: -2 unit; name byP_5; lognormal variance with pedigree 0.0446, pedigree (2,4,5,5,1)
  (same comment as for used ventilation control and wiring central unit)
  production volume 7.93266 unit; = byP_5/ vent_sys_RP* vent_sys_RP_PV
    (same comment as for used ventilation control and wiring central unit)
  property price 0 EUR2005; name byP_5_price_EUR2005
  properties: carbon content, fossil 0.00451943, dry mass 20 kg, wet mass 20 kg
- polyethylene pipe, corrugated, DN 75: 400 m; lognormal variance with pedigree 0.0446, pedigree (2,4,5,5,1)
  (same comment as for sealing tape, aluminium/PE, 50 mm wide)
  properties: heating value, net 14.02 MJ, wet mass 0.33 kg, dry mass 0.33 kg, carbon content, fossil 0.901299
- exhaust air roof hood, steel, DN 400: 1 unit; lognormal variance with pedigree 0.042, pedigree (1,1,5,5,1)
  2,4,1,1,1,nA; Questionnaire, Data related to building considered
  EcoSpold01Location=CH
  properties: dry mass 17 kg, wet mass 17 kg, carbon content, fossil 0.00377059
- exhaust air valve, in-wall housing, plastic/steel, DN 125: 18 unit; lognormal variance with pedigree 0.0446, pedigree (2,4,5,5,1)
  (same comment as for used outside air intake stainless steel, DN 370)
  properties: carbon content, fossil 0.0797702, wet mass 0.5 kg, dry mass 0.5 kg
  note on carbon content, fossil: Exhaust air outlet mounted in room ceiling. Including housing for duct connection. component made of polyvinylchloride and zinc coated steel.
- ventilation control and wiring, central unit: 1 unit; lognormal variance with pedigree 0.0446, pedigree (2,4,5,5,1)
  (same comment as for blower and heat exchange unit, central, 600-1200 m3/h)
  properties: wet mass 4.8 kg, dry mass 4.8 kg, carbon content, fossil 0.262305, carbon content, non-fossil 1.68025e-5
  note on carbon content, fossil: C content was calculated as an addition of C content in the product components, then it was referred to 1 kg DM
- excavation, hydraulic digger: 137 m3; lognormal variance with pedigree 0.062, pedigree (4,4,5,5,1)
  Assumption, Data related to building considered
  EcoSpold01Location=RER
  Uncertainty: Assumption, Data related to building considered
- used air filter central unit, 600 m3/h: -2 unit; name byP_13; lognormal variance with pedigree 0.0446, pedigree (2,4,5,5,1)
  (same comment as for used ventilation control and wiring central unit)
  production volume 7.93266 unit; = byP_13/ vent_sys_RP* vent_sys_RP_PV
    (same comment as for used ventilation control and wiring central unit)
  property price 0 EUR2005; name byP_13_price_EUR2005
  properties: dry mass 0.4 kg, wet mass 0.4 kg, carbon content, fossil 0.085325
- air distribution terminal panel, steel, 120 m3/h: 12 unit; lognormal variance with pedigree 0.0446, pedigree (2,4,5,5,1)
  (same comment as for used ventilation control and wiring central unit)
  properties: wet mass 9.5 kg, dry mass 9.5 kg, carbon content, fossil 0.0166978
  note on carbon content, fossil: C content was calculated as an addition of C content in the product component, and then referred to 1 kg DM
- waste polyethylene/polypropylene product: -139.174, -352.826 kg (2 entries); lognormal variance with pedigree 0.0446, pedigree (2,4,5,5,1)
  (same comment as for used ventilation control and wiring central unit)
  production volume 1951.44 kg
- waste bulk iron, excluding reinforcement: -116.579, -242.421 kg (2 entries); lognormal variance with pedigree 0.0446, pedigree (2,4,5,5,1)
  (same comment as for used ventilation control and wiring central unit)
  production volume 1423.91 kg

## Sampling procedure
Questionnaire and assumptions. Data valid for example building used.

## Extrapolations
none This dataset has been copied from an original dataset covering the geography CH. The uncertainty has been adjusted accordingly.

## Review by Rolf Frischknecht 2007-08-16
passed
none
