# hard coal preparation, coal washing

Dataset: EcoSpold 2, unit process
Geography: ZA
Time period: 2014-01-01 to 2021-12-31
Technology level: current
Classification: ISIC rev.4 ecoinvent: 0510:Mining of hard coal
Classification: EcoSpold01Categories: hard coal/production
Scenario: Business-as-Usual
System model: Allocation, cut-off by classification
Generated by: Philippa Notten
Published in: Notten P.J. 2017
Database: ecoinvent
isCopyrightProtected: true
accessRestrictedTo: 1

## General comment
This dataset represents the production of 1 kg of beneficiated coal in South Africa. Around 66% of South Africa's saleable coal has undergone coal washing, predominantly by dense media separation (SACRM, 2011). The washed coal product supplies both the domestic and export coal market, with many mines producing both a middlings product (often supplied to power generation), and a higher quality product for export. Total production in 2014 amounted to 172 million tonnes (DMR, 2015). This dataset includes the waste coal produced (discard), the land required for its disposal, methane emissions associated with coal preparation and storage, water and magnetite required in washing, and emissions to surface water. Energy use and the land area of the coal preparation plant are not included because disaggregated data was not available for the mining operations. Similarly, where generic mining factors have been used in the mining datasets (e.g. for particulates and infrastructure), these are assumed to include coal preparation.

Reference(s):
SACRM (2011) Overview of South African Coal Value Chain. Available at: http://www.sanedi.org.za/archived/wp-content/uploads/2013/08/sacrm value chain overview.pdf (Accessed: July 2015);
DMR (2015) Mineral Production and Sales and Mining Labour Statistics Tables 1993 - 2014, Department of Mineral Resources. Available at: http://www.dmr.gov.za/ (Accessed: March 2017).
[This dataset is meant to replace the following datasets:]

## Included activities start
Coal preparation (crushing, screening and dense medium washing), starting from hard coal, run-of mine.

## Included activities end
This activity ends with 1 kg hard coal (useable output) at the coal preparation facility. This dataset includes coal waste produced and land used for coal waste disposal, magnetite and water used in coal washing, and emissions to water, Energy use and land for the coal preparation plant are not included in this dataset as they are included in the mining datasets (they were not able to be disaggregated from the mining data). Particulates are similarly not included because the generic value applied in the mining datasets is assumed to include coal preparation..

## Geography
Coal preparation efficiency is representative of coal mining in South Africa as a whole, with the land requirements for disposal, and other coal washing inputs (water and magnetite) extrapolated from collieries mining the Witbank, Highveld and Waterberg coalfields in South Africa. Infrastructure requriements are generic (not South African specific). Rehabilitation of the mine dumps post closure is not included.

## Technology
This dataset is representative of coal beneficiation in South Africa (crushing, screening and dense medium washing), The dataset is an average over a number of mines, and thus is not representative of single- or multi-stage washing, but rather represents an average. A coal preparation efficiency of 70% is applied. This value is representative of South Africa as a whole as it is derived from

## Time period
2014 is chosen as a base year because this is the latest year for which coal production and yield data were available (i.e. the most recent government statistics on coal mining). The industry data on which the dataset is based is somewhat earlier than 2014 (mid 2000 to 2010), but expert opinion consulted is that mining operations have not changed much over this time, thus it made sense to use the most recent production data. The water balance data used in the dataset is older (2001), and expert opinion is used to adjust for efficiency improvements, so that water consumption and emissions are represenative of 2014.

## Parameters
- coal preparation efficiency: 0.7 dimensionless; name prep_efficiency
  An overall coal preparation yield of 70% is applied, resulting in 440 kg coal waste per tonne coal beneficiated (in the form of discard and fines slurry). Total coal waste is derived from the overall yield for the coal mining industry in 2014 (77%) (DMR, 2015) and an assumed yield of 98% for coal undergoing crushing and destoning only. The derived value aligns with available industry data (average value of SACRM mine data sample is 73%, with a range from 54%-80%).
  Reference(s): Department of Minerals and Resources (2015) South Africa's Mineral Industry (SAMI) 2014/2015. Pretoria; The South African Coal Roadmap (SACRM) (2011). Overview of the South African Coal Value Chain. http://www.sanedi.org.za/archived/wp-content/uploads/2013/08/sacrm%20value%20chain%20overview.pdf; DMR (2001) National Inventory Discard and Duff Coal - 2--1 Summary Report, Department of Mineral resources of South Africa Available at: http://www.energy.gov.za/Coal/coal_discard_report.pdf. (Accessed August 2017).

## Reference product
- hard coal: 1 kg; name hard_coal; CPC 11010: Hard coal; By-product classification allocatable product
  This dataset represents the production of 1 kg of beneficiated coal in South Africa. Around 66% of South Africa's saleable coal has undergone coal washing, predominantly by dense media separation (SACRM, 2011). The washed coal product supplies both the domestic and export coal market, with many mines producing both a middlings product (often supplied to power generation), and a higher quality product for export. Total production in 2014 amounted to 172 million tonnes (DMR, 2015).
  EcoSpold01Location=ZA
  production volume 1.718e11 kg; name pv_crushed_coal
    Total production of saleable coal that had undergone washing amounted to 172 million tonnes in 2014 (total production volume and overall coal preparation efficiency from DMR, 2015, with percentage of coal undergoing washing, as well as crushing yield from SACRM, 2011). Reference(s): SACRM (2011) Overview of South African Coal Value Chain. Available at: http://www.sanedi.org.za/archived/wp-content/uploads/2013/08/sacrm value chain overview.pdf (Accessed: July 2015); DMR (2015) Mineral Production and Sales and Mining Labour Statistics Tables 1993 - 2014, Department of Mineral Resources. Available at: http://www.dmr.gov.za/ (Accessed: March 2017).
  property heating value, net 27.91 MJ
    Based on the Characterization factor of Hard coal in the CED method
  property price 0.036 EUR2005; name hard_coal_price_EUR2005
    Steam coal import costs in EU in IEA key world energy statistics 2003-2004.
  property carbon content, fossil 0.56
    C content 75-94% (specified in Tab 1.1, report 6, part VI). A mean content of 0.845 kg C/ kg dry hard coal was considered
  property carbon content 0.56
    carbon content on a dry matter basis (reserved; not for manual entry)
  properties: water content 0.0869565, dry mass 0.92 kg, carbon content, non-fossil 0, water in wet mass 0.08 kg, wet mass 1 kg, ash content 0.12 kg, sulfur content 0.007, carbon allocation 0.5152 kg

## Inputs from technosphere
- spoil from hard coal mining: -0.342857 kg; name discard; = ((hard_coal*(hard_coal/prep_efficiency-1))*0.8)*-1; lognormal variance with pedigree 0.0721, pedigree (3,2,5,1,1)
  An overall coal preparation yield of 70% is applied, resulting in 440 kg coal waste per tonne coal beneficiated and assuming 80% is in the form of discard (with the balance as fines slurry). Total coal waste is derived from the overall yield for the coal mining industry in 2014 (77%) (DMR, 2015) and an assumed yield of 98% for coal undergoing crushing and destoning only. The derived value aligns with available industry data (average value of SACRM mine data sample is 73%, with a range from 54%-80%). The estimate of 80% of total waste reporting as discard is according to a national inventory of discard and duff coal in South Africa in 2001. Reference(s): Department of Minerals and Resources (2015) South Africa's Mineral Industry (SAMI) 2014/2015. Pretoria; The South African Coal Roadmap (SACRM) (2011). Overview of the South African Coal Value Chain. http://www.sanedi.org.za/archived/wp-content/uploads/2013/08/sacrm%20value%20chain%20overview.pdf; DMR (2001) National Inventory Discard and Duff Coal - 2--1 Summary Report, Department of Mineral resources of South Africa Available at: http://www.energy.gov.za/Coal/coal_discard_report.pdf. (Accessed August 2017).
  EcoSpold01Location=GLO
  Uncertainty: Variance based on variation in washing efficiency (mine data sample)
  production volume 5.89029e10 kg; = pv_crushed_coal*discard
    Calculated from the production volume of hard coal in proportion to the respective output amounts.
  property price 0 EUR2005; name discard_price_EUR2005
  properties: water content 0.111111, wet mass 1 kg, dry mass 0.9 kg, carbon content, fossil 0.007879
  note on carbon content, fossil: Composition of coal spoil is adopted by proxy from lignite spoil (pg 19, Doka G. (2009) Life Cycle Inventory of the disposal of lignite spoil, coal spoil and coal tailings. Doka Life Cycle Assessments, Zurich. Commissioned by the Swiss Centre for Life Cycle Inventories ecoinvent Centre)
- magnetite: 0.000983 kg; lognormal variance with pedigree 0.0412, pedigree (1,3,5,1,1)
  Average magnetite consumption across five coal washing facilities (industry data)
  properties: wet mass 1 kg, dry mass 1 kg
- coal slurry: -0.0857143 kg; name slurry; = ((hard_coal*(hard_coal/prep_efficiency-1))*0.2)*-1; lognormal variance with pedigree 0.0727, pedigree (3,2,5,1,2)
  EcoSpold01Location=GLO
  Weight of coal discard in slurry (excluding weight of water). Rough estimate using old data source (DMR, 2001) reporting that 20% of total coal waste produced nationally is in the form of fines slurry. According to a national inventory of discard and duff coal in South Africa in 2001, 4-6% of coal beneficiated ends up as fines slurry. Reference: DMR (2001) National Inventory Discard and Duff Coal - 2--1 Summary Report, Department of Mineral resources of South Africa Available at: http://www.energy.gov.za/Coal/coal_discard_report.pdf. (Accessed August 2017).
  Uncertainty: Variance based on variation in washing efficiency (mine data sample)
  production volume 1.47257e10 kg; = pv_crushed_coal*slurry
    (same comment as for spoil from hard coal mining)
  property price 0 EUR2005; name slurry_price_EUR2005
  properties: dry mass 0.85 kg, water content 0.176471, carbon content, fossil 0.124, wet mass 1 kg
  note on carbon content, fossil: Coal tailings composition in Tab 3.4, (Doka G. (2009) Life Cycle Inventory of the disposal of lignite spoil, coal spoil and coal tailings. Doka Life Cycle Assessments, Zurich. Commissioned by the Swiss Centre for Life Cycle Inventories ecoinvent Centre)
- tap water: 0.0357 kg; name tap_water_input; lognormal variance with pedigree 0.3426, pedigree (3,3,5,1,1)
  EcoSpold01Location=RER
  Water purchased from water boards is assumed to be potable water. Total water use in coal washing is assumed to be 150 litres/tonne ROM, with12% of this purchased water. A slightly lower water use value is applied than that in Pulles et al. (2001) (which has an average value of 217 litres/tonne ROM from a sample of 32 mines) to account for improvements in coal dewatering since 2001 (Johan de Korte, 2017). ReferencesThe sources of water on the mines is also obtained from Pullles et al. (2001), with the 12% purchased figure obtained from an average of 41 mines. Water figures are adjusted to exclude water for human consumption.References: Pulles, W., Boer, R. & Nel, S. 2001. A Generic Water Balance for the South African Coal Mining Industry. Water
  Research Commission Report No. 801/1/01.; Johan de Korte, Senior Researcher, Council for Scientific and Industrial Research (CSIR), telephonic interview, 7 June 2017.
  Uncertainty: Variance derived from range in mine data sample.
  properties: wet mass 1 kg, water content 2962.17, dry mass 0.000337476 kg, carbon content, fossil 0.00178991
  note on carbon content, fossil: Bicarbonate content is 2.93 mol/m3. CO2 content is 0.1 mol/m3 (ecoinvent v2.2 report 8, Tab 93.1).
- hard coal, run-of-mine: 0.414286 kg; = (hard_coal/prep_efficiency)*0.29; lognormal variance with pedigree 0.0721, pedigree (3,2,5,1,1)
  Coal supply from surface truck and shovel mines. An overall coal preparation yield of 70% is applied, resulting in 440 kg coal waste per tonne coal product. The washing yield is derived from the overall yield for the coal mining industry in 2014 (77%) (DMR, 2015) and an assumed yield of 98% for coal undergoing crushing and destoning only. The derived value aligns with available industry data (average coal preparation yield of SACRM mine data sample is 73%, ranging from 54%-80%). Using a combination of DMR (2015) and SACMR (2011) production statistics, coal supply to coal preparation that includes washing is as follows: 18% from underground mining, 53% for surface, dragline, and 29% from surface, truck and shovel. Reference(s): Department of Minerals and Resources (2015) South Africa's Mineral Industry (SAMI) 2014/2015. Pretoria; The South African Coal Roadmap (SACRM) (2011). Overview of the South African Coal Value Chain. http://www.sanedi.org.za/archived/wp-content/uploads/2013/08/sacrm%20value%20chain%20overview.pdf.
  Uncertainty: Variance based on variation in washing efficiency (mine data sample)
  properties: heating value, net 27.91 MJ, wet mass 1 kg, dry mass 0.998 kg, water content 0.00200401, carbon content, fossil 0.47
  note on heating value, net: Based on the Characterization factor of Hard coal in the CED method
- hard coal, run-of-mine: 0.257143 kg; = (hard_coal/prep_efficiency)*0.18; lognormal variance with pedigree 0.0721, pedigree (3,2,5,1,1)
  Coal supply fom underground mines. An overall coal preparation yield of 70% is applied, resulting in 440 kg coal waste per tonne coal product. The washing yield is derived from the overall yield for the coal mining industry in 2014 (77%) (DMR, 2015) and an assumed yield of 98% for coal undergoing crushing and destoning only. The derived value aligns with available industry data (average coal preparation yield of SACRM mine data sample is 73%, ranging from 54%-80%). Using a combination of DMR (2015) and SACMR (2011) production statistics, coal supply to coal preparation that includes washing is as follows: 18% from underground mining, 53% for surface, dragline, and 29% from surface, truck and shovel. Reference(s): Department of Minerals and Resources (2015) South Africa's Mineral Industry (SAMI) 2014/2015. Pretoria; The South African Coal Roadmap (SACRM) (2011). Overview of the South African Coal Value Chain. http://www.sanedi.org.za/archived/wp-content/uploads/2013/08/sacrm%20value%20chain%20overview.pdf.
  Uncertainty: Variance based on variation in washing efficiency (mine data sample)
  properties: dry mass 0.998 kg, heating value, net 27.91 MJ, wet mass 1 kg, water content 0.00200401
- hard coal, run-of-mine: 0.757143 kg; = (hard_coal/prep_efficiency)*0.53; lognormal variance with pedigree 0.0721, pedigree (3,2,5,1,1)
  Coal supply from surface dragline mines. An overall coal preparation yield of 70% is applied, resulting in 440 kg coal waste per tonne coal product. The washing yield is derived from the overall yield for the coal mining industry in 2014 (77%) (DMR, 2015) and an assumed yield of 98% for coal undergoing crushing and destoning only. The derived value aligns with available industry data (average coal preparation yield of SACRM mine data sample is 73%, ranging from 54%-80%). Using a combination of DMR (2015) and SACMR (2011) production statistics, coal supply to coal preparation that includes washing is as follows: 18% from underground mining, 53% for surface, dragline, and 29% from surface, truck and shovel. Reference(s): Department of Minerals and Resources (2015) South Africa's Mineral Industry (SAMI) 2014/2015. Pretoria; The South African Coal Roadmap (SACRM) (2011). Overview of the South African Coal Value Chain. http://www.sanedi.org.za/archived/wp-content/uploads/2013/08/sacrm%20value%20chain%20overview.pdf.
  Uncertainty: Variance based on variation in washing efficiency (mine data sample)
  properties: heating value, net 27.91 MJ, water content 0.002004, dry mass 0.998 kg, carbon content, fossil 0.47, wet mass 1 kg

## Inputs from nature
- Water, unspecified natural origin [natural resource, in water]: 4.7e-5 m3; name water_unspecified; lognormal variance with pedigree 0.2426, pedigree (3,3,5,1,1)
  The share of water inputs from rain as well as that for which the source is not known is included in the dataset under "unspecified natural origin". The value are taken from Pulles et al. (2001), in which a sample of 41 mines found that, on average, the origin of 13% of water inputs were not known/specified and 3% of water input was from rain ingress.Total water use by coal washing is taken to be 150 litres/tonne ROM, A slightly lower value is applied than that in Pulles et al. (2001) (which has an average value of 217 litres/tonne ROM from a sample of 32 mines) to account for improvements in coal dewatering since 2001 (Johan de Korte, 2017). References: Pulles, W., Boer, R. & Nel, S. 2001. A Generic Water Balance for the South African Coal Mining Industry. Water Research Commission Report No. 801/1/01.; Johan de Korte, Senior Researcher, Council for Scientific and Industrial Research (CSIR), telephonic interview, 7 June 2017.
  Uncertainty: Basic variance derived from range in data (maximum and mean value)
- Water, well, in ground [natural resource, in water]: 0.00011 m3; name water_well_in_ground_input; lognormal variance with pedigree 0.3426, pedigree (3,3,5,1,1)
  Average share of water used in coal washing filled by groundwater taken from Pulles et al. (2001), in which a sample of 41 mines found that groundwater supplied 39% of the water used on the mine. Total water use by coal washing is taken to be 150 litres/tonne ROM, A slightly lower value is applied than that in Pulles et al. (2001) (which has an average value of 217 litres/tonne ROM from a sample of 32 mines) to account for improvements in coal dewatering since 2001 (Johan de Korte, 2017). References: Pulles, W., Boer, R. & Nel, S. 2001. A Generic Water Balance for the South African Coal Mining Industry. Water Research Commission Report No. 801/1/01.; Johan de Korte, Senior Researcher, Council for Scientific and Industrial Research (CSIR), telephonic interview, 7 June 2017.
  Uncertainty: Basic variance derived from range in data (maximum and mean value)
- Water, river [natural resource, in water]: 9.2e-5 m3; name water_river; lognormal variance with pedigree 0.2426, pedigree (3,3,5,1,1)
  Average share of water used in coal washing filled by water extracted from rivers from Pulles et al. (2001), in which a sample of 41 mines found that river water supplied 32% of the water used on the mine. Total water use by coal washing is taken to be 150 litres/tonne ROM, A slightly lower value is applied than that in Pulles et al. (2001) (which has an average value of 217 litres/tonne ROM from a sample of 32 mines) to account for improvements in coal dewatering since 2001 (Johan de Korte, 2017). References: Pulles, W., Boer, R. & Nel, S. 2001. A Generic Water Balance for the South African Coal Mining Industry. Water Research Commission Report No. 801/1/01.; Johan de Korte, Senior Researcher, Council for Scientific and Industrial Research (CSIR), telephonic interview, 7 June 2017.
  Uncertainty: Basic variance derived from range in data (maximum and mean value)
- Transformation, from grassland, natural, for livestock grazing [natural resource, land]: 2.4e-5 m2; lognormal variance with pedigree 0.1526, pedigree (3,3,5,1,1)
  Total land transformed for mineral extraction activities at 10 collieries in South Africa, assuming constant coal production over a 30 year mine life (industry data), with 20% of land use designated as coal and spoil disposal areas. Value derived from three coal mines that had washing plants and provided disaggregated land use data, with the percentage share of total area taken up by discard and spoil disposal (inluding slurry dams, where relevant) ranging from 12% to 39%. Coal mines fall predominantly in the grasslands regions of South Africa, thus this is chosen as the default.
  Uncertainty: Variance derived from range in mine data sample.
- Transformation, to dump site [natural resource, land]: 2.4e-5 m2; name discard_area; lognormal variance with pedigree 0.1526, pedigree (3,3,5,1,1)
  Total land transformed for mineral extraction activities at 10 collieries in South Africa, assuming constant coal production over a 30 year mine life (industry data), with 20% of land use designated as coal and spoil disposal areas. Value derived from three coal mines that had washing plants and provided disaggregated land use data, with the percentage share of total area taken up by discard and spoil disposal (inluding slurry dams, where relevant) ranging from 12% to 39%.
  Uncertainty: Variance derived from range in mine data sample.
- Occupation, dump site [natural resource, land]: 0.018 m2*year; = discard_area*30*25; lognormal variance with pedigree 0.1526, pedigree (3,3,5,1,1)
  Assumes active dump area lifetime of 30 years and revegetation time of 25 years. A relatively long time is chosen as dumps present the greatest challenge to rehabilitation of coal mines.
  Uncertainty: Variance derived from range in mine data sample.

## Emissions to nature
- Calcium, ion [water, surface water]: 1.8e-5 kg; lognormal variance with pedigree 0.254, pedigree (3,4,5,1,1)
  Approximate value, calculated from concentration in representative sample of effluent multiplied by estimate of volume of water discharged to rivers (industry data).
  Uncertainty: Basic variance taken from variability in underlying water flow.
- Dissolved solids [water, surface water]: 8.1e-5 kg; lognormal variance with pedigree 0.254, pedigree (3,4,5,1,1)
  Approximate value, calculated from TDS value in representative sample of efluent multiplied by estimate of water discharged to rivers (industry data).
  Uncertainty: Basic variance taken from variability in underlying water flow.
- Potassium [water, ground-]: 6.1e-7 kg; lognormal variance with pedigree 0.344, pedigree (3,4,5,1,1)
  Approximate value, calculated from concentration in representative sample of mining effluent (dirty storage dam) multiplied by estimate of water loss through seepage (industry data). Most likely an overestimate as unspecified water outtputs are assumed to be seepage losses. Calculation also does not allow for attenuation in soils.
  Uncertainty: Basic variance taken from variability in underlying water flow.
- Chloride [water, surface water]: 1.3e-6 kg; lognormal variance with pedigree 0.254, pedigree (3,4,5,1,1)
  (same comment as for Calcium, ion)
- Water [water, surface water]: 6.2634e-5 m3; = (tap_water_input/1000+water_well_in_ground_input+water_river+water_unspecified)*0.22; lognormal variance with pedigree 0.2526, pedigree (3,3,5,1,1)
  Calculated value, assuming 22% of water output is as a result of discharge to surface water bodies. Share of water loss is taken from Pulles et al. (2001). Total water use by washing is assumed to be 150 litres/tonne ROM, A lower value is applied than in Pulles et al. (2001) (which has an average value of 217 litres/tonne ROM from a sample of 32 mines) to account for improvements in coal dewatering since 2001 (Johan de Korte, 2017). References: Pulles, W., Boer, R. & Nel, S. 2001. A Generic Water Balance for the South African Coal Mining Industry. Water Research Commission Report No. 801/1/01.; Johan de Korte, Senior Researcher, Council for Scientific and Industrial Research (CSIR), telephonic interview, 7 June 2017.
  Uncertainty: Basic variance derived from range in data (maximum and mean value)
- Magnesium [water, surface water]: 1e-5 kg; lognormal variance with pedigree 0.254, pedigree (3,4,5,1,1)
  (same comment as for Calcium, ion)
- Fluoride [water, surface water]: 4.6e-8 kg; lognormal variance with pedigree 0.254, pedigree (3,4,5,1,1)
  (same comment as for Calcium, ion)
- Sodium, ion [water, surface water]: 8.4e-6 kg; lognormal variance with pedigree 0.254, pedigree (3,4,5,1,1)
  (same comment as for Calcium, ion)
- Methane, fossil [air, non-urban air or from high stacks]: 2.16e-5 kg; source DEA (RSA) 2014; lognormal variance with pedigree 0.168, pedigree (4,1,5,1,1)
  Emission factor taken from South Africa's National GHG Inventory for post-mining coal handling and storage (0.18 m3/tonne, underground mine). Emission factor is for underground coal only, with surface coal given an emission factor of 0. The emissions are therefore adjusted for the percenatge of coal undergoing washing supplied from surface mines. Reference: Department of Environment (2014) GHG NATIONAL INVENTORY REPORT SOUTH AFRICA 2000 -2010, November 2014. http://unfccc.int/resource/docs/natc/zafnir1.pdf
- Manganese [water, surface water]: 4.5e-8 kg; lognormal variance with pedigree 0.694, pedigree (3,4,5,1,1)
  Approximate value, calculated from concentration in representative sample of effluent multiplied by estimate of volume of water discharged to rivers (industry data).
- Carbon dioxide, fossil [air, non-urban air or from high stacks]: 6.32e-6 kg; source DEA (RSA) 2014; lognormal variance with pedigree 0.168, pedigree (4,1,5,1,1)
  Emission factor for low temperature oxidation of coal taken from South Africa's National GHG Inventory for post-mining coal handling and storage (0.18 m3/tonne, underground mine). Emission factor is for underground coal only, with surface coal given an emission factor of 0. The emissions are therefore adjusted for the percenatge of coal undergoing washing supplied from surface mines. Reference: Department of Environment (2014) GHG NATIONAL INVENTORY REPORT SOUTH AFRICA 2000 -2010, November 2014. http://unfccc.int/resource/docs/natc/zafnir1.pdf
- Sulfate [water, surface water]: 2.5e-5 kg; lognormal variance with pedigree 0.254, pedigree (3,4,5,1,1)
  (same comment as for Calcium, ion)
- Water [air, unspecified]: 3.7011e-5 m3; name water_to_air_unspecified; = (tap_water_input/1000+water_well_in_ground_input+water_river+water_unspecified)*0.13; lognormal variance with pedigree 0.8826, pedigree (3,3,5,1,1)
  Calculated value, assuming 13% of water loss is as a result of evaporation. Share of water loss to evaporation is taken from Pulles et al. (2001). Total water use by washing is assumed to be 150 litres/tonne ROM, A slightly lower value is applied than in Pulles et al. (2001) (which has an average value of 217 litres/tonne ROM from a sample of 32 mines) to account for improvements in coal dewatering since 2001 (Johan de Korte, 2017). References: Pulles, W., Boer, R. & Nel, S. 2001. A Generic Water Balance for the South African Coal Mining Industry. Water Research Commission Report No. 801/1/01.; Johan de Korte, Senior Researcher, Council for Scientific and Industrial Research (CSIR), telephonic interview, 7 June 2017.
  Uncertainty: Basic variance derived from range in data (maximum and mean value)
  property fraction, origin: salt water 0; name fraction_origin_salt_water
  property fraction, origin: fresh water 1; name fraction_origin_fresh_water
  property fraction, origin: unspecified 0; name fraction_origin_unspecified

## Sampling procedure
Production volume is from DMR (2015), with the percentage of coal undergoing beneficiation from SACRM (2011). An average coal washing yield is calculated from the overall coal preparation effiency for South Africa (77% in 2014, from DMR (2015)) and an assumed crushing yield of 98%. Methane emissions are calculated using post-mining emission factors derived for South Africa's national GHG reporting (DEA, 2014). Land use for dump areas are from three mines with washing plants (ranging from simple to extensive). Water required for coal washing is from a water balance project for South Africa (Pulles et al., 2001) References: Department of Minerals and Resources (2015) South Africa's Mineral Industry (SAMI) 2014/2015. Pretoria; DEA (2014) GHG NATIONAL INVENTORY REPORT SOUTH AFRICA 2000 -2010, November 2014. http://unfccc.int/resource/docs/natc/zafnir1.pdf (accessed September 2017); Pulles, W., Boer, R. & Nel, S. 2001. A Generic Water Balance for the South African Coal Mining Industry. Water
Research Commission Report No. 801/1/01; SACRM (2011) Overview of South African Coal Value Chain. Available at: http://www.sanedi.org.za/archived/wp-content/uploads/2013/08/sacrm value chain overview.pdf (Accessed: July 2015).

## Extrapolations
This dataset has been extrapolated from year 2014 to the year of the calculation (2021). The uncertainty has been adjusted accordingly.

## Review by Christian Bauer 2017-11-23
passed
