# gas power plant construction, 100MW electrical

Dataset: EcoSpold 2, unit process
Geography: RER
Time period: 1990-01-01 to 2021-12-31
Technology level: current
Classification: ISIC rev.4 ecoinvent: 4220:Construction of utility projects
Classification: EcoSpold01Categories: natural gas/power plants
Tags: ConvertedDataset
Scenario: Business-as-Usual
System model: Allocation, cut-off by classification
Generated by: Thomas Heck
Published in: Faist Emmenegger, M. 2007
Database: ecoinvent
isCopyrightProtected: true
accessRestrictedTo: 1

## General comment
Average gas power plant 100 MWe.
[This dataset was already contained in the ecoinvent database version 2. It was not individually updated during the transfer to ecoinvent version 3. Life Cycle Impact Assessment results may still have changed, as they are affected by changes in the supply chain, i.e. in other datasets. This dataset was generated following the ecoinvent quality guidelines for version 2. It may have been subject to central changes described in the ecoinvent version 3 change report (http://www.ecoinvent.org/database/ecoinvent-version-3/reports-of-changes/), and the results of the central updates were reviewed extensively. The changes added e.g. consistent water flows and other information throughout the database. The documentation of this dataset can be found in the ecoinvent reports of version 2, which are still available via the ecoinvent website. The change report linked above covers all central changes that were made during the conversion process.]

## Included activities end
The module includes the most important materials used for construction. It includes also the energy requirements for construction; transport is implicitly included in energy consumption. (Life time for operation assumed 180'000 h.)

## Geography
Average conditions for European plants.

## Technology
Average installed gas power plant

## Reference product
- gas power plant, 100MW electrical: 1 unit; By-product classification allocatable product; CPC 53262: Power plants
  EcoSpold01Location=RER
  production volume 1.32237 unit
    This is a placeholder value that does not reflect real-world production volumes. This dataset does not currently require a real-world production volume to work in the database framework, and no actual data were collected yet. This has no negative effect on the results of the ecoinvent database. The placeholder value of this activity was scaled according to the nominal GDP of 2005 (source: United Nations, http://data.un.org/Glossary.aspx?q=GDP+%28current+US%24%29, accessed 20130726) to reflect an appropriate share of the global production volume, which is also a placeholder value.
  property price 7.56994e7 EUR2005
    Literature values. Value taken from "Updated Capital Cost Estimates for Utility Scale Electricity Generating Plants" EIA (2013) (retrived from http://www.eia.gov/forecasts/capitalcost/pdf/updated_capcost.pdf, accessed 20151215) estimated for overnight plant cost. EIA (2013) estimates for 2012 prices are based on a plant with nominal capacity of 85 MW and an overnight capital cost of 973 USD/kW.

## Inputs from technosphere
- aluminium, cast alloy: 24000 kg; = 75000*0.32; lognormal variance with pedigree 0.34, pedigree (1,1,5,1,1)
  basic uncertainty
  property water in wet mass 0 kg; name WWM
  property carbon content, fossil 0; name C_content_fossil
  property water content 0; name water_content
  property carbon content, non-fossil 0; name C_content_non_fossil
  properties: dry mass 1 kg, wet mass 1 kg
- stone wool, packed: 150000 kg; lognormal variance with pedigree 0.34, pedigree (1,1,5,1,1)
  EcoSpold01Location=CH
  basic uncertainty
  properties: wet mass 1 kg, dry mass 1 kg, carbon content, fossil 0.015401
  note on carbon content, fossil: The chemical composition of the glass fibres used in the rock wool production is similar to the composition of naturally cooled volcano basalt and has a composition listed in Tab. 3.1 and 3.2 in ecoinvent v2.2 report 16, part XIV. Rock wool contains: a minimum of 96% mineral fibres,between 0.5 and 3.0 weight percent of phenolic resin depending on the specific product characteristics, and about 0.2 percent mineral oil (ecoinvent v2.2 report 16, part XIV). An average composition of 1.8% phenolic resin, 0.2% mineral oil, and 98% mineral fibres has been assumed and used to calculate C content of the rock wool
- polyethylene, low density, granulate: 150000 kg; lognormal variance with pedigree 0.34, pedigree (1,1,5,1,1)
  EcoSpold01Location=RER
  basic uncertainty
  properties: wet mass 1 kg, carbon content, fossil 0.857143, heating value, net 42.47 MJ, dry mass 1 kg
  note on carbon content, fossil: Polyethylene is formed out of a huge amount of ethylene monomers (C2H4) (ecoinvent v2.2 report 11_II). MW=28 g/mol
- electricity, medium voltage: 236000 kWh; lognormal variance with pedigree 0.61, pedigree (1,1,5,1,1)
  EcoSpold01Location=UCTE
  uncertainty of amount of material and of energy needed
- aluminium, wrought alloy: 51000 kg; = 75000*0.68; lognormal variance with pedigree 0.34, pedigree (1,1,5,1,1)
  basic uncertainty
  properties: wet mass 1 kg, dry mass 1 kg
- heat, district or industrial, other than natural gas: 1.102e7 MJ; lognormal variance with pedigree 0.61, pedigree (1,1,5,1,1)
  EcoSpold01Location=RER
  uncertainty of amount of material and of energy needed
  properties: heating value, net 1 MJ
- diesel, burned in building machine: 1.16e7 MJ; lognormal variance with pedigree 0.61, pedigree (1,1,5,1,1)
  uncertainty of amount of material and of energy needed
  EcoSpold01Location=GLO
  properties: heating value, net 1 MJ
- concrete, normal: 1820 m3; lognormal variance with pedigree 0.34, pedigree (1,1,5,1,1)
  basic uncertainty
  EcoSpold01Location=CH
  properties: dry mass 2190 kg, wet mass 2380 kg, water content 0.086758
- copper, cathode: 75000 kg; lognormal variance with pedigree 0.34, pedigree (1,1,5,1,1)
  basic uncertainty
  EcoSpold01Location=RER
  properties: wet mass 1 kg, dry mass 1 kg
- reinforcing steel: 550000 kg; lognormal variance with pedigree 0.34, pedigree (1,1,5,1,1)
  basic uncertainty
  EcoSpold01Location=RER
  properties: dry mass 1 kg, wet mass 1 kg, carbon content, fossil 0.004

## Inputs from nature
- Occupation, industrial area [natural resource, land]: 720000 m2*year; lognormal variance with pedigree 0.52, pedigree (1,1,5,1,1)
  uncertainty of land use and life time
- Transformation, from unspecified [natural resource, land]: 20000 m2; lognormal variance with pedigree 0.34, pedigree (1,1,5,1,1)
  estimated from range of values in literature
- Transformation, to industrial area [natural resource, land]: 20000 m2; lognormal variance with pedigree 0.34, pedigree (1,1,5,1,1)
  estimated from range of values in literature

## Sampling procedure
Literature

## Extrapolations
This dataset has been extrapolated from year 2000 to the year of the calculation (2021). The uncertainty has been adjusted accordingly.

## Review by Michael Spielmann (obsolete) 2003-07-08
passed.
