# bus production

Dataset: EcoSpold 2, unit process
Geography: RER
Time period: 1998-01-01 to 2021-12-31
Technology level: current
Classification: EcoSpold01Categories: transport systems/road
Classification: ISIC rev.4 ecoinvent: 2910:Manufacture of motor vehicles
Scenario: Business-as-Usual
System model: Allocation, cut-off by classification
Generated by: Michael Spielmann (obsolete)
Published in: Spielmann M. 2004
Database: ecoinvent
isCopyrightProtected: true
accessRestrictedTo: 1

## General comment
The dataset represents the production of one bus (material composition, energy consumption and emissions of the manufacturing). The disposal of bus is included too.

## Included activities start
The dataset starts with the material used for the production of the bus.

## Included activities end
The dataset ends with the production of a bus. The dataset includes the material used for the production, the energy consumption of the building machines, the water consumption, the airborne emissions and until and including the emissions to water, as well as the vehicle disposal.

## Geography
Vehicle manufacturing data are taken from one production site in Germany.

## Technology
Current production technology, environmental issues have been addressed in the past.

## Time period
The material composition of the modelled bus in this research is based on the material composition of a Volvo bus, (available from product declaration Volvo Truck Corporation (2004)). Energy expenditures for stationary combustion processes are available from environmental reports of a
German lorry manufacturer MAN Nutzfahrzeuge AG (2000) and MAN Nutzfahrzeuge AG (2000).
References:
Volvo Truck Corporation (2004) Environmental product declaration: Volvo 8500 Low-Entry. Download of March from http://www.volvo.com/bus/global/engb/
volvogroup/core+values/environment/downloads.htm.
MAN Nutzfahrzeuge AG (2000) Umwelterklärung 1999. MAN Nutzfahrzeuge AG, München
MAN Nutzfahrzeuge AG (2002) Umwelterklärung 2002. MAN Nutzfahrzeuge AG, München

## Parameters
- fraction, process water, to air: 0.15 dimensionless; name fraction_PW_to_air; lognormal variance with pedigree 0.092025, pedigree (4,4,3,2,4)
  Literature value. In case when no industry/process specific data are available, default evaporation fraction value is used. This value is 15% and is based on literature (Statistics Canada, 2007 & Shaffer, K.H., 2008, Consumptive water use in the Great Lakes Basin, USGS & Shiklomanov, 2003, World Water Resources at the Beginning of the 21st Century) and has been approved by an expert.
- fraction, tap water, to air: 0.15 dimensionless; name fraction_TW_to_air; = fraction_PW_to_air; lognormal variance with pedigree 0.092025, pedigree (4,4,3,2,4)
  Calculated value. See comment in the other parametres present in this dataset. Tap water is considered to be always used as process water, thus process water fractions to air are applied to all tap water input flows to calculate the amount of water consumed in the processes.

## Reference product
- bus: 1 unit; name RP_amount_1; CPC 49112: Public-transport type passenger motor vehicles; By-product classification allocatable product
  EcoSpold01Location=RER
  production volume 1.32237 unit; name RP_PV_1
    This is a placeholder value that does not reflect real-world production volumes. This dataset does not currently require a real-world production volume to work in the database framework, and no actual data were collected yet. This has no negative effect on the results of the ecoinvent database. The placeholder value of this activity was scaled according to the nominal GDP of 2005 (source: United Nations, http://data.un.org/Glossary.aspx?q=GDP+%28current+US%24%29, accessed 20130726) to reflect an appropriate share of the global production volume, which is also a placeholder value.
  property price 78493 EUR2005
    UNdata (Average import and export data for EU-27; 8.195EUR/kg ). Diesel power buses (http://data.un.org/Data.aspx?q=diesel+powered+bus&d=ComTrade&f=_l1Code%3a87%3bcmdCode%3a870210).The total weight is about 12100 kg (Source: Existing ecoinvent documentation from ecoinvent v.2.2. From information in the dataset bus production.)

## Inputs from technosphere
- diesel: 167 kg; source MAN Nutzfahrzeuge AG 2000; lognormal variance with pedigree 0.34, pedigree (1,1,5,1,1)
  EcoSpold01Location=RER
  Literature value. Diesel is used for engine testing and the operation of fork-lifters. The latter is modeled as building machine. Energy expenditures for stationary combustion processes are available from environmental reports of a German lorry manufacturer MAN Nutzfahrzeuge AG (2000) and MAN Nutzfahrzeuge AG (2002). The data is available for various manufacturing sites performing different tasks in the manufacturing chain. The total value used in this study comprises stamping processes, metal part and wiring harness manufacturing, engine production and testing as well as the final assembly.
  Additional references:
  MAN Nutzfahrzeuge AG (2002) Umwelterklärung 2002. MAN Nutzfahrzeuge AG, München.
  properties: carbon content, fossil 0.865, dry mass 1 kg, wet mass 1 kg, heating value, net 42.8 MJ
  note on carbon content, fossil: C-content of diesel is 86.5% (ecoinvent v2.2 report 6_IV, Tab 3.14)
- aluminium, cast alloy: 1670 kg; source Volvo Truck Corporation 2004; lognormal variance with pedigree 0.16, pedigree (1,1,5,1,1)
  Estimated value. Based on the material composition of a Volovo FH as available from product declaration.
  properties: dry mass 1 kg, wet mass 1 kg
- sodium hydroxide, without water, in 50% solution state: 0.381 kg; source MAN Nutzfahrzeuge AG 2000; lognormal variance with pedigree 0.05, pedigree (1,1,5,1,1)
  EcoSpold01Location=RER
  Literature value. Data represent MAN production sites in Germany and comprises: final truck assembly, engine manufacturing, manufacturing of metal parts. Data available from environmental reports of the company.
  Additional references:
  MAN Nutzfahrzeuge AG (2002) Umwelterklärung 2002. MAN Nutzfahrzeuge AG, München
  properties: dry mass 1 kg, wet mass 1 kg, heating value, net 3.03 MJ
- steel, low-alloyed, hot rolled: 22.8 kg; source Volvo Truck Corporation 2004; lognormal variance with pedigree 1.37, pedigree (1,1,5,1,1)
  Estimated value. Based on the material composition of a Volvo FH as available from product declaration.
  EcoSpold01Location=RER
  properties: carbon content, fossil 0.005, wet mass 1 kg, dry mass 1 kg
  note on carbon content, fossil: Low alloyed steel composition given in Tab. 3.2 ecoinvent v2.2 report 10_partII. Steel assumed to have a C content of 0.5%
- stone wool, packed: 396 kg; source Volvo Truck Corporation 2004; lognormal variance with pedigree 0.05, pedigree (1,1,5,1,1)
  EcoSpold01Location=CH
  Estimated value. Based on the material composition of a Volvo FH as available from product declaration.
  properties: carbon content, fossil 0.015401, dry mass 1 kg, wet mass 1 kg
  note on carbon content, fossil: The chemical composition of the glass fibres used in the rock wool production is similar to the composition of naturally cooled volcano basalt and has a composition listed in Tab. 3.1 and 3.2 in ecoinvent v2.2 report 16, part XIV. Rock wool contains: a minimum of 96% mineral fibres,between 0.5 and 3.0 weight percent of phenolic resin depending on the specific product characteristics, and about 0.2 percent mineral oil (ecoinvent v2.2 report 16, part XIV). An average composition of 1.8% phenolic resin, 0.2% mineral oil, and 98% mineral fibres has been assumed and used to calculate C content of the rock wool
- wire drawing, copper: 109 kg; source Volvo Truck Corporation 2004; lognormal variance with pedigree 0.16, pedigree (1,1,5,1,1)
  (same comment as for steel, low-alloyed, hot rolled)
- wastewater from lorry production: -2.18 m3; name wastewater_output; source MAN Nutzfahrzeuge AG 2000; lognormal variance with pedigree 0.05, pedigree (1,1,5,1,1)
  Literature value. Data represent MAN production sites in Germany and comprises: final truck assembly, engine manufacturing, manufacturing of metal parts. Data available from environmental reports of the company.
  Additional references:
  MAN Nutzfahrzeuge AG (2002) Umwelterklärung 2002. MAN Nutzfahrzeuge AG, München
  EcoSpold01Location=CH
  production volume 2.18 m3
    Calculated from the production volume of bus in proportion to the respective output amounts.
  property price 0 EUR2005; name wastewater_output_price_EUR2005
  properties: wet mass 1000 kg, dry mass 0.337476 kg, water content 2962.17
- pitch: 0 kg; source Volvo Truck Corporation 2004; pedigree (1,1,1,1,1)
  Estimated value. Based on the material composition of a Volovo FH as available from product declaration.
  EcoSpold01Location=RER
  properties: heating value, net 28 MJ, carbon content, fossil 0.83, wet mass 1 kg, dry mass 1 kg
- alkyd paint, white, without solvent, in 60% solution state: 30 kg; source Volvo Truck Corporation 2004; lognormal variance with pedigree 0.08, pedigree (1,1,5,1,1)
  (same comment as for pitch)
  properties: heating value, net 10.3 MJ, dry mass 1 kg, carbon content, fossil 0.140367, carbon content, non-fossil 0.199629, wet mass 1 kg
  note on carbon content, fossil: C content was calculated as an addition of C content in the raw materials.
- lead: 90 kg; source Volvo Truck Corporation 2004; lognormal variance with pedigree 0.05, pedigree (1,1,5,1,1)
  (same comment as for steel, low-alloyed, hot rolled)
  properties: dry mass 1 kg, wet mass 1 kg
- tap water: 16400 kg; name tap_water_input; source MAN Nutzfahrzeuge AG 2002; lognormal variance with pedigree 0.05, pedigree (1,1,5,1,1)
  Calculated value. About 95% of the consumed tap water and groundwater are used in the final assembly of vehicles (own calculations based on MAN Nutzfahrzeuge AG (2002)).
  EcoSpold01Location=RER
  properties: water content 2962.17, dry mass 0.000337476 kg, carbon content, fossil 0.00178991, wet mass 1 kg
  note on carbon content, fossil: Bicarbonate content is 2.93 mol/m3. CO2 content is 0.1 mol/m3 (ecoinvent v2.2 report 8, Tab 93.1).
- sheet rolling, steel: 568 kg; source Volvo Truck Corporation 2004; lognormal variance with pedigree 0.05, pedigree (1,1,5,1,1)
  EcoSpold01Location=RER
  Estimated value. Based on the material composition of a Volvo FH as available from product declaration.
- refrigerant R134a: 2 kg; source Volvo Truck Corporation 2004; lognormal variance with pedigree 0.08, pedigree (1,1,5,1,1)
  (same comment as for sheet rolling, steel)
  properties: heating value, net 9.51 MJ, dry mass 1 kg, carbon content, fossil 0.235294, wet mass 1 kg
- pig iron: 502 kg; source Volvo Truck Corporation 2004; lognormal variance with pedigree 0.08, pedigree (1,1,5,1,1)
  Estimated value. Based on the material composition of a Volvo FH as available from product declaration.
  EcoSpold01Location=GLO
  properties: dry mass 1 kg, carbon content, fossil 0.045, wet mass 1 kg
  note on carbon content, fossil: Pig iron is the iron produced in the blast furnace. It is an alloy of 94% Fe and more than 2% C (world average 4.5%). (ecoinvent v2.2 report 10_partII)
- nitric acid, without water, in 50% solution state: 0.0985 kg; source MAN Nutzfahrzeuge AG 2000; lognormal variance with pedigree 0.05, pedigree (1,1,5,1,1)
  Literature value. Data represent MAN production sites in Germany and comprises: final truck assembly, engine manufacturing, manufacturing of metal parts. Data available from environmental reports of the company.
  Additional references:
  MAN Nutzfahrzeuge AG (2002) Umwelterklärung 2002. MAN Nutzfahrzeuge AG, München
  EcoSpold01Location=RER
  properties: dry mass 1 kg, wet mass 1 kg
- steel, chromium steel 18/8, hot rolled: 690 kg; source Volvo Truck Corporation 2004; lognormal variance with pedigree 0.16, pedigree (1,1,5,1,1)
  (same comment as for steel, low-alloyed, hot rolled)
  properties: wet mass 1 kg, carbon content, fossil 0.0008, dry mass 1 kg
  note on carbon content, fossil: Stainless steel model is the grade 304 steel (18/8 stainless, 18% chromium 8% nickel; max. 0.08% C)
- propylene glycol, liquid: 26 kg; source Volvo Truck Corporation 2004; lognormal variance with pedigree 0.05, pedigree (1,1,5,1,1)
  (same comment as for steel, low-alloyed, hot rolled)
  properties: dry mass 1 kg, carbon content, fossil 0.473684, wet mass 1 kg, heating value, net 27.09 MJ
- copper, cathode: 109 kg; source Volvo Truck Corporation 2004; lognormal variance with pedigree 0.16, pedigree (1,1,5,1,1)
  (same comment as for pitch)
  properties: wet mass 1 kg, dry mass 1 kg
- heat, district or industrial, natural gas: 32300 MJ; source MAN Nutzfahrzeuge AG 2000; lognormal variance with pedigree 0.05, pedigree (1,1,5,1,1)
  Literature value. Energy expenditures for stationary combustion processes are available from environmental reports of a German lorry manufacturer MAN Nutzfahrzeuge AG (2000)andMAN Nutzfahrzeuge AG (2000). The data is available for various manufacturing sites performing different tasks in the manufacturing chain. The total value used in this study comprises stamping processes, metal part and wiring harness manufacturing, engine production and testing as well as the final assembly.
  Additional references:
  MAN Nutzfahrzeuge AG (2002) Umwelterklärung 2002. MAN Nutzfahrzeuge AG, München.
  EcoSpold01Location=RER
  properties: heating value, net 1 MJ
- brass: 3 kg; source Volvo Truck Corporation 2004; lognormal variance with pedigree 0.08, pedigree (1,1,5,1,1)
  EcoSpold01Location=CH
  Estimated value. Based on the material composition of a Volovo FH as available from product declaration.
  properties: wet mass 1 kg, dry mass 1 kg
- cast iron: 1030 kg; source Volvo Truck Corporation 2004; lognormal variance with pedigree 0.08, pedigree (1,1,5,1,1)
  (same comment as for pitch)
  properties: dry mass 1 kg, wet mass 1 kg, carbon content, fossil 0.04
  note on carbon content, fossil: Cast iron is made by remelting pig iron in small furnaces (e.g. cupola furnaces or electric arc furnaces) and poured into moulds to make castings. It usually contains 2% to 6% carbon (ecoinvent v2.2 report 10_partII). An average content of 4% was considered
- tempering, flat glass: 490 kg; source Volvo Truck Corporation 2004; lognormal variance with pedigree 0.08, pedigree (1,1,5,1,1)
  (same comment as for steel, low-alloyed, hot rolled)
- hydrochloric acid, without water, in 30% solution state: 0.189 kg; source MAN Nutzfahrzeuge AG 2000; lognormal variance with pedigree 0.05, pedigree (1,1,5,1,1)
  Literature value. Data represent MAN production sites in Germany and comprises: final truck assembly, engine manufacturing, manufacturing of metal parts. Data available from environmental reports of the company.
  Additional references:
  MAN Nutzfahrzeuge AG (2002) Umwelterklärung 2002. MAN Nutzfahrzeuge AG, München]
  EcoSpold01Location=RER
  properties: wet mass 1 kg, heating value, net 3.32 MJ, dry mass 1 kg
- polyethylene, high density, granulate: 553 kg; source Volvo Truck Corporation 2004; lognormal variance with pedigree 0.16, pedigree (1,1,5,1,1)
  (same comment as for steel, low-alloyed, hot rolled)
  properties: dry mass 1 kg, wet mass 1 kg, heating value, net 42.47 MJ, carbon content, fossil 0.857143
  note on carbon content, fossil: Polyethylene is formed out of a huge amount of ethylene monomers (C2H4) (ecoinvent v2.2 report 11_II). MW=28 g/mol
- heat, district or industrial, other than natural gas: 860.7 MJ; source MAN Nutzfahrzeuge AG 2000; lognormal variance with pedigree 0.05, pedigree (1,1,5,1,1)
  EcoSpold01Location=RER
  Literature value. Energy expenditures for stationary combustion processes are available from environmental reports of a German lorry manufacturer MAN Nutzfahrzeuge AG (2000)andMAN Nutzfahrzeuge AG (2000). The data is available for various manufacturing sites performing different tasks in the manufacturing chain. The total value used in this study comprises stamping processes, metal part and wiring harness manufacturing, engine production and testing as well as the final assembly.
  Additional references:
  MAN Nutzfahrzeuge AG (2002) Umwelterklärung 2002. MAN Nutzfahrzeuge AG, München.
  properties: heating value, net 1 MJ
- sulfuric acid: 34 kg; source Volvo Truck Corporation 2004; lognormal variance with pedigree 0.05, pedigree (1,1,5,1,1)
  (same comment as for steel, low-alloyed, hot rolled)
  properties: dry mass 1 kg, wet mass 1 kg
- lime, hydrated, packed: 0.31 kg; source MAN Nutzfahrzeuge AG 2000; lognormal variance with pedigree 0.2106, pedigree (5,5,5,5,5)
  EcoSpold01Location=CH
  Literature value. Data represent MAN production sites in Germany and comprises: final truck assembly, engine manufacturing, manufacturing of metal parts. Data available from environmental reports of the company. For Ca(OH)2, 50% H2O is assumed.
  Additional references:
  MAN Nutzfahrzeuge AG (2002) Umwelterklärung 2002. MAN Nutzfahrzeuge AG, München
  Uncertainty: 2, 50% H2O is assumed.
  properties: dry mass 0.997 kg, water content 0.00300903, wet mass 1 kg
- road vehicle factory: 8.73e-7 unit; lognormal variance with pedigree 0.34, pedigree (1,1,5,1,1)
  Estimated value. Expenditures for the infrastructure of a road vehicle plant have been estimated and linked to vehicle manufacturing.
  EcoSpold01Location=RER
- diesel, burned in building machine: 20.1 MJ; source MAN Nutzfahrzeuge AG 2000; lognormal variance with pedigree 0.34, pedigree (1,1,5,1,1)
  EcoSpold01Location=GLO
  Literature value. Diesel is used for engine testing and the operation of fork-lifters. The latter is modeled as building machine. Energy expenditures for stationary combustion processes are available from environmental reports of a German lorry manufacturer MAN Nutzfahrzeuge AG (2000) and MAN Nutzfahrzeuge AG (2002). The data is available for various manufacturing sites performing different tasks in the manufacturing chain. The total value used in this study comprises stamping processes, metal part and wiring harness manufacturing, engine production and testing as well as the final assembly.
  Additional references:
  MAN Nutzfahrzeuge AG (2002) Umwelterklärung 2002. MAN Nutzfahrzeuge AG, München.
  properties: heating value, net 1 MJ
- reinforcing steel: 4540 kg; source Volvo Truck Corporation 2004; lognormal variance with pedigree 0.05, pedigree (1,1,5,1,1)
  (same comment as for steel, low-alloyed, hot rolled)
  properties: dry mass 1 kg, wet mass 1 kg, carbon content, fossil 0.004
- synthetic rubber: 405 kg; source Volvo Truck Corporation 2004; lognormal variance with pedigree 0.08, pedigree (1,1,5,1,1)
  (same comment as for sheet rolling, steel)
  properties: carbon content, fossil 0.871949, wet mass 1 kg, heating value, net 26.42 MJ, dry mass 1 kg
  note on carbon content, fossil: EPDM (Ethylene-propene-diene terpolymer) rubber is a terpolymer of ethylene, propene, and a diene with the residual unsaturated portion of the diene in the side chain (ecoinvent v2.2 report 7-part XX & Ullmann). Chemical formula (deduced from Evidences of Solvent-Induced Miscibility in Polychloroprene-co-Ethylene-Propene Diene Terpolymer Blends, Dubey et al., Journal of Applied Polymer Science, 2009, 111:1884–1891): C20H35
- flat glass, coated: 490 kg; source Volvo Truck Corporation 2004; lognormal variance with pedigree 0.08, pedigree (1,1,5,1,1)
  (same comment as for pitch)
  properties: wet mass 1 kg, dry mass 1 kg
- electricity, medium voltage: 4740 kWh; source MAN Nutzfahrzeuge AG 2000; lognormal variance with pedigree 0.05, pedigree (1,1,5,1,1)
  EcoSpold01Location=UCTE
  Literature value. Energy expenditures for stationary combustion processes are available from environmental reports of a German lorry manufacturer MAN Nutzfahrzeuge AG (2000)andMAN Nutzfahrzeuge AG (2000). The data is available for various manufacturing sites performing different tasks in the manufacturing chain. The total value used in this study comprises stamping processes, metal part and wiring harness manufacturing, engine production and testing as well as the final assembly.
  Additional references:
  MAN Nutzfahrzeuge AG (2002) Umwelterklärung 2002. MAN Nutzfahrzeuge AG, München.
- used bus: -1 unit; name BP_amount_1; lognormal variance with pedigree 0.342, pedigree (3,1,5,1,1)
  Uncertainty: own calculations
  production volume 1.32237 unit; = RP_PV_1 * (BP_amount_1 / RP_amount_1)
    Calculated from production volume of reference product using the relative outputs.
  property water content 0; name water_content
  property water in wet mass 0 kg; name WWM
  property carbon content, non-fossil 0.000544443; name C_content_non_fossil
  property dry mass 11000 kg; name DM
  property wet mass 11000 kg; name WM
  property carbon content, fossil 0.094343; name C_content_fossil
  property price 0 EUR2005; name BP_amount_1_price_EUR2005
- wastewater, average: 0 m3; source MAN Nutzfahrzeuge AG 2000; pedigree (1,1,1,1,1)
  (same comment as for wastewater from lorry production)
  production volume 0 m3
    (same comment as for wastewater from lorry production)
  properties: dry mass 0.346837 kg, water content 2882.2, carbon content, non-fossil 0.194039, wet mass 1000 kg
  note on carbon content, non-fossil: 0.0673 kg TOC/m3 (Tab A.17, ecoinvent v2.2 report 13_I). TOC was considered as Total Carbon.
- acetic acid, without water, in 98% solution state: 0.066 kg; source MAN Nutzfahrzeuge AG 2002; lognormal variance with pedigree 0.05, pedigree (1,1,5,1,1)
  Data represent MAN production sites in Germany and comprises: final truck assembly, engine manufacturing, manufacturing of metal parts. Data available from environmental reports of the company.
  EcoSpold01Location=RER
  properties: carbon content, fossil 0.400016, wet mass 1 kg, dry mass 1 kg, heating value, net 14.6 MJ
  note on heating value, net: Based on literature, page 10, Althaus H.-J., Chudacoff M., Hischier R., Jungbluth N., Osses M. and Primas A. (2007) Life Cycle Inventories of Chemicals. Final report ecoinvent data v2.0 No. 8. EMPA, Swiss Centre for Life Cycle Inventories, Dübendorf, CH, Online-Version under: www.ecoinvent.org.
- lubricating oil: 80.1 kg; source MAN Nutzfahrzeuge AG 2000; lognormal variance with pedigree 0.16, pedigree (1,1,5,1,1)
  (same comment as for nitric acid, without water, in 50% solution state)
  properties: carbon content, fossil 0.75, wet mass 1 kg, dry mass 1 kg, heating value, net 40.2 MJ
  note on carbon content, fossil: Lubricating oil is produced from diesel. C-content/dry mass of fats and oils considered 75%, from: ecoinvent v2.2 report, n 15a, pg 40
  note on heating value, net: Literature value, Source: IPCC 2006, 2006 IPCC Guidelines for National Greenhouse Gas Inventories, Prepared by the National Greenhouse Gas Inventories Programme, Eggleston H.S., Buendia L., Miwa K., Ngara T. and Tanabe K. (eds). Published: IGES, Japan
- section bar rolling, steel: 502 kg; source Volvo Truck Corporation 2004; lognormal variance with pedigree 0.08, pedigree (1,1,5,1,1)
  (same comment as for sheet rolling, steel)
- pitch: 53.6473, 0.352726 kg (2 entries); source Volvo Truck Corporation 2004; lognormal variance with pedigree 0.05, pedigree (1,1,5,1,1)
  (same comment as for pitch)
- wastewater, average: -14.3478, -1.55217 m3 (2 entries); source MAN Nutzfahrzeuge AG 2000; lognormal variance with pedigree 0.05, pedigree (1,1,5,1,1)
  (same comment as for wastewater from lorry production)
  production volume 15.9 m3

## Inputs from nature
- Water, well, in ground [natural resource, in water]: 69.5 m3; name water_well_in_ground_input; source MAN Nutzfahrzeuge AG 2000; lognormal variance with pedigree 0.05, pedigree (1,1,5,1,1)
  Calculated value. About 95% of the consumed tap water and groundwater are used in the final assembly of vehicles (own calculations based on MAN Nutzfahrzeuge AG (2002)).

## Emissions to nature
- DOC, Dissolved Organic Carbon [water, unspecified]: 0.0551 kg; source Frischknecht R. 2003; lognormal variance with pedigree 0.16, pedigree (1,1,5,1,1)
  Calculated value according to ecoinvent quality guidelines Frischknecht et al. (2003).
- Water [air, unspecified]: 12.885 m3; name water_to_air_unspecified; = (tap_water_input/1000*fraction_TW_to_air)+(water_well_in_ground_input*fraction_PW_to_air); lognormal variance with pedigree 0.0807, pedigree (2,2,5,1,1)
  Calculated value based on literature values and expert opinion. See comments in the parametres' comment field.
  property fraction, origin: fresh water 1; name fraction_origin_fresh_water
  property fraction, origin: salt water 0; name fraction_origin_salt_water
  property fraction, origin: unspecified 0; name fraction_origin_unspecified
- Zinc [air, unspecified]: 0.000173 kg; source MAN Nutzfahrzeuge AG 2000; lognormal variance with pedigree 0.69, pedigree (1,1,5,1,1)
  Calculated value. Based on the diesel consumption for engine testing, direct environmental emissions to air are calculated, employing the emission profile of a lorry 28t empty. Is assumed that diesel is used for engine testing and the operation of fork-lifters. The latter is modeled as building machine.Energy expenditures for stationary combustion processes are available from environmental reports of a German lorry manufacturer MAN Nutzfahrzeuge AG (2000) and MAN Nutzfahrzeuge AG (2002).
  Additional references:
  MAN Nutzfahrzeuge AG (2002) Umwelterklärung 2002. MAN Nutzfahrzeuge AG, München.
- Water [water, unspecified]: 54.935 m3; name water_to_water_unspecified; = (tap_water_input/1000)*(1-fraction_TW_to_air)+water_well_in_ground_input*(1-fraction_PW_to_air)-15.9-2.18; lognormal variance with pedigree 0.0807, pedigree (2,2,5,1,1)
  (same comment as for Water)
  property fraction, origin: fresh water 1; name fraction_origin_fresh_water_Ww
  property fraction, origin: salt water 0; name fraction_origin_salt_water_Ww
  property fraction, origin: unspecified 0; name fraction_origin_unspecified_Ww
- Cadmium [air, unspecified]: 1.73e-6 kg; source MAN Nutzfahrzeuge AG 2000; lognormal variance with pedigree 0.69, pedigree (1,1,5,1,1)
  (same comment as for Zinc)
- BOD5, Biological Oxygen Demand [water, unspecified]: 0.126 kg; source Frischknecht R. 2003; lognormal variance with pedigree 0.16, pedigree (1,1,5,1,1)
  Calculated value according to ecoinvent quality guidelines Frischknecht et al. (2003).
- Particulates, > 2.5 um, and < 10um [air, unspecified]: 0.0212 kg; source MAN Nutzfahrzeuge AG 2000; lognormal variance with pedigree 0.16, pedigree (1,1,5,1,1)
  (same comment as for Zinc)
- Carbon dioxide, fossil [air, unspecified]: 633 kg; source MAN Nutzfahrzeuge AG 2000; lognormal variance with pedigree 0.16, pedigree (1,1,5,1,1)
  (same comment as for Zinc)
- Lead [air, unspecified]: 1.9e-8 kg; source MAN Nutzfahrzeuge AG 2000; lognormal variance with pedigree 0.69, pedigree (1,1,5,1,1)
  (same comment as for Zinc)
- Carbon monoxide, fossil [air, unspecified]: 0.973 kg; source MAN Nutzfahrzeuge AG 2000; lognormal variance with pedigree 0.16, pedigree (1,1,5,1,1)
  (same comment as for Zinc)
- Toluene [air, unspecified]: 0.00551 kg; source MAN Nutzfahrzeuge AG 2000; lognormal variance with pedigree 0.16, pedigree (1,1,5,1,1)
  (same comment as for Zinc)
- Chromium [air, unspecified]: 0.000293 kg; source MAN Nutzfahrzeuge AG 2000; lognormal variance with pedigree 0.69, pedigree (1,1,5,1,1)
  (same comment as for Zinc)
- Particulates, < 2.5 um [air, unspecified]: 0.254 kg; source MAN Nutzfahrzeuge AG 2000; lognormal variance with pedigree 0.16, pedigree (1,1,5,1,1)
  (same comment as for Zinc)
- Sulfur dioxide [air, unspecified]: 0.12 kg; source MAN Nutzfahrzeuge AG 2000; lognormal variance with pedigree 0.16, pedigree (1,1,5,1,1)
  (same comment as for Zinc)
- Xylene [air, unspecified]: 0.00551 kg; source MAN Nutzfahrzeuge AG 2000; lognormal variance with pedigree 0.16, pedigree (1,1,5,1,1)
  (same comment as for Zinc)
- COD, Chemical Oxygen Demand [water, unspecified]: 0.126 kg; source MAN Nutzfahrzeuge AG 2002; lognormal variance with pedigree 0.16, pedigree (1,1,5,1,1)
  Literature value. For automotive stamping, a Chemical Oxygen Demand (COD) is reported MAN Nutzfahrzeuge AG (2002) with 12800 kg/year resulting in a specific COD of 0.126 kg/vehicle.
- Nickel [air, unspecified]: 1.21e-5 kg; source MAN Nutzfahrzeuge AG 2000; lognormal variance with pedigree 0.69, pedigree (1,1,5,1,1)
  (same comment as for Zinc)
- NMVOC, non-methane volatile organic compounds, unspecified origin [air, unspecified]: 7.87 kg; source MAN Nutzfahrzeuge AG 2000; lognormal variance with pedigree 0.16, pedigree (1,1,5,1,1)
  (same comment as for Zinc)
- Ammonia [air, unspecified]: 0.0223 kg; source MAN Nutzfahrzeuge AG 2000; lognormal variance with pedigree 0.16, pedigree (1,1,5,1,1)
  (same comment as for Zinc)
- Benzene [air, unspecified]: 0.0131 kg; source MAN Nutzfahrzeuge AG 2000; lognormal variance with pedigree 0.16, pedigree (1,1,5,1,1)
  (same comment as for Zinc)
- Selenium [air, unspecified]: 1.73e-6 kg; source MAN Nutzfahrzeuge AG 2000; lognormal variance with pedigree 0.69, pedigree (1,1,5,1,1)
  (same comment as for Zinc)
- Copper [air, unspecified]: 0.000293 kg; source MAN Nutzfahrzeuge AG 2000; lognormal variance with pedigree 0.69, pedigree (1,1,5,1,1)
  (same comment as for Zinc)
- Dinitrogen monoxide [air, unspecified]: 0.0223 kg; source MAN Nutzfahrzeuge AG 2000; lognormal variance with pedigree 0.16, pedigree (1,1,5,1,1)
  (same comment as for Zinc)
- Nitrogen oxides [air, unspecified]: 6 kg; source MAN Nutzfahrzeuge AG 2000; lognormal variance with pedigree 0.16, pedigree (1,1,5,1,1)
  (same comment as for Zinc)
- Mercury [air, unspecified]: 3.45e-9 kg; source MAN Nutzfahrzeuge AG 2000; lognormal variance with pedigree 0.69, pedigree (1,1,5,1,1)
  (same comment as for Zinc)
- Particulates, > 10 um [air, unspecified]: 0.0109 kg; source MAN Nutzfahrzeuge AG 2000; lognormal variance with pedigree 0.16, pedigree (1,1,5,1,1)
  (same comment as for Zinc)
- TOC, Total Organic Carbon [water, unspecified]: 0.0551 kg; source Frischknecht R. 2003; lognormal variance with pedigree 0.16, pedigree (1,1,5,1,1)
  Calculated value according to ecoinvent quality guidelines Frischknecht et al. (2003).
- Methane, fossil [air, unspecified]: 0.0165 kg; source MAN Nutzfahrzeuge AG 2000; lognormal variance with pedigree 0.16, pedigree (1,1,5,1,1)
  (same comment as for Zinc)

## Sampling procedure
Manufacturing data is taken from an environmental report of one production site. Additional data was generated via oral communcation.

## Extrapolations
This dataset has been extrapolated from year 2002 to the year of the calculation (2021). The uncertainty has been adjusted accordingly.

## Review by Niels Jungbluth 2004-04-02
Passed.

## Review by Emilia Moreno Ruiz 2012-02-27
trainee DS, OK, Liliane Klemann

## Review by Carl Vadenbo 2012-06-28
In preparation for the release of ecoinvent v3.0, the output of used bus was removed from the 'transport, bus' datasets and added to 'bus, RER' in ecoinvent v2.2 and renamed to 'bus production, RER 1998-2002'. The added exchange of by-product/waste was reviewed and the new dataset was accepted for inclusion into the ecoinvent database on 2012.07.05. The uncertainty information has only been adjusted for geographical representativeness in GLO, and consequently needs to be revised before subsequent releases of the database.
