# treatment of waste expanded polystyrene, municipal incineration with fly ash extraction

Dataset: EcoSpold 2, unit process
Geography: CH
Time period: 2006-01-01 to 2021-12-31
Technology level: current
Classification: ISIC rev.4 ecoinvent: 3821:Treatment and disposal of non-hazardous waste
Synonyms: municipal waste incineration
Scenario: Business-as-Usual
System model: Allocation, cut-off by classification
Share of production covered: 1.8 %
Generated by: Gabor Doka
Published in: Doka G. 2015
Database: ecoinvent
isCopyrightProtected: true
accessRestrictedTo: 1

## General comment
This dataset represents the activity of waste disposal of waste expanded polystyrene in a municipal solid waste incinerator (MSWI) // Recommended use of this dataset: For EPS, which goes to incineration as part of communal waste mixture. Larger amounts of clean, separated EPS could go to recycling. For non-expanded polystyrene use other dataset. // // Waste composition (wet, in ppm): upper heating value 33.2 MJ/kg; lower heating value 32.2 MJ/kg; H2O 1988.4; O 38626; H 77592; C 863430; S 674.8; N 1931.3; P n.a.; B n.a.; Cl 1125.5; Br 6700; F 14.167; I n.a.; Ag n.a.; As 1.8311; Ba 179.73; Cd 23.201; Co 30.444; Cr 39.382; Cu 106.94; Hg 0.81832; Mn 77.018; Mo n.a.; Ni 19.852; Pb 14.848; Sb 41.408; Se 2.0238; Sn 25.255; V 277.7; Zn 829.75; Be 0.48186; Sc n.a.; Sr 85.289; Ti 963.72; Tl 0.38549; W n.a.; Si n.a.; Fe 3590.5; Ca n.a.; Al 192.74; K n.a.; Mg n.a.; Na 1412.3; // Share of carbon in waste that is biogenic 0%. // Share of metals in waste not oxidised and bulk-recyclable (exclude very small or thin parts) Iron: 0%; Alu: 0%; Copper: 0%. // Recovery of metal scrap from bottom ash to recycling: 0g iron scrap, 0g aluminium scrap, 0g copper scrap. From this waste, the FLUWA process in the technology mix recovers 0.00065kg (DM) of a hydroxide sludge to be recycled in zinc furnaces. // Ultimately one kg of this waste produces 0.02981 kg of bottom ash (can include some washed ash) and 0.006424 kg of residues, which are landfilled (technology mix). Additional solidification of residues with 0.002569 kg of cement.Net energy production: 4.07MJ/kg electric energy and 7.88MJ/kg thermal energy. //

## Included activities start
waste incineration from waste reception gate and delivery into waste bunker at incinerator plant site (without transports to the incinerator)

## Included activities end
Waste-specific short-term emissions to water from leachate. Long-term emissions from landfill to ground water.

## Geography
Specific to the technology mix encountered in Switzerland in 2012.

## Technology
average Swiss MSWI plants in 2010 (grate incinerators) with electrostatic precipitator for fly ash (ESP), wet flue gas scrubber and 25% SNCR , 42.77% SCR-high dust , 32.68% SCR-low dust -DeNOx facilities and 0% without Denox (weighted according to mass of burnt waste, representing Swiss average). Efficiency of iron scrap separation from slag : 58%. Efficiency of non-ferrous scrap separation from slag : 31%. The technology mix for this dataset includes a filter ash treatment (FLUWA) of a share of 46.22%. Gross electric efficiency technology mix 15.84% and Gross thermal efficiency technology mix 28.51%

## Time period
Waste composition as given in literature reference, theoretical data or other source. Transfer coefficients for modern MSWI.

## Reference product
- waste expanded polystyrene: -1 kg; name RP_amount_1; By-product classification Waste; CPC 39: Wastes or scraps; CAS 9003-53-6
  Main reference product of this activity (supply of disposal service).
  production volume 1.5729e7 kg; name RP_PV_1
    based on corresponding global production volume of MSW fraction in conventional MSWI (wo fly ash extraction) and scaled down to annual Swiss incinerated MSW mass of 3.02 mio. tonnes.
  property price 0 EUR2005; name RP_amount_1_price_EUR2005
    Waste products are assigned a price of zero as they are assumed to require further treatment.
  property carbon content 0.86515
    carbon content on a dry matter basis (reserved; not for manual entry)
  properties: copper content 0.00010715, tin content 2.5305e-5, selenium content 2.0278e-6, water content 0.0019923, strontium content 8.5459e-5, wet mass 1 kg, aluminium content 0.00019313, carbon content, fossil 0.86515, iron content 0.0035976, sodium content 0.0014151, water in wet mass 0.0019884 kg, dry mass 0.99801 kg, thallium content 3.8625e-7, heating value, net 38.67 MJ, oxygen content 0.038703, hydrogen content 0.077747, chlorine content 0.0011278, sulfur content 0.00067614, bromine content 0.0067133, nitrogen content 0.0019351, fluorine content 1.4195e-5, barium content 0.00018009, cadmium content 2.3247e-5, chromium content 3.9461e-5, nickel content 1.9891e-5, arsenic content 1.8347e-6, mercury content 8.1995e-7, beryllium content 4.8282e-7, lead content 1.4878e-5, vanadium content 0.00027825, titanium content 0.00096564, manganese content 7.7172e-5, zinc content 0.0008314, antimony content 4.149e-5, cobalt content 3.0504e-5, carbon allocation 0.863428 kg

## By-products
- electricity, for reuse in municipal waste incineration only: 0 kWh; name E_el_prod_MSWI; CPC 17100: Electrical energy; By-product classification allocatable product; pedigree (1,1,1,1,1)
  Net electricity generated from this waste and used in internal MSWI plant energy redistribution.
  Uncertainty: uncertainty is calculated from uncertainties in waste composition and uncertainties in energy efficiency and the uncertainty in internal energy demand
  production volume 1.779e7 kWh
    calculated in proportion to reference product waste input to incinerator
  property true value relation 3.6; name E_el_prod_MSWI_true_value_relation
    property to calculate "true value" from
  property exergy 3.6 MJ; name E_el_prod_MSWI_exergy
    This exergy property is based on the exergy content of the product.
  property price 0.1 EUR2005; name E_el_prod_MSWI_price_EUR2005
    Estimated to be the same price as in case of electricity, medium voltage.
- heat, for reuse in municipal waste incineration only: 0 MJ; name E_th_prod_MSWI; By-product classification allocatable product; CPC 17300: Steam and hot water; pedigree (1,1,1,1,1)
  Net useful heat generated from this waste and used in internal MSWI plant energy redistribution.
  Uncertainty: uncertainty is calculated from uncertainties in waste composition and uncertainties in energy efficiency and the uncertainty in internal energy demand
  production volume 1.239e8 MJ
    calculated in proportion to reference product waste input to incinerator
  property exergy 0.1842 MJ; name E_th_prod_MSWI_exergy
    This exergy property is based on the exergy content of the product.
  property price 0.0106 EUR2005; name E_th_prod_MSWI_price_EUR2005
    Average European district heat price from Ecoheatcool and Euroheat 2005-2006, Ecoheat Work package 1: The European heat market. Final report. 10.6 EUR/GJ i s the price of district heat. http://www.solarthermalworld.org/files/Ecoheatcool%20WP1%20Web.pdf?download
  property true value relation 0.1842; name E_th_prod_MSWI_true_value_relation
    property to calculate "true value" from
- metalliferous hydroxide sludge: 0 kg; By-product classification Recyclable; CPC 1429: Other non-ferrous metal ores and concentrates (other than uranium or thorium ores and concentrates); pedigree (1,1,1,1,1)
  Metalliferous hydroxide sludge from filter ash leaching (FLUWA).
  Uncertainty: uncertainty is calculated from uncertainties in waste composition and transfer coefficients to filter ash in incinerator and the uncertainty of the transfer coefficients of the FLUWA process.
  production volume 0 kg
    calculated in proportion to reference product waste input to incinerator
  property heating value, net 0 MJ
    Non combustible products are assumed to have an LHV equal to zero (0).
  property price 0.0042 EUR2005
    World market value of manure, deflated with barley world market price and consumer price index, based on [http://www.gov.pe.ca/photos/original/af_NM_manconv.pdf].
  property carbon content 0.06911
    carbon content on a dry matter basis (reserved; not for manual entry)
  properties: tin content 3.4292e-5, aluminium content 2.0467e-5, beryllium content 1.1081e-5, zinc content 0.22521, strontium content 1.4969e-6, water in wet mass 0.75 kg, wet mass 1 kg, thallium content 5.9948e-6, vanadium content 0.0024341, sodium content 0.017852, titanium content 0.00012162, iron content 0.00060966, bromine content 0.20362, carbon content, fossil 0.06911, dry mass 0.25 kg, sulfur content 0.06386, chlorine content 0.041759, arsenic content 2.6106e-5, fluorine content 0.00031803, water content 3, mercury content 2.2946e-6, copper content 6.8373e-5, lead content 0.00041251, selenium content 3.3075e-5, oxygen content 0.35996, barium content 7.7844e-5, antimony content 0.00069145, manganese content 0.00012113, chromium content 0.00029048, cadmium content 0.012165, nickel content 2.8436e-5, cobalt content 0.0011557, carbon allocation 0.0172775 kg

## Inputs from technosphere
- cationic resin: 4.1474e-6 kg; lognormal variance with pedigree 1.6021, pedigree (1,1,4,1,1)
  Auxilliary input for mercury removal in filter ash treatment (FLUWA).
  Uncertainty: uncertainty calculated from uncertainty in of transfer coefficients in the incinerator, and the uncertainty of the waste composition of this waste
  properties: heating value, net 6.68 MJ, dry mass 0.5 kg, wet mass 1 kg, water content 1, carbon content, fossil 0.521606
- slag landfill: 5.2991e-11 unit; lognormal variance with pedigree 0.070807, pedigree (1,1,4,1,1)
  Landfill infrastructure required for landfilling of bottom ash.
  Uncertainty: uncertainty is calculated from uncertainties in waste composition and transfer coefficients in incinerator
- waste cement, hydrated: -0.0064236 kg; lognormal variance with pedigree 0.084492, pedigree (1,1,4,1,1)
  Hydrated cement output for solidification of landfilled residual material.
  Uncertainty: Uncertainty calculated from uncertainty of the waste composition of this waste and transfer coefficients in the incinerator and of the solidification recipe.
  production volume 101040 kg
    calculated in proportion to reference product waste input to incinerator
  properties: wet mass 1 kg, dry mass 1 kg
- sodium hydroxide, without water, in 50% solution state: 0.00061045 kg; lognormal variance with pedigree 0.14906, pedigree (1,1,4,1,1)
  Auxilliary inputs for the flue gas treatment stage of the incinerator plant, and partially in the filter ash treatment (FLUWA).
  Uncertainty: uncertainty calculated from uncertainty in average NaOH input, of transfer coefficients in the incinerator, and the uncertainty of the waste composition of this waste
  properties: wet mass 1 kg, dry mass 1 kg, heating value, net 3.03 MJ
- water, decarbonised: 1.1098 kg; lognormal variance with pedigree 0.27411, pedigree (1,1,4,1,1)
  Incinerator process water used in flue gas scrubber stage.
  Uncertainty: uncertainty calculated from uncertainty in average water input, and the uncertainty of the waste composition of this waste
  properties: wet mass 1 kg
- transport, freight, lorry, unspecified: 0.0015782 metric ton*km; lognormal variance with pedigree 0.046725, pedigree (1,1,4,1,1)
  Transport services to transport incineration residues to landfills and filter ash to external treatments (FLUWA).
  Uncertainty: uncertainty calculated from uncertainty of the waste composition of this waste, uncertainty of transfer coefficients and the uncertainty in generic transportation distances
- quicklime, milled, packed: 0.0011365 kg; lognormal variance with pedigree 0.38607, pedigree (1,1,4,1,1)
  Auxilliary inputs for the flue gas treatment stage of the incinerator plant.
  Uncertainty: uncertainty calculated from uncertainty in average CaO input, of transfer coefficients in the incinerator, and the uncertainty of the waste composition of this waste
  properties: water content 0.010101, wet mass 1 kg, dry mass 0.99 kg
- process-specific burdens, slag landfill: 0.029807 kg; lognormal variance with pedigree 0.070807, pedigree (1,1,4,1,1)
  Mass-specific expenditures required for landfilling of bottom ash.;activityLink introduced to establish a direct link to the corresponding regional supply of this product
  Uncertainty: uncertainty is calculated from uncertainties in waste composition and transfer coefficients in incinerator
- ammonia, anhydrous, liquid: 0.0011492 kg; lognormal variance with pedigree 0.2649, pedigree (1,1,4,1,1)
  Input to DeNOx stage (100% NH3).
  Uncertainty: uncertainty calculated from uncertainty in average DeNOx input, uncertainty in the share of thermal NOx, uncertainty of nitrogen content in average municipal waste and the uncertainty in nitrogen content in *this* waste.
  properties: dry mass 1 kg, wet mass 1 kg
- hydrochloric acid, without water, in 30% solution state: 0.00018497 kg; lognormal variance with pedigree 0.094667, pedigree (1,1,4,1,1)
  Auxilliary inputs for the wastewater treatment stage of the incinerator plant.
  Uncertainty: uncertainty calculated from uncertainty in average HCl input, of transfer coefficients in the incinerator, and the uncertainty of the waste composition of this waste
  properties: dry mass 1 kg, heating value, net 3.32 MJ, wet mass 1 kg
- municipal waste incineration facility: 2.5e-10 unit
  Demands per kilogram waste.
- spent activated carbon with mercury: -4.3656e-6 kg; name BP_amount_1; lognormal variance with pedigree 1.6021, pedigree (1,1,4,1,1)
  Spent ion exchanger charged with mercury, from FLUWA filter ash treatment, approximated here with Spent activated carbon with mercury, deposited undergound in a polyethylene Big Bag.
  Uncertainty: uncertainty calculated from uncertainty in of transfer coefficients in the incinerator, and the uncertainty of the waste composition of this waste.
  production volume 68.6665 kg; = ABS(RP_PV_1 * (BP_amount_1 / RP_amount_1))
    Calculated from production volume of reference product using the relative outputs.
  property price 0 EUR2005; name BP_amount_1_price_EUR2005
  properties: heating value, net 18.18 MJ, dry mass 1 kg, wet mass 1 kg, carbon content, fossil 0.6
- heat, district or industrial, natural gas: 0.2149 MJ; lognormal variance with pedigree 0.2649, pedigree (1,1,4,1,1)
  Input to DeNOx stage, to heat up flue gas in low-dust SCR.
  Uncertainty: uncertainty calculated from uncertainty in average DeNOx input, uncertainty in the share of thermal NOx, uncertainty of nitrogen content in average municipal waste and the uncertainty in nitrogen content in *this* waste.
  properties: heating value, net 1 MJ
- iron (III) chloride, without water, in 40% solution state: 4.771e-5 kg; lognormal variance with pedigree 0.27411, pedigree (1,1,4,1,1)
  Auxilliary inputs for the wastewater treatment stage of the incinerator plant.
  Uncertainty: uncertainty calculated from uncertainty in average FeCl3 input, of transfer coefficients in the incinerator, and the uncertainty of the waste composition of this waste
  properties: wet mass 1 kg, dry mass 1 kg
- titanium dioxide: 7.1999e-5 kg; lognormal variance with pedigree 0.54622, pedigree (1,1,4,1,1)
  Input to DeNOx stage (TiO2 catalyst carrier)
  Uncertainty: uncertainty calculated from uncertainty in average DeNOx input, uncertainty in the share of thermal NOx, uncertainty of nitrogen content in average municipal waste and the uncertainty in nitrogen content in *this* waste.
  properties: dry mass 1 kg, wet mass 1 kg
- process-specific burdens, residual material landfill: 0.012807 kg; lognormal variance with pedigree 0.075408, pedigree (1,1,4,1,1)
  Mass-specific expenditures required for landfilling of incineration residues.;activityLink introduced to establish a direct link to the corresponding regional supply of this product
  Uncertainty: uncertainty is calculated from uncertainties in waste composition and transfer coefficients in incinerator
- chemical, organic: 1.057e-5 kg; lognormal variance with pedigree 1.1935, pedigree (1,1,4,1,1)
  Auxilliary inputs for the wastewater treatment stage of the incinerator plant. Proxy for (pure) Trisodium-trimercapto-s-triazine (CAS 17766-26-6), used as 15% diluted solution, aka TMT15.
  Uncertainty: uncertainty calculated from uncertainty in average TMT15 input, of transfer coefficients in the incinerator, and the uncertainty of the waste composition of this waste
  properties: heating value, net 19.03 MJ, wet mass 1 kg, dry mass 1 kg, carbon content, fossil 0.628
- chromium oxide, flakes: 1.4694e-6 kg; lognormal variance with pedigree 0.54622, pedigree (1,1,4,1,1)
  Input to DeNOx stage. Active component in SCR catalyst (vanadium pentoxide, V2O5), here approximated with the available chromium trioxide.
  Uncertainty: uncertainty calculated from uncertainty in average DeNOx input, uncertainty in the share of thermal NOx, uncertainty of nitrogen content in average municipal waste and the uncertainty in nitrogen content in *this* waste.
  properties: dry mass 1 kg, wet mass 1 kg
- chemical, inorganic: 9.3619e-5 kg; lognormal variance with pedigree 0.18775, pedigree (1,1,4,1,1)
  Auxilliary inputs for the wastewater treatment stage of the incinerator plant. Proxy for Polyelectrolyte.
  Uncertainty: uncertainty calculated from uncertainty in average Polyelectrolyte input, of transfer coefficients in the incinerator, and the uncertainty of the waste composition of this waste
  properties: dry mass 1 kg, carbon content, fossil 0.003, wet mass 1 kg
- residual material landfill: 2.6681e-11 unit; lognormal variance with pedigree 0.075408, pedigree (1,1,4,1,1)
  Landfill infrastructure required for landfilling of incineration residues.
  Uncertainty: uncertainty is calculated from uncertainties in waste composition and transfer coefficients in incinerator
- hydrogen peroxide, without water, in 50% solution state: 0.00040816 kg; lognormal variance with pedigree 0.1183, pedigree (1,1,4,1,1)
  Auxilliary oxidising agent for filter ash treatment (FLUWA).
  Uncertainty: uncertainty calculated from uncertainty in of transfer coefficients in the incinerator, and the uncertainty of the waste composition of this waste
  properties: heating value, net 7.13 MJ, dry mass 1 kg, wet mass 1 kg
- cement, unspecified: 0.0025695 kg; lognormal variance with pedigree 0.084492, pedigree (1,1,4,1,1)
  Cement required for solidification of landfilled residual material.
  Uncertainty: Uncertainty calculated from uncertainty of the waste composition of this waste, of transfer coefficients in the incinerator and of the solidification recipe.
  properties: dry mass 1 kg, wet mass 1 kg
- metalliferous hydroxide sludge: -0.0025992 kg; lognormal variance with pedigree 0.102786, pedigree (1,1,4,1,1)
  (same comment as for metalliferous hydroxide sludge)
  production volume 40883 kg
  properties: zinc content 0.22521, wet mass 1 kg, sodium content 0.017852, bromine content 0.20362, carbon content, fossil 0.06911, dry mass 0.25 kg, sulfur content 0.06386, chlorine content 0.041759, price 0.0042 EUR2005, water content 3, oxygen content 0.35996, cadmium content 0.012165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

## Inputs from nature
- Oxygen [natural resource, in air]: 2.8886 kg; lognormal variance with pedigree 0.0161848, pedigree (1,1,4,1,1)
  Oxygen from ambient air needed to combust and oxidise this waste. Net demand, i.e. without O2 leaving the plant in flue gas uncombusted.
  Uncertainty: uncertainty is calculated from uncertainties in waste composition and transfer coefficients to flue gas and soild residues in incinerator

## Emissions to nature
- Cobalt [water, surface water]: 5.0132e-9 kg; lognormal variance with pedigree 1.6488, pedigree (1,1,4,1,1)
  Emissions to water from waste composition and transfer coefficients in incinerator and landfills.
  Uncertainty: uncertainty is calculated from uncertainties in waste composition and transfer coefficients in incinerator and landfills
- Ammonia [air, urban air close to ground]: 1.3511e-6 kg; lognormal variance with pedigree 0.30414, pedigree (1,1,4,1,1)
  Nitrogen species emitted to air after DeNOx stage.
  Uncertainty: uncertainty calculated from uncertainty in average N-emissions and uncertainty in the share of thermal NOx and the uncertainty in nitrogen content in *this* waste.
- Lead [water, ground-, long-term]: 1.0455e-5 kg; lognormal variance with pedigree 2.762, pedigree (1,1,4,1,1)
  Long-term emissions from landfilling of incineration residues.
  Uncertainty: uncertainty is calculated from uncertainties in waste composition and transfer coefficients in incinerator and landfills.
- Chromium VI [water, surface water]: 5.9752e-7 kg; lognormal variance with pedigree 1.1711, pedigree (1,1,4,1,1)
  (same comment as for Cobalt)
- Dinitrogen monoxide [air, urban air close to ground]: 2.8805e-5 kg; lognormal variance with pedigree 1.3544, pedigree (1,1,4,1,1)
  (same comment as for Ammonia)
- Antimony [water, ground-, long-term]: 1.6802e-5 kg; lognormal variance with pedigree 0.90787, pedigree (1,1,4,1,1)
  (same comment as for Lead)
- Copper, ion [water, surface water]: 9.253e-9 kg; lognormal variance with pedigree 1.1139, pedigree (1,1,4,1,1)
  (same comment as for Cobalt)
- Cyanide [air, urban air close to ground]: 6.1884e-6 kg; lognormal variance with pedigree 1.3544, pedigree (1,1,4,1,1)
  (same comment as for Ammonia)
- Selenium [water, ground-, long-term]: 1.5531e-6 kg; lognormal variance with pedigree 0.95901, pedigree (1,1,4,1,1)
  (same comment as for Lead)
- Mercury [water, surface water]: 4.3543e-9 kg; lognormal variance with pedigree 1.7719, pedigree (1,1,4,1,1)
  (same comment as for Cobalt)
- Hydrogen chloride [air, urban air close to ground]: 6.4229e-7 kg; lognormal variance with pedigree 0.6735, pedigree (1,1,4,1,1)
  Emission to air from waste composition and transfer coefficients.
  Uncertainty: uncertainty is calculated from uncertainties in waste composition and transfer coefficients in incinerator
- Tin, ion [water, ground-, long-term]: 1.6761e-5 kg; lognormal variance with pedigree 1.2563, pedigree (1,1,4,1,1)
  (same comment as for Lead)
- Manganese [water, surface water]: 9.4124e-9 kg; lognormal variance with pedigree 1.0363, pedigree (1,1,4,1,1)
  (same comment as for Cobalt)
- Bromine [air, urban air close to ground]: 3.3467e-6 kg; lognormal variance with pedigree 0.44716, pedigree (1,1,4,1,1)
  (same comment as for Hydrogen chloride)
- Vanadium, ion [water, ground-, long-term]: 8.1866e-5 kg; lognormal variance with pedigree 0.92232, pedigree (1,1,4,1,1)
  (same comment as for Lead)
- Nickel, ion [water, surface water]: 1.3143e-8 kg; lognormal variance with pedigree 1.7976, pedigree (1,1,4,1,1)
  (same comment as for Cobalt)
- Hydrogen fluoride [air, urban air close to ground]: 9.5578e-8 kg; lognormal variance with pedigree 1.2409, pedigree (1,1,4,1,1)
  (same comment as for Hydrogen chloride)
- Zinc, ion [water, ground-, long-term]: 0.00037258 kg; lognormal variance with pedigree 1.5135, pedigree (1,1,4,1,1)
  (same comment as for Lead)
- Lead [water, surface water]: 1.0114e-9 kg; lognormal variance with pedigree 1.00097, pedigree (1,1,4,1,1)
  (same comment as for Cobalt)
- Arsenic [air, urban air close to ground]: 1.4343e-8 kg; lognormal variance with pedigree 1.5056, pedigree (1,1,4,1,1)
  (same comment as for Hydrogen chloride)
- Beryllium [water, ground-, long-term]: 4.5221e-7 kg; lognormal variance with pedigree 1.6294, pedigree (1,1,4,1,1)
  (same comment as for Lead)
- Antimony [water, surface water]: 8.1379e-6 kg; lognormal variance with pedigree 1.0148, pedigree (1,1,4,1,1)
  (same comment as for Cobalt)
- Barium [air, urban air close to ground]: 7.0546e-7 kg; lognormal variance with pedigree 0.9063, pedigree (1,1,4,1,1)
  (same comment as for Hydrogen chloride)
- Strontium [water, ground-, long-term]: 8.5197e-5 kg; lognormal variance with pedigree 0.99096, pedigree (1,1,4,1,1)
  (same comment as for Lead)
- Selenium [water, surface water]: 4.0322e-7 kg; lognormal variance with pedigree 1.0497, pedigree (1,1,4,1,1)
  (same comment as for Cobalt)
- Cadmium [air, urban air close to ground]: 1.1826e-8 kg; lognormal variance with pedigree 1.1856, pedigree (1,1,4,1,1)
  (same comment as for Hydrogen chloride)
- Titanium, ion [water, ground-, long-term]: 0.0002884 kg; lognormal variance with pedigree 0.90409, pedigree (1,1,4,1,1)
  (same comment as for Lead)
- Tin, ion [water, surface water]: 2.2829e-8 kg; lognormal variance with pedigree 1.0571, pedigree (1,1,4,1,1)
  (same comment as for Cobalt)
- Cobalt [air, urban air close to ground]: 5.5368e-8 kg; lognormal variance with pedigree 1.1416, pedigree (1,1,4,1,1)
  (same comment as for Hydrogen chloride)
- Thallium [water, ground-, long-term]: 2.954e-7 kg; lognormal variance with pedigree 1.4308, pedigree (1,1,4,1,1)
  (same comment as for Lead)
- Vanadium, ion [water, surface water]: 3.2293e-7 kg; lognormal variance with pedigree 0.79428, pedigree (1,1,4,1,1)
  (same comment as for Cobalt)
- Chromium [air, urban air close to ground]: 3.4389e-8 kg; lognormal variance with pedigree 1.1122, pedigree (1,1,4,1,1)
  (same comment as for Hydrogen chloride)
- Silicon [water, ground-, long-term]: 0.00026406 kg; lognormal variance with pedigree 0.00800076, pedigree (1,1,4,1,1)
  (same comment as for Lead)
- Zinc, ion [water, surface water]: 5.0687e-8 kg; lognormal variance with pedigree 0.63412, pedigree (1,1,4,1,1)
  (same comment as for Cobalt)
- Copper [air, urban air close to ground]: 9.7944e-9 kg; lognormal variance with pedigree 0.99455, pedigree (1,1,4,1,1)
  (same comment as for Hydrogen chloride)
- Iron, ion [water, ground-, long-term]: 0.0018375 kg; lognormal variance with pedigree 0.68928, pedigree (1,1,4,1,1)
  (same comment as for Lead)
- Beryllium [water, surface water]: 2.9988e-10 kg; lognormal variance with pedigree 2.2707, pedigree (1,1,4,1,1)
  (same comment as for Cobalt)
- Mercury [air, urban air close to ground]: 2.3202e-8 kg; lognormal variance with pedigree 1.606, pedigree (1,1,4,1,1)
  (same comment as for Hydrogen chloride)
- Calcium, ion [water, ground-, long-term]: 0.00010958 kg; lognormal variance with pedigree 1.4527, pedigree (1,1,4,1,1)
  (same comment as for Lead)
- Strontium [water, surface water]: 5.5759e-8 kg; lognormal variance with pedigree 1.6602, pedigree (1,1,4,1,1)
  (same comment as for Cobalt)
- Manganese [air, urban air close to ground]: 1.4709e-8 kg; lognormal variance with pedigree 1.0313, pedigree (1,1,4,1,1)
  (same comment as for Hydrogen chloride)
- Aluminium [water, ground-, long-term]: 0.00017136 kg; lognormal variance with pedigree 0.70863, pedigree (1,1,4,1,1)
  (same comment as for Lead)
- Titanium, ion [water, surface water]: 1.962e-7 kg; lognormal variance with pedigree 0.50684, pedigree (1,1,4,1,1)
  (same comment as for Cobalt)
- Nickel [air, urban air close to ground]: 2.4938e-8 kg; lognormal variance with pedigree 1.2003, pedigree (1,1,4,1,1)
  (same comment as for Hydrogen chloride)
- Sodium, ion [water, ground-, long-term]: 0.00092434 kg; lognormal variance with pedigree 0.40596, pedigree (1,1,4,1,1)
  (same comment as for Lead)
- Thallium [water, surface water]: 2.7362e-10 kg; lognormal variance with pedigree 1.7197, pedigree (1,1,4,1,1)
  (same comment as for Cobalt)
- Lead [air, urban air close to ground]: 1.2233e-9 kg; lognormal variance with pedigree 1.2589, pedigree (1,1,4,1,1)
  (same comment as for Hydrogen chloride)
- NMVOC, non-methane volatile organic compounds, unspecified origin [air, urban air close to ground]: 4.6788e-7 kg; lognormal variance with pedigree 0.069437, pedigree (1,1,4,1,1)
  Incomplete combustion product emitted to air.
  Uncertainty: uncertainty calculated from uncertainty in average operation emissions, and the uncertainty of the flue gas volume from this waste.
- Silicon [water, surface water]: 5.9519e-7 kg; lognormal variance with pedigree 0.55671, pedigree (1,1,4,1,1)
  (same comment as for Cobalt)
- Antimony [air, urban air close to ground]: 3.317e-11 kg; lognormal variance with pedigree 1.1563, pedigree (1,1,4,1,1)
  (same comment as for Hydrogen chloride)
- Particulates, < 2.5 um [air, urban air close to ground]: 1.2275e-6 kg; lognormal variance with pedigree 0.36136, pedigree (1,1,4,1,1)
  (same comment as for NMVOC, non-methane volatile organic compounds, unspecified origin)
- Iron, ion [water, surface water]: 6.9104e-8 kg; lognormal variance with pedigree 1.0286, pedigree (1,1,4,1,1)
  (same comment as for Cobalt)
- Selenium [air, urban air close to ground]: 2.4144e-8 kg; lognormal variance with pedigree 1.4912, pedigree (1,1,4,1,1)
  (same comment as for Hydrogen chloride)
- Particulates, > 2.5 um, and < 10um [air, urban air close to ground]: 6.1681e-9 kg; lognormal variance with pedigree 0.16143, pedigree (1,1,4,1,1)
  (same comment as for NMVOC, non-methane volatile organic compounds, unspecified origin)
- Calcium, ion [water, surface water]: 1.8295e-7 kg; lognormal variance with pedigree 0.90914, pedigree (1,1,4,1,1)
  (same comment as for Cobalt)
- Tin [air, urban air close to ground]: 1.6497e-11 kg; lognormal variance with pedigree 1.2296, pedigree (1,1,4,1,1)
  (same comment as for Hydrogen chloride)
- Dioxins, measured as 2,3,7,8-tetrachlorodibenzo-p-dioxin [air, urban air close to ground]: 2.056e-14 kg; lognormal variance with pedigree 0.36136, pedigree (1,1,4,1,1)
  (same comment as for NMVOC, non-methane volatile organic compounds, unspecified origin)
- Aluminium [water, surface water]: 5.1997e-8 kg; lognormal variance with pedigree 1.2718, pedigree (1,1,4,1,1)
  (same comment as for Cobalt)
- Vanadium [air, urban air close to ground]: 5.8896e-6 kg; lognormal variance with pedigree 0.84026, pedigree (1,1,4,1,1)
  (same comment as for Hydrogen chloride)
- Benzene [air, urban air close to ground]: 1.0281e-8 kg; lognormal variance with pedigree 0.069437, pedigree (1,1,4,1,1)
  (same comment as for NMVOC, non-methane volatile organic compounds, unspecified origin)
- Sodium, ion [water, surface water]: 0.00046479 kg; lognormal variance with pedigree 0.19535, pedigree (1,1,4,1,1)
  (same comment as for Cobalt)
- Zinc [air, urban air close to ground]: 5.5615e-7 kg; lognormal variance with pedigree 0.70898, pedigree (1,1,4,1,1)
  (same comment as for Hydrogen chloride)
- Toluene [air, urban air close to ground]: 2.0562e-8 kg; lognormal variance with pedigree 0.069437, pedigree (1,1,4,1,1)
  (same comment as for NMVOC, non-methane volatile organic compounds, unspecified origin)
- Chromium, ion [water, surface water]: 5.1128e-9 kg; lognormal variance with pedigree 0.71285, pedigree (1,1,4,1,1)
  (same comment as for Cobalt)
- Strontium [air, urban air close to ground]: 8.5289e-9 kg; lognormal variance with pedigree 1.024, pedigree (1,1,4,1,1)
  (same comment as for Hydrogen chloride)
- Benzene, pentachloro- [air, urban air close to ground]: 5.4317e-11 kg; lognormal variance with pedigree 0.069437, pedigree (1,1,4,1,1)
  (same comment as for NMVOC, non-methane volatile organic compounds, unspecified origin)
- BOD5, Biological Oxygen Demand [water, ground-, long-term]: 0.0020929 kg; lognormal variance with pedigree 0.019281, pedigree (1,1,4,1,1)
  (same comment as for Lead)
- Titanium [air, urban air close to ground]: 7.9955e-7 kg; lognormal variance with pedigree 0.6945, pedigree (1,1,4,1,1)
  (same comment as for Hydrogen chloride)
- Benzene, hexachloro- [air, urban air close to ground]: 2.1497e-11 kg; lognormal variance with pedigree 0.069437, pedigree (1,1,4,1,1)
  (same comment as for NMVOC, non-methane volatile organic compounds, unspecified origin)
- TOC, Total Organic Carbon [water, ground-, long-term]: 0.0025319 kg; lognormal variance with pedigree 0.019281, pedigree (1,1,4,1,1)
  (same comment as for Lead)
- Thallium [air, urban air close to ground]: 3.8549e-10 kg; lognormal variance with pedigree 1.7197, pedigree (1,1,4,1,1)
  (same comment as for Hydrogen chloride)
- Phenol, pentachloro- [air, urban air close to ground]: 4.4772e-12 kg; lognormal variance with pedigree 0.069437, pedigree (1,1,4,1,1)
  (same comment as for NMVOC, non-methane volatile organic compounds, unspecified origin)
- COD, Chemical Oxygen Demand [water, ground-, long-term]: 0.0063984 kg; lognormal variance with pedigree 0.019281, pedigree (1,1,4,1,1)
  (same comment as for Lead)
- Iron [air, urban air close to ground]: 6.4347e-9 kg; lognormal variance with pedigree 0.56554, pedigree (1,1,4,1,1)
  (same comment as for Hydrogen chloride)
- Heat, waste [air, urban air close to ground]: 24.539 MJ; lognormal variance with pedigree 0.021452, pedigree (1,1,4,1,1)
  Waste heat generated from heating value of this waste plus any electricity required to process it.
  Uncertainty: uncertainty is calculated from uncertainties in waste composition and uncertainties in energy efficiency and the uncertainty in internal energy demand
- DOC, Dissolved Organic Carbon [water, ground-, long-term]: 0.0025319 kg; lognormal variance with pedigree 0.019281, pedigree (1,1,4,1,1)
  (same comment as for Lead)
- Aluminium [air, urban air close to ground]: 1.5715e-10 kg; lognormal variance with pedigree 0.95777, pedigree (1,1,4,1,1)
  (same comment as for Hydrogen chloride)
- Benzo(a)pyrene [air, urban air close to ground]: 2.2878e-13 kg; lognormal variance with pedigree 0.36136, pedigree (1,1,4,1,1)
  (same comment as for NMVOC, non-methane volatile organic compounds, unspecified origin)
- Sulfate [water, ground-, long-term]: 0.0016134 kg; lognormal variance with pedigree 0.52695, pedigree (1,1,4,1,1)
  (same comment as for Lead)
- Sodium [air, urban air close to ground]: 1.1595e-5 kg; lognormal variance with pedigree 0.62967, pedigree (1,1,4,1,1)
  (same comment as for Hydrogen chloride)
- Heat, waste [water, surface water]: 5.6185 MJ; lognormal variance with pedigree 0.021452, pedigree (1,1,4,1,1)
  (same comment as for Heat, waste)
- Nitrate [water, ground-, long-term]: 6.9269e-5 kg; lognormal variance with pedigree 0.58884, pedigree (1,1,4,1,1)
  (same comment as for Lead)
- COD, Chemical Oxygen Demand [water, surface water]: 0.0006564 kg; lognormal variance with pedigree 0.025163, pedigree (1,1,4,1,1)
  (same comment as for Cobalt)
- Chloride [water, ground-, long-term]: 0.00014178 kg; lognormal variance with pedigree 0.63694, pedigree (1,1,4,1,1)
  (same comment as for Lead)
- BOD5, Biological Oxygen Demand [water, surface water]: 0.00064235 kg; lognormal variance with pedigree 0.025307, pedigree (1,1,4,1,1)
  (same comment as for Cobalt)
- Water [air, urban air close to ground]: 0.00135047 m3; lognormal variance with pedigree 0.76768, pedigree (1,1,4,1,1)
  Water vapour from waste humidity, hydrogen oxidation and part of the process water.
  Uncertainty: Uncertainty calculated from uncertainty in waste composition, process water input and the uncertainty of fraction to air.
- Bromine [water, ground-, long-term]: 0.00034733 kg; lognormal variance with pedigree 0.43341, pedigree (1,1,4,1,1)
  (same comment as for Lead)
- Sulfate [water, surface water]: 0.00027575 kg; lognormal variance with pedigree 0.36559, pedigree (1,1,4,1,1)
  (same comment as for Cobalt)
- Water [water, surface water]: 0.000379695 m3; lognormal variance with pedigree 1.1698, pedigree (1,1,4,1,1)
  Process water released to surface water.
  Uncertainty: uncertainty calculated from uncertainty in process water input and the uncertainty of fraction to surface water.
- Fluoride [water, ground-, long-term]: 9.4515e-6 kg; lognormal variance with pedigree 0.79072, pedigree (1,1,4,1,1)
  (same comment as for Lead)
- DOC, Dissolved Organic Carbon [water, surface water]: 0.0002863 kg; lognormal variance with pedigree 0.025136, pedigree (1,1,4,1,1)
  (same comment as for Cobalt)
- Arsenic, ion [water, ground-, long-term]: 1.1163e-6 kg; lognormal variance with pedigree 1.4995, pedigree (1,1,4,1,1)
  (same comment as for Lead)
- TOC, Total Organic Carbon [water, surface water]: 0.0002863 kg; lognormal variance with pedigree 0.025136, pedigree (1,1,4,1,1)
  (same comment as for Cobalt)
- Barium [water, ground-, long-term]: 0.00013131 kg; lognormal variance with pedigree 1.2472, pedigree (1,1,4,1,1)
  (same comment as for Lead)
- Nitrate [water, surface water]: 2.4813e-5 kg; lognormal variance with pedigree 0.39079, pedigree (1,1,4,1,1)
  (same comment as for Cobalt)
- Cobalt [water, ground-, long-term]: 2.6631e-5 kg; lognormal variance with pedigree 1.0895, pedigree (1,1,4,1,1)
  (same comment as for Lead)
- Chloride [water, surface water]: 0.00095599 kg; lognormal variance with pedigree 0.26437, pedigree (1,1,4,1,1)
  (same comment as for Cobalt)
- Cadmium, ion [water, ground-, long-term]: 3.7197e-6 kg; lognormal variance with pedigree 5.1657, pedigree (1,1,4,1,1)
  (same comment as for Lead)
- Bromine [water, surface water]: 0.006217 kg; lognormal variance with pedigree 0.10846, pedigree (1,1,4,1,1)
  (same comment as for Cobalt)
- Carbon monoxide, fossil [air, urban air close to ground]: 1.7476e-5 kg; lognormal variance with pedigree 0.73025, pedigree (1,1,4,1,1)
  (same comment as for NMVOC, non-methane volatile organic compounds, unspecified origin)
- Chromium VI [water, ground-, long-term]: 2.0766e-6 kg; lognormal variance with pedigree 2.4967, pedigree (1,1,4,1,1)
  (same comment as for Lead)
- Fluoride [water, surface water]: 4.1231e-6 kg; lognormal variance with pedigree 0.82896, pedigree (1,1,4,1,1)
  (same comment as for Cobalt)
- Carbon dioxide, fossil [air, urban air close to ground]: 3.1468 kg; lognormal variance with pedigree 0.00868775, pedigree (1,1,4,1,1)
  (same comment as for Hydrogen chloride)
- Copper, ion [water, ground-, long-term]: 0.00010075 kg; lognormal variance with pedigree 0.95104, pedigree (1,1,4,1,1)
  (same comment as for Lead)
- Barium [water, surface water]: 7.6261e-8 kg; lognormal variance with pedigree 0.71621, pedigree (1,1,4,1,1)
  (same comment as for Cobalt)
- Methane, fossil [air, urban air close to ground]: 1.5421e-7 kg; lognormal variance with pedigree 0.069437, pedigree (1,1,4,1,1)
  (same comment as for NMVOC, non-methane volatile organic compounds, unspecified origin)
- Mercury [water, ground-, long-term]: 1.7185e-7 kg; lognormal variance with pedigree 1.6359, pedigree (1,1,4,1,1)
  (same comment as for Lead)
- Arsenic, ion [water, surface water]: 7.0754e-7 kg; lognormal variance with pedigree 1.3814, pedigree (1,1,4,1,1)
  (same comment as for Cobalt)
- Sulfur dioxide [air, urban air close to ground]: 7.1761e-6 kg; lognormal variance with pedigree 0.72898, pedigree (1,1,4,1,1)
  (same comment as for Hydrogen chloride)
- Manganese [water, ground-, long-term]: 6.1064e-5 kg; lognormal variance with pedigree 1.2779, pedigree (1,1,4,1,1)
  (same comment as for Lead)
- Cadmium, ion [water, surface water]: 4.1237e-9 kg; lognormal variance with pedigree 1.1263, pedigree (1,1,4,1,1)
  (same comment as for Cobalt)
- Nitrogen oxides [air, urban air close to ground]: 0.00042786 kg; lognormal variance with pedigree 0.30414, pedigree (1,1,4,1,1)
  Sum of fuel-Nox and thermal-NOx emitted to air after DeNOx stage.
  Uncertainty: uncertainty calculated from uncertainty in average N-emissions and uncertainty in the share of thermal NOx and the uncertainty in nitrogen content in *this* waste.
- Nickel, ion [water, ground-, long-term]: 1.9411e-5 kg; lognormal variance with pedigree 1.168, pedigree (1,1,4,1,1)
  (same comment as for Lead)

## Extrapolations
This dataset has been extrapolated from year 2012 to the year of the calculation (2021). The uncertainty has been adjusted accordingly.
