# operation, housing system, cattle, tied

Dataset: EcoSpold 2, unit process
Geography: CA-QC
Time period: 1994-01-01 to 2021-12-31
Technology level: current
Classification: ISIC rev.4 ecoinvent: 0141:Raising of cattle and buffaloes
Classification: EcoSpold01Categories: agricultural means of production/buildings
Tags: Operation
Scenario: Business-as-Usual
System model: Allocation, cut-off by classification
Generated by: Pascal Lesage
Published in: Nemecek, T. 2007
Database: ecoinvent
isCopyrightProtected: true
accessRestrictedTo: 1

## General comment
The module includes the use of energy and auxiliary materials for the operation of lighting, storage and drying of roughage, slurry agitator, milking machine, milk cooling, cleaning, drinking water. The functional unit is 1 livestock unit (LU) during 1 year. The original inventory on which the GLO is based applies to Swiss agricultural buildings. Child dataset exchanges adapted to Quebec context for a number of exchanges. Some exchanges are still based on GLO dataset - uncertainty adjusted accordingly.
[This dataset was already contained in the ecoinvent database version 2. It was not individually updated during the transfer to ecoinvent version 3. Life Cycle Impact Assessment results may still have changed, as they are affected by changes in the supply chain, i.e. in other datasets. This dataset was generated following the ecoinvent quality guidelines for version 2. It may have been subject to central changes described in the ecoinvent version 3 change report (http://www.ecoinvent.org/database/ecoinvent-version-3/reports-of-changes/), and the results of the central updates were reviewed extensively. The changes added e.g. consistent water flows and other information throughout the database. The documentation of this dataset can be found in the ecoinvent reports of version 2, which are still available via the ecoinvent website. The change report linked above covers all central changes that were made during the conversion process.]

## Included activities end
The inventory takes into account the energy and auxiliary materials like water, lubricating oil and cleaning agents for the use of the described module for one year. Also included is the use of the infrastructure with the binding of a certain part of the appropriate infrastructure module. Not taken into account were the direct emission of the animal husbandry, fodder production and produced waste water.

## Technology
The use of energy and auxiliary materials are calculated for the conditions defined in the infrastructure-module with literature data and experts knowledge.

## Time period
Period indicated in the reference.

## Parameters
- fraction, water, deionised, to air: 0.15 dimensionless; lognormal variance with pedigree 0.092025, pedigree (4,4,3,2,4)
- fraction, tap water, to air: 0.15 dimensionless; lognormal variance with pedigree 0.092025, pedigree (4,4,3,2,4)
- fraction, process water, to air: 0.15 dimensionless; lognormal variance with pedigree 0.092025, pedigree (4,4,3,2,4)

## Reference product
- operation, housing system, cattle, tied, per animal unit: 1 unit; CPC 8612: Animal husbandry services; By-product classification allocatable product
  production volume 488402 unit; = 0.25*205000/1 + 0*164000/2 + 0*154000/2 + 0.5*90655/1 + 0.927*366000/1 + 0.5*136875/5 + 0.5*145000/5 + 0.5*77421/2 + 0.25*20000/1
    The calculation depends on three types of values: the number of cattle in Quebec in 2011, the number of cattle of each type, and the number of cattle per Livestock Unit. These values were collected for nine types of cattle.
    Source [1] gives number of cattle in Québec in 2011, per type. 20 000 culls was added according to Bruno Langlois, expert in cattle production.
    Source [2] gives convertion factor in livestock unit (LSU).
    Sources [3] and [4] give proportion of tied housing system per type of cattle (beef cows: 25% tied, feeder calves: 0% tied, fed cattle: 0% tied, dairy cows: 92% tied and cull : 25% tied)
    Hypotheses was set for cull cattle (50% tied), bob calves (92% tied), milk-fed veal (92% tied) and grain-fed veal (92% tied).
    Sources [5], [6] et [7] give the weight of different cattle in order to apply the right conversion factor in LSU.
    Sources :
    [1] : http://www.bovin.qc.ca/fr/la-production/portrait-global/coup-doeil.php
    [2] : http://www.cmquebec.qc.ca/centre-documentation/popup/documents/AnnexesA_H.pdf
    [3] : http://www.infolait.gc.ca/index_f.php?s1=dff-fcil&s2=farm-ferme&page=barn
    [4] : Bruno Langlois, expert in cattle production (bruno.langlois@lacoop.coop)
    [5] : http://www.bovin.qc.ca/fr/la-production/bouvillon-dabattage/coup-doeil.php
    [6] : http://www.delimax.com/activite4.php?idDetail=1&page=1
    [7] : http://www.delimax.com/activite3.php?idDetail=1&page=1
  property price 379.831 EUR2005
    Calculated based on inputs: The price of the product has been calculated as a sum of the values of the material and energy inputs for this product. This value is therefore a rough estimation. It may underestimate the real price since there are additional expenses when producing any product. These expences can include for example labour costs, treatment of waste materials and profit for the producer. Please consider carefully whether this level of data quality is acceptable for your application.

## Inputs from technosphere
- lubricating oil: 0.26 kg; lognormal variance with pedigree 0.0427, pedigree (2,2,5,5,1)
  properties: wet mass 1 kg, heating value, net 40.2 MJ, dry mass 1 kg, carbon content, fossil 0.75
  note on heating value, net: Literature value, Source: IPCC 2006, 2006 IPCC Guidelines for National Greenhouse Gas Inventories, Prepared by the National Greenhouse Gas Inventories Programme, Eggleston H.S., Buendia L., Miwa K., Ngara T. and Tanabe K. (eds). Published: IGES, Japan
  note on carbon content, fossil: Lubricating oil is produced from diesel. C-content/dry mass of fats and oils considered 75%, from: ecoinvent v2.2 report, n 15a, pg 40
- electricity, low voltage: 991.64 kWh; source Quantis 2012; lognormal variance with pedigree 0.0413, pedigree (2,2,5,1,1)
- housing system, cattle, tied, per animal unit: 0.0333 unit; source Quantis 2012; lognormal variance with pedigree 0.3427, pedigree (2,2,5,5,1)
  30 yr life span is more representative for Quebec than the global assumption of 50 years. Source: Quantis 2012
- soda ash, light, crystalline, heptahydrate: 4.48 kg; source Quantis 2012; lognormal variance with pedigree 0.0433, pedigree (3,2,5,1,2)
  scaled from parent GLO dataset based on relative water consumption
  properties: heating value, net 3.43 MJ, wet mass 1 kg, carbon content, fossil 0.0517241, dry mass 1 kg
- sodium metasilicate pentahydrate, 58% active substance, powder: 2.63 kg; source Quantis 2012; lognormal variance with pedigree 0.0433, pedigree (3,2,5,1,2)
  scaled from parent GLO dataset based on relative water consumption
  properties: wet mass 1 kg, dry mass 1 kg, heating value, net 5.71 MJ
- water, deionised: 2.22 kg; source Quantis 2012; lognormal variance with pedigree 0.0427, pedigree (3,2,5,1,1)
  Modelled, based on "Agricultural Buildings" - pdf-document on the dedicated talk page of ecoinvent (www.ecoinvent.org/talk-pages)
  properties: wet mass 1 kg
- tap water: 43062.6 kg; source Quantis 2012; lognormal variance with pedigree 0.0413, pedigree (2,2,5,1,1)
  drinking and service water for dairy cows, calves, heifers and bulls. In Quebec dairy farm, water is suposedly taken from ground well (Quantis, 2012)
  properties: carbon content, fossil 0.00178991, dry mass 0.000337476 kg, wet mass 1 kg, water content 2962.17
  note on carbon content, fossil: Bicarbonate content is 2.93 mol/m3. CO2 content is 0.1 mol/m3 (ecoinvent v2.2 report 8, Tab 93.1).
- chemical, organic: 4.57 kg; source Quantis 2012; lognormal variance with pedigree 0.0433, pedigree (3,2,5,1,2)
  scaled from parent GLO dataset based on relative water consumption
  properties: heating value, net 19.03 MJ, wet mass 1 kg, carbon content, fossil 0.628, dry mass 1 kg
  note on carbon content, fossil: This dataset is an unweighted average of 20 organic substances (listed in Tab 88.1, ecoinvent v2.2 report 8, part II), being part of the top100 chemicals included in this database. The C-content has also been calculated as an unweighted average of the C content of the substances composing this dataset.

## Emissions to nature
- Water [air, unspecified]: 6.12031 m3; lognormal variance with pedigree 0.0827, pedigree (2,2,5,5,1)
  Calculated value based on literature values and expert opinion. See comments in the parametres" comment field.
- Water [water, unspecified]: 34.6818 m3; lognormal variance with pedigree 0.0827, pedigree (2,2,5,5,1)
  (same comment as for Water)
  property dry mass 0 kg; name DM
  property water in wet mass 1000 kg; name WWM
  property carbon content, fossil 0; name C_content_fossil
  property carbon content, non-fossil 0; name C_content_non_fossil
  property wet mass 1000 kg; name WM

## Sampling procedure
In the use of energy and auxiliary materials are big differences between the farms. The inventory is based on mean values from CH and WEU.

## Extrapolations
This dataset has been extrapolated from year 2002 to the year of the calculation (2021). The uncertainty has been adjusted accordingly.
