# treatment of used vegetable cooking oil by anaerobic digestion

Dataset: EcoSpold 2, unit process
Geography: RoW
Time period: 2009-01-01 to 2021-12-31
Technology level: current
Classification: ISIC rev.4 ecoinvent: 3830:Materials recovery
Scenario: Business-as-Usual
System model: Allocation, cut-off by classification
Generated by: Avraam Symeonidis
Published in: Dauriat A. 2011
Database: ecoinvent
isCopyrightProtected: true
accessRestrictedTo: 1

## General comment
This multi-output activity produces biogas and digestate from used vegetable oil. The methane content of the biogas is calculated depending on the substrate input.

## Included activities start
Input of used edible oil to incoming storage at the biogas plant.

## Included activities end
The treatment includes storage (and 10% of the total pre-treatment storage emissions) of the substrates, anerobic fermentation, as well as the storage after fermentation. The activity ends with the biogas and digestate being available at the biogas plant. Furthermore, the calorific value of the biogas only accounts for the methane content excluding the H2S content in it.The storage of the substrate before the AD process is assumed to be an open air system which has higher emission factors than an under cover system. Finally, the dataset incorporates emissions of CO2 and CH4 due to the storage of the substrate before the AD process. NH3 and N2O emissions to air from the substrate storage are considered irrelevant since the substrate itself does not have a respective nitrogen content. Emissions from the storage of the digestate are not included in this dataset.

## Geography
Conditions refer to biogas production in Switzerland.

## Technology
The storage of the substrate before the anaerobic digestion process is considered to be open-air.

## Parameters
- lifetime of facility: 20 year; name lifetime; lognormal variance with pedigree 0.0426, pedigree (2,1,1,5,1)
- emission factor CH4 digestate: 0.000468283 dimensionless; name EF_CH4_digestateDM; lognormal variance with pedigree 0.0426, pedigree (2,1,1,5,1)
  Calculated as 0.67*0.345*0.1*OM where OM is the organic matter content (volatile solids) per wet mass. OM for digestate: 0.02
- share of size class 6E5 m3: 0.483 dimensionless; name share_600000m3; lognormal variance with pedigree 0.3026, pedigree (2,1,1,5,1)
- share of soluble nitrogen in digestate: 0.7 dimensionless; name N_soluble_digestate
- methane density (ntp): 0.668 kg/m3; name methane_density
  calculated for normal conditions of temperature and pressure. the value represents kg of CH4 per m3 of CH4
- share of soluble nitrogen in substrate: 0.62 dimensionless; name N_soluble_substrate
- process heat use factor: 3.47 dimensionless; name factor_process_heat; lognormal variance with pedigree 0.0032, pedigree (2,1,1,5,1)
  The amount refers to heat needed for the maintenance of a 150 kWe biogas plant with a biogas engine. Values are based on the survey of 18 biogas plants in Switzerland in 2009, resulting in a mean value of 3.47 MJ per m3 of biogas
- share of carbon dioxide in biogas from used vegetable oil: 0.292 dimensionless; name share_CO2_oil; = 1-share_CH4_oil-0.008
  the amount is calculated assuming that O2 is present in Biogas at a cncentration of 0.3% v/v and H2S is present in Biogas at a concentration of 0.5% v/v. Hence, abstracting those values along with the concentration of CH4 in % v/v yields the amount of CO2.
- carbon conversion efficiency of glycerine in digester: 0.8353 dimensionless; name C_conversion_glycerine
- electricity use factor: 0.158 dimensionless; name factor_el
  The amount refers to electricity needed for the maintenance of a 350 kWe biogas plant with a biogas engine. Values are based on the survey of 18 biogas plants in Switzerland in 2009, resulting in a mean value of 0.158 kWh per m3 of biogas
- share of storage time: 0.1 dimensionless; name time_share
- emission factor CO2: 0.07 dimensionless; name EF_CO2; lognormal variance with pedigree 0.0032, pedigree (2,1,1,5,1)
- emission factor ammonia: 0.0135 dimensionless; name EF_NH3; lognormal variance with pedigree 0.0426, pedigree (2,1,1,5,1)
  Emission factor (kg/kg soluble nitrogen) for covered storage (10% of the factor for open storage)
- emission factor N2O: 0.005 dimensionless; name EF_N2O; lognormal variance with pedigree 0.0426, pedigree (2,1,1,5,1)
- share of size class 14E5 m3: 0.483 dimensionless; name share_1400000m3; lognormal variance with pedigree 0.3026, pedigree (2,1,1,5,1)
- share of methane in biogas from used vegetable oil: 0.7 dimensionless; name share_CH4_oil
- efficiency of biogas production from vegetable oil dry mass: 0.99 m3/kg; name EF_oilDM
- share of size class 2E5 m3: 0.034 dimensionless; name share_200000m3; lognormal variance with pedigree 0.3026, pedigree (2,1,1,5,1)
- carbon dioxide density (ntp): 1.842 kg/m3; name CO2_density
  calculated for normal conditions of temperature and pressure. the value represents kg of CO2 per m3 of CO2
- emission factor N2O, digestate: 0.002 dimensionless; name EF_N2O_digestate
- emission factor CH4 oil dry mass: 0.0231 dimensionless; name EF_CH4_oilDM; lognormal variance with pedigree 0.0426, pedigree (2,1,1,5,1)
  Calculated as 0.67*0.345*0.1*OM where OM is the organic matter content (volatile solids) per wet mass. OM for oil: 1
- carbon conversion efficiency of vegetable oil in digester: 0.6732 dimensionless; name C_conversion_oil

## Reference product
- used vegetable cooking oil: 0 kg; source Dauriat A. 2011; By-product classification Recyclable; CPC 39120: Bran and other residues from the working of cereals or legumes; vegetable materials and vegetable waste, veget[…]
  Shares of substrates as in Switzerland 2009
  production volume 0 kg; = ABS(oil)*PV_biogas/biogas
    Calculated from production volume of biogas using the relative outputs.
  property price 0 EUR2005; name oil_price_EUR2005
    Assumed without economic value
  property carbon content, non-fossil 0.55; name C_oil
  property heating value, net 38.4 MJ
    Values is approximated from HHV from "vegetable oil, crude". Source: Radovanovic,M.; Zivanovic,T.; Stojiljkovic,D.; Jovanovic,V.; Jerinic,N.; Knezevic,S. et.al. Utilization of sunflower husk as a fuel for industrial boilers - 20 years experience. Proc. 5th Eur. Conf. on Industrial Furnaces&Boilers 2000,vol.2,p.221-233.
    Available at: https://phyllis.nl/Biomass/View/2152
  property dry mass 0.99 kg; name DM_oil
  property carbon content 0.55
    carbon content on a dry matter basis (reserved; not for manual entry)
  properties: wet mass 1 kg, water content 0.010101, carbon content, fossil 0, water in wet mass 0.01 kg, carbon allocation 0.5445 kg
- biogas: 1 m3; = ABS(oil)*DM_oil*EF_oilDM; source Dauriat A. 2011; CPC 17200: Coal gas, water gas, producer gas and similar gases, other than petroleum gases and other gaseous hydrocarbons; By-product classification allocatable product; CAS 14493-06-2; pedigree (1,1,1,1,1)
  calculated by multypling the followings: mass of substrate (kg of wet mass) x DM of substrate (kg of DM per kg wet mass) x OM of substrate (kg of OM per kg of DM) x biogas potential (m3 of biogas per kg of OM). The result yields m3 of biogas
  production volume 5.75553e7 m3; name PV_biogas
  property share of methane in biogas 0.0251788; name share_CH4_in_biogas; = ABS(oil)*DM_oil*EF_oilDM*share_CH4_oil
  property price 0.109 EUR2005; name biogas_price_EUR2005
  property wet mass 1.00546 kg; = share_CO2_oil* CO2_density+ share_CH4_oil* methane_density
  property carbon content, non-fossil 0.49739; = (12/16)* methane_density*share_CH4_oil+(12/44)* CO2_density*share_CO2_oil
  property dry mass 1.00546 kg; name DM_biogas; = share_CO2_oil* CO2_density+ share_CH4_oil* methane_density
  properties: heating value, net 0.90354 MJ, water content 0, carbon content, fossil 0, water in wet mass 0 kg, carbon content 0.49739, carbon allocation 0.500108 kg

## By-products
- biogas: 0 m3; source Dauriat A. 2011; CPC 17200: Coal gas, water gas, producer gas and similar gases, other than petroleum gases and other gaseous hydrocarbons; By-product classification allocatable product; CAS 14493-06-2; pedigree (1,1,1,1,1)
  (same comment as for biogas)
  production volume 0 m3; name PV_biogas
    Production volume amount was scaled from the respective Swiss value. GDP scaling was employed with Switzerland accounting for roughly 0.8% of the global GDP, yielding a global production volume of 5801944 m3. Production volume comment for Switzerland: According to the Swiss ministry of Environment, in 2016 in Switzerland, 1027 TJ of energy produced from anaerobic digestion dedicated to the treatment of Agricultural wastes. Values aexpressed in gross energy production. It is further assumed, that 1.7% of the biogass production from anaerobic digestion of biowaste, is attributed to vegetable cooking oil, yielding in the end a production volume of 464156 m3 of biogass. Calculation made by assuming a calorific value of 21 MJ per Nm3 of biogas. Source: Kaufmann, U. (2017). Schweizerische Statistik der erneuerbaren Energien. Ausgabe 2016, (2016), 75. Retrieved from http://www.bfe.admin.ch/php/modules/publikationen/stream.php?extlang=de&name=de_729286095.pdf&endung=Schweizerische
  property carbon content 0.49739
    carbon content on a dry matter basis (reserved; not for manual entry)
  properties: heating value, net 0.90354 MJ, water content 0, carbon content, fossil 0, water in wet mass 0 kg, carbon allocation 0.500108 kg
- digester sludge: 0 kg; source Dauriat A. 2011; CPC 39920: Sewage sludge; By-product classification Recyclable; pedigree (1,1,1,1,1)
  Calculated as residual from the mass balance with CO2 and CH4. The density of biogas is assumed to be 1.016627 kg /m3 of BG in normal conditions of temperature and pressure.
  production volume 0 kg; = ABS(digestate)*PV_biogas/biogas
    Calculated from production volume of biogas using the relative outputs.
  property price 0 EUR2005; name digestate_price_EUR2005
    Assumed without economic value
  property carbon content, non-fossil 0.391; name C_digestate; = 0.85*0.46
    ??
  property heating value, net 2.42 MJ
    Value taken from the general comment of the treatment dataset.
  property dry mass 0.3 kg; name DM_digestate
  property carbon content 0.391
    carbon content on a dry matter basis (reserved; not for manual entry)
  properties: carbon content, fossil 0, water content 2.33333, water in wet mass 0.7 kg, wet mass 1 kg, carbon allocation 0.1173 kg

## Inputs from technosphere
All rows: source Dauriat A. 2011
- heat, central or small-scale, other than natural gas: 0 MJ; pedigree (1,1,1,1,1)
  Calculated with a fixed factor per m3 biogas produced
  properties: heating value, net 1 MJ
- anaerobic digestion plant, agriculture, with methane recovery: 2.86e-7 unit; = biogas*(share_200000m3/(share_200000m3+share_600000m3+share_1400000m3)*(200/350)^0.7+share_600000m3/(share_200000m3+share_600000m3+share_1400000m3)*(600/350)^0.7+share_1400000m3/(share_200000m3+share_600000m3+share_1400000m3)*(1400/350)^0.7)/(lifetime*350000); lognormal variance with pedigree 0.43, pedigree (5,5,5,5,4)
  Lifespan is taken as being equal to 20 years.In order to take account of the scale effect, the following formula is applied:
  Ui = U0 x (Ci/C0)^0,7
  where Ui is the number of infrastructure units for the reference case i, in “units”; U0 = 1 [unit] is the number of infrastructure units for the reference facility "anaerobic digestion plant, agriculture, with methane recovery"; Ci is the annual biogas production for the reference case i, en m3/year; C0 = 350,000 [m3/year] is the annual biogas production of the reference facility "anaerobic digestion plant, agriculture, with methane recovery".
  The infrastructure input per kg of substrate is calculated according to the following formula:
  Ii = Ui x Yi / (20 x Ci)
  where Ii is the infrastructure input “anaerobic digestion plant, covered, agriculture” for the reference case i, in “units” per kg of substrates;
  Ui is the number of infrastructure units for the reference case i, in “units”;
  Yi is the biogas production yield for the reference case i, in m3 of biogas per kg of substrates; Ci is the annual biogas production for the reference case i, in m3/year.
- electricity, low voltage: 0 kWh; pedigree (1,1,1,1,1)
  Calculated with a fixed factor per m3 biogas produced
- used vegetable cooking oil: 1.0203 kg
  Shares of substrates as in Switzerland 2009
  production volume 5.87239e7 kg
  properties: wet mass 1 kg, water content 0.010101, heating value, net 38.4 MJ
  note on heating value, net: Values is approximated from HHV from "vegetable oil, crude". Source: Radovanovic,M.; Zivanovic,T.; Stojiljkovic,D.; Jovanovic,V.; Jerinic,N.; Knezevic,S. et.al. Utilization of sunflower husk as a fuel for industrial boilers - 20 years experience. Proc. 5th Eur. Conf. on Industrial Furnaces&Boilers 2000,vol.2,p.221-233. Available at: https://phyllis.nl/Biomass/View/2152
- digester sludge: -0.0148401 kg; lognormal variance with pedigree 0.1306, pedigree (5,5,5,5,4)
  (same comment as for digester sludge)
  production volume 854123 kg
  properties: water content 2.33333, wet mass 1 kg, heating value, net 2.42 MJ
  note on heating value, net: Value taken from the general comment of the treatment dataset.
- heat, central or small-scale, other than natural gas: 0.0470127, 3.42299 MJ (2 entries); lognormal variance with pedigree 0.1306, pedigree (5,5,5,5,4)
  Calculated with a fixed factor per m3 biogas produced
- electricity, low voltage: 0.00164947, 0.000300338, 0.00677976, 0.0236869, 0.00483581, 0.0742451, 0.0120116, 0.034491 kWh (8 entries); lognormal variance with pedigree 0.1306, pedigree (5,5,5,5,4)
  Calculated with a fixed factor per m3 biogas produced

## Emissions to nature
- Carbon dioxide, non-fossil [air, non-urban air or from high stacks]: 0.0144844 kg; = 5.21E-04; source Alig, M. 2012; lognormal variance with pedigree 0.1306, pedigree (5,5,5,5,4)
  Calculated value according to literature:
  ES(CO2) = (44/12) x C(C) x EF4 x t
  where ES(CO2) is the carbon dioxide emissions in kg CO2/t of wet substrate;
  C(C) is the average carbon content of the substrates in kg C/t of wet substrate; This is calculated to be 735.075 kg of C/t of wet substrate. It is calculated by multiplying the DM of the substrate (0.99% on wet mass basis) with the OM content (0.99% OM on a dry matter basis) and 0.55% which is assumed to be the amount of Carbon (0.75% on the OM basis).
  EF4 = 7% is the carbon dioxide emission factor;
  t is the percentage of the time that the substrate is stored at the biogas producer’s (0.1, supposed that the substrates are stored at the biogas producer’s for 10% of the stockage time before digestion).
  The value includes emissions from the storage of the substrate until its use from the anaerobic digestion process but doesn’t include emissions from the storage of the digestate until its final use.
  Reference:
  Dauriat A., Gaillard G., Alig M., Scharfy D., Membrez Y., Bachmann N., Steiner R., Charles R., Maltas A., Sinaj S., Analyse de cycle de vie de la production centralisée et décentralisée de biogaz en exploitations agricoles : Rapport final. Hrsg. Station de recherche Agroscope Reckenholz-Tänikon ART & Station de recherche Agroscope Changins-Wädenswil ACW, Zürich et Nyon. Avril, 2012, 1-147 S.
- Methane, non-fossil [air, non-urban air or from high stacks]: 0.00237144 kg; = 8.53E-05; source Alig, M. 2012; lognormal variance with pedigree 0.17, pedigree (5,5,5,5,4)
  Calculated value according to literature:
  ES(CH4) = 0.670 x Bo x C(OM) x EF1 x t
  where ES(CH4) is the methane emissions in kg CH4/t of wet substrate;
  Bo = 0.345 is the substrate methane emission potential in m3 CH4/kg OM;
  C(OM) is the average organic-matter content of the substrates in kg OM/t of wet substrate;
  This is calculated (980.1 kg OM/t of wet substrate) by multiplying the DM of the substrate (0.99% on wet mass basis) with the OM content (0.99% OM on a dry matter basis).
  EF1 = 10% is the methane emission factor;
  t is the percentage of the time that the substrate is stored at the biogas producer’s (0.1, supposed that the substrates are stored at the biogas producer’s for 10% of the stockage time before digestion)
  The value includes emissions from the storage of the substrate until its use from the anaerobic digestion process but also emissions from the storage of the digestate until its final use.
  Reference:
  Dauriat A., Gaillard G., Alig M., Scharfy D., Membrez Y., Bachmann N., Steiner R., Charles R., Maltas A., Sinaj S., Analyse de cycle de vie de la production centralisée et décentralisée de biogaz en exploitations agricoles : Rapport final. Hrsg. Station de recherche Agroscope Reckenholz-Tänikon ART & Station de recherche Agroscope Changins-Wädenswil ACW, Zürich et Nyon. Avril, 2012, 1-147 S.

## Sampling procedure
The data for this dataset was generated within a project in 2009-2011 financed by the Swiss Federal Office for Energy in order to analyse the life cycle of Swiss agricultural biogas production in centralised and decentralised plants. The data used for modelling were taken from a survey of 18 biogas plants in Switzerland and literature. Assumptions were validated with biogas experts. 7 new reference biogas production systems have been established based on the questionnaires, comprising the fermentation of manure, manure with different ratios of co-substrate addition and 3 sizes of biogas plants (small = 2E5 m3, medium = 6E5 m3, large = 14E5 m3).

## Extrapolations
Data refer to Swiss production. Production volumes and uncertainty values have been changed (completeness and geographical index set from 1 to 5).
