# resistor production, wirewound, through-hole mounting

Dataset: EcoSpold 2, unit process
Geography: GLO
Time period: 1994-01-01 to 2021-12-31
Technology level: current
Classification: EcoSpold01Categories: electronics/component
Classification: ISIC rev.4 ecoinvent: 2610:Manufacture of electronic components and boards
Scenario: Business-as-Usual
System model: Allocation, cut-off by classification
Generated by: Roland Hischier
Published in: Hischier R. 2007
Database: ecoinvent
isCopyrightProtected: true
accessRestrictedTo: 1

## General comment
This dataset represents the production of 1 kg of wirewound type resistors for the through-hole mounting technology. It is based on the assumption that a typical wirewound type resistor electronic module has an average weight of 3.8 g.The data represent a typical wirewound type resistor for through-hole mounting, used in the information and communication technology. Material data are taken from datasheets of producers of such resistors. Infrastructure and production efforts are based on own assumptions. The production efforts represent not a specific resisitor type and have thus, accordingly higher uncertainties.
[This dataset was already contained in the ecoinvent database version 2. It was not individually updated during the transfer to ecoinvent version 3. Life Cycle Impact Assessment results may still have changed, as they are affected by changes in the supply chain, i.e. in other datasets. This dataset was generated following the ecoinvent quality guidelines for version 2. It may have been subject to central changes described in the ecoinvent version 3 change report (http://www.ecoinvent.org/database/ecoinvent-version-3/reports-of-changes/), and the results of the central updates were reviewed extensively. The changes added e.g. consistent water flows and other information throughout the database. The documentation of this dataset can be found in the ecoinvent reports of version 2, which are still available via the ecoinvent website. The change report linked above covers all central changes that were made during the conversion process.]

## Included activities start
From reception of metals, plastics at the factory gate.

## Included activities end
This dataset includes raw material input and production efforts for the production of currently used wirewound resistors for through-hole mounting technology.

## Geography
Data represent a global valuable composition of wirewound type resistors.

## Technology
Average technology for the production of resistors and potentiometers - comprising terminmation printing; resistive body printing; glass coat printing; laser trimming; substrate stripping (SMT) resp. ceramic rods; deposition processes; ageing; capping (THT) resp. printing; curing; punching; revetting; molding (ptoentiom.)

## Reference product
- resistor, wirewound, through-hole mounting: 1 kg; source Hobbs L. 2007; By-product classification allocatable product; CPC 47120: Electrical resistors (except heating resistors)
  Wirewound type resistor is a highly accurate resistor with a very low TCR and can be accurate within 0.005%. A temperature coefficient of resistance (TCR) of as little a 3 part per million per degree Celsius (3ppm/°C) can be achieved. The frequency response of this type is not good. Their power handling capability is very small. However these components are too expensive for general use and are normally used only in highly accurate DC measuring equipment, and as reference resistors for voltage regulators and decoding networks.
  EcoSpold01Location=GLO
  production volume 1 kg
    Dummy value to be replaced by value to be calculated from the demand for this treatment activity
  property price 20.8256 EUR2005
    Calculated based on inputs: The price of the product has been calculated as a sum of the values of the material and energy inputs for this product. This value is therefore a rough estimation. It may underestimate the real price since there are additional expenses when producing any product. These expences can include for example labour costs, treatment of waste materials and profit for the producer. Please consider carefully whether this level of data quality is acceptable for your application.
  property carbon content, fossil 0.0174395
    Calculated as the addition of C contents in the product composition, and referred to 1 kg DM resistor.
  property carbon content, non-fossil 0
    (same comment as for resistor, wirewound, through-hole mounting)
  property carbon content 0.0174395
    carbon content on a dry matter basis (reserved; not for manual entry)
  properties: water content 0, water in wet mass 0 kg, dry mass 1 kg, wet mass 1 kg, carbon allocation 0.0174395 kg

## Inputs from technosphere
- aluminium oxide, non-metallurgical: 0 kg; source ZVEI 2006; pedigree (1,1,1,1,1)
  Calculated Value. The production of 1 kg of resistors lead to a waste amount of 0.23 kg unused raw materials. Hence, this dataset here has an input of 1.23 kg of raw materials per kg of resistor. The split to the different raw materials (metals, plastics, etc.) is based on the reported material specifications.
  EcoSpold01Location=RER
  Uncertainty: company information
  properties: wet mass 1 kg, dry mass 1 kg
- silicone product: 0 kg; source ZVEI 2006; pedigree (1,1,1,1,1)
  EcoSpold01Location=RER
  Calculated Value. The production of 1 kg of resistors lead to a waste amount of 0.23 kg unused raw materials. Hence, this dataset here has an input of 1.23 kg of raw materials per kg of resistor. The split to the different raw materials (metals, plastics, etc.) is based on the reported material specifications.
  Uncertainty: company information
  properties: dry mass 1 kg, heating value, net 9.83 MJ, carbon content, fossil 0.324324, wet mass 1 kg
  note on carbon content, fossil: The term silicones is used for compounds in which silicon atoms are linked via oxygen atoms, each silicon atom bearing one or several organic groups. In industrially important silicones, these groups are usually methyl or phenyl (ecoinvent v2.2 report 8_part71 & Ullmann). The chemical formula was considered to be [Si(CH3)2O]n (Ullmann).
- resistor, auxilliaries and energy use: 1 kg; lognormal variance with pedigree 0.134, pedigree (3,4,5,1,4)
  Estimation - details see this other activity dataset
  EcoSpold01Location=GLO
  Uncertainty: rough estimation
- tin: 0.02706 kg; source ZVEI 2006; lognormal variance with pedigree 0.042, pedigree (1,4,5,1,1)
  (same comment as for silicone product)
  properties: dry mass 1 kg, wet mass 1 kg
- nickel, class 1: 0.01353 kg; source ZVEI 2006; lognormal variance with pedigree 0.042, pedigree (1,4,5,1,1)
  EcoSpold01Location=GLO
  Calculated Value. The production of 1 kg of resistors lead to a waste amount of 0.23 kg unused raw materials. Hence, this dataset here has an input of 1.23 kg of raw materials per kg of resistor. The split to the different raw materials (metals, plastics, etc.) is based on the reported material specifications.
  Uncertainty: company information
  properties: dry mass 1 kg, wet mass 1 kg
- aluminium, wrought alloy: 0.00492 kg; source ZVEI 2006; lognormal variance with pedigree 0.042, pedigree (1,4,5,1,1)
  (same comment as for silicone product)
  properties: dry mass 1 kg, wet mass 1 kg
- steel, low-alloyed, hot rolled: 0.13653 kg; source ZVEI 2006; lognormal variance with pedigree 0.042, pedigree (1,4,5,1,1)
  (same comment as for silicone product)
  properties: carbon content, fossil 0.005, dry mass 1 kg, wet mass 1 kg
  note on carbon content, fossil: Low alloyed steel composition given in Tab. 3.2 ecoinvent v2.2 report 10_partII. Steel assumed to have a C content of 0.5%
- pig iron: 0 kg; source ZVEI 2006; pedigree (1,1,1,1,1)
  Calculated Value. The production of 1 kg of resistors lead to a waste amount of 0.23 kg unused raw materials. Hence, this dataset here has an input of 1.23 kg of raw materials per kg of resistor. The split to the different raw materials (metals, plastics, etc.) is based on the reported material specifications.
  EcoSpold01Location=GLO
  Uncertainty: company information
  properties: carbon content, fossil 0.045, wet mass 1 kg, dry mass 1 kg
  note on carbon content, fossil: Pig iron is the iron produced in the blast furnace. It is an alloy of 94% Fe and more than 2% C (world average 4.5%). (ecoinvent v2.2 report 10_partII)
- lime, packed: 0 kg; source ZVEI 2006; pedigree (1,1,1,1,1)
  EcoSpold01Location=CH
  Calculated Value. The production of 1 kg of resistors lead to a waste amount of 0.23 kg unused raw materials. Hence, this dataset here has an input of 1.23 kg of raw materials per kg of resistor. The split to the different raw materials (metals, plastics, etc.) is based on the reported material specifications.
  Uncertainty: company information
  properties: wet mass 1 kg, carbon content, fossil 0.117492, water content 0.00200401, dry mass 0.998 kg
  note on carbon content, fossil: Table 3.1, ecoinvent v2.2 report 7, part VII, pg 3. MW CaCO3=100, MW MgCO3=84
- copper, cathode: 0.04059 kg; source ZVEI 2006; lognormal variance with pedigree 0.042, pedigree (1,4,5,1,1)
  (same comment as for silicone product)
  properties: wet mass 1 kg, dry mass 1 kg
- silica sand: 0.50036 kg; source ZVEI 2006; lognormal variance with pedigree 0.042, pedigree (1,4,5,1,1)
  EcoSpold01Location=DE
  Calculated Value. The production of 1 kg of resistors lead to a waste amount of 0.23 kg unused raw materials. Hence, this dataset here has an input of 1.23 kg of raw materials per kg of resistor. The split to the different raw materials (metals, plastics, etc.) is based on the reported material specifications.
  Uncertainty: company information
  properties: water content 0.010101, wet mass 1 kg, dry mass 0.99 kg
- glass tube, borosilicate: 0.01476 kg; source ZVEI 2006; lognormal variance with pedigree 0.042, pedigree (1,4,5,1,1)
  Calculated Value. The production of 1 kg of resistors lead to a waste amount of 0.23 kg unused raw materials. Hence, this dataset here has an input of 1.23 kg of raw materials per kg of resistor. The split to the different raw materials (metals, plastics, etc.) is based on the reported material specifications.
  EcoSpold01Location=DE
  Uncertainty: company information
  properties: dry mass 1 kg, wet mass 1 kg
- aluminium oxide, non-metallurgical: 0.252981, 0.0428295 kg (2 entries); source ZVEI 2006; lognormal variance with pedigree 0.042, pedigree (1,4,5,1,1)
  (same comment as for aluminium oxide, non-metallurgical)
- silicone product: 0.00376874, 0.00767026 kg (2 entries); source ZVEI 2006; lognormal variance with pedigree 0.042, pedigree (1,4,5,1,1)
  (same comment as for silicone product)
- pig iron: 0.00542194, 0.0585381 kg (2 entries); source ZVEI 2006; lognormal variance with pedigree 0.042, pedigree (1,4,5,1,1)
  (same comment as for pig iron)
- lime, packed: 0.0399719, 0.00101769, 0.0799204 kg (3 entries); source ZVEI 2006; lognormal variance with pedigree 0.042, pedigree (1,4,5,1,1)
  (same comment as for lime, packed)

## Sampling procedure
literature

## Extrapolations
This dataset has been extrapolated from year 2007 to the year of the calculation (2021). The uncertainty has been adjusted accordingly.

## Review by Rolf Frischknecht 2007-09-14
passed
