# chloromethyl methyl ether production

Dataset: EcoSpold 2, unit process
Geography: RER
Time period: 1979-01-01 to 2021-12-31
Technology level: current
Classification: ISIC rev.4 ecoinvent: 2011:Manufacture of basic chemicals
Classification: EcoSpold01Categories: chemicals/organics
Synonyms: CMME; Chlordimethylether; Methoxymethyl chloride; Dimethylchloroether; Methyl chloromethyl ether; Monochlorodimethyl ether; Chlorodimethyl ether; HSDB 908; chloromethoxymethane
Tags: ConvertedDataset
Scenario: Business-as-Usual
System model: Allocation, cut-off by classification
Generated by: Alex Primas
Published in: Althaus H.-J. 2007
Database: ecoinvent
isCopyrightProtected: true
accessRestrictedTo: 1

## General comment
The functional unit represent 1 kg of anhydrous chloromethyl methyl ether. Large uncertainty of the process data due to weak and aged data on the production process and missing data on process emissions.
[This dataset was already contained in the ecoinvent database version 2. It was not individually updated during the transfer to ecoinvent version 3. Life Cycle Impact Assessment results may still have changed, as they are affected by changes in the supply chain, i.e. in other datasets. This dataset was generated following the ecoinvent quality guidelines for version 2. It may have been subject to central changes described in the ecoinvent version 3 change report (http://www.ecoinvent.org/database/ecoinvent-version-3/reports-of-changes/), and the results of the central updates were reviewed extensively. The changes added e.g. consistent water flows and other information throughout the database. The documentation of this dataset can be found in the ecoinvent reports of version 2, which are still available via the ecoinvent website. The change report linked above covers all central changes that were made during the conversion process.]

## Included activities end
Raw materials and chemicals used for production, transport of materials to manufacturing plant, estimated emissions to air and water from production (incomplete), estimation of enegry demand and infrastructure of the plant (approximation). Solid wastes (as e.g. catalysts) omitted.

## Geography
Data used has no specific geographical origin (stoechiometry). Average europenan processes for raw materials, transport requirements and electricity mix used. For methanol process with regional transport requirement for Switzerland used (Location CH).

## Technology
Production from anhydrous hydrogen chloride, methanol and formaldehyde with a process yield of 95%. Inventory bases on stoechiometric calculations. The emissions to air (0.2 wt.% of raw material input) and water were estimated using mass balance. Treatment of the waste water in a internal waste water treatment plant assumed (elimination efficiency of 90% for C). Production of anhydrous hydrogen chloride approximated with 30% hydrogen chloride solution.

## Time period
Time of literature publication. Main process information source from 1979.

## Parameters
- fraction, cooling water, to air: 0.3875 dimensionless; name fraction_CW_to_air; = (0.5*fraction_CW_OT_to_air)+(0.5*fraction_CW_R_to_air); lognormal variance with pedigree 0.092025, pedigree (4,4,3,2,4)
  Calculated value based on literature value (see comments of the other parametres present in this dataset) and expert opinion. In the case when no industry/literature data are available about the type of cooling or directly fraction, cooling water, to air specific for the process a default assumption is applied. It is assumed that the once-through cooling system is used in 50% of all cases and recirculating system is used in another 50% of all cases.
- fraction, cooling water, once-through system, to air: 0.004 dimensionless; name fraction_CW_OT_to_air; lognormal variance with pedigree 0.0413, pedigree (2,3,1,3,1)
  Calculated based on literature value (Scown, C.D., 2011, Water Footprint of U.S. Transportation Fuels and supplying information of the article) (Vionnet, S., Quantis Water Database - Technical Report, 2012).
- fraction, cooling water, recirculating system, to air: 0.771 dimensionless; name fraction_CW_R_to_air; lognormal variance with pedigree 0.0413, pedigree (2,3,1,3,1)
  (same comment as for fraction, cooling water, once-through system, to air)
- fraction, cooling water, cooling pond system, to air: 0.032 dimensionless; name fraction_CW_CP_to_air; lognormal variance with pedigree 0.0413, pedigree (2,3,1,3,1)
  (same comment as for fraction, cooling water, once-through system, to air)

## Reference product
- chloromethyl methyl ether: 1 kg; By-product classification allocatable product; CPC 341: Basic organic chemicals; CAS 107-30-2
  EcoSpold01Location=RER
  Uncertainty not applicable for output
  production volume 1.32237 kg
    This is a placeholder value that does not reflect real-world production volumes. This dataset does not currently require a real-world production volume to work in the database framework, and no actual data were collected yet. This has no negative effect on the results of the ecoinvent database. The placeholder value of this activity was scaled according to the nominal GDP of 2005 (source: United Nations, http://data.un.org/Glossary.aspx?q=GDP+%28current+US%24%29, accessed 20130726) to reflect an appropriate share of the global production volume, which is also a placeholder value.
  property price 0.516138 EUR2005
    Calculated based on inputs: The price of the product has been calculated as a sum of the values of the material and energy inputs for this product. This value is therefore a rough estimation. It may underestimate the real price since there are additional expenses when producing any product. These expences can include for example labour costs, treatment of waste materials and profit for the producer. Please consider carefully whether this level of data quality is acceptable for your application.
  property heating value, net 16.57 MJ
    LHV is calculated based on the elemental composition of the substance. Based on the CAS number of the substance (000107-30-2), the chemical formula of the substance is found to be: C2H5ClO, (PubChem 2020).
    Reference: Kim, S., Chen, J., Cheng, T., Gindulyte, A., He, J., He, S., Li, Q., Shoemaker, B. A., Thiessen, P. A., Yu, B., Zaslavsky, L., Zhang, J., & Bolton, E. E. (2019). PubChem 2019 update: improved access to chemical data. Nucleic acids research, 47(D1), D1102–D1109. https://doi.org/10.1093/nar/gky1033
  property carbon content 0.3
    carbon content on a dry matter basis (reserved; not for manual entry)
  properties: water content 0, dry mass 1 kg, carbon content, non-fossil 0, water in wet mass 0 kg, carbon content, fossil 0.3, wet mass 1 kg, carbon allocation 0.3 kg

## Inputs from technosphere
- formaldehyde: 0.393 kg; lognormal variance with pedigree 0.1786, pedigree (4,5,5,5,5)
  Stoeciometric calculation (95% yield)
  EcoSpold01Location=RER
  Uncertainty: Stoeciometric calculation (95% yield)
  properties: heating value, net 20.19 MJ, carbon content, fossil 0.4, dry mass 1 kg, wet mass 1 kg
- chemical factory, organics: 4e-10 unit; lognormal variance with pedigree 0.508, pedigree (5,5,5,1,4)
  EcoSpold01Location=RER
  Approximation with average chem. plant
  Uncertainty: Approximation with average chem. plant
- methanol: 0.419 kg; lognormal variance with pedigree 0.1786, pedigree (4,5,5,5,5)
  Stoeciometric calculation (95% yield)
  EcoSpold01Location=CH
  Uncertainty: Stoeciometric calculation (95% yield)
  properties: wet mass 1 kg, carbon content, fossil 0.375, dry mass 1 kg, heating value, net 26.49 MJ
- electricity, medium voltage: 0.333 kWh; lognormal variance with pedigree 0.208, pedigree (5,5,5,1,4)
  EcoSpold01Location=UCTE
  Approximation with data of a large chem. plant
  Uncertainty: Approximation with data of a large chem. plant
- hydrochloric acid, without water, in 30% solution state: 0.477 kg; lognormal variance with pedigree 0.1786, pedigree (4,5,5,5,5)
  (same comment as for formaldehyde)
  properties: heating value, net 3.32 MJ, wet mass 1 kg, dry mass 1 kg
- heat, district or industrial, natural gas: 1.9 MJ; lognormal variance with pedigree 0.208, pedigree (5,5,5,1,4)
  EcoSpold01Location=RER
  Approximation with data of a large chem. plant
  Uncertainty: Approximation with data of a large chem. plant
  properties: heating value, net 1 MJ
- sodium hydroxide, without water, in 50% solution state: 0.0251 kg; lognormal variance with pedigree 0.2, pedigree (5,5,5,5,4)
  Estimated from HCl emissions to water
  EcoSpold01Location=RER
  Uncertainty: Estimated from HCl emissions to water
  properties: dry mass 1 kg, wet mass 1 kg, heating value, net 3.03 MJ

## Inputs from nature
- Water, cooling, unspecified natural origin [natural resource, in water]: 0.024 m3; name water_cooling_UNO_input; lognormal variance with pedigree 0.208, pedigree (5,5,5,1,4)
  Approximation with data of a large chem. Plant
  Uncertainty: Approximation with data of a large chem. Plant

## Emissions to nature
- COD, Chemical Oxygen Demand [water, surface water]: 0.00482 kg; lognormal variance with pedigree 0.24, pedigree (5,5,5,5,4)
  Estimated from mass balance and WWTP effic.
  Uncertainty: Estimated from mass balance and WWTP effic.
- Methanol [air, urban air close to ground]: 0.000838 kg; lognormal variance with pedigree 0.33, pedigree (5,5,5,5,5)
  Estimated
  Uncertainty: Estimated
- Formaldehyde [water, surface water]: 0.00188 kg; lognormal variance with pedigree 0.5, pedigree (5,5,5,5,4)
  (same comment as for COD, Chemical Oxygen Demand)
- BOD5, Biological Oxygen Demand [water, surface water]: 0.00482 kg; lognormal variance with pedigree 0.24, pedigree (5,5,5,5,4)
  (same comment as for COD, Chemical Oxygen Demand)
- DOC, Dissolved Organic Carbon [water, surface water]: 0.00151 kg; lognormal variance with pedigree 0.24, pedigree (5,5,5,5,4)
  (same comment as for COD, Chemical Oxygen Demand)
- Formaldehyde [air, urban air close to ground]: 0.000785 kg; lognormal variance with pedigree 0.33, pedigree (5,5,5,5,5)
  Estimated
  Uncertainty: Estimated
- Methanol [water, surface water]: 0.00201 kg; lognormal variance with pedigree 0.5, pedigree (5,5,5,5,4)
  (same comment as for COD, Chemical Oxygen Demand)
- Sodium, ion [water, surface water]: 0.0144 kg; lognormal variance with pedigree 0.26, pedigree (5,5,5,5,5)
  Estimated from mass balance
  Uncertainty: Estimated from mass balance
- Water [water, unspecified]: 0.0147 m3; name water_to_water_unspecified; = water_cooling_UNO_input*(1-fraction_CW_to_air); lognormal variance with pedigree 0.0807, pedigree (2,2,5,1,1)
  Calculated value based on literature values and expert opinion. See comments in the parametres' comment field.
  property fraction, origin: unspecified 1; name fraction_origin_unspecified_Ww
  property fraction, origin: salt water 0; name fraction_origin_salt_water_Ww
  property fraction, origin: fresh water 0; name fraction_origin_fresh_water_Ww
  property dry mass 0 kg; name DM
  property carbon content, non-fossil 0; name C_content_non_fossil
  property wet mass 1000 kg; name WM
  property water in wet mass 1000 kg; name WWM
  property carbon content, fossil 0; name C_content_fossil
- TOC, Total Organic Carbon [water, surface water]: 0.00151 kg; lognormal variance with pedigree 0.24, pedigree (5,5,5,5,4)
  (same comment as for COD, Chemical Oxygen Demand)
- Water [air, unspecified]: 0.0093 m3; name water_to_air_unspecified; = (water_cooling_UNO_input*fraction_CW_to_air); lognormal variance with pedigree 0.0807, pedigree (2,2,5,1,1)
  (same comment as for Water)
  property fraction, origin: salt water 0; name fraction_origin_salt_water
  property fraction, origin: unspecified 1; name fraction_origin_unspecified
  property fraction, origin: fresh water 0; name fraction_origin_fresh_water
- Chloride [water, surface water]: 0.0222 kg; lognormal variance with pedigree 0.26, pedigree (5,5,5,5,5)
  Estimated from mass balance
  Uncertainty: Estimated from mass balance
- Hydrogen chloride [air, urban air close to ground]: 0.000953 kg; lognormal variance with pedigree 0.33, pedigree (5,5,5,5,5)
  Estimated
  Uncertainty: Estimated
- Carbon dioxide, fossil [air, urban air close to ground]: 0.0497 kg; lognormal variance with pedigree 0.2, pedigree (5,5,5,5,4)
  (same comment as for COD, Chemical Oxygen Demand)

## Sampling procedure
Process data based on stoechiometric calculations of few literature sources. Energy demand based on approximation from large chemical plant. Process emissions based on estimations only.

## Extrapolations
This dataset has been extrapolated from year 2002 to the year of the calculation (2021). The uncertainty has been adjusted accordingly.

## Review by Roland Hischier 2003-08-26
Passed.
