# containerboard production, linerboard, kraftliner

Dataset: EcoSpold 2, unit process
Geography: CA-QC
Time period: 2009-01-01 to 2021-12-31
Technology level: current
Classification: EcoSpold01Categories: paper & cardboard/cardboard & corrugated board
Classification: ISIC rev.4 ecoinvent: 1702:Manufacture of corrugated paper and paperboard and of containers of paper a
Synonyms: containerboard; linerboard
Tags: recontextualization
Scenario: Business-as-Usual
System model: Allocation, cut-off by classification
Generated by: Pascal Lesage
Published in: FEFCO Corrugated Packaging 2015
Database: ecoinvent
isCopyrightProtected: true
accessRestrictedTo: 1

## General comment
This dataset represents the production of kraftliner from virigin wood/ sulfate pulp.
The dataset exchanges are identical to GLO dataset. Created to enable linking to regional markets (e.g. for electricity). Data quality indicators adjusted accordingly.

Kraftliner is commonly produced from virigin material, while testliner is made from recycled fibers. Nonetheless also Kraftliner can partly be made from recycled fiber input. Both products are used interchangeably as bottom and top layers surrounding the mid layer of “medium” in the production of corrugated board. Data represent the industry average in 2015.
In FEFCO 2015 fuel consumption and the related emission to air include only steam and net electricity used on site. Sold electricity is not reported as a sold product and the associated input and output data are not included in the inventory. The fuel consumption and emissions to air associated with the total heat production and the net electricity used on site were allocated to the paper production.
[This dataset is meant to replace the following datasets:
Inventory data were collected for the year 2014.

## Included activities start
The process for the production of Kraftliner starts with the reception of wood and wood chips at the mill gate.

## Included activities end
Processes include chipping, screening of chips, cooking to pulp for (kraft cooking process), which is a highly alkaline cooking process with caustic soda and sodium sulphide as active cooking chemicals with a pulp yield of around 55%.The pulp produced is defiberized in refiners, screened and washed before being sent to the paper mill. The stock passes through one or two head boxes onto the paper machine. Kraftliner is normally a
two ply product and therefore requires a paper machine with two head boxes and normally also two wires.

## Geography
This dataset is a copy of the the corresponding European (RER) dataset, It is based on average European industry data from 2014. It replaces the dataset "linerboard production, kraftliner, CA-QC 2008" (ID: 6ca44102-ff03-4cc2-a0b5-2b72b1b89bb7
) which was introduced as a copy of the corresponding RER dataset of that time period for recontextualization purposes. Therefore, the updated average European data is seen to be a more accurate proxy for Quebec than the previous version of this dataset. The production volume for Quebec was taken over from the previous version and is valid for 2008.

## Technology
Average of present used technology

## Parameters
- fraction, tap water, to air: 0.15 dimensionless; name fraction_TW_to_air; = fraction_PW_to_air; lognormal variance with pedigree 0.092025, pedigree (4,4,3,2,4)
  Calculated value. See comment in the other parametres present in this dataset. Tap water is considered to be always used as process water, thus process water fractions to air are applied to all tap water input flows to calculate the amount of water consumed in the processes.
- fraction, process water, to air: 0.15 dimensionless; name fraction_PW_to_air; lognormal variance with pedigree 0.092025, pedigree (4,4,3,2,4)
  Literature value. In case when no industry/process specific data are available, default evaporation fraction value is used. This value is 15% and is based on literature (Statistics Canada, 2007 & Shaffer, K.H., 2008, Consumptive water use in the Great Lakes Basin, USGS & Shiklomanov, 2003, World Water Resources at the Beginning of the 21st Century) and has been approved by an expert.

## Reference product
- containerboard, linerboard: 1 kg; name linerboardAmount; source FEFCO Corrugated Packaging 2015; By-product classification allocatable product; CPC 32151: Corrugated paper and paperboard
  production volume 2.18e8 kg; name linerboardProductionVolume
    According to MR Emilio Jose Urbina [1], Norampac Cascades Companie is the only one which produces corrugated board base paper (papier cannelure in French). This is a production capacity in 2008 (assumed unchanged for 2015), so it might be overestimated.
    [1] : Emilio Jose Urbina (Industrial Development expert, Ministry of Natural Resources in Quebec, contact by mail, EmilioJose.Urbina@mrnf.gouv.qc.ca)
    [2] : http://www.cascades.com/_googlemap_usine/usine/397/no_menu_page/true
  property dry mass 0.925926 kg; = 1/(1+U)
  property water in wet mass 0.0740741 kg; = U/(1+U)
  property price 0.598 EUR2005; name linerboardAmount_price_EUR2005
    Export prices for the World+ according to: http://faostat.fao.org/site/626/DesktopDefault.aspx?PageID=626#ancor downloaded 28 April 2009; calculated as export value divided by export volume.
  property water content 0.08; name U
  property carbon content 0.46
    carbon content on a dry matter basis (reserved; not for manual entry)
  property true value 598; name linerboardAmount_true_value
    allocation property applied in "true value" allocation // value calculated from revenue
  properties: heating value, net 15.92 MJ, carbon content, non-fossil 0.46, wet mass 1 kg, carbon allocation 0.425926 kg

## By-products
- tall oil, crude: 0 kg; name BP_amount_4; By-product classification allocatable product; CPC 34400: Activated natural mineral products; animal black; tall oil; terpenic oils produced by the treatment of conifer[…]; CAS 8002-26-4; pedigree (1,1,1,1,1)
  reported as tall oil
  production volume 3.53174e6 kg; = linerboardProductionVolume * (BP_amount_4 / linerboardAmount)
    Calculated from production volume of reference product using the relative outputs.
  property price 0.652995 EUR2005; name BP_amount_4_price_EUR2005
    Estimated value. Set to be 90% of tall oil, refined, comment: Average price for imports in 2005 to USA, China, India, Japan and EU-28 according to UN comtrade. Accessible online at https://comtrade.un.org/data/, 11.6.2018
  property heating value, net 23.82 MJ
    LHV is calculated based on the Carbon content of the product. More details can be found on the respective documentation.
  property carbon content 0.786
    carbon content on a dry matter basis (reserved; not for manual entry)
  property true value 10.5789; name BP_amount_4_true_value
    allocation property applied in "true value" allocation // value calculated from revenue
  properties: carbon content, fossil 0, wet mass 1 kg, carbon content, non-fossil 0.786, water content 0, dry mass 1 kg, water in wet mass 0 kg, carbon allocation 0.786 kg
- turpentine: 0 kg; name BP_amount_3; By-product classification allocatable product; CPC 34400: Activated natural mineral products; animal black; tall oil; terpenic oils produced by the treatment of conifer[…]; CAS 8006-64-2; pedigree (1,1,1,1,1)
  reported as turpentine
  production volume 287183 kg; = linerboardProductionVolume * (BP_amount_3 / linerboardAmount)
    Calculated from production volume of reference product using the relative outputs.
  property heating value, net 26.74 MJ
    (same comment as for tall oil, crude)
  property price 1.826 EUR2005; name BP_amount_3_price_EUR2005
    Average price for imports in 2005 to USA, China, India, Japan and EU-28 according to UN comtrade. Accessible online at https://comtrade.un.org/data/, 11.6.2018
  property carbon content 0.882353
    carbon content on a dry matter basis (reserved; not for manual entry)
  property true value 2.40549; name BP_amount_3_true_value
    allocation property applied in "true value" allocation // value calculated from revenue
  properties: dry mass 1 kg, carbon content, non-fossil 0.882353, wet mass 1 kg, water in wet mass 0 kg, water content 0, carbon content, fossil 0, carbon allocation 0.882353 kg
- residual softwood, wet: 0 m3; name barkResidueAmount; source FEFCO Corrugated Packaging 2015; CPC 39283: Non-agglomerated wood waste and scrap; By-product classification allocatable product; pedigree (1,1,1,1,1)
  Reported as for residues/bark, wood. Assumed all softwood, which represents 85% of wood input (by weight). Density based on assummed water content on a dry mass basis of 70%..
  Uncertainty: Uncertainty accounts for both the uncertainty associated with the waste mass value reported by FEFCO and the density value used to convert the exchange value to a volume basis.
  production volume 57.9008 m3; = linerboardProductionVolume * (barkResidueAmount / linerboardAmount)
    Calculated from production volume of reference flow.
  property heating value, net 5962.7 MJ
    LHV is calculated based on the Carbon content of the product. More details can be found on the respective documentation.The property is based on a value of 7.79MJ/kg
  property water in wet mass 315 kg; name barkResidueAmount_WWM
  property wet mass 765 kg; name barkResidueAmount_WM
  property water content 0.7; name barkResidueAmount_water_content
  property price 19.5 EUR2005; name barkResidueAmount_price_EUR2005
    Data on Import/Export (USD/kg) from UN data has been used. (http://data.un.org/Data.aspx?d=ComTrade&f=_l1Code%3a45, [accessed 10th June 2010]) Commodity: 'Sawdust, wood waste or scrap'. A density of 250 kg/m3 was used to convert from M3 to kg (data on density: http://wiki.answers.com/Q/What_is_the_density_of_sawdust, [Accessed 13 June 2010]).
  property dry mass 450 kg; name barkResidueAmount_DM
  property carbon content, non-fossil 0.494; name barkResidueAmount_C_content_non_fossil
    biogene carbon content on a dry matter basis
  property carbon content 0.494
    carbon content on a dry matter basis (reserved; not for manual entry)
  property true value 0.0051792; name barkResidueAmount_true_value
    allocation property applied in "true value" allocation // value calculated from revenue
  properties: carbon allocation 222.3 kg

## Inputs from technosphere
- maize starch: 0.00548094 kg; = 3.8+1.8/2+1.8/2; source FEFCO Corrugated Packaging 2015; lognormal variance with pedigree 0.0072, pedigree (3,3,3,5,1)
  Proxy for maize starch (3.8 kg) and half of "stach, modified" (1.8 kg) and "wheat starch" (1.8 kg). Other half of latter two modeled as potato starch.
  properties: carbon content, non-fossil 0.46, dry mass 0.86 kg, wet mass 1 kg, water content 0.16279, heating value, net 11.64 MJ
- retention aid, for paper production: 0.000675331 kg; source FEFCO Corrugated Packaging 2015; lognormal variance with pedigree 0.0072, pedigree (3,3,3,5,1)
  Proxy for polymer and retention agents.
  properties: dry mass 1 kg, wet mass 1 kg, carbon content, fossil 0.5, heating value, net 15.15 MJ
- lubricating oil: 0.000244893 kg; source FEFCO Corrugated Packaging 2015; lognormal variance with pedigree 0.0152, pedigree (3,3,3,5,3)
  Reported as lubricants
  properties: dry mass 1 kg, heating value, net 40.2 MJ, carbon content, fossil 0.75, wet mass 1 kg
  note on heating value, net: Literature value, Source: IPCC 2006, 2006 IPCC Guidelines for National Greenhouse Gas Inventories, Prepared by the National Greenhouse Gas Inventories Programme, Eggleston H.S., Buendia L., Miwa K., Ngara T. and Tanabe K. (eds). Published: IGES, Japan
- peat: 0.00170911 kg; = 0.0153668750681388*1000/8.8; source FEFCO Corrugated Packaging 2015; lognormal variance with pedigree 0.0138, pedigree (2,3,3,5,3)
  Reported as 0.0071 GJ /ton NSP. Converted to kg using the lower heating value (8.8 MJ/kg) reported in "Röder A., Bauer C. and Dones R. (2007) Kohle. In: Sachbilanzen von Energiesystemen: Grundlagen für den ökologischen Vergleich von Energiesystemen und den Einbezug von Energiesystemen in Ökobilanzen für die Schweiz (ed. Dones R.). Swiss Centre for Life Cycle Inventories, Dübendorf, CH."
  Uncertainty: Uncertainty accounts for both the uncertainty associated with the fuel consumption value reported by FEFCO and the lower heating value used to convert the exchange value to a mass basis.
  properties: dry mass 0.42 kg, wet mass 1 kg, carbon content, fossil 0.59, water content 1.38095, heating value, net 10 MJ
  note on heating value, net: Indicative value. Reference: Nature and Management of Tropical Peat Soils, FAO Soils Bulletin 59, available at: http://www.fao.org/3/x5872e/x5872e00.htm#Contents
- kaolin: 0.00948334 kg; source FEFCO Corrugated Packaging 2015; lognormal variance with pedigree 0.0152, pedigree (3,3,3,5,3)
  Proxy for filler, unspecified.
  properties: wet mass 1 kg, dry mass 1 kg
- waste paperboard, sorted: 0.441894 kg; = 363/0.804; lognormal variance with pedigree 0.0072, pedigree (3,3,3,5,1)
  Reported as recovered paper.
  properties: dry mass 0.804 kg, water content 0.243781, carbon content, non-fossil 0.483259, wet mass 1 kg, heating value, net 15.92 MJ
  note on carbon content, non-fossil: biogene carbon content on a dry matter basis. Value taken over from linerboard and fluting medium.
- ethoxylated alcohol (AE3): 0.000214629 kg; source FEFCO Corrugated Packaging 2015; lognormal variance with pedigree 0.0072, pedigree (3,3,3,5,1)
  Proxy for defoamer, unspecified.
  properties: wet mass 1 kg, carbon content, fossil 0.20795, dry mass 1 kg, heating value, net 21 MJ, carbon content, non-fossil 0.48522
- pulpwood, hardwood, measured as solid wood under bark: 0.000281527 m3; = 0.18*1000/ DM_hardwood; source FEFCO Corrugated Packaging 2015; lognormal variance with pedigree 0.0072, pedigree (3,3,3,5,1)
  Reported as 0.18 tonne hardwood logs (bone dry weight)/tonne. Converted to log volume using the dry mass per m3.
  property dry mass 625.778 kg; name DM_hardwood
  properties: heating value, net 6071.3 MJ, water content 0.8, wet mass 1126.4 kg, carbon content, non-fossil 0.494
  note on heating value, net: Value based on "hardwood forestry, mixed species, sustainable forest management"The property is based on a value of 11.58MJ/kg
- paper mill, integrated: 5.32435e-11 unit; lognormal variance with pedigree 0.1652, pedigree (3,3,5,5,5)
  Assumption.
- soda ash, dense: 0.00109299 kg; source FEFCO Corrugated Packaging 2015; lognormal variance with pedigree 0.0072, pedigree (3,3,3,5,1)
  Proxy for Na2CO3 (soda)
  properties: carbon content, fossil 0.11321, dry mass 1 kg, wet mass 1 kg, heating value, net 3.43 MJ
- quicklime, milled, loose: 0.00782992 kg; source FEFCO Corrugated Packaging 2015; lognormal variance with pedigree 0.0072, pedigree (3,3,3,5,1)
  Reported as CaO (4.4 kg) and proxy for calcium carbonate CaCO3 (3.6 kg).
  properties: wet mass 1 kg, water content 0.010101, dry mass 0.99 kg
- oxygen, liquid: 0.0028156 kg; source FEFCO Corrugated Packaging 2015; lognormal variance with pedigree 0.0072, pedigree (3,3,3,5,1)
  FEFCO 2015.
  properties: dry mass 1 kg, wet mass 1 kg
- wood chips, dry, measured as dry mass: 0.245282 kg; = 0.17*1000+1.48*1000/18.36; source FEFCO Corrugated Packaging 2015; lognormal variance with pedigree 0.0072, pedigree (3,3,3,5,1)
  Of this 170 kg are reported sawmill residues and used as raw material input( softwood) and the remaining 80.6kg are reported as biofuels (1.48 GJ/tonne product of bark, scrap wood and tall oil) and used as energy input. The average lower heating value of wood chips was calculated as 18.36MJ/kg dry mass.
  properties: carbon content, non-fossil 0.494, dry mass 1 kg, heating value, net 9.99 MJ, wet mass 1.4 kg, water content 0.4
  note on carbon content, non-fossil: C content of dry mass is 0.494 kgC/kg dry wood (ecoinvent v2.2 report 9).
- triazine-compound, unspecified: 7.82992e-5 kg; source FEFCO Corrugated Packaging 2015; lognormal variance with pedigree 0.0152, pedigree (3,3,3,5,3)
  Reported as biocide. Assumed equally split between dithiocarbamate and triazine-compound
  properties: wet mass 1 kg, dry mass 1 kg, carbon content, fossil 0.475616
- sludge from pulp and paper production: -0.00952495 kg; name BP_amount_2; = (2.2728518902431+7.45900019932683)*-1; source FEFCO Corrugated Packaging 2015; lognormal variance with pedigree 0.0152, pedigree (3,3,3,5,3)
  Reported as organic sludges (2.3 kg with a dry content of 35%) and inorganic sludges (7.5 kgwith a dry content of 65%)
  production volume 2.12154e6 kg; = linerboardProductionVolume * (BP_amount_2 / linerboardAmount)
    Calculated from production volume of reference product using the relative outputs.
  property price 0 EUR2005; name BP_amount_2_price_EUR2005
  properties: water content 0.724316, carbon content, non-fossil 0.21, dry mass 0.57994 kg, wet mass 1 kg, heating value, net 2.65 MJ
  note on heating value, net: Value taken from the general comment of the treatment dataset.
- tap water: 0.0468103 kg; name tap_water_input; source FEFCO Corrugated Packaging 2015; lognormal variance with pedigree 0.0052, pedigree (1,3,3,5,1)
  Reprted as Municipal water supply.
  property dry mass 0.00034 kg; name DM
  property water in wet mass 0.99966 kg; name WWM; = 1-DM
  properties: wet mass 1 kg, carbon content, fossil 0.0017899, water content 2940.18
- corrugated board box: 0.000185961 kg; source FEFCO Corrugated Packaging 2015; lognormal variance with pedigree 0.0072, pedigree (3,3,3,5,1)
  Proxy for paper and board for packaging
  properties: wet mass 1 kg, water content 0.0582011, carbon content, non-fossil 0.45025, dry mass 0.945 kg, carbon content, fossil 0.00365437, heating value, net 12.86 MJ
- polyaluminium chloride: 0.000822142 kg; lognormal variance with pedigree 0.0072, pedigree (3,3,3,5,1)
  FEFCO 2015.
- hydrogen peroxide, without water, in 50% solution state: 0.00317432 kg; source FEFCO Corrugated Packaging 2015; lognormal variance with pedigree 0.0072, pedigree (3,3,3,5,1)
  FEFCO 2015.
  properties: heating value, net 7.13 MJ, dry mass 1 kg, wet mass 1 kg
- pitch despergents, in paper production: 5.27112e-6 kg; source FEFCO Corrugated Packaging 2015; lognormal variance with pedigree 0.0052, pedigree (1,3,3,5,1)
  FEFCO 2015.
  properties: heating value, net 8.82 MJ, wet mass 1 kg, carbon content, fossil 0.29009, dry mass 1 kg
- heavy fuel oil: 0.00644784 kg; = 0.267468603675465*1000/40.6; source FEFCO Corrugated Packaging 2015; lognormal variance with pedigree 0.0152, pedigree (3,3,3,5,3)
  Reported as 0.27 GJ /ton NSP. Converted to kg using the lower heating value (40.6 MJ/kg) reported in "Dones R. et al.(2007) Life Cycle Inventories of Energy Systems: Results for Current Systems in Switzerland and other UCTE Countries. Final report ecoinvent data v2.0, No. 5. Swiss Centre for Life Cycle Inventories, Dübendorf, CH."
  Uncertainty: Uncertainty accounts for both the uncertainty associated with the fuel consumption value reported by FEFCO and the lower heating value used to convert the exchange value to a mass basis.
  properties: heating value, net 41.2 MJ, wet mass 1 kg, carbon content, fossil 0.849, dry mass 1 kg
- potato starch: 0.00352346 kg; = 1.8+1.8/2+1.8/2; source FEFCO Corrugated Packaging 2015; lognormal variance with pedigree 0.0072, pedigree (3,3,3,5,1)
  Proxy for potato starch (1.8 kg) and half of "starch, modified" (1.8 kg) and "wheat starch" (1.8 kg) . Other half of latter two modeled as maize starch.
  properties: wet mass 1 kg, water content 0.25, dry mass 0.8 kg, carbon content, non-fossil 0.46, heating value, net 10.66 MJ
- sodium hydroxide, without water, in 50% solution state: 0.00664845 kg; source FEFCO Corrugated Packaging 2015; lognormal variance with pedigree 0.0152, pedigree (3,3,3,5,3)
  FEFCO 2015.
  properties: wet mass 1 kg, heating value, net 3.03 MJ, dry mass 1 kg
- waste mineral oil: -0.000244893 kg; name wasteLubricantsOilAmount; source FEFCO Corrugated Packaging 2015; lognormal variance with pedigree 0.0152, pedigree (3,3,3,5,3)
  Reported as lubricants and oil
  production volume 54546.3 kg; = linerboardProductionVolume*wasteLubricantsOilAmount/linerboardAmount
    Calculated from production volume of reference flow.
  property price 0 EUR2005; name wasteLubricantsOilAmount_price_EUR2005
  property water in wet mass 0 kg; name wasteLubricantsOilAmount_WWM
  property carbon content, fossil 0.86444; name wasteLubricantsOilAmo_C_content_fossil_0
  property dry mass 1 kg; name wasteLubricantsOilAmount_DM
  property wet mass 1 kg; name wasteLubricantsOilAmount_WM
  property water content 0; name wasteLubricantsOilAmount_water_content
  properties: heating value, net 34.7 MJ
- ammonia, anhydrous, liquid: 0.00015372 kg; source FEFCO Corrugated Packaging 2015; lognormal variance with pedigree 0.0072, pedigree (3,3,3,5,1)
  FEFCO 2015.
  properties: wet mass 1 kg, dry mass 1 kg
- electricity, medium voltage: 0.441894 kWh; = 363/0.804; source FEFCO Corrugated Packaging 2015; lognormal variance with pedigree 0.0078, pedigree (3,3,3,5,2)
  Reported as recovered paper.
- lignite ash: -3.60964e-5 kg; name BP_amount_1; lognormal variance with pedigree 0.0546, pedigree (3,3,3,5,3)
  Estimation based on fuel input data and emission factors from corresponding fuel combustion ecoinvent datasets. Note(1): Within the process, energy is recovered through the burning of black liquor (7.38 GJ/tonne) and bark (3 GJ/tonne) from the wood. This inherent energy makes up a large part of this process’ energy supply. As it is supplied from within the system boundaries, it does not have a corresponding input exchange. Emissions from the combustion of the internally generated biomass (bark) is approximated with the combustion of wood chips. No comprehensive data for the emissions from the balck liquor recovery process were available. The approximation of this rather complex recovery process with biomass combustion is inappropriate. Therefore emissions from the recovery process are only reflected in the key emission values (particulates, CO2, CO, NOx, Sox, H2S) reported by FEFCO (2015) but not with a complete emission profile. This constitutes a data gap. Note(2): emissions from peat combustion were approximated with those of lignite combustion, LPG with natural gas combustion and diesel with LFO combustion.
  production volume 8039.95 kg; = linerboardProductionVolume * (BP_amount_1 / linerboardAmount)
    Calculated from production volume of reference product using the relative outputs.
  property price 0 EUR2005; name BP_amount_1_price_EUR2005
  properties: dry mass 1 kg, wet mass 1 kg
- sulfate pulp, bleached: 0.000735524 kg; lognormal variance with pedigree 0.0072, pedigree (3,3,3,5,1)
  FEFCO (2015): reported as consumption of purchased pulp: 0.00075 t bleached pulp /t product
  properties: heating value, net 13.23 MJ, carbon content, non-fossil 0.494, water content 0.111111, dry mass 0.9 kg, wet mass 1 kg
  note on carbon content, non-fossil: C content of dry mass of sulfate pulp is 0.494 kgC/kg dry wood (ecoinvent v2.2 report 6_IX & ecoinvent v2.2 report 9). No other C containing products in the formulation of the pulp.
- limestone residue: -0.00749703 kg; name wasteCalciumCarbonateAmount; source FEFCO Corrugated Packaging 2015; lognormal variance with pedigree 0.0152, pedigree (3,3,3,5,3)
  reported as calcium carbonate
  production volume 1.66985e6 kg; = linerboardProductionVolume*wasteCalciumCarbonateAmount/linerboardAmount
    Calculated from production volume of reference flow.
  property price 0 EUR2005; name wasteCalciumCarbonateAmoun_price_EUR2005
  property water in wet mass 0.25 kg; name wasteCalciumCarbonateAmount_WWM
  property wet mass 1 kg; name wasteCalciumCarbonateAmount_WM
  property carbon content, fossil 0.12; name wasteCalciumCarbonate_C_content_fossil_0
  property water content 0.333333; name wasteCalciumCarbonateAmo_water_content_0
  property dry mass 0.75 kg; name wasteCalciumCarbonateAmount_DM
- pulpwood, softwood, measured as solid wood under bark: 0.00169055 m3; = 0.76*1000/ DM_softwood; source FEFCO Corrugated Packaging 2015; lognormal variance with pedigree 0.0052, pedigree (1,3,3,5,1)
  Reported as 0.76 tonne softwood logs (bone dry weight). Converted to log volume using the dry mass per m3.
  property dry mass 440 kg; name DM_softwood
  properties: wet mass 1056 kg, carbon content, non-fossil 0.494, water content 1.4, heating value, net 4483.78 MJ
  note on heating value, net: Value based on "softwood forestry, mixed species, sustainable forest management"The property is based on a value of 11.58MJ/kg
- municipal solid waste: -0.0089213 kg; name BP_amount_5; source FEFCO Corrugated Packaging 2015; lognormal variance with pedigree 0.0152, pedigree (3,3,3,5,3)
  Waste reported as "residue, rejects, paper-related" (3.5 kg), representing paper clips, tags, adhesive labels, fibres etc. and "residue, rejects, other" (11 kg), representing e.g. glass, sand, plastics. The average dry mass of the rejects is about 50%. Summed and scaled to dry mass of MSW of 0.77kg/kg.
  production volume 1.98709e6 kg; = linerboardProductionVolume * (BP_amount_5 / linerboardAmount)
    Calculated from production volume of reference product using the relative outputs.
  property dry mass 0.5 kg; name MSW_DM
  property water content 1; name MSW_water_content
  properties: heating value, net 11.74 MJ, carbon content, fossil 0.171549, wet mass 1 kg, carbon content, non-fossil 0.261655
  note on carbon content, fossil: MSW composition in tab 4.1, ecoinvent v2.2 report 13_I. C content referred to 1 kg DM
- core board: 0.00162862 kg; source FEFCO Corrugated Packaging 2015; lognormal variance with pedigree 0.0052, pedigree (1,3,3,5,1)
  This value is qualified as "not representative" in the FEFCO 2015 report. It is reported as Cores (1.6kg) and Core Plugs (0.064kg).
  properties: carbon content, non-fossil 0.430314, water content 0.0582011, dry mass 0.945 kg, wet mass 1 kg, heating value, net 12.19 MJ
- ash from paper production sludge: -0.00719807 kg; name inorganicAshAmount; source FEFCO Corrugated Packaging 2015; lognormal variance with pedigree 0.0152, pedigree (3,3,3,5,3)
  reported as inorganic ashes
  production volume 1.60327e6 kg; = linerboardProductionVolume*inorganicAshAmount/linerboardAmount
    Calculated from production volume of reference flow.
  property carbon content, non-fossil 0.0092; name inorganicAshAmoun_C_content_non_fossil_0
  property wet mass 1 kg; name inorganicAshAmount_WM
  property price 0 EUR2005; name inorganicAshAmount_price_EUR2005
  property dry mass 0.8 kg; name inorganicAshAmount_DM
- sodium chlorate, powder: 0.00113563 kg; source FEFCO Corrugated Packaging 2015; lognormal variance with pedigree 0.0072, pedigree (3,3,3,5,1)
  FEFCO 2015.
  properties: dry mass 1 kg, wet mass 1 kg
- natural gas, low pressure: 0.0313833 m3; = 1.17999059204937*1000/36.8; source FEFCO Corrugated Packaging 2015; lognormal variance with pedigree 0.0072, pedigree (3,3,3,5,1)
  Reported as 1.2 GJ /ton NSP. Converted to Nm3 using the lower heating value (36.8 MJ/m3) reported in "Dones R. et al.(2007) Life Cycle Inventories of Energy Systems: Results for Current Systems in Switzerland and other UCTE Countries. Final report ecoinvent data v2.0, No. 5. Swiss Centre for Life Cycle Inventories, Dübendorf, CH."
  properties: carbon content, fossil 0.60238, heating value, gross 39 MJ, dry mass 0.84 kg, wet mass 0.84 kg, heating value, net 39 MJ
  note on heating value, net: Literature value, Source: United Nations Statistics Division (2018) International Recommendations for Energy Statistics (IRES). Available at: http://unstats.un.org/unsd/statcom/doc11/BG-IRES.pdf.
- hard coal: 0.0181375 kg; = 0.53*1000/28.6; lognormal variance with pedigree 0.0052, pedigree (1,3,3,5,1)
  Reprted as 0.53GJ/t NSP, converted to kg using the Lower Heating Value for hard coal, 28.6MJ/kg, from Weidema B P, Bauer C, Hischier R, Mutel C, Nemecek T, Reinhard J, Vadenbo C O,
  properties: dry mass 0.94 kg, wet mass 1 kg, water content 0.0638298, heating value, net 27.91 MJ, carbon content, fossil 0.845
  note on heating value, net: Based on the Characterization factor of Hard coal in the CED method
  note on carbon content, fossil: C content 75-94% (specified in Tab 1.1, report 6, part VI). A mean content of 0.845 kg C/ kg dry hard coal was considered
- diesel, low-sulfur: 0.000480223 kg; = 0.021*1000/42.8; source FEFCO Corrugated Packaging 2015; lognormal variance with pedigree 0.0152, pedigree (3,3,3,5,3)
  Reported as 0.021 GJ /ton NSP. Converted to kg using the lower heating value (42.8 MJ/kg) reported in "Dones R. et al.(2007) Life Cycle Inventories of Energy Systems: Results for Current Systems in Switzerland and other UCTE Countries. Final report ecoinvent data v2.0, No. 5. Swiss Centre for Life Cycle Inventories, Dübendorf, CH."
  Uncertainty: Uncertainty accounts for both the uncertainty associated with the fuel consumption value reported by FEFCO and the lower heating value used to convert the exchange value to a mass basis.
  properties: heating value, net 42.8 MJ, dry mass 1 kg, carbon content, fossil 0.865, wet mass 1 kg
- alkylketene dimer sizing agent, for paper production: 0.000908505 kg; source FEFCO Corrugated Packaging 2015; lognormal variance with pedigree 0.0072, pedigree (3,3,3,5,1)
  Reported as sizing agents.
  properties: dry mass 1 kg, carbon content, non-fossil 0.53823, wet mass 1 kg, heating value, net 16.31 MJ
- heat, district or industrial, natural gas: 0.217574 MJ; = 0.2223*1000; lognormal variance with pedigree 0.0052, pedigree (1,3,3,5,1)
  Reported as 0.22 GJ/t of steam from external CHP. Fuel used is natural gas.
  properties: heating value, net 1 MJ
- dithiocarbamate-compound: 7.82992e-5 kg; source FEFCO Corrugated Packaging 2015; lognormal variance with pedigree 0.0152, pedigree (3,3,3,5,3)
  Reported as biocide. Assumed equally split between dithiocarbamate and triazine-compound
  properties: dry mass 1 kg, wet mass 1 kg, carbon content, fossil 0.179339
- sulfate pulp, unbleached: 0.0012181 kg; lognormal variance with pedigree 0.0072, pedigree (3,3,3,5,1)
  FEFCO (2015): reported as consumption of purchased pulp: 0.0012 t unbleached pulp /t product
  properties: water content 0.111111, price 0.355 EUR2005, heating value, net 13.23 MJ, carbon content, non-fossil 0.494, dry mass 0.9 kg, wet mass 1 kg
- chemical, organic: 1.57639e-5 kg; source FEFCO Corrugated Packaging 2015; lognormal variance with pedigree 0.0072, pedigree (3,3,3,5,1)
  Reported as colorants.
  properties: heating value, net 19.03 MJ, carbon content, fossil 0.628, dry mass 1 kg, wet mass 1 kg
- light fuel oil: 0.000733482 kg; = 0.032*1000/42.7; source FEFCO Corrugated Packaging 2015; lognormal variance with pedigree 0.0152, pedigree (3,3,3,5,3)
  Reported as 0.032 GJ /ton NSP. Converted to kg using the lower heating value (42.7 MJ/kg) reported in "Dones R. et al.(2007) Life Cycle Inventories of Energy Systems: Results for Current Systems in Switzerland and other UCTE Countries. Final report ecoinvent data v2.0, No. 5. Swiss Centre for Life Cycle Inventories, Dübendorf, CH."
  Uncertainty: Uncertainty accounts for both the uncertainty associated with the fuel consumption value reported by FEFCO and the lower heating value used to convert the exchange value to a mass basis.
  properties: wet mass 1 kg, carbon content, fossil 0.862, heating value, net 42.6 MJ, dry mass 1 kg
- sulfuric acid: 0.00761579 kg; source FEFCO Corrugated Packaging 2015; lognormal variance with pedigree 0.0072, pedigree (3,3,3,5,1)
  FEFCO 2015.
  properties: dry mass 1 kg, wet mass 1 kg
- carbon dioxide, liquid: 0.00152721 kg; source FEFCO Corrugated Packaging 2015; lognormal variance with pedigree 0.0052, pedigree (1,3,3,5,1)
  FEFCO 2015.
  properties: carbon content, fossil 0.27273, wet mass 1 kg, dry mass 1 kg, heating value, net 8.27 MJ
- aluminium sulfate, powder: 0.00356697 kg; source FEFCO Corrugated Packaging 2015; lognormal variance with pedigree 0.0072, pedigree (3,3,3,5,1)
  Proxy for alum Al2(SO4)3.
  properties: wet mass 1 kg, dry mass 1 kg

## Inputs from nature
- Carbon dioxide, non-fossil, resource correction [natural resource, in air]: 0.201757 kg; pedigree (1,1,1,1,1)
  This exchange has been added after economic allocation in order to re-balance the non-fossil carbon dioxide resource extraction.
- Water, river [natural resource, in water]: 0.0350442 m3; name water_river_input; source FEFCO Corrugated Packaging 2015; lognormal variance with pedigree 0.0052, pedigree (1,3,3,5,1)
  Reported as surface water.
- Water, well, in ground [natural resource, in water]: 0.000244685 m3; lognormal variance with pedigree 0.0067, pedigree (3,2,3,5,1)
  Reported as intake of ground water in m3/tonne of net saleable product.

## Emissions to nature
- Ethyne [air, unspecified]: 7.52009e-8 kg; lognormal variance with pedigree 0.0546, pedigree (3,3,3,5,3)
  Estimation based on fuel input data and emission factors from corresponding fuel combustion ecoinvent datasets. Note(1): Within the process, energy is recovered through the burning of black liquor (7.38 GJ/tonne) and bark (3 GJ/tonne) from the wood. This inherent energy makes up a large part of this process’ energy supply. As it is supplied from within the system boundaries, it does not have a corresponding input exchange. Emissions from the combustion of the internally generated biomass (bark) is approximated with the combustion of wood chips. No comprehensive data for the emissions from the balck liquor recovery process were available. The approximation of this rather complex recovery process with biomass combustion is inappropriate. Therefore emissions from the recovery process are only reflected in the key emission values (particulates, CO2, CO, NOx, Sox, H2S) reported by FEFCO (2015) but not with a complete emission profile. This constitutes a data gap. Note(2): emissions from peat combustion were approximated with those of lignite combustion, LPG with natural gas combustion and diesel with LFO combustion.
  Uncertainty: This emission was calculated from the ecoinvent emission factor of combustion of energy. Some energy sources do not have emission factor (LPG, peat and diesel) so other factors were used ( natural gas, lignite and light fuel oil).
- Propane [air, unspecified]: 4.04087e-7 kg; lognormal variance with pedigree 0.0546, pedigree (3,3,3,5,3)
  (same comment as for Ethyne)
- Radium-226 [air, unspecified]: 2.40643e-7 kBq; lognormal variance with pedigree 0.3146, pedigree (3,3,3,5,3)
  (same comment as for Ethyne)
- Aluminium [air, unspecified]: 1.78978e-7 kg; lognormal variance with pedigree 0.6646, pedigree (3,3,3,5,3)
  (same comment as for Ethyne)
- Carbon dioxide, fossil [air, unspecified]: 0.141452 kg; source FEFCO Corrugated Packaging 2015; lognormal variance with pedigree 0.0132, pedigree (1,3,3,5,3)
  This value was reported by FEFCO 2015, i.e. it is not calculated using emission factors, contrary to most combustion emissions.
- Methane, fossil [air, unspecified]: 7.79713e-6 kg; lognormal variance with pedigree 0.0546, pedigree (3,3,3,5,3)
  (same comment as for Ethyne)
- Thorium-232 [air, unspecified]: 6.91848e-8 kBq; lognormal variance with pedigree 0.3146, pedigree (3,3,3,5,3)
  (same comment as for Ethyne)
- Formaldehyde [air, unspecified]: 8.75128e-7 kg; lognormal variance with pedigree 0.0546, pedigree (3,3,3,5,3)
  (same comment as for Ethyne)
- NMVOC, non-methane volatile organic compounds, unspecified origin [air, unspecified]: 4.76557e-5 kg; lognormal variance with pedigree 0.0546, pedigree (3,3,3,5,3)
  (same comment as for lignite ash)
- Hydrogen chloride [air, unspecified]: 4.31629e-7 kg; lognormal variance with pedigree 0.0926, pedigree (3,3,5,5,3)
  (same comment as for Ethyne)
- Titanium [air, unspecified]: 3.80517e-9 kg; lognormal variance with pedigree 0.6646, pedigree (3,3,3,5,3)
  (same comment as for Ethyne)
- Bromine [air, unspecified]: 2.71051e-7 kg; lognormal variance with pedigree 0.0546, pedigree (3,3,3,5,3)
  (same comment as for Ethyne)
- Ethene [air, unspecified]: 4.51205e-7 kg; lognormal variance with pedigree 0.0546, pedigree (3,3,3,5,3)
  (same comment as for Ethyne)
- Propene [air, unspecified]: 7.52009e-8 kg; lognormal variance with pedigree 0.0546, pedigree (3,3,3,5,3)
  (same comment as for Ethyne)
- Magnesium [air, unspecified]: 1.73894e-6 kg; lognormal variance with pedigree 0.6646, pedigree (3,3,3,5,3)
  (same comment as for Ethyne)
- DOC, Dissolved Organic Carbon [water, unspecified]: 0.00183405 kg; lognormal variance with pedigree 0.0466, pedigree (3,3,3,5,1)
  No data available for DOC. DOC=TOC as supposed in ecoinvent guidelines.
- Chromium VI [air, unspecified]: 2.04287e-10 kg; lognormal variance with pedigree 0.6646, pedigree (3,3,3,5,3)
  (same comment as for Ethyne)
- Barium [air, unspecified]: 3.80517e-9 kg; lognormal variance with pedigree 0.0546, pedigree (3,3,3,5,3)
  (same comment as for Ethyne)
- Cadmium [air, unspecified]: 3.27556e-9 kg; lognormal variance with pedigree 0.0546, pedigree (3,3,3,5,3)
  (same comment as for lignite ash)
- Water [water, surface water]: 0.0329835 m3; name water_to_water_surface; source FEFCO Corrugated Packaging 2015; lognormal variance with pedigree 0.0072, pedigree (3,3,3,5,1)
  Accounts for both "thermally polluted" (13.3m3) and "chemically polluted" (20.4 m3) water output, after treatment.
- Toluene [air, unspecified]: 1.62335e-6 kg; lognormal variance with pedigree 0.0546, pedigree (3,3,3,5,3)
  (same comment as for Ethyne)
- Dioxins, measured as 2,3,7,8-tetrachlorodibenzo-p-dioxin [air, unspecified]: 1.40133e-13 kg; lognormal variance with pedigree 0.0546, pedigree (3,3,3,5,3)
  (same comment as for lignite ash)
- Iodine [air, unspecified]: 6.84328e-10 kg; lognormal variance with pedigree 0.0546, pedigree (3,3,3,5,3)
  (same comment as for Ethyne)
- Potassium [air, unspecified]: 0.000105644 kg; lognormal variance with pedigree 0.6646, pedigree (3,3,3,5,3)
  (same comment as for Ethyne)
- Chromium [air, unspecified]: 2.02245e-8 kg; lognormal variance with pedigree 0.6646, pedigree (3,3,3,5,3)
  (same comment as for lignite ash)
- Butane [air, unspecified]: 8.73087e-7 kg; lognormal variance with pedigree 0.0546, pedigree (3,3,3,5,3)
  (same comment as for Ethyne)
- Particulates, < 2.5 um [air, unspecified]: 0.000408984 kg; lognormal variance with pedigree 0.3146, pedigree (3,3,3,5,3)
  Estimation based on fuel input data and emission factors from corresponding fuel combustion ecoinvent datasets. Note(1): Within the process, energy is recovered through the burning of black liquor (7.38 GJ/tonne) and bark (3 GJ/tonne) from the wood. This inherent energy makes up a large part of this process’ energy supply. As it is supplied from within the system boundaries, it does not have a corresponding input exchange. Emissions from the combustion of the internally generated biomass (bark) is approximated with the combustion of wood chips. No comprehensive data for the emissions from the balck liquor recovery process were available. The approximation of this rather complex recovery process with biomass combustion is inappropriate. Therefore emissions from the recovery process are only reflected in the key emission values (particulates, CO2, CO, NOx, Sox, H2S) reported by FEFCO (2015) but not with a complete emission profile. This constitutes a data gap. Note(2): emissions from peat combustion were approximated with those of lignite combustion, LPG with natural gas combustion and diesel with LFO combustion.
  Uncertainty: The data for Semichemical Fluting and Kraftliner represent more than 70% of the total annual production of corrugated base papers from primary fibres in Europe. The data for Semichemical Fluting and Kraftliner also represent 78% of the total consumption of these grades for corrugated board production in Europe. These paper grades
  are produced in large mills, located in Austria, Finland, France, Portugal, Slovakia and Sweden. The data are for the year 2008. The data were collected directly from the producers and checked by technical experts. This emission was calculated from the ecoinvent emission factor of combustion of energy. Some energy sources do not have emission factor (LPG, peat and diesel) so other factors were used ( natural gas, lignite and light fuel oil).
- Manganese [air, unspecified]: 7.67713e-7 kg; lognormal variance with pedigree 0.6646, pedigree (3,3,3,5,3)
  (same comment as for Ethyne)
- Radon-220 [air, unspecified]: 6.01607e-8 kBq; lognormal variance with pedigree 0.3146, pedigree (3,3,3,5,3)
  (same comment as for Ethyne)
- Lead [air, unspecified]: 1.51372e-7 kg; lognormal variance with pedigree 0.6646, pedigree (3,3,3,5,3)
  (same comment as for lignite ash)
- Copper [air, unspecified]: 1.40165e-7 kg; lognormal variance with pedigree 0.6646, pedigree (3,3,3,5,3)
  (same comment as for lignite ash)
- Hydrogen fluoride [air, unspecified]: 1.48972e-8 kg; lognormal variance with pedigree 0.0546, pedigree (3,3,3,5,3)
  (same comment as for Ethyne)
- Chromium, ion [water, unspecified]: 1.84982e-8 kg; lognormal variance with pedigree 0.6646, pedigree (4,4,3,5,2)
  This value is qualified as "not representative" in FEFCO (2015) because only a few mills were able to report this figure. Moreover, mills were not able to report substances in the input water, hence this figure represents gross rather than net emissions. The value is a straight average over the reporting mills.
- Ammonia [air, unspecified]: 7.81912e-6 kg; lognormal variance with pedigree 0.0546, pedigree (3,3,3,5,3)
  (same comment as for lignite ash)
- Thallium [air, unspecified]: 1.89507e-12 kg; lognormal variance with pedigree 0.0546, pedigree (3,3,3,5,3)
  (same comment as for Ethyne)
- Benzene, ethyl- [air, unspecified]: 1.35412e-7 kg; lognormal variance with pedigree 0.0546, pedigree (3,3,3,5,3)
  (same comment as for lignite ash)
- Hydrocarbons, aliphatic, unsaturated [air, unspecified]: 1.40756e-5 kg; lognormal variance with pedigree 0.0546, pedigree (3,3,3,5,3)
  (same comment as for Ethyne)
- Molybdenum [air, unspecified]: 2.75908e-9 kg; lognormal variance with pedigree 0.6646, pedigree (3,3,3,5,3)
  (same comment as for Ethyne)
- Nickel, ion [water, unspecified]: 2.28046e-9 kg; lognormal variance with pedigree 0.6646, pedigree (4,4,3,5,2)
  (same comment as for Chromium, ion)
- Silicon [air, unspecified]: 1.81986e-6 kg; lognormal variance with pedigree 0.0546, pedigree (3,3,3,5,3)
  (same comment as for Ethyne)
- AOX, Adsorbable Organic Halogen as Cl [water, unspecified]: 1.3416e-6 kg; source FEFCO Corrugated Packaging 2015; lognormal variance with pedigree 0.0446, pedigree (1,3,3,5,1)
  FEFCO 2015.
- Selenium [air, unspecified]: 4.2815e-9 kg; lognormal variance with pedigree 0.0546, pedigree (3,3,3,5,3)
  (same comment as for Ethyne)
- Phenol [air, unspecified]: 7.52009e-9 kg; lognormal variance with pedigree 0.0546, pedigree (3,3,3,5,3)
  (same comment as for Ethyne)
- Mercury [air, unspecified]: 1.62747e-9 kg; lognormal variance with pedigree 0.6646, pedigree (3,3,3,5,3)
  (same comment as for lignite ash)
- Arsenic, ion [water, unspecified]: 1.52683e-8 kg; lognormal variance with pedigree 0.6646, pedigree (4,4,3,5,2)
  (same comment as for Chromium, ion)
- Uranium-238 [air, unspecified]: 2.01538e-7 kBq; lognormal variance with pedigree 0.3146, pedigree (3,3,3,5,3)
  (same comment as for Ethyne)
- Xylene [air, unspecified]: 4.96326e-8 kg; lognormal variance with pedigree 0.0546, pedigree (3,3,3,5,3)
  (same comment as for Ethyne)
- Particulates, > 2.5 um, and < 10um [air, unspecified]: 2.34843e-5 kg; lognormal variance with pedigree 0.1346, pedigree (3,3,3,5,3)
  (same comment as for Ethyne)
- Phosphorus [water, unspecified]: 2.3446e-5 kg; source FEFCO Corrugated Packaging 2015; lognormal variance with pedigree 0.0526, pedigree (1,3,3,5,3)
  (same comment as for Carbon dioxide, fossil)
- Sulfur oxides [air, unspecified]: 0.000347277 kg; source FEFCO Corrugated Packaging 2015; lognormal variance with pedigree 0.0152, pedigree (3,3,3,5,3)
  (same comment as for Carbon dioxide, fossil)
- Calcium [air, unspecified]: 2.71936e-5 kg; lognormal variance with pedigree 0.0546, pedigree (3,3,3,5,3)
  (same comment as for Ethyne)
- Hydrocarbons, aromatic [air, unspecified]: 4.08229e-8 kg; lognormal variance with pedigree 0.0546, pedigree (3,3,3,5,3)
  (same comment as for Ethyne)
- BOD5, Biological Oxygen Demand [water, unspecified]: 0.000897673 kg; source FEFCO Corrugated Packaging 2015; lognormal variance with pedigree 0.0546, pedigree (3,3,3,5,3)
  FEFCO 2015.
- Carbon monoxide, non-fossil [air, unspecified]: 0.00225686 kg; lognormal variance with pedigree 0.0546, pedigree (3,3,3,5,3)
  (same comment as for lignite ash)
- Carbon monoxide, fossil [air, unspecified]: 0.00156694 kg; source FEFCO Corrugated Packaging 2015; lognormal variance with pedigree 0.6646, pedigree (3,3,3,5,3)
  (same comment as for Carbon dioxide, fossil)
- Pentane [air, unspecified]: 1.47962e-6 kg; lognormal variance with pedigree 0.0546, pedigree (3,3,3,5,3)
  (same comment as for Ethyne)
- Scandium [air, unspecified]: 9.5054e-12 kg; lognormal variance with pedigree 0.0546, pedigree (3,3,3,5,3)
  (same comment as for Ethyne)
- Benzo(a)pyrene [air, unspecified]: 2.57869e-9 kg; lognormal variance with pedigree 0.3146, pedigree (3,3,3,5,3)
  (same comment as for Ethyne)
- Mercury [water, unspecified]: 1.4779e-7 kg; lognormal variance with pedigree 0.6646, pedigree (4,4,3,5,2)
  (same comment as for Chromium, ion)
- Boron [air, unspecified]: 1.71458e-7 kg; lognormal variance with pedigree 0.6646, pedigree (3,3,3,5,3)
  (same comment as for Ethyne)
- Cobalt [air, unspecified]: 9.20902e-9 kg; lognormal variance with pedigree 0.6646, pedigree (3,3,3,5,3)
  (same comment as for Ethyne)
- Fluorine [air, unspecified]: 2.25686e-7 kg; lognormal variance with pedigree 0.0546, pedigree (3,3,3,5,3)
  (same comment as for lignite ash)
- Potassium-40 [air, unspecified]: 2.51171e-7 kBq; lognormal variance with pedigree 0.3146, pedigree (3,3,3,5,3)
  (same comment as for Ethyne)
- Strontium [air, unspecified]: 3.98564e-9 kg; lognormal variance with pedigree 0.0546, pedigree (3,3,3,5,3)
  (same comment as for Ethyne)
- m-Xylene [air, unspecified]: 5.41646e-7 kg; lognormal variance with pedigree 0.0546, pedigree (3,3,3,5,3)
  (same comment as for lignite ash)
- Particulates, > 10 um [air, unspecified]: 0.000185281 kg; lognormal variance with pedigree 0.0546, pedigree (3,3,3,5,3)
  FEFCO 2015 reports 0.19kg of dust emissions, these were added to the PM emissions which were estimated from the on-site fuel use.
  Uncertainty: This emission was calculated from the ecoinvent emission factor of combustion of energy. Some energy sources do not have emission factor (LPG, peat and diesel) so other factors were used ( natural gas, lignite and light fuel oil).
- Tin [air, unspecified]: 3.03812e-11 kg; lognormal variance with pedigree 0.6646, pedigree (3,3,3,5,3)
  (same comment as for Ethyne)
- Methanol [air, unspecified]: 1.33512e-7 kg; lognormal variance with pedigree 0.0546, pedigree (3,3,3,5,3)
  (same comment as for Particulates, < 2.5 um)
- Acetic acid [air, unspecified]: 3.40665e-7 kg; lognormal variance with pedigree 0.0546, pedigree (3,3,3,5,3)
  (same comment as for Ethyne)
- Nitrogen [water, unspecified]: 0.000128364 kg; source FEFCO Corrugated Packaging 2015; lognormal variance with pedigree 0.0546, pedigree (3,3,3,5,3)
  FEFCO 2015.
- Lead [water, unspecified]: 2.37834e-7 kg; lognormal variance with pedigree 0.6646, pedigree (4,4,3,5,2)
  (same comment as for Chromium, ion)
- Thorium-228 [air, unspecified]: 1.11297e-7 kBq; lognormal variance with pedigree 0.3146, pedigree (3,3,3,5,3)
  (same comment as for Ethyne)
- Hydrogen sulfide [air, unspecified]: 5.18732e-6 kg; source FEFCO Corrugated Packaging 2015; lognormal variance with pedigree 0.0446, pedigree (1,3,3,5,1)
  Reported as "TRS (H2S as S)" emissions. TRS stands dor total reduced sulfur, which is a mixture composed of several compounds containing sulfur in reduced form. The most common compounds are (1) hydrogen sulphide (H2S), (2) methyl mercaptan, (3) dimethyl sulphide and (4) dimethyl disulphide. H2S is considered to be the largest fraction of TRS, therefore TRS is here approximated with H2S emissions.
- Zinc [soil, unspecified]: 4.54135e-8 kg; lognormal variance with pedigree 0.0546, pedigree (3,3,3,5,3)
  (same comment as for Chromium, ion)
- Phosphorus [air, unspecified]: 1.35563e-6 kg; lognormal variance with pedigree 0.0546, pedigree (3,3,3,5,3)
  (same comment as for Ethyne)
- Suspended solids, unspecified [water, unspecified]: 0.00126845 kg; source FEFCO Corrugated Packaging 2015; lognormal variance with pedigree 0.0546, pedigree (3,3,3,5,3)
  FEFCO 2015.
- Benzene, hexachloro- [air, unspecified]: 3.24988e-14 kg; lognormal variance with pedigree 0.0546, pedigree (3,3,3,5,3)
  (same comment as for lignite ash)
- TOC, Total Organic Carbon [water, unspecified]: 0.00183405 kg; source FEFCO Corrugated Packaging 2015; lognormal variance with pedigree 0.0446, pedigree (1,3,3,5,1)
  FEFCO 2015.
- PAH, polycyclic aromatic hydrocarbons [air, unspecified]: 6.25237e-8 kg; lognormal variance with pedigree 0.3146, pedigree (3,3,3,5,3)
  (same comment as for lignite ash)
- Water [air, unspecified]: 0.00329835 m3; lognormal variance with pedigree 0.0566, pedigree (3,3,5,5,3)
  Calculated amount of evaporated water to close the water balance.
- COD, Chemical Oxygen Demand [water, unspecified]: 0.00523921 kg; source FEFCO Corrugated Packaging 2015; lognormal variance with pedigree 0.0546, pedigree (3,3,3,5,3)
  FEFCO 2015.
- Nickel [air, unspecified]: 1.56214e-7 kg; lognormal variance with pedigree 0.6646, pedigree (3,3,3,5,3)
  (same comment as for lignite ash)
- Polonium-210 [air, unspecified]: 1.71458e-6 kBq; lognormal variance with pedigree 0.3146, pedigree (3,3,3,5,3)
  (same comment as for Ethyne)
- Benzene [air, unspecified]: 4.67304e-6 kg; lognormal variance with pedigree 0.0546, pedigree (3,3,3,5,3)
  Estimation based on fuel input data and emission factors from corresponding fuel combustion ecoinvent datasets. Note(1): Within the process, energy is recovered through the burning of black liquor (7.38 GJ/tonne) and bark (3 GJ/tonne) from the wood. This inherent energy makes up a large part of this process’ energy supply. As it is supplied from within the system boundaries, it does not have a corresponding input exchange. Emissions from the combustion of the internally generated biomass (bark) is approximated with the combustion of wood chips. No comprehensive data for the emissions from the balck liquor recovery process were available. The approximation of this rather complex recovery process with biomass combustion is inappropriate. Therefore emissions from the recovery process are only reflected in the key emission values (particulates, CO2, CO, NOx, Sox, H2S) reported by FEFCO (2015) but not with a complete emission profile. This constitutes a data gap. Note(2): emissions from peat combustion were approximated with those of lignite combustion, LPG with natural gas combustion and diesel with LFO combustion.
  Uncertainty: This emission was calculated from the ecoinvent emission factor of combustion of energy. Some energy sources do not have emission factor (LPG, peat and diesel) so other factors were used ( natural gas, lignite and light fuel oil, respectively).
- Vanadium [air, unspecified]: 2.63788e-7 kg; lognormal variance with pedigree 0.0546, pedigree (3,3,3,5,3)
  (same comment as for Ethyne)
- Phenol, pentachloro- [air, unspecified]: 3.65611e-11 kg; lognormal variance with pedigree 0.0546, pedigree (3,3,3,5,3)
  (same comment as for lignite ash)
- Iron [air, unspecified]: 4.19213e-7 kg; lognormal variance with pedigree 0.6646, pedigree (3,3,3,5,3)
  (same comment as for Ethyne)
- Ethanol [air, unspecified]: 7.85364e-8 kg; lognormal variance with pedigree 0.0546, pedigree (3,3,3,5,3)
  (same comment as for Ethyne)
- Acetone [air, unspecified]: 3.92682e-8 kg; lognormal variance with pedigree 0.0546, pedigree (3,3,3,5,3)
  (same comment as for Ethyne)
- Thorium [air, unspecified]: 4.55717e-11 kg; lognormal variance with pedigree 0.0546, pedigree (3,3,3,5,3)
  (same comment as for Ethyne)
- Dinitrogen monoxide [air, unspecified]: 1.16547e-5 kg; lognormal variance with pedigree 0.0546, pedigree (3,3,3,5,3)
  (same comment as for lignite ash)
- Chlorine [air, unspecified]: 8.1247e-7 kg; lognormal variance with pedigree 0.0546, pedigree (3,3,3,5,3)
  (same comment as for lignite ash)
- Lead-210 [air, unspecified]: 9.32491e-7 kBq; lognormal variance with pedigree 0.3146, pedigree (3,3,3,5,3)
  (same comment as for Ethyne)
- Acetaldehyde [air, unspecified]: 3.15829e-7 kg; lognormal variance with pedigree 0.0546, pedigree (3,3,3,5,3)
  (same comment as for Ethyne)
- Copper, ion [water, unspecified]: 4.51199e-7 kg; lognormal variance with pedigree 0.6646, pedigree (3,3,3,5,3)
  (same comment as for Chromium, ion)
- Beryllium [air, unspecified]: 3.80517e-11 kg; lognormal variance with pedigree 0.0546, pedigree (3,3,3,5,3)
  (same comment as for Ethyne)
- Hydrocarbons, aliphatic, alkanes, unspecified [air, unspecified]: 4.36463e-6 kg; lognormal variance with pedigree 0.0546, pedigree (3,3,3,5,3)
  (same comment as for Ethyne)
- Carbon dioxide, non-fossil [air, unspecified]: 1.29318 kg; source FEFCO Corrugated Packaging 2015; lognormal variance with pedigree 0.0132, pedigree (1,3,3,5,3)
  (same comment as for Carbon dioxide, fossil)
- Sodium [air, unspecified]: 6.09832e-6 kg; lognormal variance with pedigree 0.0546, pedigree (3,3,3,5,3)
  (same comment as for Ethyne)
- Arsenic [air, unspecified]: 8.67649e-9 kg; lognormal variance with pedigree 0.0546, pedigree (3,3,3,5,3)
  (same comment as for lignite ash)
- Radium-228 [air, unspecified]: 1.29345e-7 kBq; lognormal variance with pedigree 0.3146, pedigree (3,3,3,5,3)
  (same comment as for Ethyne)
- Zinc [air, unspecified]: 1.40494e-6 kg; lognormal variance with pedigree 0.6646, pedigree (3,3,3,5,3)
  (same comment as for lignite ash)
- Antimony [air, unspecified]: 3.80517e-10 kg; lognormal variance with pedigree 0.4146, pedigree (3,3,3,5,3)
  (same comment as for Ethyne)
- Uranium [air, unspecified]: 7.59529e-11 kg; lognormal variance with pedigree 0.0546, pedigree (3,3,3,5,3)
  (same comment as for Ethyne)
- Nitrogen oxides [air, unspecified]: 0.0010201 kg; source FEFCO Corrugated Packaging 2015; lognormal variance with pedigree 0.0546, pedigree (3,3,3,5,3)
  (same comment as for Carbon dioxide, fossil)
- Ethane [air, unspecified]: 2.25603e-7 kg; lognormal variance with pedigree 0.0546, pedigree (3,3,3,5,3)
  (same comment as for Ethyne)
- Radon-222 [air, unspecified]: 6.01607e-8 kBq; lognormal variance with pedigree 0.3146, pedigree (3,3,3,5,3)
  (same comment as for Ethyne)
- Propionic acid [air, unspecified]: 2.4479e-8 kg; lognormal variance with pedigree 0.0546, pedigree (3,3,3,5,3)
  (same comment as for Ethyne)

## Sampling procedure
Data were collected from the producers by Cepi ContainerBoard and FEFCO Corrugated Pagaging for the European Database for Corrugated Board Life Cycle Studies and reviewed by the Institut für Energie- und Umweltforschung Heidelberg (ifeu).
The data for Semichemical Fluting and Kraftliner represent more than 90% of the total annual
production of corrugated base papers from primary fibres in Europe. The data for Semichemical
Fluting and Kraftliner also represent 90% of the total consumption of these grades for corrugated
board production in Europe. These paper grades are produced in large mills, located in Austria, Finland,
France, Portugal, Poland and Sweden. Their total production was 4.740.000 tonnes net saleable paper
in 2014. The mills each have an annual production of 85.000-700.000 tonnes net saleable paper (FEFCO, 2015).
Reference(s): CCB & FEFCO. 2015. European Database for Corrugated Board Life Cycle Studies. Accessible online at <http://www.fefco.org/sites/default/files/lca-report-2015.pdf> (25.Jan 2018).

## Extrapolations
This dataset is a copy of the European dataset. The production volume was adjusted accordingly.
Additional air emissions from the combustion of fossil fuels estimated based on industrial heating datasets from the ecoinvent database and matched as follows:
light fuel oil: heat production, light fuel oil, at industrial furnace 1MW, Europe without Switzerland
heavy fuel oil: heat production, heavy fuel oil, at industrial furnace 1MW, Europe without Switzerland
hard coal: heat production, at hard coal industrial furnace 1-10MW, Europe without Switzerland
natural gas: heat production, natural gas, at industrial furnace >100kW, Europe without Switzerland
lignite briquettes and peat: heat production, lignite briquette, at stove 5-15kW, Europe without Switzerland
wood chips: heat production, wood chips from industry, at furnace 1000kW, CH
