# hydropower plant construction, run-of-river

Dataset: EcoSpold 2, unit process
Geography: RoW
Time period: 1945-01-01 to 2021-12-31
Technology level: current
Classification: EcoSpold01Categories: hydro power/production of components
Classification: ISIC rev.4 ecoinvent: 4220:Construction of utility projects
Tags: ConvertedDataset
Scenario: Business-as-Usual
System model: Allocation, cut-off by classification
Generated by: Pablo Tirado
Published in: Bolliger, R. 2007
Database: ecoinvent
isCopyrightProtected: true
accessRestrictedTo: 1

## General comment
This study adresses Swiss and Austrian plants only. The data have been directly applied to preliminary describe plant-mixes in other countries. Only a representative sample of 5 run-of-river power plants in Switzerland and Austria is used for calculating the inputs. Lifetime is assumed to be 80 years for the structural part and 40 years for other materials. The data refer to the construction of a mix of 5 plants built between 1945 and the beginning of the 1980s, therefore they might not be representative for more modern construction, nor for an individual type.
[This dataset was already contained in the ecoinvent database version 2. It was not individually updated during the transfer to ecoinvent version 3. Life Cycle Impact Assessment results may still have changed, as they are affected by changes in the supply chain, i.e. in other datasets. This dataset was generated following the ecoinvent quality guidelines for version 2. It may have been subject to central changes described in the ecoinvent version 3 change report (http://www.ecoinvent.org/database/ecoinvent-version-3/reports-of-changes/), and the results of the central updates were reviewed extensively. The changes added e.g. consistent water flows and other information throughout the database. The documentation of this dataset can be found in the ecoinvent reports of version 2, which are still available via the ecoinvent website. The change report linked above covers all central changes that were made during the conversion process.]

## Included activities end
Includes the most important materials used for the construction: cement, gravel, water, steel, explosives. Also includes transports and energy used for the construction. Included direct burdens to the environment are particle emissions caused by the construction and the disposal of the dam.

## Geography
Available data for a mix of plants in Switzerland and Austria, directly used here.

## Technology
Construction technology refers to a mix of 5 plants built between 1945 and the 1980s, therefore they might not be representative for more modern construction, nor for an individual type.

## Parameters
- fraction, process water, to air: 0.15 dimensionless; name fraction_PW_to_air; lognormal variance with pedigree 0.092025, pedigree (4,4,3,2,4)
- fraction, tap water, to air: 0.15 dimensionless; name fraction_TW_to_air; lognormal variance with pedigree 0.092025, pedigree (4,4,3,2,4)

## Reference product
- hydropower plant, run-of-river: 1 unit; name amountRP; By-product classification allocatable product; CPC 53262: Power plants
  EcoSpold01Location=RER
  production volume 0.821427 unit; name apv_rp
    Assumed half of global hydropower production (rest is reservoir plants). ecoinvent v2 report 6_XVI and VIII
  property price 2.79622e10 EUR2005
    EU27 I/O database(in the 'EU & DK Input Output Database' (available in SimaPro)); -79 Building, non-residential EU 27 (calculated to be 38.169 EUR2003/kg). Based on consumption of (_53 Iron basic, virgin, EU27;7.25517782294095E-3 kg/EUR building; 0.45 EUR2003 per kg DS), (_61 Iron, after first processing, EU27;5.8766830719783E-3kg/EUR building; 0.62 EUR2003 per kg DS), (_65 Fabricated metal products, except machinery, EU27; 8.9167022775554E-3 kg/EUR building; 3.63 EUR2003 per kg DS) and (_66 Machinery and equipment n.e.c., EU27;4.15071881936446E-3 kg/EUR building; 5.71 EUR2003 per kg DS) -738200000 kg

## Inputs from technosphere
- electricity, medium voltage: 0 kWh; pedigree (1,1,1,1,1)
  EcoSpold01Location=UCTE
  own assumption, includes lifetime
- reinforcing steel: 1.9e8 kg; lognormal variance with pedigree 0.142, pedigree (1,1,5,5,1)
  own assumption, includes lifetime
  EcoSpold01Location=RER
  properties: wet mass 1 kg, dry mass 1 kg, carbon content, fossil 0.004
- diesel, burned in building machine: 5.82e9 MJ; lognormal variance with pedigree 0.142, pedigree (1,1,5,5,1)
  own assumption, includes lifetime
  EcoSpold01Location=GLO
  properties: heating value, net 1 MJ
- cement, Portland: 0 kg; pedigree (1,1,1,1,1)
  own assumption, includes lifetime
  EcoSpold01Location=CH
  properties: dry mass 1 kg, wet mass 1 kg
- copper, cathode: 502044 kg; = 5.28E+07*0.01/ apv_rp; lognormal variance with pedigree 0.1712, pedigree (3,5,5,4,5)
  This flow is considered as a regional specificity of Quebec. The flow is scaled using the production volumes (Quebec and GLO) to avoid its accounting of this specificity in the other regions."
  properties: wet mass 1 kg, dry mass 1 kg
- steel, chromium steel 18/8, hot rolled: 3.72e7 kg; lognormal variance with pedigree 0.212, pedigree (1,1,5,5,1)
  EcoSpold01Location=RER
  own assumption, includes lifetime
  properties: dry mass 1 kg, carbon content, fossil 0.0008, wet mass 1 kg
  note on carbon content, fossil: Stainless steel model is the grade 304 steel (18/8 stainless, 18% chromium 8% nickel; max. 0.08% C)
- sand: 0 kg; pedigree (1,1,1,1,1)
  (same comment as for copper, cathode)
  properties: wet mass 1 kg, dry mass 1 kg
- waste reinforced concrete: -2.34e10 kg; name concrete_waste; lognormal variance with pedigree 0.162, pedigree (1,1,5,5,1)
  own assumption, includes lifetime
  EcoSpold01Location=CH
  production volume 1.91954e10 kg; = apv_RP *concrete_waste / amountRP
    Calculated from the production volume of hydropower plant, run-of-river in proportion to the respective output amounts.
  property price 0 EUR2005; name concrete_waste_price_EUR2005
  properties: water content 0.00585407, wet mass 1 kg, dry mass 0.99418 kg
- excavation, hydraulic digger: 2.08234e6 m3; = 2.19E+08 *0.01/ apv_rp; lognormal variance with pedigree 0.1712, pedigree (3,5,5,4,5)
  (same comment as for copper, cathode)
- gravel, round: 1.97e10 kg; lognormal variance with pedigree 0.162, pedigree (1,1,5,5,1)
  own assumption, includes lifetime
  EcoSpold01Location=CH
  properties: wet mass 1 kg, dry mass 1 kg
- steel, low-alloyed, hot rolled: 5.11e8 kg; lognormal variance with pedigree 0.142, pedigree (1,1,5,5,1)
  own assumption, includes lifetime
  EcoSpold01Location=RER
  properties: carbon content, fossil 0.005, dry mass 1 kg, wet mass 1 kg
  note on carbon content, fossil: Low alloyed steel composition given in Tab. 3.2 ecoinvent v2.2 report 10_partII. Steel assumed to have a C content of 0.5%
- sawnwood, softwood, raw, dried (u=10%): 62185 m3; = 6.54E+06 *0.01/ apv_rp; lognormal variance with pedigree 0.1712, pedigree (3,5,5,4,5)
  (same comment as for copper, cathode)
  properties: carbon content, non-fossil 0.494, wet mass 540 kg, dry mass 450 kg, water content 0.2, heating value, net 7227.56 MJ
  note on heating value, net: Assumed equal to "sawnwood, softwood, dried (u=10%), planed".The property is based on a value of 13.38MJ/kg
- scrap copper: -502044 kg; name scrapCopper; = (5.28E+07 *0.01/ apv_rp )*-1; lognormal variance with pedigree 0.1712, pedigree (3,5,5,4,5)
  (same comment as for copper, cathode)
  production volume 0 kg; = scrapCopper*apv_RP/amountRP
    Calculated from production volume of reference product using the relative outputs.
  property price 0 EUR2005; name scrapCopper_price_EUR2005
  properties: wet mass 1 kg, dry mass 1 kg
- scrap steel: -2.7099e7 kg; name scrapSteel; = (2.85E+09 *0.01/ apv_rp )*-1; lognormal variance with pedigree 0.1712, pedigree (3,5,5,4,5)
  (same comment as for copper, cathode)
  production volume 0 kg; = scrapSteel*apv_RP/amountRP
    Calculated from production volume of reference product using the relative outputs.
  property price 0 EUR2005; name scrapSteel_price_EUR2005
  properties: wet mass 1 kg, dry mass 1 kg
- explosive, tovex: 779000 kg; lognormal variance with pedigree 0.132, pedigree (1,1,5,5,1)
  EcoSpold01Location=CH
  standard for working material, incl. Lifetime
  properties: dry mass 0.92 kg, water content 0.0869565, wet mass 1 kg, carbon content, fossil 0.0483756
  note on carbon content, fossil: Composition in Tab 4.1, ecoinvent v2.2 report n 7-part XVIII. 23% of wet mass consists of CH6N2O3
- tap water: 0 kg; name tap_water_input; pedigree (1,1,1,1,1)
  own assumption, includes lifetime
  EcoSpold01Location=RER
  properties: carbon content, fossil 0.00178991, water content 2962.17, wet mass 1 kg, dry mass 0.000337476 kg
  note on carbon content, fossil: Bicarbonate content is 2.93 mol/m3. CO2 content is 0.1 mol/m3 (ecoinvent v2.2 report 8, Tab 93.1).
- electricity, medium voltage: 1.06864e7, 2.04918e6, 3.44015e7, 5.0034e8, 7.05231e7 kWh (5 entries); lognormal variance with pedigree 0.132, pedigree (1,1,5,5,1)
  EcoSpold01Location=UCTE
  own assumption, includes lifetime
- cement, Portland: 8.46938e6, 2.62652e8, 1.46784e7, 2.93863e8, 1.20406e7, 1.7283e9 kg (6 entries); lognormal variance with pedigree 0.162, pedigree (1,1,5,5,1)
  own assumption, includes lifetime
  EcoSpold01Location=CH
- sand: 3.92561e8, 2.038e6 kg (2 entries); lognormal variance with pedigree 0.1712, pedigree (3,5,5,4,5)
  (same comment as for copper, cathode)
- tap water: 1.80905e7, 3.59885e6, 9.07489e7, 2.36081e6, 6.71528e6, 1.03849e9 kg (6 entries); lognormal variance with pedigree 0.132, pedigree (1,1,5,5,1)
  own assumption, includes lifetime
  EcoSpold01Location=RER

## Emissions to nature
- Particulates, < 2.5 um [air, non-urban air or from high stacks]: 2.32e6 kg; lognormal variance with pedigree 0.342, pedigree (1,1,5,5,1)
  own assumption, includes lifetime
- Particulates, > 10 um [air, non-urban air or from high stacks]: 3.08e7 kg; lognormal variance with pedigree 0.342, pedigree (1,1,5,5,1)
  own assumption, includes lifetime
- Water [air, unspecified]: 174000 m3; name water_to_air_unspecified; lognormal variance with pedigree 0.0827, pedigree (2,2,5,5,1)
  Calculated value based on literature values and expert opinion. See comments in the parametres' comment field.
  property fraction, origin: unspecified 0; name fraction_origin_unspecified
  property fraction, origin: salt water 0; name fraction_origin_salt_water
  property fraction, origin: fresh water 1; name fraction_origin_fresh_water
- Particulates, > 2.5 um, and < 10um [air, non-urban air or from high stacks]: 1.12e7 kg; lognormal variance with pedigree 0.342, pedigree (1,1,5,5,1)
  own assumption, includes lifetime
- Water [water, unspecified]: 986000 m3; name water_to_water_unspecified; lognormal variance with pedigree 0.0827, pedigree (2,2,5,5,1)
  (same comment as for Water)
  property dry mass 0 kg; name DM
  property fraction, origin: unspecified 0; name fraction_origin_unspecified_Ww
  property fraction, origin: fresh water 1; name fraction_origin_fresh_water_Ww
  property water in wet mass 1000 kg; name WWM
  property wet mass 1000 kg; name WM
  property carbon content, non-fossil 0; name C_content_non_fossil
  property fraction, origin: salt water 0; name fraction_origin_salt_water_Ww
  property carbon content, fossil 0; name C_content_fossil

## Sampling procedure
literature

## Extrapolations
see Geography/Text This dataset has been copied from an original dataset covering the geography Europe without Switzerland. The uncertainty has been adjusted accordingly.

## Review by Christian Bauer 2009-02-24
Passed.

## Review by Christian Bauer 2014-01-05
This dataset was thoroughfully reviewed and complies with the Data Quality Guidelines.
