# furnace production, wood chips, with silo, 300kW

Dataset: EcoSpold 2, unit process
Geography: RoW
Time period: 2010-01-01 to 2021-12-31
Technology level: modern
Classification: ISIC rev.4 ecoinvent: 2815:Manufacture of ovens, furnaces and furnace burners
Classification: EcoSpold01Categories: oil/cogeneration
Synonyms: wood chips boiler production; wood fired boiler production
Tags: biomass power
Scenario: Business-as-Usual
System model: Allocation, cut-off by classification
Generated by: Christian Bauer
Database: ecoinvent
isCopyrightProtected: true
accessRestrictedTo: 1

## General comment
This dataset represent the production and the disposal of a wood chips burning furnace for local heating networks, with a storage silo for the wood chips.

## Included activities start
From reception of furnace components at the factory gate

## Included activities end
This activity ends with the disposal of the device in the end of its lifetime. The dataset includes the most important materials used for the fabrication of the furnace, the accumulator hot water tanks, the screw conveyor system and the chimney flue pipes: steel, concrete, insulating materials, electronic components, plastics, polystyrene, lubricating oil, paint. The dataset includes the basement for the furnace (around 17m2) and the wood chips storage silo in concrete (dimensions: 7x7x4m), which is assumed to be built in an external space out from an existing building. The dataset includes the land transformation and occupation and the energy and heat for the construction and the disposal of the device.

## Technology
Furnace of modern technology available on the European and Swiss market, with tilting grate technology and combustion chambers in refractory bricks, designed for an optimal combustion process (cyclone integrated). The model of reference is a woodchip boiler, brand Froling mod.Turbomat 320 kW. It was compared with another model with similar technology, brand Schmid mod.Pyrotronic UTSR 300 kW. Represent the typical boiler for providing heat for local heating networks, commercial premises and multi-storey housing.
Source of image: http://www.froeling.com/ch/produkte/hackgut-ab-150kw/froeling-turbomat.html

## Time period
This model of furnace is commercialized since 2010 in Europe and Switzerland and is still available on the market (end 2011)

## Reference product
- furnace, wood chips, with silo, 300kW: 1 unit; name RP_amount_1; By-product classification allocatable product; CPC 43420: Industrial or laboratory furnaces and ovens, except non-electric bakery ovens; other industrial or laboratory […]
  EcoSpold01Location=GLO
  production volume 34904 unit; name RP_PV_1
    extrapolated with proportions (population) from the local dataset of Switzerland (from which value comes from an estimation of the auto stocker boilers 300-500kW produced within the country) - high uncertainty
  property price 22188 EUR2005
    Calculated by 2.0 - Prices from UNDATA "Industrial furnace, oven, incinerator non-electric ne" (http://data.un.org/Data.aspx?q=industrial+furnace&d=ComTrade&f=_l1Code%3a84%3bcmdCode%3a841780). The prices are per kg and converted to per unit by summed weight of material concumption of the process in existing ecoinvent documentation from ecoinvent v.2.2. For weight of concrete, it is separately added for from price per m3 used of each unit and apply EU&DK input output database 2003 (0.08 Euro2003/kg DS of concrete => 176 Euro2003/m3 concrete).
  property capacity [MW] 0.3 MW; name capacity_MW
  property lifetime 20 year; name lifetime
  property lifetime capacity [kWh] 5.256e7 kWh; name lifetime_capacity_kWh; = (lifetime*8760)*capacity_MW*1000
    calculated value

## Inputs from technosphere
- scrap aluminium: 0 kg; name BP_amount_10; pedigree (1,1,1,1,1)
  disposal of aluminium components in the furnace
  EcoSpold01Location=CH
  production volume 0 kg
    Calculated from production volume of reference product using the relative outputs.
  property price 0 EUR2005; name BP_amount_10_price_EUR2005
  properties: dry mass 1 kg, wet mass 1 kg, lifetime 20 year
- electronics, for control units: 4.5 kg; source Fröling Gmbh 2011; lognormal variance with pedigree 0.0598, pedigree (3,3,5,1,1)
  EcoSpold01Location=RER
  estimation
  properties: carbon content, fossil 0.337146, dry mass 1 kg, wet mass 1 kg, carbon content, non-fossil 0.00013442
  note on carbon content, fossil: The control unit has a composition of 46% steel (housing), 32% plastics, 14% printed wiring boards and 8% cables (various types).;
- stone wool: 338 kg; source Fröling Gmbh 2011; lognormal variance with pedigree 0.0278, pedigree (2,1,4,5,1)
  EcoSpold01Location=CH
  estimation - insulation material for the accumulator hot water tanks
  properties: dry mass 1 kg, carbon content, fossil 0.015401, wet mass 1 kg
  note on carbon content, fossil: The chemical composition of the glass fibres used in the rock wool production is similar to the composition of naturally cooled volcano basalt and has a composition listed in Tab. 3.1 and 3.2 in ecoinvent v2.2 report 16, part XIV. Rock wool contains: a minimum of 96% mineral fibres,between 0.5 and 3.0 weight percent of phenolic resin depending on the specific product characteristics, and about 0.2 percent mineral oil (ecoinvent v2.2 report 16, part XIV). An average composition of 1.8% phenolic resin, 0.2% mineral oil, and 98% mineral fibres has been assumed and used to calculate C content of the rock wool
- inert waste, for final disposal: -830 kg; name BP_amount_7; lognormal variance with pedigree 0.0107, pedigree (1,2,4,5,1)
  EcoSpold01Location=CH
  disposal of the refractory bricks
  production volume 2.89703e7 kg; = RP_PV_1* BP_amount_7
    Calculated from production volume of reference product using the relative outputs.
  property price 0 EUR2005; name BP_amount_7_price_EUR2005
  properties: water content 0.00502513, dry mass 0.995 kg, wet mass 1 kg, lifetime 20 year
- sheet rolling, steel: 201 kg; source Fröling Gmbh 2011; lognormal variance with pedigree 0.0278, pedigree (2,1,4,5,1)
  EcoSpold01Location=RER
  estimation
- electricity, low voltage: 0 kWh; source Fröling Gmbh 2011; pedigree (1,1,1,1,1)
  Estimation - data derives from comparison between old dataset value, energy required for steel manufacturing (similar weight device) and suggestions from FROELING technician
  EcoSpold01Location=CH
- waste polystyrene isolation, flame-retardant: 0 kg; name BP_amount_2; pedigree (1,1,1,1,1)
  disposal of accumulator water tanks insulation
  production volume 0 kg
    Calculated from production volume of reference product using the relative outputs.
  property price 0 EUR2005; name BP_amount_2_price_EUR2005
  properties: dry mass 0.998012 kg, heating value, net 38.67 MJ, water content 0.00199232, carbon content, fossil 0.918145, wet mass 1 kg
  note on carbon content, fossil: Polystyrene isolation (EPS) is flame-retarded with hexa-bromo-cyclo-dodecan (C12H18Br6) and contains 0.67 w% bromine (ecoinvent v2.2 report 13_I, pg 39). The rest is polystyrene: (C8H8)n.
- heat, central or small-scale, other than natural gas: 0 MJ; source Fröling Gmbh 2011; pedigree (1,1,1,1,1)
  estimation - data comes from a comparison between old dataset value and communication with FROELING producer (total annual heating value in factory/production)
  EcoSpold01Location=CH
  properties: heating value, net 1 MJ
- waste concrete: 0 kg; name BP_amount_1; pedigree (1,1,1,1,1)
  EcoSpold01Location=CH
  disposal of the concrete for the furnace basement and for the woodchips silo - around 22.60 m3 of concrete * 2350 kg/m3 (concrete density) = 53000 kg
  production volume 0 kg
    Calculated from production volume of reference product using the relative outputs.
  property price 0 EUR2005; name BP_amount_1_price_EUR2005
  properties: water content 1, wet mass 1 kg, dry mass 0.5 kg, lifetime 20 year
- waste polyethylene: 0 kg; name BP_amount_4; pedigree (1,1,1,1,1)
  EcoSpold01Location=CH
  disposal of plastic materials
  production volume 0 kg
    Calculated from production volume of reference product using the relative outputs.
  property price 0 EUR2005; name BP_amount_4_price_EUR2005
  properties: heating value, net 42.47 MJ, carbon content, fossil 0.825301, wet mass 1 kg, dry mass 0.996 kg, water content 0.00401606, lifetime 20 year
  note on heating value, net: Value taken from the general comment of the treatment dataset.
  note on carbon content, fossil: C content in 1 kg DM was calculated using data in Tab A.1, ecoinvent v2.2 report 13_I
- scrap copper: 0 kg; name BP_amount_5; pedigree (1,1,1,1,1)
  disposal of copper
  production volume 0 kg
    Calculated from production volume of reference product using the relative outputs.
  property price 0 EUR2005; name BP_amount_5_price_EUR2005
  properties: dry mass 1 kg, wet mass 1 kg
- concrete, normal: 0 m3; source Fröling Gmbh 2011; pedigree (1,1,1,1,1)
  EcoSpold01Location=CH
  calculated value - basing on the silo dimensions (from furnace manual) the amount of concrete was calculated (basement 0.69 m3 + silo 16.20 m3)
  properties: dry mass 2190 kg, water content 0.086758, wet mass 2380 kg
- polyethylene, high density, granulate: 5.5 kg; source Fröling Gmbh 2011; lognormal variance with pedigree 0.0278, pedigree (2,1,4,5,1)
  estimation
  EcoSpold01Location=RER
  properties: heating value, net 42.47 MJ, wet mass 1 kg, carbon content, fossil 0.857143, dry mass 1 kg
  note on carbon content, fossil: Polyethylene is formed out of a huge amount of ethylene monomers (C2H4) (ecoinvent v2.2 report 11_II). MW=28 g/mol
- electronics scrap from control units: -4.5 kg; name BP_amount_8; lognormal variance with pedigree 0.0107, pedigree (1,2,4,5,1)
  disposal of electronical parts
  EcoSpold01Location=RER
  production volume 157068 kg; = RP_PV_1* BP_amount_8
    Calculated from production volume of reference product using the relative outputs.
  property price 0 EUR2005; name BP_amount_8_price_EUR2005
  properties: carbon content, non-fossil 0.00013442, carbon content, fossil 0.337146, dry mass 1 kg, wet mass 1 kg, lifetime 20 year
- waste mineral wool, for final disposal: 0 kg; name BP_amount_6; pedigree (1,1,1,1,1)
  EcoSpold01Location=CH
  disposal of insulation material (boiler + chimney)
  production volume 0 kg
    Calculated from production volume of reference product using the relative outputs.
  property price 0 EUR2005; name BP_amount_6_price_EUR2005
  properties: lifetime 20 year, dry mass 1 kg, wet mass 1 kg
- iron-nickel-chromium alloy: 120 kg; source Fröling Gmbh 2011; lognormal variance with pedigree 0.0358, pedigree (4,3,4,5,1)
  estimation - components for the conveyor grate in the combustion chamber
  EcoSpold01Location=RER
  properties: wet mass 1 kg, dry mass 1 kg
- lubricating oil: 3.5 kg; source Fröling Gmbh 2011; lognormal variance with pedigree 0.0298, pedigree (3,3,4,5,1)
  estimation - used for furnace manufacturing and for maintenance
  EcoSpold01Location=RER
  properties: wet mass 1 kg, carbon content, fossil 0.75, dry mass 1 kg, heating value, net 40.2 MJ
  note on carbon content, fossil: Lubricating oil is produced from diesel. C-content/dry mass of fats and oils considered 75%, from: ecoinvent v2.2 report, n 15a, pg 40
  note on heating value, net: Literature value, Source: IPCC 2006, 2006 IPCC Guidelines for National Greenhouse Gas Inventories, Prepared by the National Greenhouse Gas Inventories Programme, Eggleston H.S., Buendia L., Miwa K., Ngara T. and Tanabe K. (eds). Published: IGES, Japan
- refractory, fireclay, packed: 830 kg; source Fröling Gmbh 2011; lognormal variance with pedigree 0.0292, pedigree (3,1,4,5,1)
  estimation - refractory bricks in fireclay are used in the combustion chamber inside the furnace, for a efficient combustion (hight quantity of refractory is necessary for this kind of furnace, which can burn woodchips with high water content)
  EcoSpold01Location=DE
  properties: dry mass 1 kg, wet mass 1 kg
- polystyrene foam slab: 52 kg; source Fröling Gmbh 2011; lognormal variance with pedigree 0.0278, pedigree (2,1,4,5,1)
  calculated value - insulation of the accumulator hot water tanks
  EcoSpold01Location=RER
  properties: carbon content, fossil 0.859091, wet mass 1 kg, dry mass 1 kg, heating value, net 38.67 MJ
  note on carbon content, fossil: XPS consists in 91% of polystyrene, 7% of blowing agent and the re-maining 2% are flame retardants (bromine compounds) and other additives (ecoinvent v2.2 report 7, part XIV, pg69). The chemical formula of polystyrene is (C8H8)n. Here, the blowing agent is CO2.
- steel, chromium steel 18/8, hot rolled: 40 kg; source Fröling Gmbh 2011; lognormal variance with pedigree 0.0298, pedigree (3,3,4,5,1)
  EcoSpold01Location=RER
  estimation . several components in the body of the furnace
  properties: dry mass 1 kg, wet mass 1 kg, carbon content, fossil 0.0008
  note on carbon content, fossil: Stainless steel model is the grade 304 steel (18/8 stainless, 18% chromium 8% nickel; max. 0.08% C)
- alkyd paint, white, without solvent, in 60% solution state: 5 kg; source Fröling Gmbh 2011; lognormal variance with pedigree 0.0278, pedigree (2,1,4,5,1)
  calculated value for the furnace cladding
  EcoSpold01Location=RER
  properties: carbon content, non-fossil 0.199629, dry mass 1 kg, carbon content, fossil 0.140367, wet mass 1 kg, heating value, net 10.3 MJ
  note on carbon content, non-fossil: C content was calculated as an addition of C content in the raw materials.
- steel, low-alloyed, hot rolled: 4791 kg; source Fröling Gmbh 2011; lognormal variance with pedigree 0.0298, pedigree (3,3,4,5,1)
  EcoSpold01Location=RER
  calculated value (tot weight - summa of all other materials)
  properties: wet mass 1 kg, dry mass 1 kg, carbon content, fossil 0.005
  note on carbon content, fossil: Low alloyed steel composition given in Tab. 3.2 ecoinvent v2.2 report 10_partII. Steel assumed to have a C content of 0.5%
- copper, cathode: 7 kg; source Fröling Gmbh 2011; lognormal variance with pedigree 0.0358, pedigree (4,3,4,5,1)
  EcoSpold01Location=RER
  estimation
  properties: wet mass 1 kg, dry mass 1 kg
- scrap steel: 0 kg; name BP_amount_9; pedigree (1,1,1,1,1)
  disposal of steel low-alloyed, chromium steel and steel alloy. Summa from inputs (body of the furnace, accumulation water tanks, screw conveyour, chimney flue pipes)
  EcoSpold01Location=CH
  production volume 0 kg
    Calculated from production volume of reference product using the relative outputs.
  property price 0 EUR2005; name BP_amount_9_price_EUR2005
  properties: lifetime 20 year, wet mass 1 kg, dry mass 1 kg
- waste mineral oil: 0 kg; name BP_amount_3; pedigree (1,1,1,1,1)
  disposal of the lubricating oil
  production volume 0 kg
    Calculated from production volume of reference product using the relative outputs.
  property price 0 EUR2005; name BP_amount_3_price_EUR2005
  properties: heating value, net 34.7 MJ, water content 0.111111, dry mass 0.9 kg, carbon content, fossil 0.864444, wet mass 1 kg
  note on carbon content, fossil: Tab A.6, ecoinvent v2.2 report 13_I. C content has been calculated after data in the tables, and then referred to 1 kg DM
- scrap aluminium: -3.864, -8.136 kg (2 entries); lognormal variance with pedigree 0.0107, pedigree (1,2,4,5,1)
  disposal of aluminium components in the furnace
  EcoSpold01Location=CH
  production volume 418848 kg
- electricity, low voltage: 13.8848, 2.52816, 57.0701, 199.39, 40.7065, 624.975, 101.11, 290.336 kWh (8 entries); source Fröling Gmbh 2011; lognormal variance with pedigree 0.101, pedigree (4,3,4,5,1)
  (same comment as for electricity, low voltage)
- waste polystyrene isolation, flame-retardant: -14.7095, -37.2905 kg (2 entries); lognormal variance with pedigree 0.0107, pedigree (1,2,4,5,1)
  disposal of accumulator water tanks insulation
  production volume 1.81501e6 kg
- heat, central or small-scale, other than natural gas: 36.5805, 2663.42 MJ (2 entries); source Fröling Gmbh 2011; lognormal variance with pedigree 0.133, pedigree (4,3,5,5,1)
  (same comment as for heat, central or small-scale, other than natural gas)
- waste concrete: -3622.51, -49381.5 kg (2 entries); lognormal variance with pedigree 0.0107, pedigree (1,2,4,5,1)
  (same comment as for waste concrete)
  production volume 1.85005e9 kg
- waste polyethylene: -0.61183, -0.0408801, -0.0030917, -0.016885, -0.00682133, -0.0160338, -0.521308, -4.28315 kg (8 entries); lognormal variance with pedigree 0.0107, pedigree (1,2,4,5,1)
  EcoSpold01Location=CH
  disposal of plastic materials
  production volume 191972 kg
- scrap copper: -2.254, -4.746 kg (2 entries); lognormal variance with pedigree 0.0107, pedigree (1,2,4,5,1)
  disposal of copper
  production volume 244328 kg
- concrete, normal: 0.511146, 0.0532608, 0.431183, 0.242541, 1.02709, 0.0346432, 20.3001 m3 (7 entries); source Fröling Gmbh 2011; lognormal variance with pedigree 0.0278, pedigree (2,1,4,5,1)
  (same comment as for concrete, normal)
- waste mineral wool, for final disposal: -145.592, -192.408 kg (2 entries); lognormal variance with pedigree 0.0107, pedigree (1,2,4,5,1)
  EcoSpold01Location=CH
  disposal of insulation material (boiler + chimney)
  production volume 1.17976e7 kg
- scrap steel: -1205.92, -3745.08 kg (2 entries); lognormal variance with pedigree 0.0107, pedigree (1,2,4,5,1)
  (same comment as for scrap steel)
  production volume 1.7281e8 kg
- waste mineral oil: -0.967292, -2.53271 kg (2 entries); lognormal variance with pedigree 0.0107, pedigree (1,2,4,5,1)
  disposal of the lubricating oil
  production volume 122164 kg

## Inputs from nature
- Transformation, to industrial area [natural resource, land]: 102 m2; source Fröling Gmbh 2011; lognormal variance with pedigree 0.0752, pedigree (4,5,5,5,1)
  calculated value - space required for the boiler and screw conveyor system, from the furnace manual
- Occupation, industrial area [natural resource, land]: 2040 m2*year; = land_use*20; source Fröling Gmbh 2011; lognormal variance with pedigree 0.0752, pedigree (4,5,5,5,1)
  calculated value - (land_use * lifetime of the furnace) [lifetime of the furnace: 20 years]
  Uncertainty: basic uncertainty:2;
- Transformation, from unspecified [natural resource, land]: 102 m2; name land_use; source Fröling Gmbh 2011; lognormal variance with pedigree 0.0752, pedigree (4,5,5,5,1)
  (same comment as for Transformation, to industrial area)

## Sampling procedure
literature, furnace manual available for customers, investigation and personal communication from producer and technician

## Extrapolations
extrapolated from Austrian data

## Review by Bo Weidema 2012-02-16
Passed. Documentation adequate, inputs relevant, mass balance correct, and correct handling of capacity utilisation.

## Review by Bo Weidema 2012-02-16
As an exception, this dataset has only been reviewed by one reviewer. As an infraqstructure dataset, this exception is reasonable.
