# clinker production

Dataset: EcoSpold 2, unit process
Geography: CH
Time period: 2009-01-01 to 2021-12-31
Technology level: current
Classification: ISIC rev.4 ecoinvent: 2394:Manufacture of cement, lime and plaster
Classification: EcoSpold01Categories: construction materials/binder
Synonyms: Portland cement clinker
Tags: combined production
Scenario: Business-as-Usual
System model: Allocation, cut-off by classification
Share of production covered: 100 %
Generated by: Frank Werner
Database: ecoinvent
isCopyrightProtected: true
accessRestrictedTo: 1

## General comment
The dataset describes the production of portland cement clinker; in the production different types of alterantive fuels and raw materials are used. As the use of a alternative fuel/material can vary considerably between different years, this dataset covers the period from 2005 to 2009.
Clinker consists of various calcium silicates including alite and belite. Tricalcium aluminate and calcium aluminoferrite are other common components. These components are often generated in situ by heating various clays and limestone.

Portland cement clinker is made by heating in a rotary kiln at high temperature a homogeneous mixture of raw materials. The products of the chemical reaction aggregate together at their sintering temperature, about 1,450 °C. Aluminium oxide and iron oxide are present only as a flux to reduce the sintering temperature and contribute little to the cement strength. For special cements, such as low heat (LH) and sulfate resistant (SR) types, it is necessary to limit the amount of tricalcium aluminate formed. The major raw material for the clinker-making is usually limestone mixed with a second material containing clay as source of alumino-silicate. Normally, an impure limestone which contains clay or silicon dioxide (SiO2) is used. The calcium carbonate (CaCO3) content of these limestones can be as low as 80%. Second raw materials (materials in the rawmix other than limestone) depend on the purity of the limestone. Some of the second raw materials used are: clay, shale, sand, iron ore, and bauxite.
The CO2 emissions from the use of alternative fuels as well as CO2 emissions from the calcination of limestone have been included in the environmental flows of fossil/non-fossil CO2 emissions. For calculations for clinker, cement and concrete that do not follow this methodological approach, recalculations have to be made adjusting the respective elementary flows in this dataset.

## Included activities start
From the reception of traditional and alternative fuels and raw materials at the factory gate.

## Included activities end
This activity ends with the cooling of the produced clinker. The infrastructure of cement production facility is inventoried in the cement production dataset; the infrastructure inventoried in this dataset comprises the rotary kiln, refractory clay and some wear and tear parts made from steel.

## Parameters
- fraction, tap water, to air: 0.15 dimensionless; name fraction_TW_to_air; = fraction_PW_to_air
  Calculated value. See comment in the other parametres present in this dataset. Tap water is considered to be always used as process water, thus process water fractions to air are applied to all tap water input flows to calculate the amount of water consumed in the processes.
- fraction, process water, to air: 0.15 dimensionless; name fraction_PW_to_air
  Literature value. In case when no industry/process specific data are available, default evaporation fraction value is used. This value is 15% and is based on literature (Statistics Canada, 2007 & Shaffer, K.H., 2008, Consumptive water use in the Great Lakes Basin, USGS & Shiklomanov, 2003, World Water Resources at the Beginning of the 21st Century) and has been approved by an expert.

## Reference product
- used vegetable cooking oil: 0 kg; name other_biogenic_fuels; By-product classification Recyclable; CPC 39120: Bran and other residues from the working of cereals or legumes; vegetable materials and vegetable waste, veget[…]
  specific composition unknown; cemsuisse, personal communication, 2014
  production volume 0 kg
    Calculated from the production volume of clinker in proportion to the respective output amounts.
  property carbon content, non-fossil 0.75
    C content in fat is estimated to be 75% in dry mass (ecoinvent v2.2 report, n 15a, pg 40)
  property price 0 EUR2005; name other_biogenic_fuels_price_EUR2005
    Assumed without economic value
  property heating value, net 38.4 MJ
    Values is approximated from HHV from "vegetable oil, crude". Source: Radovanovic,M.; Zivanovic,T.; Stojiljkovic,D.; Jovanovic,V.; Jerinic,N.; Knezevic,S. et.al. Utilization of sunflower husk as a fuel for industrial boilers - 20 years experience. Proc. 5th Eur. Conf. on Industrial Furnaces&Boilers 2000,vol.2,p.221-233.
    Available at: https://phyllis.nl/Biomass/View/2152
  property carbon content 0.75
    carbon content on a dry matter basis (reserved; not for manual entry)
  properties: water in wet mass 0 kg, dry mass 1 kg, wet mass 1 kg, carbon content, fossil 0, water content 0, carbon allocation 0.75 kg
- blast furnace sludge: 0 kg; name ironsludge; By-product classification Waste; CPC 39310: Slag, dross, scalings and other waste from the manufacture of iron or steel
  cemsuisse, personal communication, 2014
  production volume 0 kg
    (same comment as for used vegetable cooking oil)
  property price 0 EUR2005; name ironsludge_price_EUR2005
    Waste products are assigned a price of zero as they are assumed to require further treatment.
  property carbon content 0.339168
    carbon content on a dry matter basis (reserved; not for manual entry)
  properties: water content 0.0940919, dry mass 0.914 kg, heating value, net 0 MJ, carbon content, fossil 0.339168, carbon content, non-fossil 0, water in wet mass 0.086 kg, wet mass 1 kg, carbon allocation 0.31 kg
- sewage sludge, dried: 0 kg; name sewage_sludge; By-product classification Waste; CPC 39920: Sewage sludge
  cemsuisse, personal communication, 2014
  production volume 0 kg
    (same comment as for used vegetable cooking oil)
  property price 0 EUR2005; name sewage_sludge_price_EUR2005
    (same comment as for blast furnace sludge)
  property carbon content 0.4096
    carbon content on a dry matter basis (reserved; not for manual entry)
  properties: dry mass 0.99 kg, wet mass 1 kg, carbon content, non-fossil 0.4096, water content 0.010101, carbon content, fossil 0, water in wet mass 0.01 kg, carbon allocation 0.405504 kg
- waste wood, untreated: 0 kg; name wastewood; CPC 3928: Sawdust and wood waste and scrap; By-product classification Waste
  cemsuisse, personal communication, 2014
  production volume 0 kg
    (same comment as for used vegetable cooking oil)
  property price 0 EUR2005; name wastewood_price_EUR2005
    (same comment as for blast furnace sludge)
  property carbon content, fossil 0; name wastewood_C_content_fossil
    fossil carbon content on a dry matter basis
  property Corresponding fuel use 10 MJ; name wastewood_fuel_use
    Lower heating value of the fuel input related to the heat/electricity output
  property carbon content, non-fossil 0.48632; name wastewood_C_content_non_fossil
    biogene carbon content on a dry matter basis
    Tab A.4, ecoinvent v2.2 report 13_I. C content has been referred to 1 kg DM,
  property heating value, net 13.99 MJ
    Value taken from the general comment of the treatment dataset.
  property carbon content 0.48632
    carbon content on a dry matter basis (reserved; not for manual entry)
  properties: wet mass 1 kg, water in wet mass 0.2 kg, water content 0.25, dry mass 0.8 kg, carbon allocation 0.389056 kg
- spent solvent mixture: 0 kg; name wastesolvent; CPC 39950: Wastes from chemical or allied industries; By-product classification Waste
  cemsuisse, personal communication, 2014
  production volume 0 kg
    (same comment as for used vegetable cooking oil)
  property heating value, net 21.7 MJ
    Value taken from the general comment of the treatment dataset.
  property price 0 EUR2005; name wastesolvent_price_EUR2005
    (same comment as for blast furnace sludge)
  property Corresponding fuel use 22.46 MJ; name wastesolvent_fuel_use
    Lower heating value of the fuel input related to the heat/electricity output
  property carbon content, non-fossil 0; name wastesolvent_C_content_non_fossil
    biogene carbon content on a dry matter basis
  property carbon content, fossil 0.571257; name wastesolvent_C_content_fossil
    fossil carbon content on a dry matter basis
    Tab A.7, ecoinvent v2.2 report 13_I. C content has been calculated after data in the tables, and then referred to 1 kg DM
  property carbon content 0.571257
    carbon content on a dry matter basis (reserved; not for manual entry)
  properties: wet mass 1 kg, water in wet mass 0.165 kg, dry mass 0.835 kg, water content 0.197605, carbon allocation 0.477 kg
- waste mineral oil: 0 kg; name wasteoil; CPC 39990: Other wastes n.e.c.; By-product classification Waste
  cemsuisse, personal communication, 2014
  This exchange represents waste mineral oil and other fossil fuels from waste.
  production volume 0 kg
    (same comment as for used vegetable cooking oil)
  property carbon content, fossil 0.864444; name wasteoil_C_content_fossil
    fossil carbon content on a dry matter basis
    Tab A.6, ecoinvent v2.2 report 13_I. C content has been calculated after data in the tables, and then referred to 1 kg DM
  property Corresponding fuel use 32.93 MJ; name wasteoil_fuel_use
    Lower heating value of the fuel input related to the heat/electricity output
  property carbon content, non-fossil 0; name wasteoil_C_content_non_fossil
    biogene carbon content on a dry matter basis
  property heating value, net 34.7 MJ
    Value taken from the general comment of the treatment dataset.
  property price 0 EUR2005; name wasteoil_price_EUR2005
    (same comment as for blast furnace sludge)
  property carbon content 0.864444
    carbon content on a dry matter basis (reserved; not for manual entry)
  properties: water content 0.111111, water in wet mass 0.1 kg, dry mass 0.9 kg, wet mass 1 kg, carbon allocation 0.778 kg
- inert waste: 0 kg; name inert_waste; CPC 39: Wastes or scraps; By-product classification Waste
  Calculated value based on personal communication (Cemsuisse, 2014). This exchange is a proxy for
  0.0105 kg of paper ash
  0.0202 kg of soil, uncontaminated
  0.00548 kg of sand, from street cleaning
  0.00052 kg of saw dust, used as absorbant, measured as dry mass
  0.00108 kg of sludge from street cleaning
  0.035 kg of soil, contaminated
  0.000956 kg of waste foundry sand
  production volume 0 kg
    (same comment as for used vegetable cooking oil)
  property price 0 EUR2005; name inert_waste_price_EUR2005
    (same comment as for blast furnace sludge)
  property carbon content 0
    carbon content on a dry matter basis (reserved; not for manual entry)
  properties: wet mass 1 kg, carbon content, non-fossil 0, dry mass 1 kg, water content 0, carbon content, fossil 0, water in wet mass 0 kg, carbon allocation 0 kg
- clinker: 1 kg; CPC 37430: Cement clinkers; By-product classification allocatable product
  Grey clinker for use in cement
  EcoSpold01Location=CH
  production volume 3.1e9 kg; name clinker_production_CH
    Mean production volume between 2005 and 2009
  property price 0.047 EUR2005; name clinker_price_EUR2005
    Calculated value based on data from United Nations Commodity Trade Statistics Database (comtrade.un.org). UN comtrade category: 252310 Cement Clinkers. Using exchange rate of 1EURO = 1.209 USD. Average of price of import into 5 main markets (EU, US, JP, IN and CN).
  property carbon content 0
    carbon content on a dry matter basis (reserved; not for manual entry)
  properties: water content 0, wet mass 1 kg, carbon content, fossil 0, dry mass 1 kg, water in wet mass 0 kg, carbon content, non-fossil 0, carbon allocation 0 kg
- used tyre: 0 kg; name usedtyre; CPC 39260: Used pneumatic tyres of rubber; By-product classification Waste
  cemsuisse, personal communication, 2014
  production volume 0 kg
    (same comment as for used vegetable cooking oil)
  property heating value, net 24.85 MJ
    LHV is calculated based on the Carbon content of the product. More details can be found on the respective documentation.
  property price 0 EUR2005; name usedtyre_price_EUR2005
    (same comment as for blast furnace sludge)
  property carbon content, non-fossil 0.193; name usedtyre_C_content_non_fossil
    biogene carbon content on a dry matter basis
  property Corresponding fuel use 30.89 MJ; name usedtyre_fuel_use
    Lower heating value of the fuel input related to the heat/electricity output
  property carbon content, fossil 0.522; name usedtyre_C_content_fossil
    fossil carbon content on a dry matter basis
- waste plastic, mixture: 0 kg; name wasteplastic; By-product classification Waste; CPC 39270: Waste, parings and scrap of plastics
  cemsuisse, personal communication, 2014
  production volume 0 kg
    (same comment as for used vegetable cooking oil)
  property price 0 EUR2005; name wasteplastic_price_EUR2005
    (same comment as for blast furnace sludge)
  property carbon content, non-fossil 0; name wasteplastic_C_content_non_fossil
    biogene carbon content on a dry matter basis
  property carbon content, fossil 0.747344; name wasteplastic_C_content_fossil
    fossil carbon content on a dry matter basis
    C content in 1 kg DM was calculated using data in Tab A.2, ecoinvent v2.2 report 13_I
  property Corresponding fuel use 27.94 MJ; name wasteplastic_fuel_use
    Lower heating value of the fuel input related to the heat/electricity output
  property heating value, net 30.79 MJ
    Value taken from the general comment of the treatment dataset.
  property carbon content 0.747344
    carbon content on a dry matter basis (reserved; not for manual entry)
  properties: water in wet mass 0.153 kg, dry mass 0.847 kg, wet mass 1 kg, water content 0.180638, carbon allocation 0.633 kg
- pyrite ash: 0 kg; name pyrite_ash; By-product classification Waste; CPC 374: Plaster, lime and cement
  cemsuisse, personal communication, 2014
  production volume 0 kg
    (same comment as for used vegetable cooking oil)
  property price 0 EUR2005; name pyrite_ash_price_EUR2005
    (same comment as for blast furnace sludge)
  property carbon content, fossil 0
    Based on composition of pyrite ash from http://www.srcosmos.gr/srcosmos/showpub.aspx?aa=3629
  property carbon content, non-fossil 0
    (same comment as for pyrite ash)
  property carbon content 0
    carbon content on a dry matter basis (reserved; not for manual entry)
  properties: water content 0, wet mass 1 kg, water in wet mass 0 kg, dry mass 1 kg, carbon allocation 0 kg
- waste paint: 0 kg; name CCS_organics; CPC 39: Wastes or scraps; By-product classification Waste
  Contaminated sawdust (CCS) is assumed to consist of 80% sawdust (wood chip and particles, 40% water on dry mass basis) and 20% waste paint. Assumption is based on the share of organic carbon of impregnated sawdust, as stated in Boesch et al. 2010. cemsuisse, personal communication, 2014.
  production volume 0 kg
    (same comment as for used vegetable cooking oil)
  property heating value, net 19.7 MJ
    (same comment as for used tyre)
  property price 0 EUR2005; name CCS_organics_price_EUR2005
    (same comment as for blast furnace sludge)
  property carbon content 0.65
    carbon content on a dry matter basis (reserved; not for manual entry)
  properties: carbon content, fossil 0.65, dry mass 1 kg, water content 0, water in wet mass 0 kg, carbon content, non-fossil 0, wet mass 1 kg, carbon allocation 0.65 kg

## Inputs from technosphere
- steel, chromium steel 18/8, hot rolled: 5.86e-5 kg; = (0.0586/1000)*clinker; lognormal variance with pedigree 0.0086, pedigree (1,1,4,1,1)
  EcoSpold01Location=RER
  cemsuisse, personal communication, 2014
  Uncertainty: Variance of log-transformed data was taken from ecoinvent report no 1, table 10.3. Value represents demand of products, electricity etc. for input/output group c.
  properties: dry mass 1 kg, carbon content, fossil 0.0008, wet mass 1 kg
  note on carbon content, fossil: Stainless steel model is the grade 304 steel (18/8 stainless, 18% chromium 8% nickel; max. 0.08% C)
- lubricating oil: 4.71e-5 kg; = (0.0471/1000)*clinker; lognormal variance with pedigree 0.0086, pedigree (1,1,4,1,1)
  cemsuisse, personal communication, 2014
  EcoSpold01Location=RER
  Uncertainty: Variance of log-transformed data was taken from ecoinvent report no 1, table 10.3. Value represents demand of products, electricity etc. for input/output group c.
  properties: wet mass 1 kg, dry mass 1 kg, carbon content, fossil 0.75, heating value, net 40.2 MJ
  note on carbon content, fossil: Lubricating oil is produced from diesel. C-content/dry mass of fats and oils considered 75%, from: ecoinvent v2.2 report, n 15a, pg 40
  note on heating value, net: Literature value, Source: IPCC 2006, 2006 IPCC Guidelines for National Greenhouse Gas Inventories, Prepared by the National Greenhouse Gas Inventories Programme, Eggleston H.S., Buendia L., Miwa K., Ngara T. and Tanabe K. (eds). Published: IGES, Japan
- diesel, burned in building machine: 0.0134 MJ; = (13.4/1000)*clinker; lognormal variance with pedigree 0.0086, pedigree (1,1,4,1,1)
  EcoSpold01Location=GLO
  cemsuisse, personal communication, 2014
  Uncertainty: Variance of log-transformed data was taken from ecoinvent report no 1, table 10.3. Value represents resources (primary energy carrier) for input/output group c.
  properties: heating value, net 1 MJ
- electricity, medium voltage: 0.121 kWh; = (121/1000)*clinker; lognormal variance with pedigree 0.0086, pedigree (1,1,4,1,1)
  cemsuisse, personal communication, 2014, converted to N via molar relationship
  EcoSpold01Location=CH
  Uncertainty: Variance of log-transformed data was taken from ecoinvent report no 1, table 10.3. Value represents demand of products, electricity etc. for input/output group c.
- tap water: 0.34 kg; name tap_water_input; = (340/1000)*clinker; lognormal variance with pedigree 0.0086, pedigree (1,1,4,1,1)
  cemsuisse, personal communication, 2014
  properties: wet mass 1 kg, water content 2962.17, carbon content, fossil 0.00178991, dry mass 0.000337476 kg
  note on carbon content, fossil: Bicarbonate content is 2.93 mol/m3. CO2 content is 0.1 mol/m3 (ecoinvent v2.2 report 8, Tab 93.1).
- refractory, basic, packed: 0.00019 kg; = (0.19/1000)*clinker; lognormal variance with pedigree 0.0086, pedigree (1,1,4,1,1)
  cemsuisse, personal communication, 2014
  EcoSpold01Location=DE
  Uncertainty: Variance of log-transformed data was taken from ecoinvent report no 1, table 10.3. Value represents demand of products, electricity etc. for input/output group c.
  properties: wet mass 1 kg, dry mass 1 kg
- petroleum coke: 0.00891 kg; = (8.91/1000)*clinker; undefined min -0.00765, max -0.00765, standardDeviation95 0, pedigree (1,1,4,1,1)
  cemsuisse, personal communication, 2014
  Uncertainty: No uncertainty data available
  properties: wet mass 1 kg, heating value, net 35 MJ, carbon content, fossil 0.885, dry mass 1 kg
- hard coal: 0.037 kg; = (37/1000)*clinker+wasteplastic*0+ usedtyre*0+ wastewood*0+ wasteoil*0+ ironsludge*0+ CCS_organics*0+ pyrite_ash*0+ wastesolvent*0+ other_biogenic_fuels*0+inert_waste*0; lognormal variance with pedigree 0.0086, pedigree (1,1,4,1,1)
  EcoSpold01Location=WEU
  cemsuisse, personal communication, 2014
  Uncertainty: Variance of log-transformed data was taken from ecoinvent report no 1, table 10.3. Value represents resources (primary energy carrier) for input/output group c.
  property carbon dioxide factor 96 kg/GJ; name hard_coal_CO2_factor
  property heating value, net 26.62 MJ; name hard_coal_Net_Heat_Value
  properties: dry mass 0.94 kg, carbon content, fossil 0.845, wet mass 1 kg, water content 0.0638298
  note on carbon dioxide factor: Factor describes the amount of CO2 released per GJ heat supplied. CO2 factors of fuels commonly used in cement production are available from WBCSD (www.wbcsdcement.org)
  note on carbon content, fossil: C content 75-94% (specified in Tab 1.1, report 6, part VI). A mean content of 0.845 kg C/ kg dry hard coal was considered
- limestone, crushed, for mill: 1.16 kg; = (1160/1000)*clinker; lognormal variance with pedigree 0.0086, pedigree (1,1,4,1,1)
  cemsuisse, personal communication, 2014
  Uncertainty: Variance of log-transformed data was taken from ecoinvent report no 1, table 10.3. Value represents demand of products, electricity etc. for input/output group c.
  properties: water content 0.00200401, dry mass 0.998 kg, carbon content, fossil 0.117492, wet mass 1 kg
- calcareous marl: 0.386 kg; = (386/1000)*clinker; lognormal variance with pedigree 0.0086, pedigree (1,1,4,1,1)
  EcoSpold01Location=CH
  cemsuisse, personal communication, 2014
  Uncertainty: Variance of log-transformed data was taken from ecoinvent report no 1, table 10.3. Value represents demand of products, electricity etc. for input/output group c.
  properties: wet mass 1 kg, carbon content, fossil 0.087767, dry mass 1 kg
  note on carbon content, fossil: composed from 3/4 pure limestone and 1/4 clay, ecoinvent v2.2 report 7 part II pg 14. C content of limestone is 0.117 kg/kg WM
- urea: 0.000300132 kg; = ((0.6/60*14/1000)*clinker)*2.14379903903132; lognormal variance with pedigree 0.0086, pedigree (1,1,4,1,1)
  The exchange has been updated from 'urea, as N' into 'urea' and therefore its amount has been scaled (multiplied) from 0.0001 kg by 2.1438 kg of 'urea' per kg of 'urea, as N'. Original comment of the exchange is: cemsuisse, personal communication, 2014, converted to N via molar relationship
  Uncertainty: Variance of log-transformed data was taken from ecoinvent report no 1, table 10.3. Value represents demand of products, electricity etc. for input/output group c.
  properties: wet mass 1 kg, dry mass 1 kg, carbon content, fossil 0.2
- bauxite: 0.0027 kg; = (2.7/1000)*clinker; lognormal variance with pedigree 0.0086, pedigree (1,1,4,1,1)
  cemsuisse, personal communication, 2014
  EcoSpold01Location=GLO
  Uncertainty: Variance of log-transformed data was taken from ecoinvent report no 1, table 10.3. Value represents demand of products, electricity etc. for input/output group c.
  properties: wet mass 1 kg, dry mass 1 kg
- natural gas, high pressure: 0.0001 m3; = (0.1/1000)*clinker; lognormal variance with pedigree 0.0086, pedigree (1,1,4,1,1)
  cemsuisse, personal communication, 2014
  EcoSpold01Location=CH
  Uncertainty: Variance of log-transformed data was taken from ecoinvent report no 1, table 10.3. Value represents resources (primary energy carrier) for input/output group c.
  property heating value, net 33.5 MJ; name natural_gas_Net_Heat_Value
  property carbon dioxide factor 56.1 kg/GJ; name natural_gas_CO2_factor
  properties: wet mass 0.84 kg, dry mass 0.84 kg, carbon content, fossil 0.602381, heating value, gross 39 MJ
  note on carbon content, fossil: An average C content of 0.506 kg C/ m3 has been assumed (this average has been calculated using data in Tab 3.5, ecoinvent v2.2 report 6_V
- refractory, fireclay, packed: 8.21e-5 kg; = (0.0821/1000)*clinker; lognormal variance with pedigree 0.0086, pedigree (1,1,4,1,1)
  EcoSpold01Location=DE
  cemsuisse, personal communication, 2014
  Uncertainty: Variance of log-transformed data was taken from ecoinvent report no 1, table 10.3. Value represents demand of products, electricity etc. for input/output group c.
  properties: wet mass 1 kg, dry mass 1 kg
- industrial machine, heavy, unspecified: 3.76e-5 kg; = (0.0376/1000)*clinker; lognormal variance with pedigree 0.0086, pedigree (1,1,4,1,1)
  (same comment as for limestone, crushed, for mill)
- refractory, high aluminium oxide, packed: 0.000137 kg; = (0.137/1000)*clinker; lognormal variance with pedigree 0.0086, pedigree (1,1,4,1,1)
  (same comment as for refractory, basic, packed)
  properties: dry mass 1 kg, wet mass 1 kg
- pulverised lignite: 0.156426 MJ; = (17.4*8.99/1000)*clinker; lognormal variance with pedigree 0.0086, pedigree (1,1,4,1,1)
  cemsuisse, personal communication, 2014; value in kg konverted to MJ with 8.99 MJ/kg
  Uncertainty: Variance of log-transformed data was taken from ecoinvent report no 1, table 10.3. Value represents demand of products, electricity etc. for input/output group c.
  property heating value, net 8.8 MJ; name lignite_Net_Heat_Value
  property carbon dioxide factor 101 kg/GJ; name lignite_CO2_factor
  properties: wet mass 0.0460829 kg, water content 0.123596, dry mass 0.0410138 kg, carbon content, fossil 0.660674
  note on carbon content, fossil: 58.8% C and 11% water in wet mass (ecoinvent v2.1 report 6_VI Table 7.1)
- light fuel oil: 0.0002 kg; = (0.2/1000)*clinker; lognormal variance with pedigree 0.0086, pedigree (1,1,4,1,1)
  EcoSpold01Location=CH
  cemsuisse, personal communication, 2014
  Uncertainty: Variance of log-transformed data was taken from ecoinvent report no 1, table 10.3. Value represents resources (primary energy carrier) for input/output group c.
  property heating value, net 42.8 MJ; name light_fuel_oil_Net_Heat_Value
  property carbon dioxide factor 74.1 kg/GJ; name light_fuel_oil_CO2_factor
  properties: wet mass 1 kg, carbon content, fossil 0.862, dry mass 1 kg
- meat and bone meal: 0.00961 kg; name meat_and_bone_meal; = 0.00961*clinker; lognormal variance with pedigree 0.0086, pedigree (1,1,4,1,1)
  cemsuisse, personal communication, 2014
  property dry mass 0.96 kg; name meat_and_bone_meal_DM
  property water in wet mass 0.04 kg; name meat_and_bone_meal_WWM
  property heating value, net 21.45 MJ; name meat_and_bone_meal_Net_Heat_Value
  property water content 0.0416667; name meat_and_bone_meal_water_content
  property wet mass 1 kg; name meat_and_bone_meal_WM
  properties: carbon content, non-fossil 0.521
  note on carbon content, non-fossil: Boesch & Hellweg 2010, 2010, Boesch, M.E., Hellweg, S., Identifying Improvement Potentials in Cement Production with Life Cycle Assessment, Environmental Science & Technology, 44, 23, 9143-9149, 1 - Article, Supporting information is available via http://pubs.acs.org
- heavy fuel oil: 0.000758 kg; = (0.758/1000)*clinker; lognormal variance with pedigree 0.0086, pedigree (1,1,4,1,1)
  (same comment as for light fuel oil)
  property heating value, net 41 MJ; name heavy_fuel_oil_Net_Heat_Value
  property carbon dioxide factor 77.3 kg/GJ; name heavy_fuel_oil_CO2_factor
  properties: wet mass 1 kg, dry mass 1 kg, carbon content, fossil 0.849
- ammonia, anhydrous, liquid: 0.00188 kg; = (1.88/1000)*clinker; lognormal variance with pedigree 0.0086, pedigree (1,1,4,1,1)
  (same comment as for calcareous marl)
  properties: wet mass 1 kg, dry mass 1 kg

## Inputs from nature
- Water, unspecified natural origin [natural resource, in water]: 0.00162 m3; name water_UNO_input; = (1.62/1000)*clinker; lognormal variance with pedigree 0.0086, pedigree (1,1,4,1,1)
  cemsuisse, personal communication, 2014
  Uncertainty: Variance of log-transformed data was taken from ecoinvent report no 1, table 10.3. Value represents resources for input/output group c.

## Emissions to nature
- Water [water, unspecified]: 0.001666 m3; name water_to_water_unspecified; = 0.001666*clinker; lognormal variance with pedigree 0.0487, pedigree (2,2,4,1,1)
  Calculated value.
  Calculated using following formula;
  ((water_UNO_input+(tap_water_input/1000))*(1-fraction_PW_to_air))
- Particulates, > 10 um [air, non-urban air or from high stacks]: 9.29e-7 kg; = (0.000929/1000)*clinker; lognormal variance with pedigree 0.048, pedigree (1,1,4,1,1)
  cemsuisse, personal communication, 2014
  Uncertainty: Variance of log-transformed data was taken from ecoinvent report no 1, table 10.3. Value represents PM>10 emitted to air for input/output group p.
- Hydrogen chloride [air, unspecified]: 2.94e-6 kg; = (0.00294/1000)*clinker; lognormal variance with pedigree 0.048, pedigree (1,1,4,1,1)
  cemsuisse, personal communication, 2014
  Uncertainty: Variance of log-transformed data was taken from ecoinvent report no 1, table 10.3. Value represents others emitted to air for input/output group p.
- Particulates, < 2.5 um [air, non-urban air or from high stacks]: 3.96e-6 kg; = (0.00396/1000)*clinker; lognormal variance with pedigree 0.308, pedigree (1,1,4,1,1)
  cemsuisse, personal communication, 2014
  Uncertainty: Variance of log-transformed data was taken from ecoinvent report no 1, table 10.3. Value represents PM2.5 emitted to air for input/output group p.
- Thallium [air, unspecified]: 1.46e-8 kg; = (0.0000146/1000)*clinker; lognormal variance with pedigree 0.658, pedigree (1,1,4,1,1)
  cemsuisse, personal communication, 2014
  Uncertainty: Variance of log-transformed data was taken from ecoinvent report no 1, table 10.3. Value represents heavy metal emitted to air for input/output group c.
- Chromium [air, unspecified]: 5.91e-9 kg; = (0.00000591/1000)*clinker; lognormal variance with pedigree 0.658, pedigree (1,1,4,1,1)
  (same comment as for Thallium)
- Ammonia [air, unspecified]: 2.21e-5 kg; = (0.0221/1000)*clinker; lognormal variance with pedigree 0.048, pedigree (1,1,4,1,1)
  cemsuisse, personal communication, 2014
  Uncertainty: Variance of log-transformed data was taken from ecoinvent report no 1, table 10.3. Value represents ammonia emitted to air for input/output group p.
- Sulfur dioxide [air, unspecified]: 0.00041 kg; = (0.41/1000)*clinker; lognormal variance with pedigree 0.0086, pedigree (1,1,4,1,1)
  cemsuisse, personal communication, 2014
  Uncertainty: Variance of log-transformed data was taken from ecoinvent report no 1, table 10.3. Value represents SO2 emitted to air for input/output group c.
- Zinc [air, unspecified]: 6.11e-8 kg; = (0.0000611/1000)*clinker; lognormal variance with pedigree 0.658, pedigree (1,1,4,1,1)
  (same comment as for Thallium)
- Vanadium [air, unspecified]: 1.84e-9 kg; = (0.00000184/1000)*clinker; lognormal variance with pedigree 0.658, pedigree (1,1,4,1,1)
  (same comment as for Thallium)
- Nitrogen oxides [air, unspecified]: 0.00089 kg; = (0.890/1000)*clinker; lognormal variance with pedigree 0.048, pedigree (1,1,4,1,1)
  cemsuisse, personal communication, 2014
  Uncertainty: Variance of log-transformed data was taken from ecoinvent report no 1, table 10.3. Value represents NOx emitted to air for input/output group p.
- Carbon dioxide, non-fossil [air, unspecified]: 0.048081 kg; = (48.081/1000)*clinker; lognormal variance with pedigree 0.0086, pedigree (1,1,4,1,1)
  CO2 emissions from the use of waste containing components originally produced from non-fossil fuels; please note that according to Swiss legislation, all inputs of alternative fuels are considered waste (and not secondary fuels). For calculations for clinker, cement and concrete that do not follow this methodological approach, recalculations have to be made adjusting this respective elementary flow. cemsuisse, personal communication, 2014
- Lead [air, unspecified]: 2.97e-8 kg; = (0.0000297/1000)*clinker; lognormal variance with pedigree 0.658, pedigree (1,1,4,1,1)
  (same comment as for Thallium)
- Arsenic [air, unspecified]: 4.33e-8 kg; = (0.0000433/1000)*clinker; lognormal variance with pedigree 0.658, pedigree (1,1,4,1,1)
  cemsuisse, personal communication, 2014
  Uncertainty: Variance of log-transformed data was taken from ecoinvent report no 1, table 10.3. Value represents arsenic emitted to air for input/output group c.
- Carbon dioxide, fossil [air, unspecified]: 0.769112 kg; = ((156+525+88.112)/1000)*clinker; lognormal variance with pedigree 0.0086, pedigree (1,1,4,1,1)
  CO2 emissions from the use of primary fossil fuels, from the use of alternative fuels derived from primary fossil energy (0.088112 kg CO2/kg clinker) as well as from the calcination of limestone (0.525 kg CO2/kg clinker) have been included in this environmental flow. For calculations for clinker, cement and concrete that do not follow this methodological approach, recalculations have to be made adjusting this respective elementary flow. cemsuisse, personal communication, 2014.
  Uncertainty: Variance of log-transformed data was taken from ecoinvent report no 1, table 10.3. Value represents CO2 emitted to air for input/output group c.
- Water [air, unspecified]: 0.000294 m3; name water_to_air_unspecified; = 0.000294*clinker; lognormal variance with pedigree 0.0487, pedigree (2,2,4,1,1)
  Calculated value.
  Calculated using following formula;
  ((water_UNO_input+(tap_water_input/1000))* fraction_PW_to_air)
- Tin [air, unspecified]: 1.34e-8 kg; = (0.0000134/1000)*clinker; lognormal variance with pedigree 0.658, pedigree (1,1,4,1,1)
  (same comment as for Thallium)
- Nickel [air, unspecified]: 9.16e-9 kg; = (0.00000916/1000)*clinker; lognormal variance with pedigree 0.658, pedigree (1,1,4,1,1)
  (same comment as for Thallium)
- Particulates, > 2.5 um, and < 10um [air, non-urban air or from high stacks]: 1.3e-6 kg; = (0.00130/1000)*clinker; lognormal variance with pedigree 0.308, pedigree (1,1,4,1,1)
  cemsuisse, personal communication, 2014
  Uncertainty: Variance of log-transformed data was taken from ecoinvent report no 1, table 10.3. Value represents PM10 emitted to air for input/output group p.
- Cobalt [air, unspecified]: 2.25e-9 kg; = (0.00000225/1000)*clinker; lognormal variance with pedigree 0.658, pedigree (1,1,4,1,1)
  (same comment as for Thallium)
- Dioxins, measured as 2,3,7,8-tetrachlorodibenzo-p-dioxin [air, unspecified]: 2.78e-14 kg; = (0.0000000000278/1000)*clinker; lognormal variance with pedigree 0.048, pedigree (1,1,4,1,1)
  (same comment as for Hydrogen chloride)
- Copper [air, unspecified]: 4.18e-8 kg; = (0.0000418/1000)*clinker; lognormal variance with pedigree 0.658, pedigree (1,1,4,1,1)
  (same comment as for Thallium)
- Mercury [air, unspecified]: 1.18e-8 kg; = (0.0000118/1000)*clinker; lognormal variance with pedigree 0.658, pedigree (1,1,4,1,1)
  (same comment as for Thallium)
- NMVOC, non-methane volatile organic compounds, unspecified origin [air, unspecified]: 6.05e-5 kg; = (0.0605/1000)*clinker; lognormal variance with pedigree 0.048, pedigree (1,1,4,1,1)
  cemsuisse, personal communication, 2014
  Uncertainty: Variance of log-transformed data was taken from ecoinvent report no 1, table 10.3. Value represents NMVOC emitted to air for input/output group p.
- Carbon monoxide, fossil [air, unspecified]: 0.00163 kg; = (1.63/1000)*clinker; lognormal variance with pedigree 0.0086, pedigree (1,1,4,1,1)
  cemsuisse, personal communication, 2014
  Uncertainty: Variance of log-transformed data was taken from ecoinvent report no 1, table 10.3. Value represents CO emitted to air for input/output group c.
- Cadmium [air, unspecified]: 2.13e-9 kg; = (0.00000213/1000)*clinker; lognormal variance with pedigree 0.658, pedigree (1,1,4,1,1)
  (same comment as for Thallium)
- Antimony [air, unspecified]: 2.41e-8 kg; = (0.0000241/1000)*clinker; lognormal variance with pedigree 0.658, pedigree (1,1,4,1,1)
  (same comment as for Thallium)

## Sampling procedure
Data from the Association of the Swiss Cement Industry (cemsuisse) representing average production in Switzerland

## Extrapolations
See geography
