# celery675 production

Dataset: EcoSpold 2, unit process
Geography: GLO
Time period: 2010-01-01 to 2021-12-31
Technology level: current
Classification: ISIC rev.4 ecoinvent: 0113:Growing of vegetables and melons, roots and tubers
Scenario: Business-as-Usual
System model: Allocation, cut-off by classification
Generated by: Franziska Stössel
Published in: Stoessel, Franziska; 2012
Database: ecoinvent
isCopyrightProtected: false
accessRestrictedTo: 1

## General comment
This dataset represents celery production according to the Integrated Production standard in CH.
Yield: 40 t / ha.
Duration of one cropping cycle: 5.75 months.
Field production.
The LCA study, from which this LCI has been derived, contains detailed descriptions of the system boundaries and the data sources used (Stoessel et al. 2012). The publication is published and freely available with comprehensive supporting information:
http://pubs.acs.org/doi/pdf/10.1021/es2030577
Franziska Stoessel, Ronnie Juraske, Stephan Pfister, Stefanie Hellweg. (2012) Life Cycle Inventory and Carbon and Water FoodPrint of Fruits and Vegetables: Application to a Swiss Retailer. Environmental Science & Technology 6(46) 3253−3262.
This activity was adapted to include the global average land use change (LUC) emissions according 2nd edition of the Quantis-modified tool developed by Blonk Consultants 'WFLDB-adapted-Blonk 2014 direct-land-use-change-assessment-tool_2015-05-18a.xlsx', tab. 'Country & land use unknown'. The size of the emission depends on (i) the relative crop expansion in all countries of the crop during the last 20 years and (ii) the corresponding, country specific land transformations. The current results are based on the average FAOSTAT data (harvested area) of 2009-2011 and 1989-1991. The weighted average is used which takes into account relative difference in crop expansion into primary forest, secondary forest, grassland, perennial and annual land.

## Included activities start
From seedling production.

## Included activities end
This activity ends with harvest and storage.
The dataset includes a storage period of 7 months and it's use of electricity. And the greenhouse heating energy for the seedling production.
The pesticide inputs are classified according to their chemical classes and the emmssions are assigned to the soil (100%). Mercury emissions are neglected due to a lack of data while other heavy metal emissions are included. The dataset doesn't include infrastructure for production and storage facilities. No transports for agricultural means of production from the regional storage to the farm are included.

## Technology
Integrated Production

## Parameters
- fraction, tap water, to air: 0.15 dimensionless; name fraction_TW_to_air; = fraction_PW_to_air; lognormal variance with pedigree 0.092025, pedigree (4,4,3,2,4)
  Calculated value. See comment in the other parametres present in this dataset. Tap water is considered to be always used as process water, thus process water fractions to air are applied to all tap water input flows to calculate the amount of water consumed in the processes.
- fraction, irrigation water, to air: 0.586986 dimensionless; name fraction_IW_to_air; lognormal variance with pedigree 0.0409, pedigree (2,2,2,1,1)
  Literature value (Siebert, 2010) (Vionnet, S., Quantis Water Database - Technical Report, 2012).
- fraction, irrigation water, to ground water: 0.8 dimensionless; name fraction_IW_to_ground_water; lognormal variance with pedigree 0.0886, pedigree (4,3,1,1,4)
  Literature value (Döll, 2011) cross referenced with expert opinion.
- fraction, process water, to air: 0.15 dimensionless; name fraction_PW_to_air; lognormal variance with pedigree 0.092025, pedigree (4,4,3,2,4)
  Literature value. In case when no industry/process specific data are available, default evaporation fraction value is used. This value is 15% and is based on literature (Statistics Canada, 2007 & Shaffer, K.H., 2008, Consumptive water use in the Great Lakes Basin, USGS & Shiklomanov, 2003, World Water Resources at the Beginning of the 21st Century) and has been approved by an expert.
- fraction, irrigation water to surface water: 0.2 dimensionless; name fraction_IW_to_surface_water; lognormal variance with pedigree 0.0886, pedigree (4,3,1,1,4)
  Literature value (Döll, 2011) cross referenced with expert opinion.

## Reference product
- celery: 1 kg; source Stoessel, Franziska; 2012; CPC 01290: Vegetables, fresh, n.e.c.; By-product classification allocatable product
  production volume 8.96998e9 kg
    in kg / year (2010) including all roots and tubers
  property price 0.584 EUR2005
    Calculated from the trade statistics for the year 2005 published by the UN (COMTRADE database, accessed 20151105) as an average of 5 biggest importers of celery in the world; CA, UK, FR, USA and NL. Comtrade cathegory: 70940: Celery, other than celeriac, fresh or chilled.
  property carbon content 0.028392
    carbon content on a dry matter basis (reserved; not for manual entry)
  properties: water in wet mass 0.944 kg, carbon content, non-fossil 0.028392, carbon content, fossil 0, dry mass 0.056 kg, wet mass 1 kg, water content 16.8571, carbon allocation 0.00158995 kg

## Inputs from technosphere
- ammonium nitrate: 0 kg; source Stoessel, Franziska; 2012; pedigree (1,1,1,1,1)
  The exchange has been updated from 'ammonium nitrate, as N' into 'ammonium nitrate' and therefore its amount has been scaled (multiplied) from 0.0055 kg by 2.8573 kg of 'ammonium nitrate' per kg of 'ammonium nitrate, as N'.
  Uncertainty: Variance of logtransformed data = Default value of table 10.3 in Data Quality Guidelines
  properties: dry mass 1 kg, wet mass 1 kg
- packaging, for pesticides: 0.00070177 kg; lognormal variance with pedigree 0.0592, pedigree (4,3,4,5,4)
  Total amount of active substance/s of pesticides needed for the production of celery is calculated to be circa 3.51E-04 kg. Pesticide/s used in this dataset is/are: '[sulfonyl]urea-compound', 'dithiocarbamate-compound', 'pesticide, unspecified', 'pyrethroid-compound'. The total amount of active substance/s is doubled in order to account for the packaging of the dilluted product of pesticide/s that is/are applied. Therefore, 7.02E-04 kg of packaging for pesticides is justified with this exchange.
  properties: heating value, net 25.97 MJ, wet mass 1 kg, dry mass 1 kg, carbon content, fossil 0.85714, price 0.0642 EUR2005
- electricity, low voltage: 0.315 kWh; source Stoessel, Franziska; 2012; lognormal variance with pedigree 0.0105, pedigree (2,3,4,3,2)
  Uncertainty: Variance of logtransformed data = Default value of table 10.3 in Data Quality Guidelines
- fertilising, by broadcaster: 0.00171 ha; source Stoessel, Franziska; 2012; lognormal variance with pedigree 0.0105, pedigree (2,3,4,3,2)
  Fertilizing by broadcaster is used as a proxy for all the machinery work done in horticultural processes.
  Uncertainty: Variance of logtransformed data = Default value of table 10.3 in Data Quality Guidelines
- dithiocarbamate-compound: 0.0002385 kg; = dithio1; source Stoessel, Franziska; 2012; lognormal variance with pedigree 0.0453, pedigree (3,4,5,3,2)
  sum of coumpounds in this family
  properties: wet mass 1 kg, dry mass 1 kg, carbon content, fossil 0.179339
- tap water: 0.4 kg; name tap_water_input; source Stoessel, Franziska; 2012; lognormal variance with pedigree 0.0105, pedigree (2,3,4,3,2)
  (same comment as for electricity, low voltage)
  properties: water content 2962.17, carbon content, fossil 0.00178991, wet mass 1 kg, dry mass 0.000337476 kg
  note on carbon content, fossil: Bicarbonate content is 2.93 mol/m3. CO2 content is 0.1 mol/m3 (ecoinvent v2.2 report 8, Tab 93.1).
- inorganic phosphorus fertiliser, as P2O5: 0 kg; source Stoessel, Franziska; 2012; pedigree (1,1,1,1,1)
  (same comment as for electricity, low voltage)
  properties: wet mass 1 kg, dry mass 1 kg
- packaging, for fertilisers: 0.0267 kg; lognormal variance with pedigree 0.0592, pedigree (4,3,4,5,4)
  Total amount of active substance/s of fertilisers needed for the production of 'celery' is calculated to be circa 1.34E-02 kg. Fertiliser/s used in this dataset is/are: 'ammonium nitrate, as N', 'phosphate fertiliser, as P2O5', 'potassium sulfate, as K2O'. The total amount of active substance/s is doubled in order to account for the packaging of the dilluted product of fertiliser/s that is/are applied. Therefore, 2.67E-02 kg of packaging for fertilisers is justified with this exchange.
  properties: price 0.0642 EUR2005, carbon content, fossil 0.825301, wet mass 1 kg, heating value, net 25.01 MJ, dry mass 1 kg
  note on carbon content, fossil: Considering a chemical formula (C2H4)n for polyethylene, carbon content-fossil is calculated to be 0.856286 kg of Carbon per kg of dry mass.
- heat, central or small-scale, other than natural gas: 0.115 MJ; source Stoessel, Franziska; 2012; lognormal variance with pedigree 0.0105, pedigree (2,3,4,3,2)
  (same comment as for electricity, low voltage)
  properties: heating value, net 1 MJ
- pyrethroid-compound: 7.5e-7 kg; = pyre1; source Stoessel, Franziska; 2012; lognormal variance with pedigree 0.0453, pedigree (3,4,5,3,2)
  sum of coumpounds in this family
  properties: carbon content, fossil 0.623, wet mass 1 kg, dry mass 1 kg
- irrigation: 0.015 m3; name water_irrigation_input; source Stoessel, Franziska; 2012; lognormal variance with pedigree 0.0198, pedigree (2,4,4,4,3)
  Switzerland
  Uncertainty: Variance of logtransformed data = Default value of table 10.3 in Data Quality Guidelines
  properties: dry mass 0.11 kg, wet mass 1000 kg, water content 9089.91
- pesticide, unspecified: 6.81351e-5 kg; = unsp1+unsp2; source Stoessel, Franziska; 2012; lognormal variance with pedigree 0.0105, pedigree (2,3,4,3,2)
  sum of coumpounds in this family
  Uncertainty: Variance of logtransformed data = Default value of table 10.3 in Data Quality Guidelines
  properties: carbon content, fossil 0.486978, dry mass 1 kg, wet mass 1 kg
  note on carbon content, fossil: Mean of C content in all pesticides whose formula has been documented in Sutter 2010
- potassium sulfate: 0 kg; source Stoessel, Franziska; 2012; pedigree (1,1,1,1,1)
  The exchange has been updated from 'potassium sulfate, as K2O' into 'potassium sulfate' and therefore its amount has been scaled (multiplied) from 0.0066 kg by 1.85 kg of 'potassium sulfate' per kg of 'potassium sulfate, as K2O'.
  Uncertainty: Variance of logtransformed data = Default value of table 10.3 in Data Quality Guidelines
  properties: dry mass 1 kg, wet mass 1 kg
- [sulfonyl]urea-compound: 4.35e-5 kg; = sulfo1+sulfo2; source Stoessel, Franziska; 2012; lognormal variance with pedigree 0.0453, pedigree (3,4,5,3,2)
  sum of coumpounds in this family
  property dry mass 1 kg; name DM
  property water in wet mass 0 kg; name WWM
  property water content 0; name water_content
  property wet mass 1 kg; name WM
  property carbon content, non-fossil 0; name C_content_non_fossil
  property carbon content, fossil 0.540853; name C_content_fossil
- ammonium nitrate: 0.00390776, 0.00271018, 0.00208306, 0.0070714 kg (4 entries); source Stoessel, Franziska; 2012; lognormal variance with pedigree 0.0105, pedigree (2,3,4,3,2)
  (same comment as for ammonium nitrate)
- inorganic phosphorus fertiliser, as P2O5: 4.59141e-5, 4.66536e-6, 0.000166623, 2.32717e-6, 3.27732e-7, 9.01401e-6, 3.3324e-7, 5.37728e-6, 3.00329e-6, 1.10286e-5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 kg (30 entries); source Stoessel, Franziska; 2012; lognormal variance with pedigree 0.0159, pedigree (2,3,4,3,2)
  (same comment as for electricity, low voltage)
- potassium sulfate: 0.0021245, 0.0100853 kg (2 entries); source Stoessel, Franziska; 2012; lognormal variance with pedigree 0.0114, pedigree (3,2,4,3,2)
  (same comment as for potassium sulfate)

## Inputs from nature
- Transformation, to annual crop, irrigated, intensive [natural resource, land]: 0.250435 m2; source Stoessel, Franziska; 2012; lognormal variance with pedigree 0.0119, pedigree (2,3,4,3,2)
  (same comment as for electricity, low voltage)
- Occupation, annual crop, irrigated, intensive [natural resource, land]: 0.12 m2*year; source Stoessel, Franziska; 2012; lognormal variance with pedigree 0.0119, pedigree (2,3,4,3,2)
  (same comment as for electricity, low voltage)
- Peat, in ground [natural resource, biotic]: 0.04 kg; source Stoessel, Franziska; 2012; lognormal variance with pedigree 0.0105, pedigree (2,3,4,3,2)
  (same comment as for electricity, low voltage)
- Transformation, from annual crop, irrigated, intensive [natural resource, land]: 0.250435 m2; source Stoessel, Franziska; 2012; lognormal variance with pedigree 0.0119, pedigree (2,3,4,3,2)
  (same comment as for electricity, low voltage)
- Energy, gross calorific value, in biomass [natural resource, biotic]: 1.25278 MJ; lognormal variance with pedigree 0.0099, pedigree (2,3,4,3,1)
  Calculated value based on literature. The gross energy is calculated using following formula; gross energy (MJ) = crude protein (kg)*23.04 (MJ/kg)+crude fat (kg)*38.96 (MJ/kg)+crude fibre (kg)*17.95 (MJ/kg)+carbohydrates (kg)*17.17 (MJ/kg) (formula based on expert opinion, cross referenced; Diepenbrock, 2012, Energy Balance in Crop Production). The product composition of fruits and vegetables is extracted from the USDA National Nutrient Database for Standard Reference (http://ndb.nal.usda.gov/, accessed 20131114). Crude protein (g)= 6.9, crude fat (g)= 1.7, crude fibre (g)= 16, ash (g)= 7.5, water (g)= 954.3, carbohydrates (g)= 29.7. The gross energy per kg of DM is 18.26MJ. The calculated gross energy per kg of reference product is thus 1.25MJ.

## Emissions to nature
- Phosphate [water, ground-]: 8.39e-7 kg; source Stoessel, Franziska; 2012; lognormal variance with pedigree 0.0847, pedigree (3,4,5,3,2)
  (same comment as for electricity, low voltage)
- Cadmium [soil, agricultural]: 5.52904e-8 kg; source Thomas Nemecek 2011; lognormal variance with pedigree 0.0847, pedigree (3,4,5,3,2)
  (same comment as for electricity, low voltage)
- Cymoxanil [soil, agricultural]: 6e-6 kg; name sulfo2; source Stoessel, Franziska; 2012; lognormal variance with pedigree 0.0777, pedigree (3,4,5,3,2)
  (same comment as for electricity, low voltage)
- Nitrate [water, ground-]: 0.00733371 kg; source Thomas Nemecek 2011; lognormal variance with pedigree 0.0847, pedigree (3,4,5,3,2)
  (same comment as for electricity, low voltage)
- Nickel [soil, agricultural]: 1.784e-7 kg; source Thomas Nemecek 2011; lognormal variance with pedigree 0.0847, pedigree (3,4,5,3,2)
  (same comment as for electricity, low voltage)
- Chromium [soil, agricultural]: 9.23212e-8 kg; source Thomas Nemecek 2011; lognormal variance with pedigree 0.0847, pedigree (3,4,5,3,2)
  (same comment as for electricity, low voltage)
- Linuron [soil, agricultural]: 3.75e-5 kg; name sulfo1; source Stoessel, Franziska; 2012; lognormal variance with pedigree 0.0777, pedigree (3,4,5,3,2)
  (same comment as for electricity, low voltage)
- Nitrogen oxides [air, non-urban air or from high stacks]: 2.26789e-5 kg; source Thomas Nemecek 2011; lognormal variance with pedigree 0.0747, pedigree (3,4,5,3,2)
  (same comment as for electricity, low voltage)
- Lead [soil, agricultural]: 6.37208e-7 kg; source Thomas Nemecek 2011; lognormal variance with pedigree 0.0847, pedigree (3,4,5,3,2)
  (same comment as for electricity, low voltage)
- Ammonia [air, non-urban air or from high stacks]: 0.000134057 kg; source Thomas Nemecek 2011; lognormal variance with pedigree 0.0527, pedigree (3,4,5,3,2)
  (same comment as for electricity, low voltage)
- Alpha-cypermethrin [soil, agricultural]: 7.5e-7 kg; name pyre1; source Stoessel, Franziska; 2012; lognormal variance with pedigree 0.0777, pedigree (3,4,5,3,2)
  (same comment as for electricity, low voltage)
- Phosphorus [water, surface water]: 2.93e-6 kg; source Stoessel, Franziska; 2012; lognormal variance with pedigree 0.0847, pedigree (3,4,5,3,2)
  Uncertainty: Variance of log-transformed data for phosphorus to water = 0.04, as for the phosphate emission into the water (because no default value is given in table 10.3, of the Data Quality Guidelines)
- Dinitrogen monoxide [air, non-urban air or from high stacks]: 0.000107995 kg; source Thomas Nemecek 2011; lognormal variance with pedigree 0.0747, pedigree (3,4,5,3,2)
  (same comment as for electricity, low voltage)
- Difenoconazole [soil, agricultural]: 6.2e-6 kg; name unsp1; source Stoessel, Franziska; 2012; lognormal variance with pedigree 0.0777, pedigree (3,4,5,3,2)
  (same comment as for electricity, low voltage)
- Water [air, unspecified]: 0.00886479 m3; name water_to_air_unspecified; = (tap_water_input/1000)*fraction_TW_to_air+water_irrigation_input*fraction_IW_to_air; lognormal variance with pedigree 0.0487, pedigree (2,2,4,1,1)
  Calculated value based on literature values and expert opinion. See comments in the parametres' comment field.
  property fraction, origin: fresh water 1; name fraction_origin_fresh_water
  property fraction, origin: salt water 0; name fraction_origin_salt_water
  property fraction, origin: unspecified 0; name fraction_origin_unspecified
- Mancozeb [soil, agricultural]: 0.0002385 kg; name dithio1; source Stoessel, Franziska; 2012; lognormal variance with pedigree 0.0777, pedigree (3,4,5,3,2)
  (same comment as for electricity, low voltage)
- Zinc [soil, agricultural]: -1.87972e-7 kg; source Thomas Nemecek 2011
- Water [water, ground-]: 0.00495617 m3; name water_to_water_ground; = water_irrigation_input*(1-fraction_IW_to_air)*fraction_IW_to_ground_water; lognormal variance with pedigree 0.0966, pedigree (4,3,4,1,4)
  Calculated value. See the parameters and their comments to understand the calculation.
  property fraction, origin: fresh water 1; name fraction_origin_fresh_water_Wgw
  property fraction, origin: salt water 0; name fraction_origin_salt_water_Wgw
  property fraction, origin: unspecified 0; name fraction_origin_unspecified_Wgw
- Copper [soil, agricultural]: 6.19351e-5 kg; name unsp2; source Stoessel, Franziska; 2012; lognormal variance with pedigree 0.0777, pedigree (3,4,5,3,2)
  emission to agricultural soil from fertilizing, erosion, leaching etc. included (according to Nemecek 2011)
  Uncertainty: Variance of logtransformed data = Default value of table 10.3 in Data Quality Guidelines
- Water [water, surface water]: 0.00123904 m3; name water_to_water_surface; = water_irrigation_input*(1-fraction_IW_to_air)*fraction_IW_to_surface_water; lognormal variance with pedigree 0.0966, pedigree (4,3,4,1,4)
  Calculated value. See the parameters and their comments to understand the calculation.
  property fraction, origin: salt water 0; name fraction_origin_salt_water_Wsw
  property fraction, origin: fresh water 1; name fraction_origin_fresh_water_Wsw

## Sampling procedure
The LCI is based on white celery production cost tables from Switzerland which is well representative for an Integrated Production in Switzerland. Most probably it is representative for productions in industrialized countries or farms which produces similarly.
Please refer to Stoessel et al. (2012) for more information: http://pubs.acs.org/doi/pdf/10.1021/es2030577
Franziska Stoessel, Ronnie Juraske, Stephan Pfister, Stefanie Hellweg. (2012) Life Cycle Inventory and Carbon and Water FoodPrint of Fruits and Vegetables: Application to a Swiss Retailer. Environmental Science & Technology 6(46) 3253−3262.

## Extrapolations
This dataset has been extrapolated from year 2010 to the year of the calculation (2021). The uncertainty has been adjusted accordingly.

## Review by Bo Weidema 2011-12-31
Production volume too large. Infrastructure missing. Number in activity name without explanation.
