# potentiometer production, unspecified

Dataset: EcoSpold 2, unit process
Geography: GLO
Time period: 1994-01-01 to 2021-12-31
Technology level: current
Classification: ISIC rev.4 ecoinvent: 2610:Manufacture of electronic components and boards
Classification: EcoSpold01Categories: electronics/component
Synonyms: variable resistor
Scenario: Business-as-Usual
System model: Allocation, cut-off by classification
Generated by: Roland Hischier
Published in: Hischier R. 2007
Database: ecoinvent
isCopyrightProtected: true
accessRestrictedTo: 1

## General comment
This dataset represents the production of 1 kg of a typical potentiometer. It is based on the assumption that a typical potentiometer in electronic module has an average weight of 6.1 g.The data represent a typical potentiometer, used in the information and communication technology. Material data are taken from the literature. Infrastructure and production efforts are based on own assumptions. The production efforts represent not a specific resistor type and have thus, accordingly higher uncertainties.
[This dataset was already contained in the ecoinvent database version 2. It was not individually updated during the transfer to ecoinvent version 3. Life Cycle Impact Assessment results may still have changed, as they are affected by changes in the supply chain, i.e. in other datasets. This dataset was generated following the ecoinvent quality guidelines for version 2. It may have been subject to central changes described in the ecoinvent version 3 change report (http://www.ecoinvent.org/database/ecoinvent-version-3/reports-of-changes/), and the results of the central updates were reviewed extensively. The changes added e.g. consistent water flows and other information throughout the database. The documentation of this dataset can be found in the ecoinvent reports of version 2, which are still available via the ecoinvent website. The change report linked above covers all central changes that were made during the conversion process.]

## Included activities start
From reception of metals, plastics at the factory gate.

## Included activities end
This dataset includes raw material input and production efforts for the production of potentiometers (the variable resistor type).

## Geography
Data represent a global valuable composition of potentiometers.

## Technology
Average technology for the production of resistors and potentiometers - comprising terminmation printing; resistive body printing; glass coat printing; laser trimming; substrate stripping (SMT) resp. ceramic rods; deposition processes; ageing; capping (THT) resp. printing; curing; punching; revetting; molding (ptoentiom.)

## Reference product
- potentiometer, unspecified: 1 kg; By-product classification allocatable product; CPC 47120: Electrical resistors (except heating resistors)
  EcoSpold01Location=GLO
  Potentiometer here is considered as an example of a variable resistor, an average/typical trim potentiometer, like used in the information and communication technology (e.g. television production), is represented here as the fourth type of resistors. The potentiometer then is "a variable resistor that can be used as a voltage divider". Hence, it describes an electrical device which has a user-adjustable resistance. Usually, this is a three-terminal resistor with a sliding contact in the center. If all three terminals are used, it can act as a variable voltage divider. If only two terminals are used (one side and the wiper), it acts as a variable resistor.
  production volume 1 kg
    Dummy value to be replaced by measured, estimated or calculated value
  property carbon content, fossil 0.570934
    Calculated as the addition of C contents in the product composition, and referred to 1 kg DM potentiometer (ecoinvent v2.2 report 18_I)
  property price 57 EUR2005
    Calculated value based on data from United Nations Commodity Trade Statistics Database (comtrade.un.org). UN comtrade category: 853340 Variable resistors, rheostats and potentiometers, nes. Year 2005. Using exchange rate of 1EURO = 1.209 USD. Average of price of import into 5 main markets (EU, US, JP, IN and CN).
  property carbon content 0.589933
    carbon content on a dry matter basis (reserved; not for manual entry)
  properties: carbon content, non-fossil 0.0189996, water content 0, water in wet mass 0 kg, dry mass 1 kg, wet mass 1 kg, carbon allocation 0.589933 kg

## Inputs from technosphere
- polyethylene terephthalate, granulate, amorphous: 0.041451 kg; source Behrendt S 1998; lognormal variance with pedigree 0.052, pedigree (1,4,5,1,1)
  Calculated Value. The production of 1 kg of resistors lead to a waste amount of 0.23 kg unused raw materials. Hence, this dataset here has an input of 1.23 kg of raw materials per kg of resistor. The split to the different raw materials (metals, plastics, etc.) is based on the reported material specifications.
  EcoSpold01Location=RER
  Uncertainty: literature data
  properties: wet mass 1 kg, carbon content, fossil 0.625, dry mass 1 kg, heating value, net 22.95 MJ
  note on carbon content, fossil: Polymer of the ethylen terephtalate monomer (C10H8O4)n (ecoinvent v2.2 report 11_II), MW=192 g/mol
- polycarbonate: 0.89421 kg; source Behrendt S 1998; lognormal variance with pedigree 0.052, pedigree (1,4,5,1,1)
  EcoSpold01Location=RER
  Calculated Value. The production of 1 kg of resistors lead to a waste amount of 0.23 kg unused raw materials. Hence, this dataset here has an input of 1.23 kg of raw materials per kg of resistor. The split to the different raw materials (metals, plastics, etc.) is based on the reported material specifications.
  Uncertainty: literature data
  properties: dry mass 1 kg, heating value, net 29.57 MJ, carbon content, fossil 0.755906, wet mass 1 kg
  note on carbon content, fossil: Polycarbonate means here 2,2-bis(4-hydroxyphenyl)propane polycarbonate – also called bisphenol A polycarbonate ( -(O-C6H4-C(CH3)2-C6H4-O-CO)n- (ecoinvent v2.2 report 11_II), C16H14O3, MW=254 g/mol.
- nickel, class 1: 0.005658 kg; source Behrendt S 1998; lognormal variance with pedigree 0.052, pedigree (1,4,5,1,1)
  Calculated Value. The production of 1 kg of resistors lead to a waste amount of 0.23 kg unused raw materials. Hence, this dataset here has an input of 1.23 kg of raw materials per kg of resistor. The split to the different raw materials (metals, plastics, etc.) is based on the reported material specifications.
  EcoSpold01Location=GLO
  Uncertainty: literature data
  properties: wet mass 1 kg, dry mass 1 kg
- copper, cathode: 0.064206 kg; source Behrendt S 1998; lognormal variance with pedigree 0.052, pedigree (1,4,5,1,1)
  (same comment as for polycarbonate)
  properties: wet mass 1 kg, dry mass 1 kg
- steel, low-alloyed, hot rolled: 0.084132 kg; source Behrendt S 1998; lognormal variance with pedigree 0.052, pedigree (1,4,5,1,1)
  (same comment as for polyethylene terephthalate, granulate, amorphous)
  properties: carbon content, fossil 0.005, dry mass 1 kg, wet mass 1 kg
  note on carbon content, fossil: Low alloyed steel composition given in Tab. 3.2 ecoinvent v2.2 report 10_partII. Steel assumed to have a C content of 0.5%
- aluminium oxide, non-metallurgical: 0 kg; source Behrendt S 1998; pedigree (1,1,1,1,1)
  (same comment as for polycarbonate)
  properties: dry mass 1 kg, wet mass 1 kg
- kraft paper: 0 kg; source Behrendt S 1998; pedigree (1,1,1,1,1)
  (same comment as for polycarbonate)
  properties: water content 0.0582011, carbon content, fossil 0.0020219, carbon content, non-fossil 0.41662, heating value, net 14.11 MJ, wet mass 1 kg, dry mass 0.945 kg
  note on carbon content, fossil: Fossil C content was calculated after fossil C contents of chemicals used in the production of the paper (in Tab 9.4 ecoinvent v2.2 report 11_III, part 9).
  note on carbon content, non-fossil: Biogenic C content was calculated after biogenic C contents of chemicals used in the production of the paper (in Tab 9.4 ecoinvent v2.2 report 11_III, part 9). The cellulose content in 1 kg of paper (on a wet mas basis) was estimated as (1-chemical content), C content of cellulose was considered 0.44 kgC/kg dry mass (ecoinvent v2.2 report, n 15a, pg 40)
- resistor, auxilliaries and energy use: 1 kg; lognormal variance with pedigree 0.134, pedigree (3,4,5,1,4)
  EcoSpold01Location=GLO
  Estimation - details see this other activity dataset
  Uncertainty: rough estimation
- zinc: 0.008733 kg; source Behrendt S 1998; lognormal variance with pedigree 0.052, pedigree (1,4,5,1,1)
  (same comment as for polyethylene terephthalate, granulate, amorphous)
  properties: dry mass 1 kg, wet mass 1 kg
- tin: 0.005658 kg; source Behrendt S 1998; lognormal variance with pedigree 0.052, pedigree (1,4,5,1,1)
  (same comment as for polyethylene terephthalate, granulate, amorphous)
  properties: dry mass 1 kg, wet mass 1 kg
- aluminium oxide, non-metallurgical: 0.0842581, 0.0142649 kg (2 entries); source Behrendt S 1998; lognormal variance with pedigree 0.052, pedigree (1,4,5,1,1)
  (same comment as for polycarbonate)
- kraft paper: 0.00322752, 0.0243245 kg (2 entries); source Behrendt S 1998; lognormal variance with pedigree 0.052, pedigree (1,4,5,1,1)
  (same comment as for polycarbonate)

## Sampling procedure
literature

## Extrapolations
This dataset has been extrapolated from year 2007 to the year of the calculation (2021). The uncertainty has been adjusted accordingly.

## Review by Rolf Frischknecht 2007-09-14
passed

## Review by Roland Hischier 2011-09-21
Transfer of documentation done.
