# laminating service, foil, with acrylic binder

Dataset: EcoSpold 2, unit process
Geography: RoW
Time period: 1996-01-01 to 2021-12-31
Technology level: current
Classification: EcoSpold01Categories: paintings/processing
Classification: ISIC rev.4 ecoinvent: 1812:Service activities related to printing
Tags: ConvertedDataset
Scenario: Business-as-Usual
System model: Allocation, cut-off by classification
Generated by: Alex Primas
Published in: Hässig, W. 2007
Database: ecoinvent
isCopyrightProtected: true
accessRestrictedTo: 1

## General comment
Data derived from: BUWAL 250, Ökoinventare für Verpackungen, Umwelt-Materialien Nr. 250, Bundesamt für Umwelt, Wald und Landschaft (BUWAL), Bern, 1996.
[This dataset was already contained in the ecoinvent database version 2. It was not individually updated during the transfer to ecoinvent version 3. Life Cycle Impact Assessment results may still have changed, as they are affected by changes in the supply chain, i.e. in other datasets. This dataset was generated following the ecoinvent quality guidelines for version 2. It may have been subject to central changes described in the ecoinvent version 3 change report (http://www.ecoinvent.org/database/ecoinvent-version-3/reports-of-changes/), and the results of the central updates were reviewed extensively. The changes added e.g. consistent water flows and other information throughout the database. The documentation of this dataset can be found in the ecoinvent reports of version 2, which are still available via the ecoinvent website. The change report linked above covers all central changes that were made during the conversion process.]

## Included activities end
Estimation of electricity use for the laminating and cutting of foils. Only glue for laminating process included. Estimaion for waste process of glue overspray included. Materials which are laminated are not included. No transports of raw materials to the plant included. Infrastructure of the production plant not included.

## Geography
Data used has no specific geographical origin (literature values).

## Technology
Approximation from data of lamination of packaging foils. Acrylic glue as binder assumed.

## Time period
Time of literature publication.

## Reference product
- laminating service, foil, with acrylic binder: 1 m2; CPC 89122: Services related to printing; By-product classification allocatable product
  EcoSpold01Location=RER
  production volume 2.65986 m2
    This is a placeholder value that does not reflect real-world production volumes. This dataset does not currently require a real-world production volume to work in the database framework, and no actual data were collected yet. This has no negative effect on the results of the ecoinvent database.
  properties: price 0.837 EUR2005

## Inputs from technosphere
- electricity, medium voltage: 0 kWh; pedigree (1,1,1,1,1)
  EcoSpold01Location=UCTE
  Data estimated from a related process
  Uncertainty: Data estimated from a related process
- acrylic binder, without water, in 34% solution state: 0.0014 kg; lognormal variance with pedigree 0.074, pedigree (3,4,5,5,3)
  Data estimated from a related process
  EcoSpold01Location=RER
  Uncertainty: Data estimated from a related process
  properties: heating value, net 18.18 MJ, carbon content, fossil 0.599846, dry mass 1 kg, wet mass 1 kg
  note on carbon content, fossil: The acrylic acid ethyl ester (ethyl acrylate) is used for both solvent- and water-based paints, and in textiles as a binder in nonwoven fabrics and flocking (Acrylic acid and derivatives: uses, Ullmann). It was used as a representative example of acrylic binders. Its formula is C5H8O2
- waste paint: -0.0002 kg; lognormal variance with pedigree 0.072, pedigree (4,4,5,5,1)
  Data estimated from a related process
  EcoSpold01Location=CH
  Uncertainty: Data estimated from a related process
  production volume 0.000596446 kg
    Calculated from the production volume of laminating service, foil, with acrylic binder in proportion to the respective output amounts.
  properties: heating value, net 19.7 MJ, wet mass 1 kg, dry mass 1 kg, carbon content, fossil 0.65
  note on carbon content, fossil: Tab A.5, ecoinvent v2.2 report 13_I. C content has been calculated after data in the tables, and then referred to 1 kg DM
- electricity, medium voltage: 0.000233251, 4.47275e-5, 0.000364606, 0.000750881, 0.0109209, 0.0015393, 0.00444634 kWh (7 entries); lognormal variance with pedigree 0.11, pedigree (3,5,5,5,3)
  (same comment as for electricity, medium voltage)

## Sampling procedure
Data from Literature used

## Extrapolations
none This dataset has been copied from an original dataset covering the geography RER. The uncertainty has been adjusted accordingly.

## Review by Rolf Frischknecht 2007-08-16
passed
none
