# p-nitrotoluene production

Dataset: EcoSpold 2, unit process
Geography: RoW
Time period: 2010-01-01 to 2021-12-31
Technology level: current
Classification: ISIC rev.4 ecoinvent: 2011:Manufacture of basic chemicals
Synonyms: C7H7NO2
Scenario: Business-as-Usual
System model: Allocation, cut-off by classification
Share of production covered: 100 %
Generated by: Jürgen Sutter
Database: ecoinvent
isCopyrightProtected: true
accessRestrictedTo: 1

## General comment
The process “p-nitrotoluene (PNT), at plant, GLO" is modelled for the production of p-nitrotoluene (PNT) from toluene. Raw materials are modelled with a stoechiometric calculation. Emissions are estimated. Energy consumptions, infrastructure and transports are calculated with standard values.
p-Nitrotoluene (C7H7NO2; CAS 99-99-0, 4-nitrotoluene, PNT, 4-nitro-1-methylbenzene) forms colourless to light yellow rhombic – bipyramidal crystals, which are soluble in most organic solvents but only slightly soluble in water (0.044 % at 30 °C). p-Nitrotoluene can be produced by nitration of toluene:
C7H8 + HNO3 → C7H7NO2 + H2O
4-Nitrotoluene derivatives are used principally as intermediates for colorants and related products; for example, p-toluidine, 4-nitrobenzoic acid (by oxidation of 4-nitrotoluene with 15 % HNO3 at 175 °C), 4-amino-2-chlorotoluene (by reduction of 2-chloro-4-nitrotoluene), and 4-nitrotoluene-2-sulfonic acid, which is of great importance in forming stilbene intermediates for fluorescent whitening agents.
Frischknecht R., Jungbluth N., Althaus H.-J., Doka G., Dones R., Heck T., Hellweg S., Hischier R., Nemecek T., Rebitzer G. and Spielmann M. (2007) Overview and Methodology. Final report ecoinvent v2.0 No. 1. Swiss Centre for Life Cycle Inventories, Dübendorf, CH, retrieved from: www.ecoinvent.org.

Gendorf (2000) Umwelterklärung 2000, Werk Gendorf. Werk Gendorf, Burgkirchen as pdf-File under: http://www.gendorf.de/pdf/umwelterklaerung2000.pdf

Kim 2003 Kim S., Overcash M.: Energy in chemical manufacturing processes: gate-to-gate information for life cycle assessment. In: Journal of Chemical Technology & Biotechnology vol. 78, no. 9: 995-1005(11). 2003

Gerald Booth: Nitro Compounds, Aromatic. Published online: 2003. In: Ullmann's Encyclopedia of Industrial Chemistry, Seventh Edition, 2004 Electronic Release (ed. Fiedler E., Grossmann G., Kersebohm D., Weiss G. and Witte C.). 7 th Electronic Release Edition. Wiley InterScience, New York, Online-Version under: DOI: 10.1002/14356007.a17_411

## Included activities end
production of p-nitrotoluene (PNT) including materials, energy uses, infrastructure, and emissions

## Geography
The inventory is modelled for the world.

## Technology
nitration of toluene

## Time period
Time of publications

## Parameters
- fraction, cooling water, recirculating system, to air: 0.771 dimensionless; name fraction_CW_R_to_air; lognormal variance with pedigree 0.0413, pedigree (2,3,1,3,1)
  Calculated based on literature value (Scown, C.D., 2011, Water Footprint of U.S. Transportation Fuels and supplying information of the article) (Vionnet, S., Quantis Water Database - Technical Report, 2012).
- fraction, cooling water, to air: 0.3875 dimensionless; name fraction_CW_to_air; = (0.5*fraction_CW_OT_to_air)+(0.5*fraction_CW_R_to_air); lognormal variance with pedigree 0.092025, pedigree (4,4,3,2,4)
  Calculated value based on literature value (see comments of the other parametres present in this dataset) and expert opinion. In the case when no industry/literature data are available about the type of cooling or directly fraction, cooling water, to air specific for the process a default assumption is applied. It is assumed that the once-through cooling system is used in 50% of all cases and recirculating system is used in another 50% of all cases.
- fraction, cooling water, cooling pond system, to air: 0.032 dimensionless; name fraction_CW_CP_to_air; lognormal variance with pedigree 0.0413, pedigree (2,3,1,3,1)
  (same comment as for fraction, cooling water, recirculating system, to air)
- fraction, cooling water, once-through system, to air: 0.004 dimensionless; name fraction_CW_OT_to_air; lognormal variance with pedigree 0.0413, pedigree (2,3,1,3,1)
  (same comment as for fraction, cooling water, recirculating system, to air)

## Reference product
- p-nitrotoluene: 1 kg; CPC 341: Basic organic chemicals; By-product classification allocatable product; CAS 99-99-0
  EcoSpold01Location=RER
  production volume 6.7e6 kg
    Expert judgement
  property price 0.725543 EUR2005
    Calculated based on inputs: The price of the product has been calculated as a sum of the values of the material and energy inputs for this product. This value is therefore a rough estimation. It may underestimate the real price since there are additional expenses when producing any product. These expences can include for example labour costs, treatment of waste materials and profit for the producer. Please consider carefully whether this level of data quality is acceptable for your application.
  property carbon content, fossil 0.613083
    Calculated based on molecular structure. See tab "chemicals".
  property heating value, net 24.76 MJ
    LHV is calculated based on the elemental composition of the substance. Based on the name of the substance, the chemical formula of the substance is manually found to be: C7H7NO2.
  property carbon content 0.613083
    carbon content on a dry matter basis (reserved; not for manual entry)
  properties: water content 0, dry mass 1 kg, water in wet mass 0 kg, carbon content, non-fossil 0, wet mass 1 kg, carbon allocation 0.613083 kg

## Inputs from technosphere
- chemical factory, organics: 4e-10 unit; lognormal variance with pedigree 0.3184, pedigree (4,5,5,5,5)
  No information was readily available about infrastructure and land-use of p-nitrophenol production plants. Therefore, in this study, the infrastructure is estimated based on the module "chemical plant, organics". This module assumes a built area of about 4.2 ha, an average output of 50'000 t/a, and plant life of fifty years. For this study, the estimated value is 4.00 E-10 units per kg of produced chemical.
  EcoSpold01Location=RER
  Uncertainty: Estimation
- electricity, medium voltage: 0 kWh; pedigree (1,1,1,1,1)
  EcoSpold01Location=UCTE
  Kim 2003 gives values for the energy consumption of the nitration of toluene.
  Uncertainty: Kim 2003
- heat, from steam, in chemical industry: 6.43 MJ; lognormal variance with pedigree 0.0416, pedigree (1,2,5,1,1)
  Kim 2003 gives values for the energy consumption of the nitration of toluene.
  EcoSpold01Location=RER
  Uncertainty: Kim 2003
  properties: heating value, net 1 MJ
- sodium hydroxide, without water, in 50% solution state: 0.012165 kg; lognormal variance with pedigree 0.0335, pedigree (4,5,4,1,1)
  The remaining nitric acid is considered to be neutralized with sodium hydroxide.
  EcoSpold01Location=RER
  Uncertainty: Stoechiometric calculation
  properties: heating value, net 3.03 MJ, dry mass 1 kg, wet mass 1 kg
- nitric acid, without water, in 50% solution state: 0 kg; pedigree (1,1,1,1,1)
  EcoSpold01Location=RER
  As there was no data available for the production of p-nitrotoluene, the values for the consumption of the raw materials are calculated with an assumed yield of 95 % (Frischknecht et al. 2007).
  Uncertainty: Stoechiometric calculation
  properties: dry mass 1 kg, wet mass 1 kg
- toluene, liquid: 0.69951 kg; lognormal variance with pedigree 0.0335, pedigree (4,5,4,1,1)
  (same comment as for nitric acid, without water, in 50% solution state)
  properties: heating value, net 38.17 MJ, carbon content, fossil 0.913043, dry mass 1 kg, wet mass 1 kg
- electricity, medium voltage: 0.000309873, 5.94204e-5, 0.000997545, 0.0145084, 0.00204497, 0.0066628 kWh (6 entries); lognormal variance with pedigree 0.0416, pedigree (1,2,5,1,1)
  (same comment as for electricity, medium voltage)
- nitric acid, without water, in 50% solution state: 0.0922816, 0.0225178, 0.0559975, 0.17097, 0.0268311, 0.0151549, 0.0224344, 0.0728231 kg (8 entries); lognormal variance with pedigree 0.0335, pedigree (4,5,4,1,1)
  (same comment as for nitric acid, without water, in 50% solution state)

## Inputs from nature
- Water, cooling, unspecified natural origin [natural resource, in water]: 0.024 m3; name water_cooling_UNO_input; lognormal variance with pedigree 0.0335, pedigree (4,5,4,1,1)
  There was no information available on the amount of cooling water used within the plant. In order not to neglect the process cooling water demand this value was approximated with data from an large chemical plant site in Germany producing 2.05 Mt a-1 (intermediates included) of different chemicals (Gendorf 2000). In this plant in total an average 24 kg water per kg of product were used for. This value was used in this inventory as approximation for the cooling water consumption.
  There was no information available on the amount of cooling water used within the plant. In order not to neglect the process cooling water demand this value was approximated with data from an large chemical plant site in Germany producing 2.05 Mt a-1 (intermediates included) of different chemicals (Gendorf 2000). In this plant in total an average 24 kg water per kg of product were used for. This value was used in this inventory as approximation for the cooling water consumption.
  Uncertainty: Estimation

## Emissions to nature
- Carbon dioxide, fossil [air, urban air close to ground]: 0.080091 kg; lognormal variance with pedigree 0.1786, pedigree (4,5,5,5,5)
  The carbon contained in the removed toluene is accounted as CO2 emissions to air.
  Uncertainty: Estimation
- COD, Chemical Oxygen Demand [water, surface water]: 0.0079756 kg; lognormal variance with pedigree 0.218, pedigree (4,5,5,5,5)
  The values for COD, BOD, TOC, and DOC used in this inventory are calculated from the amount of organic substancesl in the treated waste water assuming a carbon conversion of 96% for COD. For the calculation of the values for BOD and DOC the worst case scenario BOD = COD and TOC = DOC is used.
  Uncertainty: Estimation
- Toluene [water, surface water]: 0.0026582 kg; lognormal variance with pedigree 0.3184, pedigree (4,5,5,5,5)
  The remaining amount of unreacted toluene and nitric acid is assumed to leave the production process with the waste water. Further it was assumed that this wastewater is treated in a internal wastewater plant. The removal efficiency for toluene is assumed with 90%. The carbon contained in the removed toluene is accounted as CO2 emissions to air.
  Uncertainty: Estimation
- Water [water, unspecified]: 0.0147 m3; name water_to_water_unspecified; = water_cooling_UNO_input*(1-fraction_CW_to_air); lognormal variance with pedigree 0.130025, pedigree (4,4,5,2,4)
  Calculated value based on literature values and expert opinion. See comments in the parametres' comment field.
  property fraction, origin: fresh water 0; name fraction_origin_fresh_water_Ww
  property fraction, origin: salt water 0; name fraction_origin_salt_water_Ww
  property fraction, origin: unspecified 1; name fraction_origin_unspecified_Ww
- Sodium, ion [water, surface water]: 0.0069951 kg; lognormal variance with pedigree 0.6642, pedigree (4,5,5,5,5)
  Estimation
  Uncertainty: Estimation
- TOC, Total Organic Carbon [water, surface water]: 0.0024255 kg; lognormal variance with pedigree 0.218, pedigree (4,5,5,5,5)
  (same comment as for COD, Chemical Oxygen Demand)
- Water [air, unspecified]: 0.0093 m3; name water_to_air_unspecified; = water_cooling_UNO_input*fraction_CW_to_air; lognormal variance with pedigree 0.130025, pedigree (4,4,5,2,4)
  (same comment as for Water)
  property fraction, origin: unspecified 1; name fraction_origin_unspecified
  property fraction, origin: fresh water 0; name fraction_origin_fresh_water
  property fraction, origin: salt water 0; name fraction_origin_salt_water
- Nitrate [water, surface water]: 0.0094282 kg; lognormal variance with pedigree 0.1786, pedigree (4,5,5,5,5)
  The nitric acid is considered to be neutralized with sodium hydroxid and is calculated as nitrate emission.
  Uncertainty: Estimation
- DOC, Dissolved Organic Carbon [water, surface water]: 0.0024255 kg; lognormal variance with pedigree 0.218, pedigree (4,5,5,5,5)
  (same comment as for COD, Chemical Oxygen Demand)
- BOD5, Biological Oxygen Demand [water, surface water]: 0.0079756 kg; lognormal variance with pedigree 0.218, pedigree (4,5,5,5,5)
  (same comment as for COD, Chemical Oxygen Demand)
- Toluene [air, urban air close to ground]: 0.001399 kg; lognormal variance with pedigree 0.1786, pedigree (4,5,5,5,5)
  There was no data available on process emissions to air for the p-nitrotoluene production. As approximation the air emissions occurring from the purge vent, the distillation vent and fugitive emission sources were estimated to 0.2% of the toluene input.
  Uncertainty: Estimation

## Sampling procedure
Literature data

## Extrapolations
Emissions are modelled with standard methods.
