# battery production, NiMH, rechargeable, prismatic

Dataset: EcoSpold 2, unit process
Geography: GLO
Time period: 1999-01-01 to 2021-12-31
Technology level: current
Classification: ISIC rev.4 ecoinvent: 2720:Manufacture of batteries and accumulators
Classification: EcoSpold01Categories: electronics/module
Synonyms: NiMN-Akku
Tags: ConvertedDataset
Scenario: Business-as-Usual
System model: Allocation, cut-off by classification
Generated by: Wolfram Scharnhorst
Published in: Hischier R. 2007
Database: ecoinvent
isCopyrightProtected: true
accessRestrictedTo: 1

## General comment
This dataset represents the production of 1 kg of a NiMH battery for laptop applications. It is based on a NiMH battery package as used in a Fujitsu-Siemens laptop, model: C4135 and on the assumption that a typical such NiMH battery has a weight of 0.591 kg. Main data are taken from an environmental report of a battery producer as well as from literature. In addition own measurements of sizes and weights of batteries were used.
[This dataset was already contained in the ecoinvent database version 2. It was not individually updated during the transfer to ecoinvent version 3. Life Cycle Impact Assessment results may still have changed, as they are affected by changes in the supply chain, i.e. in other datasets. This dataset was generated following the ecoinvent quality guidelines for version 2. It may have been subject to central changes described in the ecoinvent version 3 change report (http://www.ecoinvent.org/database/ecoinvent-version-3/reports-of-changes/), and the results of the central updates were reviewed extensively. The changes added e.g. consistent water flows and other information throughout the database. The documentation of this dataset can be found in the ecoinvent reports of version 2, which are still available via the ecoinvent website. The change report linked above covers all central changes that were made during the conversion process.]

## Included activities end
(Raw) materials, infrastructure, transport efforts, energy consumption and waste disposal for the production of a NiMH battery. No emissions to air or water are taken into account.

## Geography
This module relates to the global situation (electricity consumption according to the main producing countries).

## Technology
Construction details as described for NiMH-rechargable batteries and manufacturing conditions as documented in the environmental report were adopted.

## Parameters
- fraction, cooling water, cooling pond system, to air: 0.032 dimensionless; name fraction_CW_CP_to_air; lognormal variance with pedigree 0.0413, pedigree (2,3,1,3,1)
  Calculated based on literature value (Scown, C.D., 2011, Water Footprint of U.S. Transportation Fuels and supplying information of the article) (Vionnet, S., Quantis Water Database - Technical Report, 2012).
- fraction, cooling water, recirculating system, to air: 0.771 dimensionless; name fraction_CW_R_to_air; lognormal variance with pedigree 0.0413, pedigree (2,3,1,3,1)
  (same comment as for fraction, cooling water, cooling pond system, to air)
- fraction, cooling water, once-through system, to air: 0.004 dimensionless; name fraction_CW_OT_to_air; lognormal variance with pedigree 0.0413, pedigree (2,3,1,3,1)
  (same comment as for fraction, cooling water, cooling pond system, to air)
- fraction, cooling water, to air: 0.3875 dimensionless; name fraction_CW_to_air; = (0.5*fraction_CW_OT_to_air)+(0.5*fraction_CW_R_to_air); lognormal variance with pedigree 0.092025, pedigree (4,4,3,2,4)
  Calculated value based on literature value (see comments of the other parametres present in this dataset) and expert opinion. In the case when no industry/literature data are available about the type of cooling or directly fraction, cooling water, to air specific for the process a default assumption is applied. It is assumed that the once-through cooling system is used in 50% of all cases and recirculating system is used in another 50% of all cases.
- fraction, water, decarbonised, to air: 0.3875 dimensionless; name fraction_WDC_to_air; = fraction_CW_to_air; lognormal variance with pedigree 0.092025, pedigree (4,4,3,2,4)
  Calculated value. See comments in the other parametres present in this dataset. Decarbonised water is considered to be always used as cooling water, thus cooling water fractions to air are applied to all carbonised water input flows to calculate the amount of water consumed in the processes.

## Reference product
- battery, NiMH, rechargeable, prismatic: 1 kg; By-product classification allocatable product; CPC 46420: Electric accumulators
  EcoSpold01Location=GLO
  The battery package consists of only one large sized battery cell. Technologically a battery cell consists of a multilayered assembly of coats sandwiched to each other and wound eiter circular or prismatically around a virtual axis. The size of this wound layer assembly is specified based on approximations for single cell layer assembly as contained in a LiIo rechargable battery.
  The mass of the entire multilayer cell assembly of the considered reference NiMH rechargable battery package is approximated based upon size approximations for the above noted LiIo battery model and is made as follows:
  Cell layer assembly length (LiIo rechargable battery): 100.00 mm
  Cell layer assembly width (LiIo rechargable battery): 60.00 mm
  Battery length (LiIo rechargable battery): 128.00 mm
  Battery width (LiIo rechargable battery): 77.00 mm
  Battery length (NiMH rechargable battery): 138.00 mm
  The calculation is then performed as follows:
  Cell layer assembly length (NiMH rechargable battery):
  100.00 mm / 128.00 mm = 78.125%
  138.00 mm *0.781 = 107.81 mm
  Cell layer assembly width (NiMH rechargable battery):
  60.00 mm / 77.00 mm = 77.922%
  105.00 mm *0.779 = 81.81 mm
  The thickness (i.e. the depth) of the single unwound layer compartments is approximated with 0.15 mm. Accordingly the single layers are dimensioned as follows (W x D x H): 81.81 mm x 0.15 mm x 107.81 mm.
  A multilayer package consists of 5 individual layers, namely positive and negative electrode, separator and electrolyte layer. The thickness of the entire prismatically wound multilayer assembly is approximated to 13.5 mm. Adopting the above defined thickness for a single layer (0.15 mm), the entire prismatically wound multilayer assembly consists in total of 90 individual layers and 18 windings (with each time 5 individual layers).
  production volume 1 kg
    183?000 t in 2005 (own calculations)
    Dummy value to be replaced by measured, estimated or calculated value
  property price 25.6 EUR2005
    Estimated to have 20% lower price as the Li-ion battery. The NiMH batteries are usually heavier due to lower energy density. That is why the price per kg is lower than Li-ion.
  property carbon content, fossil 0.0949631
    Calculated as the addition of C contents in the product composition
  property carbon content, non-fossil 0
    Calculated as the addition of C contents in the product composition
  property carbon content 0.0949631
    carbon content on a dry matter basis (reserved; not for manual entry)
  properties: water content 0, water in wet mass 0 kg, dry mass 1 kg, wet mass 1 kg, carbon allocation 0.0949631 kg

## Inputs from technosphere
- precious metal refinery: 1.6461e-7 unit; lognormal variance with pedigree 0.5761, pedigree (4,5,5,3,5)
  Proxy with Calculated Value, assuming a life time of the battery plant of 50 years. Hence an amount of 7.831e-8 plants per kg battery packages results from this calculation. To represent the infrastructure module facilities precious metal refinery is used.
  EcoSpold01Location=SE
- electrolyte, KOH, LiOH additive: 0.082202 kg; source Linden D. 2002; lognormal variance with pedigree 0.054025, pedigree (3,4,5,2,1)
  EcoSpold01Location=GLO
  Estimation, based on literature and own assumptions.
  properties: wet mass 1 kg, dry mass 1 kg
- water, decarbonised: 0 kg; name water_decarbonised_input; pedigree (1,1,1,1,1)
  EcoSpold01Location=RER
  Estimation, it is assumed the HITACHI annual water consumption of 1'190'000 m3.
  properties: wet mass 1 kg
- zinc coat, pieces: 4.812e-5 m2; lognormal variance with pedigree 0.128025, pedigree (5,5,5,2,1)
  Proxy, to represent the coating process zinc coating, pieces is used.
  EcoSpold01Location=RER
- polycarbonate: 0.081198 kg; lognormal variance with pedigree 0.066025, pedigree (4,5,5,2,1)
  EcoSpold01Location=RER
  Measured and calculated value. A thickness of 1.0 mm and a density of 1240 kg/m3 are measured. The calculation of the amount is performed as follows:
  <- Surface S = (0.138 m * 0.105 m * 2) + (0.105 m * 0.02 m * 2) + (0.138 m * 0.02 m * 2)
  S * 0.001 m * 1240 kg/m3 = 0.072 kg PC / NiMH battery package
  0.071982 kg * 1 kg / 0.591 kg = 0.0812 kg PC/ kg NiMH battery package
  properties: wet mass 1 kg, heating value, net 29.57 MJ, carbon content, fossil 0.755906, dry mass 1 kg
  note on carbon content, fossil: Polycarbonate means here 2,2-bis(4-hydroxyphenyl)propane polycarbonate – also called bisphenol A polycarbonate ( -(O-C6H4-C(CH3)2-C6H4-O-CO)n- (ecoinvent v2.2 report 11_II), C16H14O3, MW=254 g/mol.
- acrylic acid: 0 kg; source Noda D. 2005; pedigree (1,1,1,1,1)
  Literature Value.
  EcoSpold01Location=RER
  properties: carbon content, fossil 0.5, dry mass 1 kg, wet mass 1 kg, heating value, net 21.88 MJ
- steel, low-alloyed, hot rolled: 0.046263 kg; lognormal variance with pedigree 0.066025, pedigree (4,5,5,2,1)
  Proxy with estimtion, based on literature and own assumptions. To represent processing of the battery jacket, steel low-alloyed is used. A thickness of the steel jacket of 0.09 mm and a density of 7850 kg/m3 are assumed. The calculation is performed as for the policarbonate, resulting in 0.046 kg steel/kg battery.
  EcoSpold01Location=RER
  properties: dry mass 1 kg, carbon content, fossil 0.005, wet mass 1 kg
  note on carbon content, fossil: Low alloyed steel composition given in Tab. 3.2 ecoinvent v2.2 report 10_partII. Steel assumed to have a C content of 0.5%
- sheet rolling, copper: 3.6223e-6 kg; lognormal variance with pedigree 0.042025, pedigree (1,4,5,2,1)
  EcoSpold01Location=RER
  Proxy with estimtion, based on literature and own assumptions. To represent the substrate production process, sheet rolling copper is used.
- electricity, medium voltage: 0.544 kWh; source Rantik M 1999; lognormal variance with pedigree 0.042025, pedigree (1,4,5,2,1)
  EcoSpold01Location=CN
  Estimation based on literature.
- electrode, negative, Ni: 0.35895 kg; source Linden D. 2002; lognormal variance with pedigree 0.054025, pedigree (3,4,5,2,1)
  Estimation, based on literature and own assumptions.
  Further references:
  Freitas M. B. J. G. (2001) Nickel hydroxide powder for NiO*OH/Ni(OH)2 electrodes of the alkaline batteries. In: Journal of Power Sources, 93, pp. 163-173.
  Sakai T., Yoshinaga H., Miyamura H., Kuriyama N. and Ishikawa H. (1992) Rechargeable hydrogen batteries using rare-earth-based hydrogen storage alloys. In: Journal of Alloys and Compounds, 180, pp. 37-54.
  Dixit M., Kamath P. V., Kumar V. G., Munichandraiah N. and Shukla A. K. (1996) An electrochemically impregnated sintered-nickel electrode. In: Journal of Power Sources, 63, pp. 167-171.
  Jayashree R. S. and Kamath P. V. (2001) Nickel hydroxide electrodeposition from nickel nitrate solutions: mechanistic studies. In: Journal of Power Sources, 93, pp. 273-278.
  Subbaiah T., Mallick S. C., Mishra K. G., Sanjay K. and Das R. P. (2002) Electrochemical precipitation of nickel hydroxide. In: Journal of Power Sources, 112, pp. 562-569.
  EcoSpold01Location=GLO
  properties: carbon content, fossil 0.00301397, dry mass 1 kg, wet mass 1 kg
  note on carbon content, fossil: Calculated as the addition of C contents in the product composition
- copper, cathode: 3.6223e-6 kg; lognormal variance with pedigree 0.042025, pedigree (1,4,5,2,1)
  EcoSpold01Location=RAS
  Measured and calculated value. A size of (W x D x H): 2.00 mm x 0.00001 mm x 1.00 mm and a density of 8920 kg/m3 are measured.The calculation of the amount is performed as follows:
  0.002 m * 0.001 m * 0.0000001 m * 8920 kg/m3 * 12 = 0.0000021408 kg Cu-contacts / NiMH battery package
  0.0000021408 kg * 1 kg / 0.591 kg = 3.622e-6 kg Cu / kg NiMH battery package
  properties: dry mass 1 kg, wet mass 1 kg
- nickel, class 1: 0.058332 kg; source Linden D. 2002; lognormal variance with pedigree 0.066025, pedigree (4,5,5,2,1)
  Calculated value with estimation, based on literature and own assumptions. It is assumed a thickness of the substrate of 0.1 mm and a density of 8908 kg/m3. The calculation of the amount is performed as follows:
  <- (0.138 m * 0.105 m * 0.0001 m) * 2 + (0.105 m * 0.02 m * 0.0001 m) * 2 + (0.138 m * 0.02 m * 0.0001 m) * 2 * 8908 kg/m3 = 0.0266 kg Ni /NiMH battery package
  0.0266 kg * 1 kg / 0.591 kg = 0.058 kg Ni/ kg NiMH battery package
  Further references:
  Fetcenko M. (2002) Propulsion and industrial Nickel-Metal hydride batteries. In: Handbook of Batteries (ed. Linden D. and Reddy T. B.), 3rd Edition Edition. McGraw-Hill Companies, Inc., New York, Chicago, San Francisco, Lisbon, London, Madrid, Mexico City, Milan, New Delhi, San Juan, Seoul, Singapore, Sydney, Toronto
  EcoSpold01Location=GLO
  properties: wet mass 1 kg, dry mass 1 kg
- hazardous waste, for incineration: 0 kg; pedigree (1,1,1,1,1)
  Estimation, based on HITACHI environmental report.
  EcoSpold01Location=CH
  production volume 0 kg
    Calculated from the production volume of battery, NiMH, rechargeable, prismatic in proportion to the respective output amounts.
  properties: heating value, net 17 MJ, dry mass 0.75 kg, wet mass 1 kg, water content 0.333333, carbon content, fossil 0.554667
  note on heating value, net: Value taken from the general comment of the treatment dataset.
  note on carbon content, fossil: Tab A.6, ecoinvent v2.2 report 13_I. C content has been calculated after data in the tables, and then referred to 1 kg DM
- injection moulding: 0.11807 kg; source Hischier R. 2007; lognormal variance with pedigree 0.042025, pedigree (1,4,5,2,1)
  EcoSpold01Location=RER
  Estimation based on literature.
- polypropylene, granulate: 0.018536 kg; source Noda D. 2005; lognormal variance with pedigree 0.044025, pedigree (3,4,5,2,1)
  EcoSpold01Location=RER
  Estimation, based on literature and own assumptions. It is assumed a density of 920 kg/m3 .
  Further references:
  Calábek M., Micka K., Krivák P. and Baca P. (2006) Significance of carbon additive in negative lead-acid battery electrodes. In: Journal of Power Sources, 158, pp. 864-867.
  Fetcenko M. (2002) Propulsion and industrial Nickel-Metal hydride batteries. In: Handbook of Batteries (ed. Linden D. and Reddy T. B.), 3rd Edition Edition. McGraw-Hill Companies, Inc., New York, Chicago, San Francisco, Lisbon, London, Madrid, Mexico City, Milan, New Delhi, San Juan, Seoul, Singapore, Sydney, Toronto
  W.L. Gore & Associates Inc. (2006) Electrodes and Electrode Assemblies. Download of 2006-10-16 from <http://www.gore.com/en_xx/products/electronic/battery/electrodes_and_electrode_assemblies.html>.
  properties: heating value, net 32.78 MJ, carbon content, fossil 0.857143, dry mass 1 kg, wet mass 1 kg
  note on heating value, net: Value extracted from "treatment of waste polypropylene, open burning"
  note on carbon content, fossil: Polypropylene is formed by the polymerisation of propylene, C3H6 (ecoinvent v2.2 report 11_II)
- heat, district or industrial, natural gas: 8.35 MJ; source Rantik M 1999; lognormal variance with pedigree 0.042025, pedigree (1,4,5,2,1)
  EcoSpold01Location=RER
  Estimation based on literature.
  properties: heating value, net 1 MJ
- polyethylene, low density, granulate: 0.018334 kg; source Noda D. 2005; lognormal variance with pedigree 0.044025, pedigree (3,4,5,2,1)
  Estimation, based on literature and own assumptions. It is assumed a density of 910 kg/m3.
  Further references:
  Calábek M., Micka K., Krivák P. and Baca P. (2006) Significance of carbon additive in negative lead-acid battery electrodes. In: Journal of Power Sources, 158, pp. 864-867.
  Fetcenko M. (2002) Propulsion and industrial Nickel-Metal hydride batteries. In: Handbook of Batteries (ed. Linden D. and Reddy T. B.), 3rd Edition Edition. McGraw-Hill Companies, Inc., New York, Chicago, San Francisco, Lisbon, London, Madrid, Mexico City, Milan, New Delhi, San Juan, Seoul, Singapore, Sydney, Toronto
  W.L. Gore & Associates Inc. (2006) Electrodes and Electrode Assemblies. Download of 2006-10-16 from <http://www.gore.com/en_xx/products/electronic/battery/electrodes_and_electrode_assemblies.html>.
  EcoSpold01Location=RER
  properties: heating value, net 42.47 MJ, carbon content, fossil 0.857143, dry mass 1 kg, wet mass 1 kg
  note on carbon content, fossil: Polyethylene is formed out of a huge amount of ethylene monomers (C2H4) (ecoinvent v2.2 report 11_II). MW=28 g/mol
- electrode, positive, LaNi5: 0.33484 kg; source Linden D. 2002; lognormal variance with pedigree 0.054025, pedigree (3,4,5,2,1)
  Estimation, based on literature and own assumptions.
  Further references:
  Freitas M. B. J. G. (2001) Nickel hydroxide powder for NiO*OH/Ni(OH)2 electrodes of the alkaline batteries. In: Journal of Power Sources, 93, pp. 163-173.
  Sakai T., Yoshinaga H., Miyamura H., Kuriyama N. and Ishikawa H. (1992) Rechargeable hydrogen batteries using rare-earth-based hydrogen storage alloys. In: Journal of Alloys and Compounds, 180, pp. 37-54.
  EcoSpold01Location=GLO
  properties: dry mass 1 kg, wet mass 1 kg
- zinc: 3.6223e-8 kg; source Linden D. 2002; lognormal variance with pedigree 0.128025, pedigree (5,5,5,2,1)
  Estimation, based on literature.
  EcoSpold01Location=RER
  properties: wet mass 1 kg, dry mass 1 kg
- sheet rolling, steel: 0.10459 kg; source Classen M. 2009; lognormal variance with pedigree 0.066025, pedigree (4,5,5,2,1)
  EcoSpold01Location=RER
  Proxy with estimtion, based on literature and own assumptions. To represent processing of the battery jacket, sheet rolling steel is used. A thickness of the steel jacket of 0.09 mm and a density of 7850 kg/m3 are assumed. The calculation is performed as for the policarbonate, resulting in 0.046 kg steel/kg battery.
- water, decarbonised: 32.1206, 7.84368, 1.58125, 5.19944, 4.09026, 0.390981, 3.06072, 7.96398, 0.00498049, 0.28704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 kg (13 entries); lognormal variance with pedigree 0.042025, pedigree (1,4,5,2,1)
  (same comment as for water, decarbonised)
- acrylic acid: 0.000232829, 0.00110527 kg (2 entries); source Noda D. 2005; lognormal variance with pedigree 0.128025, pedigree (5,5,5,2,1)
  Literature Value.
  EcoSpold01Location=RER
- hazardous waste, for incineration: -0.28451, -0.00743691, -0.591624 kg (3 entries); lognormal variance with pedigree 0.082025, pedigree (1,4,5,2,1)
  Estimation, based on HITACHI environmental report.
  EcoSpold01Location=CH
  production volume 0.88357 kg

## Emissions to nature
- Water [air, unspecified]: 0.0707459 m3; name water_to_air_unspecified; = (water_decarbonised_input/1000*fraction_WDC_to_air); lognormal variance with pedigree 0.0807, pedigree (2,2,5,1,1)
  Calculated value based on literature values and expert opinion. See comments in the parametres' comment field.
  property fraction, origin: unspecified 0; name fraction_origin_unspecified
  property fraction, origin: salt water 0; name fraction_origin_salt_water
  property fraction, origin: fresh water 1; name fraction_origin_fresh_water
- Water [water, unspecified]: 0.111824 m3; name water_to_water_unspecified; = (water_decarbonised_input/1000)*(1-fraction_WDC_to_air); lognormal variance with pedigree 0.0807, pedigree (2,2,5,1,1)
  (same comment as for Water)
  property wet mass 1000 kg; name WM
  property water in wet mass 1000 kg; name WWM
  property carbon content, non-fossil 0; name C_content_non_fossil
  property dry mass 0 kg; name DM
  property carbon content, fossil 0; name C_content_fossil
  property fraction, origin: unspecified 0; name fraction_origin_unspecified_Ww
  property fraction, origin: salt water 0; name fraction_origin_salt_water_Ww
  property fraction, origin: fresh water 1; name fraction_origin_fresh_water_Ww

## Sampling procedure
Literature, measurements

## Extrapolations
This dataset has been extrapolated from year 2006 to the year of the calculation (2021). The uncertainty has been adjusted accordingly.

## Review by Roland Hischier 2011-09-30
Transfer of documentation done.

## Review by Rolf Frischknecht 2010-03-26
passed
