# plastic flake production, consumer electronics, for recycling, by grinding/shredding, formal sector

Dataset: EcoSpold 2, unit process
Geography: IN
Time period: 2017-01-01 to 2021-12-31
Technology level: current
Classification: ISIC rev.4 ecoinvent: 3830:Materials recovery
Scenario: Business-as-Usual
System model: Allocation, cut-off by classification
Share of production covered: 1 %
Generated by: Prasad Gangane
Published in: Gangane, P. 2017
Database: ecoinvent
isCopyrightProtected: true
accessRestrictedTo: 1

## General comment
The formal plastic recycling sector in India contributes to a comparitively smaller percentage of the overall plastic recycling of the country in comparison with the informal sector. Once the received plastics are segregated, cleaned and sorted, the plastics are ground into smaller flakes. The grinding phase generally comprises of shredders that reduce bulk plastics into smaller flakes. Visited formal recyclers were from different parts of the country based out of Pune, Bangalore, Hyderabad. Electricity is obtained from the grid. Data collection questionnaire was circulated amongst the recyclers and on-site visits were carried out. Information provided was verified and actual readings were taken related to electrical energy consumption the formal sector. The dataset is representation of production of plastic wastes from grinding operations.

## Included activities start
This dataset include activities that occur once the material is sorted and is received for grinding or shredding.

## Included activities end
This dataset includes activities until the received sorted waste plastics is ground or shredded into smaller plastic flakes.

## Geography
The geography included for the formal sector includes the leading formal plastic recyclers spread across the country.

## Technology
The technology that is used in the formal sector is standard and is uniformly adopted by all the formal recyclers. The equipment is maintained and is not of very old technology.

## Time period
The recycling sector has been following this method for several years. There is no anticipated change in the next few years in their method of working. However, with the new e-waste rules in the country, bringing in more focus on sustainable recycling, certain changes are expected to occur over a period of time.

## Reference product
- plastic flake, consumer electronics, for recycling: 1 kg; CPC 39270: Waste, parings and scrap of plastics; By-product classification Recyclable
  plastic flakes produced from the grinding operations.
  production volume 1.5e6 kg
    Annual plastic waste generation in India https://www.epa.gov/sites/production/files/2014-05/documents/india.pdf
  property price 0.6 EUR2005
    Temporary from https://www.alibaba.com/showroom/pet-flakes-price.html
  property carbon content 0.83022
    carbon content on a dry matter basis (reserved; not for manual entry)
  properties: total polycyclic aromatic hydrocarbon content 0.0010858, concentration, chromium 9.1e-7 kg/kg, carbon content, fossil 0.83022, heating value, net 34.78 MJ, dry mass 1 kg, concentration, cadmium 1.05e-7 kg/kg, concentration, zinc 6.517e-5 kg/kg, concentration, nickel 1.225e-6 kg/kg, concentration, copper 6.2e-7 kg/kg, concentration, lead 5.66e-7 kg/kg, wet mass 1 kg, carbon allocation 0.83022 kg

## Inputs from technosphere
- waste plastic, consumer electronics, sorted: 0.947368 kg; lognormal variance with pedigree 0.051225, pedigree (2,5,3,2,2)
  This exchange represents the cleaned and sorted material used by formal and informal plastic recycling sectors in India. These recyclers are engaged into recycling of different plastic types from e-waste/WEEE, mainly Polycarbonate (PC), High Impact Polystyrene (HIPS), Acrylonitrile Butadiene Styrene (ABS), Poly Propylene (PP) etc
  properties: lead content 5.66e-7, cadmium content 1.05e-7, wet mass 1 kg, heating value, net 34.78 MJ, chromium content 9.1e-7, zinc content 1.225e-6, copper content 6.2e-7, polycyclic aromatic hydrocarbon content, total 0.0010858, carbon content, fossil 0.83022, dry mass 1 kg, nickel content 1.225e-6
  note on polycyclic aromatic hydrocarbon content, total: content of total polycyclic aromatic hydrocarbon content on a dry mass basis
- electricity, low voltage: 0.02852 kWh; lognormal variance with pedigree 0.131225, pedigree (2,5,3,2,2)
  Electricity consumed in shredding operations
- chemical, organic: 0.0526316 kg; lognormal variance with pedigree 0.051225, pedigree (2,5,3,2,2)
  It is proxy for Ethylene Propylene Diene (EPDM) Chemical. EPDM is is a copolymer of ethylene, propylene and a small amount of non-conjugated diene monomers (3 - 9 percent) which provide cross-linking sites for vulcanization and is used by formal recyclers. http://polymerdatabase.com/Elastomers/EPDM.html
  properties: dry mass 1 kg, carbon content, fossil 0.628, heating value, net 19.03 MJ, wet mass 1 kg
  note on carbon content, fossil: This dataset is an unweighted average of 20 organic substances (listed in Tab 88.1, ecoinvent v2.2 report 8, part II), being part of the top100 chemicals included in this database. The C-content has also been calculated as an unweighted average of the C content of the substances composing this dataset.

## Sampling procedure
An initial data collection questionnaire was circulated amongst the recyclers. On-site visits were carried out and data was collected from leading recyclers in the formal recycling sector. Information provided was verified and readings were taken for information that is unavailable with the formal sector. The recyclers were engaged into recycling of plastics mainly Polycarbonate (PC), High Impact Polystyrene (HIPS), Acrylonitrile Butadiene Styrene (ABS), Poly Propylene (PP) etc.Data collected from different recyclers was compiled in the excel sheets and analysed. All the data was aggregated to per 1000 kgs of production of plastic flakes.

## Extrapolations
This dataset has been extrapolated from year 2017 to the year of the calculation (2021). The uncertainty has been adjusted accordingly.
