# anaerobic digestion plant construction, for sewage sludge

Dataset: EcoSpold 2, unit process
Geography: RoW
Time period: 2002-01-01 to 2021-12-31
Technology level: current
Classification: EcoSpold01Categories: biomass/fuels
Classification: ISIC rev.4 ecoinvent: 4290:Construction of other civil engineering projects
Tags: ConvertedDataset
Scenario: Business-as-Usual
System model: Allocation, cut-off by classification
Share of production covered: 100 %
Generated by: Michael Spielmann (obsolete)
Published in: Jungbluth N. 2007
Database: ecoinvent
isCopyrightProtected: true
accessRestrictedTo: 1

## General comment
Infrastructure is accounted for with a lifetime of 30 years. For stationary machines a lifetime of 10 years is assumed.
[This dataset was already contained in the ecoinvent database version 2. It was not individually updated during the transfer to ecoinvent version 3. Life Cycle Impact Assessment results may still have changed, as they are affected by changes in the supply chain, i.e. in other datasets. This dataset was generated following the ecoinvent quality guidelines for version 2. It may have been subject to central changes described in the ecoinvent version 3 change report (http://www.ecoinvent.org/database/ecoinvent-version-3/reports-of-changes/), and the results of the central updates were reviewed extensively. The changes added e.g. consistent water flows and other information throughout the database. The documentation of this dataset can be found in the ecoinvent reports of version 2, which are still available via the ecoinvent website. The change report linked above covers all central changes that were made during the conversion process.]

## Included activities end
Infrastructure of the anaerobic sludge treatment in a wastewater treatment plant. Data includes exclusively the infrastructure of the digestion tank and gasholder. Land occupation and land transformation are included, too.

## Geography
Estimate for Swiss plants.

## Technology
Swiss average technology. Data refers to an annual treatment of 50'000 PCE

## Time period
Data is obtained from a recent LCA study.

## Reference product
- anaerobic digestion plant, for sewage sludge: 1 unit; CPC 53290: Other civil engineering works; By-product classification allocatable product
  EcoSpold01Location=CH
  production volume 3.96633 unit
    This is a placeholder value that does not reflect real-world production volumes. This dataset does not currently require a real-world production volume to work in the database framework, and no actual data were collected yet. This has no negative effect on the results of the ecoinvent database.
  property price 804700 EUR2005
    Convert from EU 27 price to the world by currency exchange rate.

## Inputs from technosphere
- cast iron: 504 kg; lognormal variance with pedigree 0.692, pedigree (1,1,5,5,1)
  EcoSpold01Location=RER
  literature studies, uncertainties due to variation in plant size
  properties: wet mass 1 kg, dry mass 1 kg, carbon content, fossil 0.04
  note on carbon content, fossil: Cast iron is made by remelting pig iron in small furnaces (e.g. cupola furnaces or electric arc furnaces) and poured into moulds to make castings. It usually contains 2% to 6% carbon (ecoinvent v2.2 report 10_partII). An average content of 4% was considered
- reinforcing steel: 24300 kg; lognormal variance with pedigree 0.692, pedigree (1,1,5,5,1)
  literature studies, uncertainties due to variation in plant size
  EcoSpold01Location=RER
  properties: dry mass 1 kg, wet mass 1 kg, carbon content, fossil 0.004
- steel, chromium steel 18/8, hot rolled: 1970 kg; lognormal variance with pedigree 0.692, pedigree (1,1,5,5,1)
  literature studies, uncertainties due to variation in plant size
  EcoSpold01Location=RER
  properties: carbon content, fossil 0.0008, wet mass 1 kg, dry mass 1 kg
  note on carbon content, fossil: Stainless steel model is the grade 304 steel (18/8 stainless, 18% chromium 8% nickel; max. 0.08% C)
- waste reinforced concrete: 0 kg; pedigree (1,1,1,1,1)
  literature studies, uncertainties due to variation in plant size
  EcoSpold01Location=CH
  production volume 0 kg
    Calculated from the production volume of anaerobic digestion plant, for sewage sludge in proportion to the respective output amounts.
  properties: water content 0.00585407, dry mass 0.99418 kg, wet mass 1 kg
- concrete, normal: 0 m3; pedigree (1,1,1,1,1)
  literature studies, uncertainties due to variation in plant size
  EcoSpold01Location=CH
  properties: water content 0.086758, wet mass 2380 kg, dry mass 2190 kg
- waste reinforced concrete: -58474, -834526 kg (2 entries); lognormal variance with pedigree 0.692, pedigree (1,1,5,5,1)
  literature studies, uncertainties due to variation in plant size
  EcoSpold01Location=CH
  production volume 2.679e6 kg
- concrete, normal: 9.18254, 0.956808, 7.74604, 4.35715, 18.4513, 0.622351, 364.684 m3 (7 entries); lognormal variance with pedigree 0.692, pedigree (1,1,5,5,1)
  literature studies, uncertainties due to variation in plant size
  EcoSpold01Location=CH

## Inputs from nature
- Occupation, industrial area [natural resource, land]: 75000 m2*year; lognormal variance with pedigree 0.0946, pedigree (2,4,5,5,1)
  Literature studies, uncertainties due to variation in plant size
  Uncertainty: literature studies, uncertainties due to variation in plant size
- Transformation, from pasture, man made [natural resource, land]: 3000 m2; lognormal variance with pedigree 0.1746, pedigree (2,4,5,5,1)
  (same comment as for Occupation, industrial area)
- Transformation, to industrial area [natural resource, land]: 3000 m2; lognormal variance with pedigree 0.1746, pedigree (2,4,5,5,1)
  Literature studies, uncertainties due to variation in size
  Uncertainty: literature studies, uncertainties due to variation in size
- Occupation, construction site [natural resource, land]: 3000 m2*year; lognormal variance with pedigree 0.0946, pedigree (2,4,5,5,1)
  (same comment as for Occupation, industrial area)

## Sampling procedure
Literature data

## Extrapolations
none This dataset has been copied from an original dataset covering the geography CH. The uncertainty has been adjusted accordingly.

## Review by Niels Jungbluth 2005-08-30
Passed.
