# heat production, anthracite, at stove 5-15kW

Dataset: EcoSpold 2, unit process
Geography: RoW
Time period: 1988-01-01 to 2021-12-31
Technology level: current
Classification: ISIC rev.4 ecoinvent: 3530:Steam and air conditioning supply
Classification: EcoSpold01Categories: hard coal/heating systems
Tags: ConvertedDataset
Scenario: Business-as-Usual
System model: Allocation, cut-off by classification
Generated by: Christian Bauer
Published in: Röder, A. 2004
Database: ecoinvent
isCopyrightProtected: true
accessRestrictedTo: 1

## General comment
A module for anthracite has not been defined; therefore to account for the upstream chain, the hard coal supply mix is used. The heating value (32.4 MJ/kg) and the composition of the anthracite are average values available from the literature. The emission data are also taken from literature reporting measurements performed at the end of the 1980s in Germany. Size distribution of particles has been estimated on the basis of recent information from EPA. Emissions of trace elements were calculated using the ash content in the coal and average transfer coefficients for coal power plants with ash retention of 98 %, as first approximation.
[This dataset was already contained in the ecoinvent database version 2. It was not individually updated during the transfer to ecoinvent version 3. Life Cycle Impact Assessment results may still have changed, as they are affected by changes in the supply chain, i.e. in other datasets. This dataset was generated following the ecoinvent quality guidelines for version 2. It may have been subject to central changes described in the ecoinvent version 3 change report (http://www.ecoinvent.org/database/ecoinvent-version-3/reports-of-changes/), and the results of the central updates were reviewed extensively. The changes added e.g. consistent water flows and other information throughout the database. The documentation of this dataset can be found in the ecoinvent reports of version 2, which are still available via the ecoinvent website. The change report linked above covers all central changes that were made during the conversion process.]

## Included activities end
House heating. The module describes the combustion process and includes coal transport and ash disposal.

## Geography
German conditions.

## Technology
Average used in early 1990s.

## Reference product
- heat, central or small-scale, other than natural gas: 1 MJ; CPC 17300: Steam and hot water; By-product classification allocatable product
  EcoSpold01Location=RER
  production volume 6.69406e13 MJ; name heat_apv
    Assumption. This production volume does not represent a realistic value, but reflects the share of heat from coal sources on the market for heat, central or small-scale, other than natural gas.
    See talk pages for further discussion.
    A relation of 1:100 between the geographies RER and RoW was assumed.
    //Original comment //:
    IEA coal and Peat statistics for 2007 (http://www.iea.org/stats/coaldata.asp?COUNTRY_CODE=29), residential, commercial and agriculture. All bituminous coal in kg converted to MJ heat out by multiplying with 0.67 (conversion efficiency on a gross heating value basis) and dividing by 0.0294 (kg/MJ gross heating value).
  property price 0.0106 EUR2005
    Average European district heat price from Ecoheatcool and Euroheat 2005-2006, Ecoheat Work package 1: The European heat market. Final report. 10.6 EUR/GJ i s the price of district heat. http://www.solarthermalworld.org/files/Ecoheatcool%20WP1%20Web.pdf?download
  properties: Corresponding fuel use 1.43 MJ, heating value, net 1 MJ

## Inputs from technosphere
- coal stove, 5-15kW: 8.2797e-7 unit; lognormal variance with pedigree 0.3532, pedigree (2,3,5,5,1)
  EcoSpold01Location=RER
  Infrastructure
  Uncertainty: infrastructure
- hard coal ash: -0.002574 kg; name hard_coal_ash; lognormal variance with pedigree 0.112, pedigree (5,1,5,5,1)
  EcoSpold01Location=PL
  Assumption: no reuse
  Uncertainty: assumption: no reuse
  production volume 1.72305e11 kg; = heat_apv*hard_coal_ash
    Calculated from the production volume of anthracite, burned in stove 5-15kW in proportion to the respective output amounts.
  property price 0 EUR2005; name hard_coal_ash_price_EUR2005
  properties: dry mass 1 kg, wet mass 1 kg
- hard coal: 0 kg; pedigree (1,1,1,1,1)
  Fuel input
  EcoSpold01Location=UCTE
  Uncertainty: fuel input
  properties: water content 0.0638298, carbon content, fossil 0.845, dry mass 0.94 kg, wet mass 1 kg, heating value, net 27.91 MJ
  note on carbon content, fossil: C content 75-94% (specified in Tab 1.1, report 6, part VI). A mean content of 0.845 kg C/ kg dry hard coal was considered
  note on heating value, net: Based on the Characterization factor of Hard coal in the CED method
- hard coal: 0.00348955, 0.0242008, 0.00341953, 0.00568354, 0.00081143, 0.00509812, 0.00148397 kg (7 entries); lognormal variance with pedigree 0.0601, pedigree (4,2,5,5,1)
  Fuel input
  EcoSpold01Location=UCTE
  Uncertainty: fuel input

## Emissions to nature
- Thorium-232 [air, urban air close to ground]: 5.005e-6 kBq; lognormal variance with pedigree 0.728, pedigree (4,5,5,5,1)
  From radioactivity of the elements; see report for details
  Uncertainty: from radioactivity of the elements; see report for details
- Radon-222 [air, urban air close to ground]: 1.43e-6 kBq; lognormal variance with pedigree 0.728, pedigree (4,5,5,5,1)
  (same comment as for Thorium-232)
- Radon-220 [air, urban air close to ground]: 1.43e-6 kBq; lognormal variance with pedigree 0.728, pedigree (4,5,5,5,1)
  (same comment as for Thorium-232)
- Ethane [air, urban air close to ground]: 4.29e-6 kg; lognormal variance with pedigree 0.0932, pedigree (2,3,5,5,1)
  Total NMVOC and profile estimate
  Uncertainty: total NMVOC and profile estimate
- Beryllium [air, urban air close to ground]: 1.8018e-9 kg; lognormal variance with pedigree 0.728, pedigree (4,5,5,5,1)
  From trace element balance; see report for details
  Uncertainty: from trace element balance; see report for details
- Hydrogen sulfide [air, urban air close to ground]: 2.86e-6 kg; lognormal variance with pedigree 0.0932, pedigree (2,3,5,5,1)
  Typical value
  Uncertainty: typical value
- Antimony [air, urban air close to ground]: 2.574e-9 kg; lognormal variance with pedigree 0.728, pedigree (4,5,5,5,1)
  (same comment as for Beryllium)
- Iron [air, urban air close to ground]: 6.3206e-6 kg; lognormal variance with pedigree 0.728, pedigree (4,5,5,5,1)
  (same comment as for Beryllium)
- Chromium VI [air, urban air close to ground]: 1.287e-10 kg; lognormal variance with pedigree 0.522, pedigree (1,1,5,5,1)
  based on range of data
- Particulates, < 2.5 um [air, urban air close to ground]: 7.15e-6 kg; lognormal variance with pedigree 0.378, pedigree (4,5,5,5,1)
  Total PM and profile estimates
  Uncertainty: total PM and profile estimates
- Chromium [air, urban air close to ground]: 1.27413e-8 kg; lognormal variance with pedigree 0.728, pedigree (4,5,5,5,1)
  (same comment as for Beryllium)
- Phenol [air, urban air close to ground]: 7.15e-8 kg; lognormal variance with pedigree 0.0932, pedigree (2,3,5,5,1)
  Total NMVOC and profile estimate
  Uncertainty: total NMVOC and profile estimate
- Toluene [air, urban air close to ground]: 2.86e-7 kg; lognormal variance with pedigree 0.0932, pedigree (2,3,5,5,1)
  Total NMVOC and profile estimate
  Uncertainty: total NMVOC and profile estimate
- Thorium [air, urban air close to ground]: 2.0592e-9 kg; lognormal variance with pedigree 0.728, pedigree (4,5,5,5,1)
  (same comment as for Beryllium)
- Carbon dioxide, fossil [air, urban air close to ground]: 0.1144 kg; lognormal variance with pedigree 0.0427, pedigree (2,2,5,5,1)
  From carbon balance
  Uncertainty: from carbon balance
- Thallium [air, urban air close to ground]: 2.2594e-9 kg; lognormal variance with pedigree 0.728, pedigree (4,5,5,5,1)
  (same comment as for Beryllium)
- Xylene [air, urban air close to ground]: 2.86e-7 kg; lognormal variance with pedigree 0.0932, pedigree (2,3,5,5,1)
  Total NMVOC and profile estimate
  Uncertainty: total NMVOC and profile estimate
- Iodine [air, urban air close to ground]: 1.6302e-8 kg; lognormal variance with pedigree 0.728, pedigree (4,5,5,5,1)
  (same comment as for Beryllium)
- Sulfur dioxide [air, urban air close to ground]: 0.0005005 kg; lognormal variance with pedigree 0.078, pedigree (4,5,5,5,1)
  From S-balance
  Uncertainty: from S-balance
- Hydrogen chloride [air, urban air close to ground]: 1.4586e-5 kg; lognormal variance with pedigree 0.118, pedigree (4,5,5,5,1)
  (same comment as for Beryllium)
- Zinc [air, urban air close to ground]: 2.2594e-7 kg; lognormal variance with pedigree 0.728, pedigree (4,5,5,5,1)
  (same comment as for Beryllium)
- Phosphorus [air, urban air close to ground]: 9.0376e-8 kg; lognormal variance with pedigree 0.728, pedigree (4,5,5,5,1)
  (same comment as for Beryllium)
- Formaldehyde [air, urban air close to ground]: 1.43e-7 kg; lognormal variance with pedigree 0.0932, pedigree (2,3,5,5,1)
  Total NMVOC and profile estimate
  Uncertainty: total NMVOC and profile estimate
- Ethene [air, urban air close to ground]: 8.58e-6 kg; lognormal variance with pedigree 0.0932, pedigree (2,3,5,5,1)
  Total NMVOC and profile estimate
  Uncertainty: total NMVOC and profile estimate
- Potassium-40 [air, urban air close to ground]: 1.9305e-5 kBq; lognormal variance with pedigree 0.728, pedigree (4,5,5,5,1)
  (same comment as for Thorium-232)
- Molybdenum [air, urban air close to ground]: 3.861e-9 kg; lognormal variance with pedigree 0.728, pedigree (4,5,5,5,1)
  (same comment as for Beryllium)
- Vanadium [air, urban air close to ground]: 5.148e-8 kg; lognormal variance with pedigree 0.728, pedigree (4,5,5,5,1)
  (same comment as for Beryllium)
- Polonium-210 [air, urban air close to ground]: 0.00012155 kBq; lognormal variance with pedigree 0.728, pedigree (4,5,5,5,1)
  (same comment as for Thorium-232)
- Dioxins, measured as 2,3,7,8-tetrachlorodibenzo-p-dioxin [air, urban air close to ground]: 1.43e-13 kg; lognormal variance with pedigree 0.3532, pedigree (2,3,5,5,1)
- Carbon monoxide, fossil [air, urban air close to ground]: 0.01144 kg; lognormal variance with pedigree 0.6932, pedigree (2,3,5,5,1)
  Typical value
  Uncertainty: typical value
- Particulates, > 10 um [air, urban air close to ground]: 5.005e-5 kg; lognormal variance with pedigree 0.118, pedigree (4,5,5,5,1)
  Total PM and profile estimates
  Uncertainty: total PM and profile estimates
- Barium [air, urban air close to ground]: 1.287e-7 kg; lognormal variance with pedigree 0.728, pedigree (4,5,5,5,1)
  (same comment as for Beryllium)
- Scandium [air, urban air close to ground]: 1.8018e-9 kg; lognormal variance with pedigree 0.728, pedigree (4,5,5,5,1)
  (same comment as for Beryllium)
- Arsenic [air, urban air close to ground]: 3.6608e-8 kg; lognormal variance with pedigree 0.728, pedigree (4,5,5,5,1)
  (same comment as for Beryllium)
- Calcium [air, urban air close to ground]: 1.8018e-6 kg; lognormal variance with pedigree 0.728, pedigree (4,5,5,5,1)
  (same comment as for Beryllium)
- Bromine [air, urban air close to ground]: 1.35564e-8 kg; lognormal variance with pedigree 0.728, pedigree (4,5,5,5,1)
  (same comment as for Beryllium)
- Dinitrogen monoxide [air, urban air close to ground]: 2.145e-6 kg; lognormal variance with pedigree 0.0932, pedigree (2,3,5,5,1)
  Typical value
  Uncertainty: typical value
- Propane [air, urban air close to ground]: 2.86e-6 kg; lognormal variance with pedigree 0.0932, pedigree (2,3,5,5,1)
  Total NMVOC and profile estimate
  Uncertainty: total NMVOC and profile estimate
- Boron [air, urban air close to ground]: 3.575e-7 kg; lognormal variance with pedigree 0.728, pedigree (4,5,5,5,1)
  (same comment as for Beryllium)
- Lead-210 [air, urban air close to ground]: 6.6495e-5 kBq; lognormal variance with pedigree 0.728, pedigree (4,5,5,5,1)
  (same comment as for Thorium-232)
- Uranium [air, urban air close to ground]: 2.574e-9 kg; lognormal variance with pedigree 0.728, pedigree (4,5,5,5,1)
  (same comment as for Beryllium)
- Copper [air, urban air close to ground]: 2.2165e-8 kg; lognormal variance with pedigree 0.728, pedigree (4,5,5,5,1)
  (same comment as for Beryllium)
- Mercury [air, urban air close to ground]: 2.145e-9 kg; lognormal variance with pedigree 0.728, pedigree (4,5,5,5,1)
  (same comment as for Beryllium)
- Nitrogen oxides [air, urban air close to ground]: 7.15e-5 kg; lognormal variance with pedigree 0.0932, pedigree (2,3,5,5,1)
  Typical value
  Uncertainty: typical value
- Cadmium [air, urban air close to ground]: 2.2594e-9 kg; lognormal variance with pedigree 0.728, pedigree (4,5,5,5,1)
  (same comment as for Beryllium)
- Hydrocarbons, aliphatic, alkanes, unspecified [air, urban air close to ground]: 1.43e-6 kg; lognormal variance with pedigree 0.0932, pedigree (2,3,5,5,1)
  Total NMVOC and profile estimate
  Uncertainty: total NMVOC and profile estimate
- Ethyne [air, urban air close to ground]: 1.43e-6 kg; lognormal variance with pedigree 0.0932, pedigree (2,3,5,5,1)
  Total NMVOC and profile estimate
  Uncertainty: total NMVOC and profile estimate
- Aluminium [air, urban air close to ground]: 1.5301e-5 kg; lognormal variance with pedigree 0.728, pedigree (4,5,5,5,1)
  (same comment as for Beryllium)
- Thorium-228 [air, urban air close to ground]: 7.865e-6 kBq; lognormal variance with pedigree 0.728, pedigree (4,5,5,5,1)
  (same comment as for Thorium-232)
- Lead [air, urban air close to ground]: 1.5444e-7 kg; lognormal variance with pedigree 0.728, pedigree (4,5,5,5,1)
  (same comment as for Beryllium)
- Uranium-238 [air, urban air close to ground]: 1.43e-5 kBq; lognormal variance with pedigree 0.728, pedigree (4,5,5,5,1)
  (same comment as for Thorium-232)
- Benzo(a)pyrene [air, urban air close to ground]: 1.43e-10 kg; lognormal variance with pedigree 0.0932, pedigree (2,3,5,5,1)
  Total NMVOC and profile estimate
  Uncertainty: total NMVOC and profile estimate
- Potassium [air, urban air close to ground]: 1.8018e-6 kg; lognormal variance with pedigree 0.728, pedigree (4,5,5,5,1)
  (same comment as for Beryllium)
- Titanium [air, urban air close to ground]: 5.4197e-7 kg; lognormal variance with pedigree 0.728, pedigree (4,5,5,5,1)
  (same comment as for Beryllium)
- Tin [air, urban air close to ground]: 9.0376e-10 kg; lognormal variance with pedigree 0.728, pedigree (4,5,5,5,1)
  (same comment as for Beryllium)
- Radium-228 [air, urban air close to ground]: 9.295e-5 kBq; lognormal variance with pedigree 0.728, pedigree (4,5,5,5,1)
  (same comment as for Thorium-232)
- Hydrogen fluoride [air, urban air close to ground]: 1.13113e-6 kg; lognormal variance with pedigree 0.118, pedigree (4,5,5,5,1)
  (same comment as for Beryllium)
- Manganese [air, urban air close to ground]: 4.5045e-8 kg; lognormal variance with pedigree 0.728, pedigree (4,5,5,5,1)
  (same comment as for Beryllium)
- Cobalt [air, urban air close to ground]: 6.435e-9 kg; lognormal variance with pedigree 0.728, pedigree (4,5,5,5,1)
  (same comment as for Beryllium)
- Benzene [air, urban air close to ground]: 1.43e-6 kg; lognormal variance with pedigree 0.0932, pedigree (2,3,5,5,1)
  Total NMVOC and profile estimate
  Uncertainty: total NMVOC and profile estimate
- Strontium [air, urban air close to ground]: 1.9305e-7 kg; lognormal variance with pedigree 0.728, pedigree (4,5,5,5,1)
  (same comment as for Beryllium)
- Nickel [air, urban air close to ground]: 4.2471e-8 kg; lognormal variance with pedigree 0.728, pedigree (4,5,5,5,1)
  (same comment as for Beryllium)
- Radium-226 [air, urban air close to ground]: 1.716e-5 kBq; lognormal variance with pedigree 0.728, pedigree (4,5,5,5,1)
  (same comment as for Thorium-232)
- Particulates, > 2.5 um, and < 10um [air, urban air close to ground]: 1.43e-5 kg; lognormal variance with pedigree 0.198, pedigree (4,5,5,5,1)
  Total PM and profile estimates
  Uncertainty: total PM and profile estimates
- Propene [air, urban air close to ground]: 1.43e-6 kg; lognormal variance with pedigree 0.0932, pedigree (2,3,5,5,1)
  Total NMVOC and profile estimate
  Uncertainty: total NMVOC and profile estimate
- Hydrocarbons, aliphatic, unsaturated [air, urban air close to ground]: 1.43e-6 kg; lognormal variance with pedigree 0.0932, pedigree (2,3,5,5,1)
  Total NMVOC and profile estimate
  Uncertainty: total NMVOC and profile estimate
- Methane, fossil [air, urban air close to ground]: 0.0002574 kg; lognormal variance with pedigree 0.0932, pedigree (2,3,5,5,1)
  Typical value
  Uncertainty: typical value
- Silicon [air, urban air close to ground]: 2.2594e-5 kg; lognormal variance with pedigree 0.728, pedigree (4,5,5,5,1)
  (same comment as for Beryllium)
- NMVOC, non-methane volatile organic compounds, unspecified origin [air, urban air close to ground]: 4.9335e-6 kg; lognormal variance with pedigree 0.0932, pedigree (2,3,5,5,1)
  Total NMVOC and profile estimate
  Uncertainty: total NMVOC and profile estimate
- Sodium [air, urban air close to ground]: 9.0376e-7 kg; lognormal variance with pedigree 0.728, pedigree (4,5,5,5,1)
  (same comment as for Beryllium)
- Selenium [air, urban air close to ground]: 8.3941e-9 kg; lognormal variance with pedigree 0.728, pedigree (4,5,5,5,1)
  (same comment as for Beryllium)
- Magnesium [air, urban air close to ground]: 5.4197e-6 kg; lognormal variance with pedigree 0.728, pedigree (4,5,5,5,1)
  (same comment as for Beryllium)

## Sampling procedure
literature

## Extrapolations
see Geography/Text This dataset has been copied from an original dataset covering the geography RER. The uncertainty has been adjusted accordingly.

## Review by Hans-Jörg Althaus 2005-07-19
passed
