# concrete production, 20MPa, ready-mix, with cement, pozzolana and fly ash 36-55%

Dataset: EcoSpold 2, unit process
Geography: RoW
Time period: 2014-01-01 to 2021-12-31
Technology level: current
Classification: EcoSpold01Categories: construction materials/concrete
Classification: ISIC rev.4 ecoinvent: 2395:Manufacture of articles of concrete, cement and plaster
Synonyms: ready-mix concrete; concreto premezclado; ready mixed concrete
Scenario: Business-as-Usual
System model: Allocation, cut-off by classification
Generated by: [System]
Published in: Gmünder S. 2017
Database: ecoinvent
isCopyrightProtected: false
accessRestrictedTo: 1

## General comment
This dataset represents the production of 20MPa ready-mix concrete in Peru. Density: 2'358 kg/m³ - w/c: 0.65. Ingredients (for 1 m³): cement type ICo 300 kg, Water 195 kg, Gravel 1116 kg, Sand 744kg, Admixtures (retarder 0.3%cem and superplastisizers 0.7%cem) in total 3kg/m3.
This dataset is a copy of the corresponding PE dataset.

## Included activities start
From reception of raw materials at the ready-mix plant gate.

## Included activities end
This activity ends before the delivery of concrete at the construction site.
The dataset includes the whole manufacturing processes to produce ready-mixed concrete, internal processes (material handling and mixing) and infrastructure.
The dataset does not include:
- the transport of concrete in a mixing truck.

## Geography
Representative production of ready-mix concrete 20 MPa with cement type IP in Peru. Data based from main cement producers and personal comunications with local experts.
The uncertainy has been adjusted accordingly.

## Technology
Represent the current technology for ready-mix concrete production in Peru.

## Time period
The production volume of 2016 is considered. The data from sustainability reports goes from 2014 to 2016. Data have been reported with the production volume of corresponding year.

## Parameters
- total aggregates: 1860 kg/m3; name aggregates_tot; lognormal variance with pedigree 0.0046, pedigree (3,4,1,1,1)
  Estimated value. The mix design contains 1860 kg /m3 of aggregates (Pimentel, 2017).
- water withdrawal, per cubic meter of concrete: 255 kg/m3; name water_withdrawal; lognormal variance with pedigree 0.0046, pedigree (3,4,1,1,1)
  Calculated value. The water cement ratio (w/c) is 0.65. In addition, 60kg is assumed for other water uses such as washing, dust treatment, irrigation, etc.
- losses: 0.03 dimensionless; lognormal variance with pedigree 0.018, pedigree (4,5,1,5,1)
  Estimated value. Losses due to returned concrete from construction sites.
- water to cement ratio: 0.65 dimensionless; name w_c_ratio; lognormal variance with pedigree 0.0046, pedigree (3,4,1,1,1)

## Reference product
- concrete, 20MPa: 1 m3; name concrete; CPC 37510: Non-refractory mortars and concretes; By-product classification allocatable product
  reference flow
  production volume 72596.3 m3; name concrete_PV
    The global production volume was calculated as follows:
    1) The total production volume of each country was calculated
    2) The production volume was scaled based construction output (*)
    3) The average of the results was assumed to be the GLO PV
    4) The share of each different technology per country was calculated
    5) The weighted average of the shares for each country was used to split the GLO PV into different technologies
    (*)
    Construction output assumed per country
    Country Share
    ZA 0.50%
    BR 2.01%
    CH 0.36%
    CO 0.58%
    IN 9.67%
    PE 0.31%
    CA-QC 0.37%
    RNA without CA-QC 9.03%
    Source:
    OECD. 2018. Input-Output Tables. http://www.oecd.org/trade/input-outputtables.htm.
    United Nations Statistics Division. 2019. UN data. A world of information. http://data.un.org/.
    Timmer, M.P., E. Dietzenbacher, B. Los, R. Stehrer, and G.J. de Vries. 2015. An Illustrated User Guide to the World Input-Output Database: the Case of Global Automotive Production. Review of International Economics 23(3): 575-605. http://doi.wiley.com/10.1111/roie.12178.
    The data was adjusted based on PPP, data from:
    The World Bank. 2019. World Bank Open Data. https://data.worldbank.org/
  property price 185 EUR2005; name concrete_price_EUR2005
    Estimated to be the same price as in case of concrete, normal (Data are not easily available. Therefore, an average price of products supplied by the activities in the same ISIC 3 code has been applied.This price is obtained as '_49 Concrete, asphalt and other mineral products, EU27 virgin, EU27' in the 'EU & DK Input Output Database' (available in SimaPro). The price is assumed to be valid for both RER2003, RER 2004, world 2003 and world 2004. Multiplied by density.).
  property water in wet mass 195 kg; name water_in_wet_mass
  property dry mass 2163.09 kg; name dry_mass; = (cement+additives)/(1+losses)+ aggregates_tot
  property wet mass 2358.09 kg; name wet_mass; = dry_mass+ (w_c_ratio*cement)/(1+losses)
  property carbon content 0
    carbon content on a dry matter basis (reserved; not for manual entry)
  properties: sand content 766.32 kg, gravel content 1116 kg, cement content 309 kg, water content 0.090145, carbon content, fossil 0, carbon allocation 0 kg

## Inputs from technosphere
- wastewater from concrete production: -0.02472 m3; name Water_to_water; lognormal variance with pedigree 0.0226, pedigree (2,5,3,5,1)
  Calculated value. The water balance is established taking into account the total water input (withdrawal) minus the outputs, which include the water contained in the concrete, the water evaporated and the water infiltrated. In general, no waste water is produced. The water incorporated in the concrete correspond to the cement amount multiplied by w/c ratio. The share of the water evaporated to air and the water infiltrated is calculated based on the sustainability reports from Argos (60% evaporated).
  EcoSpold01Location=CH
  production volume 1794.58 m3; name waste_water; = concrete_PV*water_to_water/concrete
    This dataset is a copy of the corresponding PE dataset.
  property dry mass 0.449139 kg; name Water_to_water_DM
  property price 0 EUR2005; name Water_to_water_price_EUR2005
  property water in wet mass 999.551 kg; name Water_to_water_WWM
  property water content 2225.48; name Water_to_water_water_content
  properties: wet mass 1000 kg, carbon content, fossil 0.027074
  note on carbon content, fossil: TOC =0.01216 kg/m3 (Tab A.20, ecoinvent v2.2 report 13_I). TOC was considered as Total Carbon.
- lubricating oil: 0.0499 kg; name lub_oil; source Kellenberger D. 2007; lognormal variance with pedigree 0.3086, pedigree (2,5,3,5,1)
  Calculated value. Weighted average amount from 34 concrete plants in Brazil is used (Silva 2018).
  Silva, F. B., Oliveira, L. A., Passuello, A. C. B., Moraga, G. L., Silva, V. G., Silva, M. G., Saade, M. R. M., Gmünder, S., Myers, N. , Life Cycle Inventories of cement and concrete production in Latin America, 3 - SeparatePublication
  EcoSpold01Location=RER
  Uncertainty: Variance of logtransformed data calculated based on the sample's coefficient of variation.
  properties: heating value, net 40.2 MJ, carbon content, fossil 0.75, wet mass 1 kg, dry mass 1 kg
  note on heating value, net: Literature value, Source: IPCC 2006, 2006 IPCC Guidelines for National Greenhouse Gas Inventories, Prepared by the National Greenhouse Gas Inventories Programme, Eggleston H.S., Buendia L., Miwa K., Ngara T. and Tanabe K. (eds). Published: IGES, Japan
  note on carbon content, fossil: Lubricating oil is produced from diesel. C-content/dry mass of fats and oils considered 75%, from: ecoinvent v2.2 report, n 15a, pg 40
- chemical, organic: 3.1827 kg; name additives; lognormal variance with pedigree 0.0206, pedigree (4,5,3,5,1)
  Calculated value. Local experts estimate as an average that aditives concentrations are: 1%cem additives are added to the recipe as :0.3%cem retarder and 0.7%cem superplasticizer (Ing. Guerra, 2017)
  properties: carbon content, fossil 0.628, dry mass 1 kg, wet mass 1 kg, heating value, net 19.03 MJ
  note on carbon content, fossil: This dataset is an unweighted average of 20 organic substances (listed in Tab 88.1, ecoinvent v2.2 report 8, part II), being part of the top100 chemicals included in this database. The C-content has also been calculated as an unweighted average of the C content of the substances composing this dataset.
- waste mineral oil: 0 kg; pedigree (1,1,1,1,1)
  Calculated value.
  production volume 0 kg
    Calculated from production volume of reference product using the relative outputs.
  properties: wet mass 1 kg, water content 0.111111, carbon content, fossil 0.864444, dry mass 0.9 kg, heating value, net 34.7 MJ
  note on carbon content, fossil: Tab A.6, ecoinvent v2.2 report 13_I. C content has been calculated after data in the tables, and then referred to 1 kg DM
  note on heating value, net: Value taken from the general comment of the treatment dataset.
- electricity, medium voltage: 0 kWh; pedigree (1,1,1,1,1)
  EcoSpold01Location=CH
  Calculated value. The sustainability reports of the cement manufacturers reports the electricity demand for concrete (Cementos Argos S.A, 2017; Cemex, 2017; Holcim, 2015). The data is exprapolated from Colombia.
  Argos 2.38E+00 Colombia value, sustainability report 2016.
  Holcim 3.25E+00 Colombia value, sustainability report 2015.
  Cemex 3.70E+00 Colombia value, sustainability report 2015.
  Values in kWh/m3
  The value presented is calculated considering a weighted average with production volumes.
  Cementos Argos S.A. (2017). Energy and Co-Processing, 1-8.
  Cemex. (2015). Sustainability Report 2015.
  Holcim. (2015). Informe de Desarrollo Sostenible 2015.
  Uncertainty: There is an important variability of energy consumption between plants
- gravel, crushed: 0 kg; name gravel; pedigree (1,1,1,1,1)
  Estimated value. The mix design contains 1860 kg /m3 of aggregates. The aggregates are composed by a mix of 40% of sand and 60% of gravels (Ing. Pimentel, 2017).
  Uncertainty: Calculated variable. Uncertainty will be determined from propagation of uncertainty factors of underlying variables.
  properties: dry mass 1 kg, wet mass 1 kg
- tap water: 0 kg; pedigree (1,1,1,1,1)
  Calculated value.
  EcoSpold01Location=CH
  Uncertainty: Calculated variable. Uncertainty will be determined from propagation of uncertainty factors of underlying variables.
  properties: wet mass 1 kg, water content 2962.17, dry mass 0.000337476 kg, carbon content, fossil 0.00178991
  note on carbon content, fossil: Bicarbonate content is 2.93 mol/m3. CO2 content is 0.1 mol/m3 (ecoinvent v2.2 report 8, Tab 93.1).
- steel, low-alloyed, hot rolled: 0.0238 kg; name steel; source Kellenberger D. 2007; lognormal variance with pedigree 0.0146, pedigree (2,1,3,5,1)
  Literature value. From ecoinvent dataset "concrete production, normal" (Accessed October 15th 2017)
  EcoSpold01Location=RER
  properties: wet mass 1 kg, carbon content, fossil 0.005, dry mass 1 kg
  note on carbon content, fossil: Low alloyed steel composition given in Tab. 3.2 ecoinvent v2.2 report 10_partII. Steel assumed to have a C content of 0.5%
- cement, pozzolana and fly ash 36-55%: 0 kg; name cement; pedigree (1,1,1,1,1)
  Estimated value. SUPERMIX value as the most produced concrete for 20MPa (Ing. Guerra, 2017)
  Uncertainty: Calculated variable. Uncertainty will be determined from propagation of uncertainty factors of underlying variables.
  properties: wet mass 1 kg, dry mass 1 kg
- waste rubber, unspecified: 0 kg; pedigree (1,1,1,1,1)
  Calculated value.
  production volume 0 kg
    Calculated from production volume of reference product using the relative outputs.
  properties: dry mass 1 kg, heating value, net 27.19 MJ, carbon content, fossil 0.853, wet mass 1 kg
- waste concrete: 0 kg; name waste_concrete; pedigree (1,1,1,1,1)
  Calculated value.
  production volume 0 kg
    Calculated from production volume of reference product using the relative outputs.
  property price 0 EUR2005; name waste_concrete_price_EUR2005
  properties: wet mass 1 kg, dry mass 0.5 kg, water content 1
- synthetic rubber: 0.0345 kg; name rub; source Kellenberger D. 2007; lognormal variance with pedigree 0.7326, pedigree (2,5,3,5,1)
  EcoSpold01Location=RER
  Calculated value. Weighted average amount from 34 concrete plants in Brazil is used (Silva 2018).
  Silva, F. B., Oliveira, L. A., Passuello, A. C. B., Moraga, G. L., Silva, V. G., Silva, M. G., Saade, M. R. M., Gmünder, S., Myers, N. , Life Cycle Inventories of cement and concrete production in Latin America, 3 - SeparatePublication
  Uncertainty: Variance of logtransformed data calculated based on the sample's coefficient of variation.
  properties: carbon content, fossil 0.871949, wet mass 1 kg, dry mass 1 kg, heating value, net 26.42 MJ
  note on carbon content, fossil: EPDM (Ethylene-propene-diene terpolymer) rubber is a terpolymer of ethylene, propene, and a diene with the residual unsaturated portion of the diene in the side chain (ecoinvent v2.2 report 7-part XX & Ullmann). Chemical formula (deduced from Evidences of Solvent-Induced Miscibility in Polychloroprene-co-Ethylene-Propene Diene Terpolymer Blends, Dubey et al., Journal of Applied Polymer Science, 2009, 111:1884–1891): C20H35
- concrete mixing factory: 4.57e-7 unit; source Kellenberger D. 2007; lognormal variance with pedigree 0.3326, pedigree (2,5,3,5,1)
  EcoSpold01Location=CH
  Approximation. The average value of concrete production, 35 MPa (GLO) are used.
- scrap steel: 0 kg; pedigree (1,1,1,1,1)
  Calculated value.
  production volume 0 kg
    Calculated from production volume of reference product using the relative outputs.
  properties: dry mass 1 kg, wet mass 1 kg
- sand: 0 kg; source Manuel Lascarro 2017; pedigree (1,1,1,1,1)
  (same comment as for gravel, crushed)
  properties: dry mass 1 kg, wet mass 1 kg
- waste mineral oil: -0.00120548, -0.0486945 kg (2 entries); lognormal variance with pedigree 0.0226, pedigree (2,5,3,5,1)
  Calculated value.
  production volume 3622.55 kg
- electricity, medium voltage: 0.00261124, 0.0185373, 0.0313131, 0.00125515, 0.00994176, 0.00972615, 0.00153971, 0.00255213, 9.81745e-5, 0.00211979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 kWh (30 entries); lognormal variance with pedigree 0.0226, pedigree (2,5,3,5,1)
  (same comment as for electricity, medium voltage)
- gravel, crushed: 202.531, 18.5417, 1.22417, 927.183 kg (4 entries); lognormal variance with pedigree 0.0206, pedigree (4,5,3,5,1)
  (same comment as for gravel, crushed)
- tap water: 2.45518, 0.295538, 0.488425, 12.3162, 0.911377, 105.243, 140.94 kg (7 entries); lognormal variance with pedigree 0.0286, pedigree (4,5,3,5,3)
  (same comment as for tap water)
- cement, pozzolana and fly ash 36-55%: 0.408571, 308.591 kg (2 entries); lognormal variance with pedigree 0.0126, pedigree (4,3,3,5,1)
  (same comment as for cement, pozzolana and fly ash 36-55%)
- waste rubber, unspecified: -0.00138995, -0.03311 kg (2 entries); lognormal variance with pedigree 0.0226, pedigree (2,5,3,5,1)
  Calculated value.
  production volume 2504.57 kg
- waste concrete: -0.249247, -70.4962 kg (2 entries); lognormal variance with pedigree 0.0226, pedigree (2,5,3,5,1)
  Calculated value.
  production volume 5.13586e6 kg
- scrap steel: -3.01156e-5, -0.0237699 kg (2 entries); lognormal variance with pedigree 0.0226, pedigree (2,5,3,5,1)
  Calculated value.
  production volume 1727.79 kg
- sand: 753.388, 9.02049, 3.91124 kg (3 entries); source Manuel Lascarro 2017; lognormal variance with pedigree 0.0206, pedigree (4,5,3,5,1)
  (same comment as for gravel, crushed)

## Emissions to nature
- Water [air, unspecified]: 0.03708 m3; name Water_to_air; lognormal variance with pedigree 0.0132, pedigree (2,5,3,5,1)
  Calculated value. The water balance is established taking into account the total water input (withdrawal) minus the outputs, which include the water contained in the concrete, the water evaporated and the water infiltrated. In general, no waste water is produced. The water incorporated in the concrete correspond to the cement amount multiplied by w/c ratio. The share of the water evaporated to air and the water infiltrated is calculated based on the sustainability reports from Argos (60% evaporated).
  Uncertainty: Calculated variable. Uncertainty will be determined from propagation of uncertainty factors of underlying variables.

## Sampling procedure
Production data provides mostly from personal comunication with local experts and sustainability reports and general information of 2 principle cement and concrete producers of Peru (Paquasmayo and UNACEM). Data has been checked, completed and confirmed by personal communication with local experts.

Unit flows were calculated by dividing the amounts of inputs and outputs by the total concrete production in mass.

## Extrapolations
The main values are considered representative for a typical production of ready mix concrete for building construction in Peru.

The infrastrucutre is included and the main emissions to water and some inputs are taken from the global dataset for ready-mix concrete production.

Extrapolated from the corresponding PE dataset.

The auxiliary material (rubber, lube oil) are based on a sampling of 34 concrete plants in Brazil.
