# glass fibre reinforced plastic production, polyester resin, hand lay-up

Dataset: EcoSpold 2, unit process
Geography: RoW
Time period: 2000-01-01 to 2021-12-31
Technology level: current
Classification: ISIC rev.4 ecoinvent: 2220:Manufacture of plastics products
Classification: EcoSpold01Categories: plastics/others
Synonyms: GFK; GRP
Tags: ConvertedDataset
Scenario: Business-as-Usual
System model: Allocation, cut-off by classification
Share of production covered: 0 %
Generated by: Niels Jungbluth
Published in: Kellenberger D. 2007
Database: ecoinvent
isCopyrightProtected: true
accessRestrictedTo: 1

## General comment
Based on assumptions for material uses. No data for direct energy use.
[This dataset was already contained in the ecoinvent database version 2. It was not individually updated during the transfer to ecoinvent version 3. Life Cycle Impact Assessment results may still have changed, as they are affected by changes in the supply chain, i.e. in other datasets. This dataset was generated following the ecoinvent quality guidelines for version 2. It may have been subject to central changes described in the ecoinvent version 3 change report (http://www.ecoinvent.org/database/ecoinvent-version-3/reports-of-changes/), and the results of the central updates were reviewed extensively. The changes added e.g. consistent water flows and other information throughout the database. The documentation of this dataset can be found in the ecoinvent reports of version 2, which are still available via the ecoinvent website. The change report linked above covers all central changes that were made during the conversion process.]

## Included activities end
Gate to gate inventory for the hand lay-up moulding of glass fibre with polyester resin.

## Geography
Information from one manufacturer.

## Technology
Hand lay-up moulding of glass fibre.

## Time period
Time of publication

## Reference product
- glass fibre reinforced plastic, polyester resin, hand lay-up: 1 kg; By-product classification allocatable product; CPC 36990: Articles of plastics n.e.c.
  EcoSpold01Location=RER
  production volume 2.67763 kg
    This is a placeholder value that does not reflect real-world production volumes. This dataset does not currently require a real-world production volume to work in the database framework, and no actual data were collected yet. This has no negative effect on the results of the ecoinvent database.
  property price 2.1 EUR2005
    Calculated after Alibaba. Source: http://www.alibaba.com/product-detail/Glass-fiber-reinforced-plastic-sheet-Fiberglass_60408629556.html?spm=a2700.7724838.30.28.uclAAV
  property carbon content, fossil 0.246639
    C content was calculated as an addition of C content in the product components (60% glass fibre, 40% polyester resin)
  property carbon content 0.246639
    carbon content on a dry matter basis (reserved; not for manual entry)
  properties: carbon content, non-fossil 0, water content 0, water in wet mass 0 kg, dry mass 1 kg, wet mass 1 kg, carbon allocation 0.246639 kg

## Inputs from technosphere
- chemical, organic: 0.025 kg; lognormal variance with pedigree 0.052, pedigree (4,4,5,5,1)
  EcoSpold01Location=GLO
  Estimation for extender, additives and peroxides
  Uncertainty: Estimation for extender, additives and peroxides
  properties: dry mass 1 kg, wet mass 1 kg, heating value, net 19.03 MJ, carbon content, fossil 0.628
  note on carbon content, fossil: This dataset is an unweighted average of 20 organic substances (listed in Tab 88.1, ecoinvent v2.2 report 8, part II), being part of the top100 chemicals included in this database. The C-content has also been calculated as an unweighted average of the C content of the substances composing this dataset.
- polyester resin, unsaturated: 0.421 kg; lognormal variance with pedigree 0.052, pedigree (4,4,5,5,1)
  Resin, 95% use efficiency
  EcoSpold01Location=RER
  Uncertainty: Resin, 95% use efficiency
  properties: carbon content, fossil 0.58584, wet mass 1 kg, dry mass 1 kg, heating value, net 17.75 MJ
  note on carbon content, fossil: (C8H6O2, C8H16O4, C5H12O2,C4H2O3)n was used as a representative formula for unsaturated polyester resin. This formula corresponds to the M390B Unsaturated Polyester Resin (National Industrial Chemicals Notification and Assessment Scheme, full public report, 1994).
- waste mineral wool, for final disposal: -0.0526 kg; lognormal variance with pedigree 0.052, pedigree (4,4,5,5,1)
  EcoSpold01Location=CH
  Estimation for losses
  Uncertainty: Estimation for losses
  production volume 0.1578 kg
    Calculated from the production volume of glass fibre reinforced plastic, polyester resin, hand lay-up in proportion to the respective output amounts.
  properties: wet mass 1 kg, dry mass 1 kg
- glass fibre: 0.632 kg; lognormal variance with pedigree 0.052, pedigree (4,4,5,5,1)
  EcoSpold01Location=RER
  Basic product, 95% use efficiency
  Uncertainty: Basic product, 95% use efficiency
  properties: dry mass 1 kg, wet mass 1 kg

## Emissions to nature
- Hydrocarbons, aromatic [air, urban air close to ground]: 6.25e-5 kg; lognormal variance with pedigree 0.182, pedigree (4,4,5,5,1)
  0.25% emission of styrene
  Uncertainty: 0.25% emission of styrene

## Sampling procedure
Personal communication

## Extrapolations
To European average. This dataset has been copied from an original dataset covering the geography RER. The uncertainty has been adjusted accordingly.

## Review by Hans-Jörg Althaus 2003-06-10
passed
