# wafer production, fabricated, for integrated circuit

Dataset: EcoSpold 2, unit process
Geography: GLO
Time period: 2000-01-01 to 2021-12-31
Technology level: current
Classification: ISIC rev.4 ecoinvent: 2610:Manufacture of electronic components and boards
Classification: EcoSpold01Categories: electronics/component
Synonyms: Semiconductor substrate; Semiconductor wafer; Semiconductor crystal slice
Tags: ConvertedDataset
Scenario: Business-as-Usual
System model: Allocation, cut-off by classification
Generated by: Martin Lehmann
Published in: Hischier R. 2007
Database: ecoinvent
isCopyrightProtected: true
accessRestrictedTo: 1

## General comment
This dataset represents the production of 1 m2 of an electronic-grade silicon wafer used for integrated circuit or chip fabrication.The original input data for chemicals and elemental gases represents measures in grams per cm2 of input wafer. The information stems partly from an anonymous firm describing material input/output for a mid-sized, state-of-the art integrated circuit fabrication facility in Western Europe in 2000. The infrastructure is calculated for a company producing 40'000 200-mm wafers per month, each weighing 168 kg. The life-span of the facility is assumed to be 25 years, a photovoltaic cell factory is taken as proxy.

## Included activities start
From reception of process chemicals, process gases and silicon wafer at the factory gate. Describes the inputs of elemental gases like helium nitrogen or argon; deposition or dopant gases like silane, phosphine or arsine; etchants like ammonia, nitrous oxide, chlorine, hydrogen chloride or hydrofluoric acid; acids like nitric acid or sulfuric acid; photolithographic chemicals like acetone.

## Included activities end
Further inventoried are electricity input for the whole wafer fabrication process (layering, patterning, doping, heat treatment), consumption of direct fossil fuels (natural gas), water consumption for the purification processes and the cooling, emissions to air (e.g. VOCs, PFC, HAPs, etc.), water and infrastructure.

## Geography
The input data is based on a chip factory in Western Europe representing global average. Emissions, water and energy inputs are retrieved from three different wafer fabrication sites in the USA and one company in Central Europe.

## Technology
Wafer fabrication operation may take several steps, there are two major activities:
-FEOL (Front End Of the Line)
-BEOL (Back End Of the Line)
In FEOL transistors and other devices are formed in the wafer surface. Companies use four basic operations in a large number of sequences and variations to produce specific microchips.
- Layering: used to add thin layers to the wafer surface. These layers could be insulators, semiconductors, or conductors. They are of different materials (e.g. silicon dioxide or polycrystalline silicon) and grown or deposited by a variety of processes (e.g. thermal oxidation, chemical vapor deposition).
- Patterning: steps that results in the removal of selected portions of the added surface layers, various physical parts of the transistors, diodes, capacitors or resistors are formed in and on the wafer surface, one layer at the time. The goal is to create the desired shapes in the exact dimensions required by the circuit design, and to locate them in their proper location on the wafer surface and in relation to the other parts. It is the most critical of the four basic operations.
-Doping: puts specific amounts of electrically active dopants in the wafer surface through openings in the surface layers. It can be done by: thermal diffusion (wafer heated at about 1000 °C and exposed to vapors of the proper dopant), ion implantation (wafers loaded in one end of an implanter and dopant sources in the other)
-Heat treatments: wafer is heated and cooled to achieve specific results
In BEOL, devices are wired together with metallization processes, and the circuit is protected with a final sealing layer. Alloying, is performed after metal patterning to ensure good electrical contact between the metal and the wafer surface, wafer sort of every chip to identify those that meet customer specifications.

## Parameters
- fraction, process water, to air: 0.061 dimensionless; name fraction_PW_to_air; lognormal variance with pedigree 0.092025, pedigree (4,4,3,2,4)
  Literature value (Statistics Canada, 2007 & Shaffer, K.H., 2008, Consumptive water use in the Great Lakes Basin, USGS) (Vionnet, S., Quantis Water Database - Technical Report, 2012).
- fraction, water, ultrapure, to air: 0.061 dimensionless; name fraction_WUP_to_air; = fraction_PW_to_air; lognormal variance with pedigree 0.092025, pedigree (4,4,3,2,4)
  Calculated value. See comment in the other parametres present in this dataset. Ultrapure water is considered to be always used as process water, thus process water fractions to air are applied to all ultrapure water input flows to calculate the amount of water consumed in the processes.
- fraction, tap water, to air: 0.061 dimensionless; name fraction_TW_to_air; = fraction_PW_to_air; lognormal variance with pedigree 0.092025, pedigree (4,4,3,2,4)
  Calculated value. See comment in the other parametres present in this dataset. Tap water is considered to be always used as process water, thus process water fractions to air are applied to all tap water input flows to calculate the amount of water consumed in the processes.

## Reference product
- wafer, fabricated, for integrated circuit: 1 m2; By-product classification allocatable product; CPC 47173: Parts for the goods of subclasses 47140 to 47160
  The wafer fabrication is the processes required to prepare and process a high-grade silicon wafer to become an integrated circuit or microchip. Elemental gases, organic and inorganic chemicals, as well as a remarkable amount of high-purity water and energy are being consumed during wafer fabrication. Apart from that, high amounts of air emissions (e.g. VOCs), solid waste and waste water are produced during the different process steps.
  EcoSpold01Location=GLO
  production volume 4.03369e6 m2; name APV_Wafer; = 0.031415*12*10700000
    0.031415 m2 per wafer * 12 months/year * 10700000 wafers per month (SEMI data for 2009 installed capacity; SEMI World Fab Forecast February 2012; Figure 2 at http://www.semi.org/en/node/40871)http://www.semi.org/en/node/40871
  property price 49807 EUR2005
    Calculated based on inputs: The price of the product has been calculated as a sum of the values of the material and energy inputs for this product. This value is therefore a rough estimation. It may underestimate the real price since there are additional expenses when producing any product. These expences can include for example labour costs, treatment of waste materials and profit for the producer. Please consider carefully whether this level of data quality is acceptable for your application.
  property carbon content 0
    carbon content on a dry matter basis (reserved; not for manual entry)
  properties: wet mass 0.7 kg, carbon content, fossil 0, dry mass 0.7 kg, carbon content, non-fossil 0, water in wet mass 0 kg, water content 0, carbon allocation 0 kg

## Inputs from technosphere
- phosphane: 0.00030909 kg; source Williams E. D. 2002; lognormal variance with pedigree 0.0527, pedigree (2,4,5,3,1)
  EcoSpold01Location=GLO
  Estimation, based on literature. A process yield of 55% is assumed.
  properties: wet mass 1 kg, dry mass 1 kg
- ammonium carbonate: 0 kg; source Williams E. D. 2002; pedigree (1,1,1,1,1)
  Estimation, based on literature. A process yield of 55% is assumed.
  EcoSpold01Location=RER
  properties: heating value, net 13.88 MJ, dry mass 1 kg, wet mass 1 kg, carbon content, fossil 0.125
- nitrogen, liquid: 0 kg; source ams - austriamicrosystems AG 2005; pedigree (1,1,1,1,1)
  Literature Value.
  EcoSpold01Location=RER
  properties: dry mass 1 kg, wet mass 1 kg
- tap water: 84702 kg; name tap_water_input; source ams - austriamicrosystems AG 2005; lognormal variance with pedigree 0.0513, pedigree (2,3,5,3,1)
  EcoSpold01Location=RER
  Literature Value.
  properties: dry mass 0.000337476 kg, water content 2962.17, wet mass 1 kg, carbon content, fossil 0.00178991
  note on carbon content, fossil: Bicarbonate content is 2.93 mol/m3. CO2 content is 0.1 mol/m3 (ecoinvent v2.2 report 8, Tab 93.1).
- sulfuric acid: 0 kg; source Williams E. D. 2002; pedigree (1,1,1,1,1)
  EcoSpold01Location=RER
  Estimation, based on literature. A process yield of 55% is assumed.
  properties: dry mass 1 kg, wet mass 1 kg
- heat, district or industrial, natural gas: 58959 MJ; source ams - austriamicrosystems AG 2005; lognormal variance with pedigree 0.0527, pedigree (3,3,5,3,1)
  EcoSpold01Location=RER
  Literature Value.
  properties: heating value, net 1 MJ
- chlorine, liquid: 0 kg; source Williams E. D. 2002; pedigree (1,1,1,1,1)
  EcoSpold01Location=RER
  Estimation, based on literature. A process yield of 55% is assumed.
  properties: dry mass 1 kg, wet mass 1 kg
- waste, from silicon wafer production, inorganic: -9.18 kg; name waste; source Williams E. D. 2002; lognormal variance with pedigree 0.0541, pedigree (3,4,5,3,1)
  EcoSpold01Location=CH
  Calculated Value, based on literature. A 55% process yeld was assumed. It is based on a amount of 0.505 kg of solid waste per cm2 of wafer input
  Calculation: (0.23+0.78)/2*10’000*(1/0.55)
  Source: UNU/IAS (Eric Williams) 2000/United Nations University/Institute of Advanced Studies, 2000: p.74 one 150 mm wafer creates 40.5 kg of waste (40.5 kg/ 176.1 cm2) = 0.23 kg/ cm2 and p.75 UNIDO/UNEP 4 kg/in2 = 0.78 kg/cm2 (older data based on 100 mm wafers) Average of 0.23+0.78=0.505 kg taken.
  production volume 3.70292e7 kg; = APV_Wafer*waste
    Calculated from the production volume of wafer, fabricated, for integrated circuit in proportion to the respective output amounts.
  property price 0 EUR2005; name waste_price_EUR2005
  properties: dry mass 0.906 kg, water content 0.103753, wet mass 1 kg, carbon content, fossil 0.0347572
- single-Si wafer, for electronics: 1.8182 m2; source ST Microelectronics 2004; lognormal variance with pedigree 0.0527, pedigree (2,4,5,3,1)
  EcoSpold01Location=RER
  Estimation, based on literature. A process yield of 55% is assumed.This input is linked to the whole product chain from raw material extraction to the electronic-grade silicon wafer.
  properties: dry mass 0.629 kg, wet mass 0.629 kg
- photovoltaic cell factory: 1.459e-6 unit; lognormal variance with pedigree 0.3707, pedigree (2,4,5,3,3)
  Proxy with a calculated Value. The infrastructure for a photovoltaic cell factory was used. For the calculation a life-time of 25 years was assumed with a monthly production volume of 40’000 200 mm-wafers and a 55%process yeld.
  EcoSpold01Location=DE
- helium: 3.0909 kg; source Williams E. D. 2002; lognormal variance with pedigree 0.0527, pedigree (2,4,5,3,1)
  Estimation, based on literature. A process yield of 55% is assumed.
  EcoSpold01Location=GLO
  properties: wet mass 1 kg, dry mass 1 kg
- sodium hydroxide, without water, in 50% solution state: 150.02 kg; source Williams E. D. 2002; lognormal variance with pedigree 0.0527, pedigree (2,4,5,3,1)
  EcoSpold01Location=RER
  Estimation, based on literature. A process yield of 55% is assumed.
  properties: wet mass 1 kg, dry mass 1 kg, heating value, net 3.03 MJ
- argon, liquid: 0 kg; source Williams E. D. 2002; pedigree (1,1,1,1,1)
  EcoSpold01Location=RER
  Estimation, based on literature. A process yield of 55% is assumed.
  properties: wet mass 1 kg, dry mass 1 kg
- isopropanol: 0 kg; source Williams E. D. 2002; pedigree (1,1,1,1,1)
  Estimation, based on literature. A process yield of 55% is assumed.
  EcoSpold01Location=RER
  properties: dry mass 1 kg, wet mass 1 kg, carbon content, fossil 0.6, heating value, net 34.3 MJ
- phosphoric acid, industrial grade, without water, in 85% solution state: 37.684 kg; source Williams E. D. 2002; lognormal variance with pedigree 0.0527, pedigree (2,4,5,3,1)
  EcoSpold01Location=RER
  Estimation, based on literature. A process yield of 55% is assumed.
  properties: wet mass 1 kg, dry mass 1 kg
- nitric acid, without water, in 50% solution state: 0 kg; source Williams E. D. 2002; pedigree (1,1,1,1,1)
  Estimation, based on literature. A process yield of 55% is assumed.
  EcoSpold01Location=RER
  properties: dry mass 1 kg, wet mass 1 kg
- oxygen, liquid: 0 kg; source ams - austriamicrosystems AG 2005; pedigree (1,1,1,1,1)
  EcoSpold01Location=RER
  Literature Value.
  properties: wet mass 1 kg, dry mass 1 kg
- water, ultrapure: 0 kg; name water_ultrapure_input; source ams - austriamicrosystems AG 2005; pedigree (1,1,1,1,1)
  Literature Value.
  EcoSpold01Location=GLO
  properties: wet mass 1 kg
- hydrogen peroxide, without water, in 50% solution state: 0 kg; source Williams E. D. 2002; pedigree (1,1,1,1,1)
  Estimation, based on literature. A process yield of 55% is assumed.
  EcoSpold01Location=RER
  properties: heating value, net 7.13 MJ, wet mass 1 kg, dry mass 1 kg
- hexafluoroethane: 0.90909 kg; source Williams E. D. 2002; lognormal variance with pedigree 0.0527, pedigree (2,4,5,3,1)
  Estimation, based on literature. A process yield of 55% is assumed.
  EcoSpold01Location=GLO
  properties: carbon content, fossil 0.173913, dry mass 1 kg, wet mass 1 kg, heating value, net 5.27 MJ
- trichloromethane: 0 kg; source Williams E. D. 2002; pedigree (1,1,1,1,1)
  Estimation, based on literature. A process yield of 55% is assumed. Trichloromethane is used as a proxy for trichloroborane and trifluoroborane.
  EcoSpold01Location=RER
  properties: wet mass 1 kg, heating value, net 4.06 MJ, dry mass 1 kg, carbon content, fossil 0.101695
- wastewater from wafer fabrication: -96.509 m3; name wastewater_output; source ams - austriamicrosystems AG 2005; lognormal variance with pedigree 0.0527, pedigree (2,4,5,3,1)
  Literature Value.
  EcoSpold01Location=CH
  production volume 3.89287e8 m3; = APV_Wafer*wastewater_output
    (same comment as for waste, from silicon wafer production, inorganic)
  property price 0 EUR2005; name wastewater_output_price_EUR2005
  properties: carbon content, fossil 0.121862, water content 2962.17, dry mass 0.337476 kg, wet mass 1000 kg
  note on carbon content, fossil: COD: 0.095 kg/m3 (Tab 3.7, ecoinvent v2.2 report 18_1). COD was converted to TOC, using conversion factors in Tab 4.10 (ecoinvent v2.2 report 13_IV). TOC was considered as Total Carbon.
- trifluoromethane: 0.56364 kg; source Williams E. D. 2002; lognormal variance with pedigree 0.0527, pedigree (2,4,5,3,1)
  EcoSpold01Location=GLO
  Estimation, based on literature. A process yield of 55% is assumed.
  properties: carbon content, fossil 0.171429, dry mass 1 kg, wet mass 1 kg, heating value, net 6.93 MJ
- ammonia, anhydrous, liquid: 0 kg; source Williams E. D. 2002; pedigree (1,1,1,1,1)
  Estimation, based on literature. A process yield of 55% is assumed.
  EcoSpold01Location=RER
  properties: dry mass 1 kg, wet mass 1 kg
- electricity, medium voltage: 27600 kWh; source ams - austriamicrosystems AG 2005; lognormal variance with pedigree 0.0527, pedigree (2,4,5,3,1)
  Literature Value.
  EcoSpold01Location=UCTE
- tetrafluoroethylene: 0.54545 kg; source Williams E. D. 2002; lognormal variance with pedigree 0.0527, pedigree (2,4,5,3,1)
  EcoSpold01Location=RER
  Estimation, based on literature. A process yield of 55% is assumed.
  properties: wet mass 1 kg, dry mass 1 kg, heating value, net 7.27 MJ, carbon content, fossil 0.24
- monoethanolamine: 25.818 kg; source Williams E. D. 2002; lognormal variance with pedigree 0.0527, pedigree (2,4,5,3,1)
  Estimation, based on literature. A process yield of 55% is assumed.
  EcoSpold01Location=RER
  properties: carbon content, fossil 0.393443, dry mass 1 kg, wet mass 1 kg, heating value, net 25.8 MJ
- hydrogen, liquid: 0 kg; source ams - austriamicrosystems AG 2005; pedigree (1,1,1,1,1)
  Literature Value.
  EcoSpold01Location=RER
  properties: dry mass 1 kg, wet mass 1 kg, heating value, net 120.21 MJ
- zeolite, slurry, without water, in 50% solution state: 0 kg; source Williams E. D. 2002; pedigree (1,1,1,1,1)
  Estimation, based on literature. A process yield of 55% is assumed.
  EcoSpold01Location=RER
  properties: wet mass 1 kg, dry mass 1 kg
- hexamethyldisilazane: 0.4 kg; source Williams E. D. 2002; lognormal variance with pedigree 0.0527, pedigree (2,4,5,3,1)
  Estimation, based on literature. A process yield of 55% is assumed.
  EcoSpold01Location=GLO
  properties: heating value, net 27.79 MJ, wet mass 1 kg, dry mass 1 kg, carbon content, fossil 0.447205
- hydrochloric acid, without water, in 30% solution state: 0 kg; source Williams E. D. 2002; pedigree (1,1,1,1,1)
  EcoSpold01Location=RER
  Estimation, based on literature. A process yield of 55% is assumed.
  properties: wet mass 1 kg, heating value, net 3.32 MJ, dry mass 1 kg
- diborane: 7.8182e-5 kg; source Williams E. D. 2002; lognormal variance with pedigree 0.0527, pedigree (2,4,5,3,1)
  Estimation, based on literature. A process yield of 55% is assumed.
  EcoSpold01Location=GLO
  properties: dry mass 1 kg, wet mass 1 kg, heating value, net 26.28 MJ
- methyl-3-methoxypropionate: 26.909 kg; source Williams E. D. 2002; lognormal variance with pedigree 0.0527, pedigree (2,4,5,3,1)
  EcoSpold01Location=GLO
  Estimation, based on literature. A process yield of 55% is assumed.
  properties: heating value, net 25.66 MJ, wet mass 1 kg, carbon content, fossil 0.508475, dry mass 1 kg
- arsine: 7.8182e-5 kg; source Williams E. D. 2002; lognormal variance with pedigree 0.0527, pedigree (2,4,5,3,1)
  Estimation, based on literature. A process yield of 55% is assumed.
  EcoSpold01Location=GLO
  properties: dry mass 1 kg, wet mass 1 kg
- acetone, liquid: 0 kg; source Williams E. D. 2002; pedigree (1,1,1,1,1)
  Estimation, based on literature. A process yield of 55% is assumed.
  EcoSpold01Location=RER
  properties: dry mass 1 kg, wet mass 1 kg, carbon content, fossil 0.62069, heating value, net 31.32 MJ
- sulfur hexafluoride, liquid: 0 kg; source Williams E. D. 2002; pedigree (1,1,1,1,1)
  EcoSpold01Location=RER
  Estimation, based on literature. A process yield of 55% is assumed.
  properties: dry mass 1 kg, wet mass 1 kg
- trimethylamine: 0 kg; source Williams E. D. 2002; pedigree (1,1,1,1,1)
  EcoSpold01Location=RER
  Estimation, based on literature. A process yield of 55% is assumed.
  properties: carbon content, fossil 0.610169, wet mass 1 kg, dry mass 1 kg, heating value, net 36.92 MJ
- chemical, inorganic: 1.3587 kg; source Williams E. D. 2002; lognormal variance with pedigree 0.0527, pedigree (2,4,5,3,1)
  Estimation, based on literature. A process yield of 55% is assumed.
  EcoSpold01Location=GLO
  properties: carbon content, fossil 0.003, wet mass 1 kg, dry mass 1 kg
  note on carbon content, fossil: This dataset is an unweighted average of 20 inorganic substances (listed in Tab 88.1, ecoinvent v2.2 report 8, part II), being part of the top100 chemicals included in this database. The C-content has also been calculated as an unweighted average of the C content of the substances composing this dataset.
- hydrogen fluoride: 0 kg; source Williams E. D. 2002; pedigree (1,1,1,1,1)
  EcoSpold01Location=GLO
  Estimation, based on literature. A process yield of 55% is assumed.
  properties: dry mass 1 kg, wet mass 1 kg, heating value, net 6.06 MJ
- silicone product: 0 kg; source Williams E. D. 2002; pedigree (1,1,1,1,1)
  Estimation, based on literature. A process yield of 55% is assumed.
  EcoSpold01Location=RER
  properties: wet mass 1 kg, carbon content, fossil 0.324324, dry mass 1 kg, heating value, net 9.83 MJ
  note on carbon content, fossil: The term silicones is used for compounds in which silicon atoms are linked via oxygen atoms, each silicon atom bearing one or several organic groups. In industrially important silicones, these groups are usually methyl or phenyl (ecoinvent v2.2 report 8_part71 & Ullmann). The chemical formula was considered to be [Si(CH3)2O]n (Ullmann).
- ammonium carbonate: 16.52, 33.451 kg (2 entries); source Williams E. D. 2002; lognormal variance with pedigree 0.0527, pedigree (2,4,5,3,1)
  Estimation, based on literature. A process yield of 55% is assumed.
  EcoSpold01Location=RER
- nitrogen, liquid: 1089.79, 3970.21 kg (2 entries); source ams - austriamicrosystems AG 2005; lognormal variance with pedigree 0.0527, pedigree (2,4,5,3,1)
  Literature Value.
  EcoSpold01Location=RER
- sulfuric acid: 15.8514, 121.169 kg (2 entries); source Williams E. D. 2002; lognormal variance with pedigree 0.0527, pedigree (2,4,5,3,1)
  EcoSpold01Location=RER
  Estimation, based on literature. A process yield of 55% is assumed.
- chlorine, liquid: 0.0145478, 0.0727252 kg (2 entries); source Williams E. D. 2002; lognormal variance with pedigree 0.0527, pedigree (2,4,5,3,1)
  EcoSpold01Location=RER
  Estimation, based on literature. A process yield of 55% is assumed.
- argon, liquid: 5.37817, 25.5308 kg (2 entries); source Williams E. D. 2002; lognormal variance with pedigree 0.0527, pedigree (2,4,5,3,1)
  EcoSpold01Location=RER
  Estimation, based on literature. A process yield of 55% is assumed.
- isopropanol: 6.3905, 30.3365 kg (2 entries); source Williams E. D. 2002; lognormal variance with pedigree 0.0527, pedigree (2,4,5,3,1)
  Estimation, based on literature. A process yield of 55% is assumed.
  EcoSpold01Location=RER
- nitric acid, without water, in 50% solution state: 0.486846, 1.2107, 0.580102, 3.69645, 0.485044, 1.99518, 0.525994, 0.327656, 1.57447, 4.26256 kg (10 entries); source Williams E. D. 2002; lognormal variance with pedigree 0.0527, pedigree (2,4,5,3,1)
  Estimation, based on literature. A process yield of 55% is assumed.
  EcoSpold01Location=RER
- oxygen, liquid: 46.0764, 167.924 kg (2 entries); source ams - austriamicrosystems AG 2005; lognormal variance with pedigree 0.0527, pedigree (2,4,5,3,1)
  EcoSpold01Location=RER
  Literature Value.
- water, ultrapure: 22708.3, 42125.1, 31675.6 kg (3 entries); source ams - austriamicrosystems AG 2005; lognormal variance with pedigree 0.0513, pedigree (2,3,5,3,1)
  Literature Value.
  EcoSpold01Location=GLO
- hydrogen peroxide, without water, in 50% solution state: 4.20454, 19.9595 kg (2 entries); source Williams E. D. 2002; lognormal variance with pedigree 0.0527, pedigree (2,4,5,3,1)
  Estimation, based on literature. A process yield of 55% is assumed.
  EcoSpold01Location=RER
- trichloromethane: 0.102752, 0.0560675 kg (2 entries); source Williams E. D. 2002; lognormal variance with pedigree 0.0527, pedigree (2,4,5,3,1)
  (same comment as for trichloromethane)
- ammonia, anhydrous, liquid: 0.067041, 0.448079, 0.104298, 0.202465, 0.206652, 0.0948633, 0.779891, 0.0212205, 2.24419 kg (9 entries); source Williams E. D. 2002; lognormal variance with pedigree 0.0527, pedigree (2,4,5,3,1)
  Estimation, based on literature. A process yield of 55% is assumed.
  EcoSpold01Location=RER
- hydrogen, liquid: 0.753319, 3.44668 kg (2 entries); source ams - austriamicrosystems AG 2005; lognormal variance with pedigree 0.0527, pedigree (2,4,5,3,1)
  Literature Value.
  EcoSpold01Location=RER
- zeolite, slurry, without water, in 50% solution state: 1.71908, 3.48092 kg (2 entries); source Williams E. D. 2002; lognormal variance with pedigree 0.0527, pedigree (2,4,5,3,1)
  Estimation, based on literature. A process yield of 55% is assumed.
  EcoSpold01Location=RER
- hydrochloric acid, without water, in 30% solution state: 8.90018, 39.8087 kg (2 entries); source Williams E. D. 2002; lognormal variance with pedigree 0.0527, pedigree (2,4,5,3,1)
  EcoSpold01Location=RER
  Estimation, based on literature. A process yield of 55% is assumed.
- acetone, liquid: 2.67612, 7.39688 kg (2 entries); source Williams E. D. 2002; lognormal variance with pedigree 0.0527, pedigree (2,4,5,3,1)
  Estimation, based on literature. A process yield of 55% is assumed.
  EcoSpold01Location=RER
- sulfur hexafluoride, liquid: 0.0390694, 0.0791106 kg (2 entries); source Williams E. D. 2002; lognormal variance with pedigree 0.0527, pedigree (2,4,5,3,1)
  EcoSpold01Location=RER
  Estimation, based on literature. A process yield of 55% is assumed.
- trimethylamine: 25.9065, 52.4575 kg (2 entries); source Williams E. D. 2002; lognormal variance with pedigree 0.0527, pedigree (2,4,5,3,1)
  EcoSpold01Location=RER
  Estimation, based on literature. A process yield of 55% is assumed.
- hydrogen fluoride: 1.19438, 3.50402 kg (2 entries); source Williams E. D. 2002; lognormal variance with pedigree 0.0527, pedigree (2,4,5,3,1)
  EcoSpold01Location=GLO
  Estimation, based on literature. A process yield of 55% is assumed.
- silicone product: 0.0551094, 0.112161 kg (2 entries); source Williams E. D. 2002; lognormal variance with pedigree 0.0527, pedigree (2,4,5,3,1)
  Estimation, based on literature. A process yield of 55% is assumed.
  EcoSpold01Location=RER

## Emissions to nature
- Ethane, 1,1,2-trichloro-1,2,2-trifluoro-, CFC-113 [air, urban air close to ground]: 0.001727 kg; source Williams E. D. 2002; lognormal variance with pedigree 0.0927, pedigree (2,4,5,3,1)
  Calculated Value, based on literature, calculated indirectly via the water usage. The calculated ratio between sources is 56456. 78 kg CFC-11
  equals 97.5 kg CFC-113, ODP (ozone depletion potential) of CFC-113 is 0.8 of the potential of CFC-11.
  Calculation: (1/0.8*78)/56456
  Further references:
  ST Microelectronics (2004) Chemical Content of Semiconductor Packaging. PDF from <http://www.stmicroelectronics.com/stonline/company/environm/report03/envi03.pdf>.
- Arsine [air, urban air close to ground]: 4.2416e-7 kg; source Williams E. D. 2002; lognormal variance with pedigree 0.0927, pedigree (2,4,5,3,1)
  Calculated Value, based on literature, calculated indirectly via the water usage. The calculated ratio between sources is 63585. It is considered that data are 10% of the total consumption and emissions of the entire Intel Company. Arsine is used as a proxy for inorganic chemicals.
  Calculation:0.62*0.435*0.1/63585
  Further references:
  Intel Corporation (2005) Annual FPA Progress Report - Ocotillo.
- Methanol [air, urban air close to ground]: 0.0016671 kg; source Williams E. D. 2002; lognormal variance with pedigree 0.0927, pedigree (2,4,5,3,1)
  Calculated Value, based on literature, calculated indirectly via the water usage. The calculated ratio between sources is 63585. It is considered that data are 10% of the total consumption and emissions of the entire Intel Company.
  Calculation: 1060*0.1/63585
  Further references:
  Intel Corporation (2005) Annual FPA Progress Report - Ocotillo.
- Sulfuric acid [soil, agricultural]: 4.7181e-5 kg; source Williams E. D. 2002; lognormal variance with pedigree 0.1727, pedigree (2,4,5,3,1)
  Calculated Value, based on literature, calculated indirectly via the water usage. The calculated ratio between sources is 63585. It is considered that data are 10% of the total consumption and emissions of the entire Intel Company.
  Calculation: 30*0.1/63585
  Further references:
  Intel Corporation (2005) Annual FPA Progress Report - Ocotillo.
- NMVOC, non-methane volatile organic compounds, unspecified origin [air, urban air close to ground]: 4.1706 kg; source Williams E. D. 2002; lognormal variance with pedigree 0.1727, pedigree (2,4,5,3,1)
  Calculated Value, based on literature, calculated indirectly via the water usage. The calculated ratio between sources is 6701.
  Calculation: 27947/6701
  Further references:
  AMD (2006) 2005 Corporate Responsibility Report. In, pp., Online-Version under: <http://www.amd.com/us-en/assets/content_type/DownloadableAssets/2005_Corporate_Responsibility_Report_Final.pdf>.
- Ethane, hexafluoro-, HFC-116 [air, urban air close to ground]: 0.11902 kg; source Williams E. D. 2002; lognormal variance with pedigree 0.1727, pedigree (2,4,5,3,1)
  Calculated Value, based on literature, calculated indirectly via the water usage. The calculated ratio between sources is 6701. 1 kg C2F6 is 11900 kg of CO2-eq.
  Calculation: (0.0348*1’000’000’000*12/44/11900)/6701
  Further references:
  AMD (2006) 2005 Corporate Responsibility Report. In, pp., Online-Version under: <http://www.amd.com/us-en/assets/content_type/DownloadableAssets/2005_Corporate_Responsibility_Report_Final.pdf>.
  www.epa.gov/climatechange/glossary.html <http://www.epa.gov/climatechange/glossary.html>)
- Water [water, unspecified]: 73.6481 m3; name water_to_water_unspecified; = (tap_water_input/1000)*(1-fraction_TW_to_air)+(water_ultrapure_input/1000)*(1-fraction_WUP_to_air)-(wastewater_output*-1); lognormal variance with pedigree 0.0807, pedigree (2,2,5,1,1)
  Calculated value based on literature values and expert opinion. See comments in the parametres' comment field.
  property carbon content, non-fossil 0; name C_content_non_fossil
  property dry mass 0 kg; name DM
  property carbon content, fossil 0; name C_content_fossil
  property water in wet mass 1000 kg; name WWM
  property fraction, origin: fresh water 1; name fraction_origin_fresh_water_Ww
  property fraction, origin: salt water 0; name fraction_origin_salt_water_Ww
  property fraction, origin: unspecified 0; name fraction_origin_unspecified_Ww
  property wet mass 1000 kg; name WM
- Water [air, unspecified]: 11.0539 m3; name water_to_air_unspecified; = (tap_water_input/1000*fraction_TW_to_air)+(water_ultrapure_input/1000*fraction_WUP_to_air); lognormal variance with pedigree 0.0807, pedigree (2,2,5,1,1)
  (same comment as for Water)
  property fraction, origin: salt water 0; name fraction_origin_salt_water
  property fraction, origin: fresh water 1; name fraction_origin_fresh_water
  property fraction, origin: unspecified 0; name fraction_origin_unspecified
- Phosphine [air, urban air close to ground]: 3.1454e-5 kg; source Williams E. D. 2002; lognormal variance with pedigree 0.0927, pedigree (2,4,5,3,1)
  Calculated Value, based on literature, calculated indirectly via the water usage. The calculated ratio between sources is 63585. It is considered that data are 10% of the total consumption and emissions of the entire Intel Company. Phosphine is used as a proxy for inorganic chemicals.
  Calculation: 1060*0.1/63585
  Further references:
  Intel Corporation (2005) Annual FPA Progress Report - Ocotillo.
- Hydrogen fluoride [air, urban air close to ground]: 0.49339 kg; source Williams E. D. 2002; lognormal variance with pedigree 0.0927, pedigree (2,4,5,3,1)
  Calculated Value, based on literature. Hydrogen fluoride is used as a proxy for corrosives and inorganic chemicals. It is calculated indirectly via the water usage. For corrosives the calculated ratio between sources is 6701.
  Calculation: 3298/6701
  For inorganic chemicals the calculated ratio between sources is 63585. It is considered that data are 10% of the total consumption and emissions of the entire Intel Company. For the calculation: 800 kg of all inorganic HAPs, 20 kg of Phosphine emissions and 0.62*0.435 kg (1 pound) = 0.27 kg of Arsine.
  Calculation: (800-20.27)*0.1/63585
  Further references:
  AMD (2006) 2005 Corporate Responsibility Report. In, pp., Online-Version under: <http://www.amd.com/us-en/assets/content_type/DownloadableAssets/2005_Corporate_Responsibility_Report_Final.pdf>.
  Intel Corporation (2005) Annual FPA Progress Report - Ocotillo.

## Sampling procedure
Manufacturer information from literature and sustainability reports.

## Extrapolations
This dataset has been extrapolated from year 2006 to the year of the calculation (2021). The uncertainty has been adjusted accordingly.

## Review by Bo Weidema 2012-09-21
Corrects some input values that were to high and adds a production volume

## Review by Rolf Frischknecht 2007-11-14
passed.
-
