# pointing device production, optical mouse, with cable

Dataset: EcoSpold 2, unit process
Geography: GLO
Time period: 2002-01-01 to 2021-12-31
Technology level: current
Classification: ISIC rev.4 ecoinvent: 2620:Manufacture of computers and peripheral equipment
Classification: EcoSpold01Categories: electronics/devices
Tags: ConvertedDataset
Scenario: Business-as-Usual
System model: Allocation, cut-off by classification
Generated by: Martin Lehmann
Published in: Hischier R. 2007
Database: ecoinvent
isCopyrightProtected: false
accessRestrictedTo: 1

## General comment
This dataset represents the production of 1 unit of optical mouse with cable. It is based on typical optical computer mouse used at home or in an office examined at the EMPA laboratories, a Logitech Optical Mouse USB manufactured in 2002 with a total weight 0.120 kg.
[This dataset was already contained in the ecoinvent database version 2. It was not individually updated during the transfer to ecoinvent version 3. Life Cycle Impact Assessment results may still have changed, as they are affected by changes in the supply chain, i.e. in other datasets. This dataset was generated following the ecoinvent quality guidelines for version 2. It may have been subject to central changes described in the ecoinvent version 3 change report (http://www.ecoinvent.org/database/ecoinvent-version-3/reports-of-changes/), and the results of the central updates were reviewed extensively. The changes added e.g. consistent water flows and other information throughout the database. The documentation of this dataset can be found in the ecoinvent reports of version 2, which are still available via the ecoinvent website. The change report linked above covers all central changes that were made during the conversion process.]

## Included activities start
From reception of raw materials and auxiliares at the factory gate.

## Included activities end
This dataset includes materials (mainly metals and plastics) with manufacturing processes (e.g. the rolling of the supporting steel plate or the injection moulding of the plastic and rubber for cover, base and wheel). Infrastructure, electricity for the assembly are included as well. The water consumption during production has not been taken into account due to lack of information.

## Geography
The data is based on weighing measurement at the EMPA Laboratories in 2006. The optical mouse looked at is available all over the world. Therefore a global dataset is justifiable.

## Technology
The production of an optical mouse includes the sheet rolling of the steel plate plus the injection moulding of the plastic and rubber parts (cover, base and wheel). An optical mouse is constructed with components like LED (light emitting diode), sensor, clips, lens, small printed wiring board and base plate.

## Reference product
- pointing device, optical mouse, with cable: 1 unit; CPC 45261: Input peripherals (keyboard, joystick, mouse etc.); By-product classification allocatable product
  Modern surface-independent optical mice work by using an optoelectronic sensor to take successive pictures of the surface o which the mouse operates. Most of these mice use LEDs to illuminate the surface that is being tracked; LED optical mice are often mislabelled as "laser mice". Changes between one frame and the next are processed by the image processing part of the chip and translated into movement on the two axes using an optical flow estimation algorithm. (Wikipedia, 2007)
  EcoSpold01Location=GLO
  production volume 1 unit
    Dummy value to be replaced by measured, estimated or calculated value
  property carbon content, fossil 0.482336
    Calculated as the addition of C contents in the product composition, then referred to 1 kg DM
  property price 6.99321 EUR2005
    Calculated based on inputs: The price of the product has been calculated as a sum of the values of the material and energy inputs for this product. This value is therefore a rough estimation. It may underestimate the real price since there are additional expenses when producing any product. These expences can include for example labour costs, treatment of waste materials and profit for the producer. Please consider carefully whether this level of data quality is acceptable for your application.
  property carbon content 0.482336
    carbon content on a dry matter basis (reserved; not for manual entry)
  properties: dry mass 0.12 kg, water content 0, water in wet mass 0 kg, carbon content, non-fossil 0, wet mass 0.12 kg, carbon allocation 0.0578803 kg

## Inputs from technosphere
- steel, chromium steel 18/8, hot rolled: 0.0022 kg; lognormal variance with pedigree 0.0521, pedigree (1,4,5,3,1)
  EcoSpold01Location=RER
  Measured Value.
  properties: wet mass 1 kg, dry mass 1 kg, carbon content, fossil 0.0008
  note on carbon content, fossil: Stainless steel model is the grade 304 steel (18/8 stainless, 18% chromium 8% nickel; max. 0.08% C)
- synthetic rubber: 0.002 kg; lognormal variance with pedigree 0.0521, pedigree (1,4,5,3,1)
  EcoSpold01Location=RER
  Measured Value.
  properties: dry mass 1 kg, heating value, net 26.42 MJ, wet mass 1 kg, carbon content, fossil 0.871949
  note on carbon content, fossil: EPDM (Ethylene-propene-diene terpolymer) rubber is a terpolymer of ethylene, propene, and a diene with the residual unsaturated portion of the diene in the side chain (ecoinvent v2.2 report 7-part XX & Ullmann). Chemical formula (deduced from Evidences of Solvent-Induced Miscibility in Polychloroprene-co-Ethylene-Propene Diene Terpolymer Blends, Dubey et al., Journal of Applied Polymer Science, 2009, 111:1884–1891): C20H35
- polypropylene, granulate: 0.00245 kg; lognormal variance with pedigree 0.0521, pedigree (1,4,5,3,1)
  EcoSpold01Location=RER
  Measured Value.
  properties: wet mass 1 kg, carbon content, fossil 0.857143, dry mass 1 kg, heating value, net 32.78 MJ
  note on carbon content, fossil: Polypropylene is formed by the polymerisation of propylene, C3H6 (ecoinvent v2.2 report 11_II)
  note on heating value, net: Value extracted from "treatment of waste polypropylene, open burning"
- printed wiring board mounting facility: 2.496e-8 unit; lognormal variance with pedigree 0.3701, pedigree (1,4,5,3,3)
  EcoSpold01Location=GLO
  Calculated Value, based on a annual production volume of 192 t for a printed wiring board mounting plant, assuming 25 years life-span.
- solar glass, low-iron: 0.0003 kg; lognormal variance with pedigree 0.0521, pedigree (1,4,5,3,1)
  Measured Value.
  EcoSpold01Location=RER
  properties: wet mass 1 kg, dry mass 1 kg
- acrylonitrile-butadiene-styrene copolymer: 0.0493 kg; lognormal variance with pedigree 0.0521, pedigree (1,4,5,3,1)
  Measured Value.
  EcoSpold01Location=RER
  properties: wet mass 1 kg, dry mass 1 kg, carbon content, fossil 0.853081, heating value, net 35.58 MJ
  note on carbon content, fossil: ABS is the abbreviation originating from its monomers acrylonitrile, butadiene and styrene. It was assumed that every monomer was present in the same proportion, so the basic ABS monomer was considered (C8H8·C4H6·C3H3N), and the MW=104+54+53=211 g/mol
- plug, inlet and outlet, for network cable: 1 unit; lognormal variance with pedigree 0.0521, pedigree (1,4,5,3,1)
  Measured Value.
  EcoSpold01Location=GLO
  properties: dry mass 0.0086 kg, carbon content, fossil 0.414034, wet mass 0.0086 kg
  note on carbon content, fossil: Calculated as the addition of C contents in the product composition
- printed wiring board, surface mounted, unspecified, Pb containing: 0.003975 kg; = 0.01325*0.3; lognormal variance with pedigree 0.0521, pedigree (1,4,5,3,1)
  Measured Value.
  This original value from production mix has been replaced by 2 flows. Pb-containing has a share of 0.3, Pb-free has a share of 0.7.
  property water content 0; name water_content
  property carbon content, non-fossil 0; name C_content_non_fossil
  property carbon content, fossil 0.132522; name C_content_fossil
  property water in wet mass 0 kg; name WWM
  property dry mass 1 kg; name DM
  property wet mass 1 kg; name WM
- hot rolling, steel: 0.0022 kg; lognormal variance with pedigree 0.0521, pedigree (1,4,5,3,1)
  EcoSpold01Location=RER
  Measured Value.Measured Value.
- injection moulding: 0.0513 kg; lognormal variance with pedigree 0.0521, pedigree (1,4,5,3,1)
  Measured Value.
  EcoSpold01Location=RER
- extrusion, plastic pipes: 0.00245 kg; lognormal variance with pedigree 0.0521, pedigree (1,4,5,3,1)
  Measured Value.
  EcoSpold01Location=RER
- printed wiring board, surface mounted, unspecified, Pb free: 0.009275 kg; = 0.01325*0.7; lognormal variance with pedigree 0.0521, pedigree (1,4,5,3,1)
  (same comment as for printed wiring board, surface mounted, unspecified, Pb containing)
  properties: carbon content, fossil 0.132522, wet mass 1 kg, dry mass 1 kg
- steel, low-alloyed, hot rolled: 0.01085 kg; lognormal variance with pedigree 0.0521, pedigree (1,4,5,3,1)
  EcoSpold01Location=RER
  Measured Value.
  properties: carbon content, fossil 0.005, wet mass 1 kg, dry mass 1 kg
  note on carbon content, fossil: Low alloyed steel composition given in Tab. 3.2 ecoinvent v2.2 report 10_partII. Steel assumed to have a C content of 0.5%
- electricity, medium voltage: 1.1111 kWh; source Stachura 2006; lognormal variance with pedigree 0.0421, pedigree (1,4,5,3,1)
  Estimation, based on literature.
  EcoSpold01Location=UCTE
- cable, network cable, category 5, without plugs: 0.9 m; lognormal variance with pedigree 0.0521, pedigree (1,4,5,3,1)
  Measured Value.
  EcoSpold01Location=GLO
  properties: dry mass 0.036 kg, carbon content, fossil 0.203917, wet mass 0.036 kg
  note on carbon content, fossil: Calculated as the addition of C contents in the product composition. Then referred to 1 kg DM
- sheet rolling, steel: 0.01085 kg; lognormal variance with pedigree 0.0521, pedigree (1,4,5,3,1)
  EcoSpold01Location=RER
  Measured Value.
- zinc coat, pieces: 0.0004 m2; lognormal variance with pedigree 0.0521, pedigree (1,4,5,3,1)
  Measured Value.
  EcoSpold01Location=RER
- used IT accessory: -0.12 kg; lognormal variance with pedigree 0.0701, pedigree (1,4,5,3,3)
  Measured Value.
  EcoSpold01Location=CH
  production volume 0.12 kg
    Calculated from the production volume of pointing device, optical mouse, with cable in proportion to the respective output amounts.
  properties: dry mass 1 kg, carbon content, fossil 0.470164, wet mass 1 kg
  note on carbon content, fossil: The composition of the IT accessory is an average of the keyboard, optical mouse and external power adapter (for laptop) composition (ecoinvent v2.2 report 18_V, pg 67). The C content was calculated from Tab 4.43 and 4.44: 16.19% is cables and 83.81 goes to mechanical treatment. According to the European company, 1 kg cable is split up into 0.66 kg of copper and 0.34 kg of plastics (ecoinvent v2.2 report 18_V, pg 97). Plastic C content was calculated using data in Tab A.2, ecoinvent v2.2 report 13_I. From shredder, only plastic and other (others was also considered plastic (from pg 70, ecoinvent v2.2 report 18_V)) were considered to have a carbon content, and it was calculated using data in Tab A.2, ecoinvent v2.2 report 13_I.

## Sampling procedure
Own measurements at laboratory (weighing) and manufacturer information.

## Extrapolations
This dataset has been extrapolated from year 2006 to the year of the calculation (2021). The uncertainty has been adjusted accordingly.

## Review by Jürgen Sutter 2007-11-08
passed.
-

## Review by Roland Hischier 2011-09-22
Transfer of documentation done.
