# electricity production, oil

Dataset: EcoSpold 2, unit process
Geography: AR
Time period: 2012-01-01 to 2021-12-31
Technology level: current
Classification: ISIC rev.4 ecoinvent: 3510:Electric power generation, transmission and distribution
Classification: EcoSpold01Categories: oil/power plants
Synonyms: heavy fuel oil; petroleum
Tags: fossil fuels; oil power
Scenario: Business-as-Usual
System model: Allocation, cut-off by classification
Generated by: Alejandro P Arena
Published in: Suppen, N. 2017
Database: ecoinvent
isCopyrightProtected: true
accessRestrictedTo: 1

## General comment
This dataset represents the production of high voltage electricity at a grid-connected oil power plant in Argentina in 2014. In this category all conventional generation units (steam and gas turbines) consuming oil-derived fuels are considered. Gas Turbines and Steam Turbine belonging to combined cycle power plants and cogeneration plants are excluded from this dataset. During 2014, most of the Steam Power (SP) plants consumed a mix of Natural Gas and Fuel Oil. The percentage of fuel oil is very high, ranging from 5 up to 95 %, with a median value close to 70%. Only one power plant (San Nicolás) consumed Coal, Natural Gas and Fuel Oil.

Gas Turbine power plants (GT) usually consume Natural Gas and Gas Oil. From 43 gas turbines considered in this study, 81 % consumed a mix of Natural Gas and Gas Oil during 2014, and the rest only natural gas. The percentage of Gas Oil consumed ranges from 0,4 % to 64 %, with a median value of 4 %.
An averaged efficiency has been calculated considering the specific consumption of the oil-consuming generation units and their annual electricity production.
Emissions are in general calculated/estimated based on the fuel oil type S, European quality. This dataset has been built on the basis of oil electricity production datasets in version 2 of the ecoinvent database which were elaborated by N. Jungbluth 2007 as appears in the original dataset (GLO) and adjusted for Argentina. The values and emissions are a weighted average of emissions in all datasets in version 2 (which are considered as the global values) multiplied with an efficiency scaling factor calculated for Argentina. Nothing else than the efficiency has been adjusted in this dataset.
Comments:
The average efficiency of oil power plants was 0.335, and this dataset consideres all cooling systems as once through.

## Included activities start
From the constructed power plant ready to produce electricity and from the fuel ready to be used

## Included activities end
This activity ends with 1kWh of high voltage electricity produced at the power plant and arrived at the busbar.

This dataset includes all energy use, use of chemicals, emissions to air and water including treatment of flue gasses and effluents. In an oil power plant, water is needed for cooling, feed water for the steam circuit, for the flue gas treatment, or other cleaning. This dataset only considers water use (evaporation) for cooling and steam circuit

## Technology
Electricity production in a conventional oil power plant with a capacity of 500 MWe.

## Time period
The Annual Production Volume is valid for the year 2014.

## Parameters
- gross electricity production: 1.38877e10 kWh; name gross_electricity; lognormal variance with pedigree 0.0012, pedigree (2,1,1,1,1)
  Literature value/statistics. The gross electricity production was calculated from the net electricity production considering the losses due to auxiliary consumption within the power plant (see the comment for the parameter losses from gross electricity production).
  CAMMESA "COMPAÑÍA ADMINISTRADORA DEL MERCADO MAYORISTA ELÉCTRICO SOCIEDAD ANÓNIMA" provides statistics about net energy exchanges through the electric wholesale market. Supporting documentation available at: <http://portalweb.cammesa.com/Memnet1/default.aspx>
- fraction, water, completely softened, to air: 0.15 dimensionless; name fraction_WCS_to_air; = fraction_PW_to_air; lognormal variance with pedigree 0.092025, pedigree (4,4,3,2,4)
  Calculated value. See comment in the other parametres present in this dataset. Water, completely softened is considered to be always used as process water, thus process water fractions to air are applied to all water, completely softened input flows to calculate the amount of water consumed in the processes.
  nan
- factor: input of MJ for the production of 1 kWh: 9.72973 MJ/kWh; name factor_MJ_kWh; = 1*3.6/efficiency_oil_global; lognormal variance with pedigree 0.0006, pedigree (1,1,1,1,1)
  Calculated value from the average efficiency. 3.6 MJ = 1kWh.
  nan
- once-through and cooling pond cooling systems as a fraction of all cooling syste: 1 dimensionless; name once_through_andCP_CS_fractio_from_allCS; lognormal variance with pedigree 0.092025, pedigree (4,4,3,2,4)
  100 % of the considered power plants in this dataset are modelled as cooled using once- trhough colling systemss
  nan
- water withdrawal, electricity production from oil, once-T and coolingP CS: 0.098 m3/kWh; name WWithdrawal_EP_oil_onceT_andCP_CS; lognormal variance with pedigree 0.092025, pedigree (4,4,3,2,4)
  Estimated based on literature (Scown, 2011, Water Footprint of U.S. Transportation Fuels, SI). Taken from the GLO 2008 dataset
  nan
- losses from gross electricity production: 0.07 dimensionless; name losses_gross_net; lognormal variance with pedigree 0.017225, pedigree (4,3,1,2,3)
  Literature value. Own use of electricity plants in this country in 2012. The default loss as described by the IEA in the electricity statistic is applied, which is 0.07 (IEA electricity information 2014: The difference between gross and net electricity production is generally observed to be about 7% for conventional thermal stations, 1% for hydro stations and 6% for nuclear.)
  IEA. 2014. Electricity Information 2014. ISBN 978-92-64-21692-1. International Energy Agency (IEA), Paris Cedex (FR).
  nan
  Uncertainty: generic IEA value used
- average efficiency of oil power plants, global: 0.37 dimensionless; name efficiency_oil_global; lognormal variance with pedigree 0.003325, pedigree (3,2,1,2,2)
  Literature value/calculated value. Net electrical efficiency based on the lower heating value (LHV).
  For all OECD countries, the IEA Electricity information 2014 provides data for the year 2012 on fuel input (TJ, Net calorific value NCV) and gross electricity production (GWh) as well as heat production (TJ) in tables 8 and 9 for each country for electricity only and Combined Heat and Power (CHP) plants each. Together with the information on own use (see parameter 'losses'), the net electrical efficiency based on the NCV is calculated.
  For all non-OECD countries, data from the IEA Energy balances of non-OECD countries 2014 have been used. These tables do not always provide information on how much of the electricity has been produced in electricity only and in CHP plants, but often give the total value only.
  IEA. 2014. Electricity Information 2014. ISBN 978-92-64-21692-1. International Energy Agency (IEA), Paris Cedex (FR).
  IEA/OECD. 2014. Energy balances of non-OECD countries 2014. International Energy Agency (IEA), Paris Cedex (FR).
  nan
- relation between the global and the country's efficiency of oil power plants: 1.1025 dimensionless; name relation_global_country; = efficiency_oil_global/ efficiency_oil_country; undefined min 1, max 1, standardDeviation95 0, pedigree (1,1,1,1,1)
  This factor brings the amounts of the exchanges in the global dataset into relation with the amounts in the country datasets.
  nan
- average efficiency of oil power plants, country: 0.3356 dimensionless; name efficiency_oil_country; lognormal variance with pedigree 0.003325, pedigree (3,2,1,2,2)
  Literature value/calculated value. This value is a weighted average of the different power plants in Argentina which burn oil in any form (DO, FO, GO), including steam turbines, gas turbines and Diesel engines. based on the lower heating value (LHV) of the different burned fuels.. Combined cycle power plants and CHP are excluded from this figure. The calculation of the weighted average efficiency for each technology and fuel type was performed considering the specific consumption of every generation unit reported by CAMMESA (available from http://portalweb.cammesa.com/memnet1/revistas/estacional/datos_termicos.html. For some generation units in which the specific consumption is not available, their efficiency was calculated based on the amount of electricity production and of fuel consumption during 2014. Supporting documentation available at: <http://portalweb.cammesa.com/Memnet1/default.aspx>
- water consumption, electricity production from oil, once-T and coolingP CS: 0.0005 m3/kWh; name WConsumption_EP_oil_onceT_andCP_CS; lognormal variance with pedigree 0.092025, pedigree (4,4,3,2,4)
  (same comment as for water withdrawal, electricity production from oil, once-T and coolingP)
- fraction, process water, to air: 0.15 dimensionless; name fraction_PW_to_air; lognormal variance with pedigree 0.092025, pedigree (4,4,3,2,4)
  Literature value. In case when no industry/process specific data are available, default evaporation fraction value is used. This value is 15% and is based on literature (Statistics Canada, 2007 & Shaffer, K.H., 2008, Consumptive water use in the Great Lakes Basin, USGS & Shiklomanov, 2003, World Water Resources at the Beginning of the 21st Century) and has been approved by an expert.
  nan
- fraction, cooling water, to air: 0.00510204 dimensionless; name fraction_CW_to_air; = (WConsumption_EP_oil_onceT_andCP_CS*once_through_andCP_CS_fractio_from_allCS)/(WWithdrawal_EP_oil_onceT_andCP_CS*once_through_andCP_CS_fractio_from_allCS); lognormal variance with pedigree 0.092025, pedigree (4,4,3,2,4)
  Calculated value
  nan

## Reference product
- electricity, high voltage: 1 kWh; name electricity; By-product classification allocatable product; CPC 17100: Electrical energy
  production volume 1.29155e10 kWh; name apv_electricity; = gross_electricity* (1-losses_gross_net)
    Calculated value.
  property price 0.0977 EUR2005
    Temporary price data. Calculated as 90% of purchasers price based on: 94% of the average price (to account for a 6% loss in transformation and transmission) for electricity for industrial consumersin 2005 (excluded taxes). From IEA.

## Inputs from technosphere
- water, completely softened: 0.115921 kg; name water_softened_input; = 0.105143225836924 * relation_global_country; source COMPAÑÍA ADMINISTRADORA DEL MERCADO MAYO 2014, p. Tab. 12.10 p. 228; lognormal variance with pedigree 0.0439, pedigree (2,2,5,5,2)
  Calculated value, adapted from the GLO 2008 dataset using the mathematical relation taken from the original dataset and adapted for Argentina with the "efficiency_oil_global/ efficiency_oil_country" parameter.
  For details see comment for parameter 'average efficiency of oil power plants, global'. The efficiency is based on CAMMESA statistics and calculated with own assumptions (see comment on the "efficiency_oi_l country" parameter for more information.
  Source: CAMMESA "COMPAÑÍA ADMINISTRADORA DEL MERCADO MAYORISTA ELÉCTRICO SOCIEDAD ANÓNIMA". Supporting documentation available at: <http://portalweb.cammesa.com/Memnet1/default.aspx> Additional information can be obtained from CAMMESA under request
  Child exchanges are put into relation to the parent exchanges by means of average efficiency of oil power plants in the country and global average efficiency of oil power plants.".
  properties: wet mass 1 kg
- bilge oil: -2.44101e-5 kg; name bilge_oil; = (2.21405798675039E-05 * relation_global_country)*-1; source Jungbluth, N. 2007; lognormal variance with pedigree 0.0438, pedigree (2,3,5,5,1)
  Average of literature data
  production volume 315269 kg; = apv_electricity * bilge_oil
    Calculated from the production volume of electricity produced in proportion to the respective output amounts.
  property price 0 EUR2005; name bilge_oil_price_EUR2005
  properties: wet mass 1 kg, dry mass 0.1 kg, heating value, net 1.92 MJ, water content 9, carbon content, fossil 0.84
  note on heating value, net: Value taken from the general comment of the treatment dataset.
  note on carbon content, fossil: Tab A.6, ecoinvent v2.2 report 13_I. C content has been calculated after data in the tables, and then referred to 1 kg DM
- limestone, crushed, washed: 0.0157109 kg; = 0.0142502047575074 * relation_global_country; source COMPAÑÍA ADMINISTRADORA DEL MERCADO MAYO 2014, p. Tab. 12.11 p. 228; lognormal variance with pedigree 0.0226, pedigree (2,4,4,5,1)
  Literature value/calculated value for flue gas treatment, adapted from the GLO 2008 dataset using the mathematical relation taken from the original dataset and adapted for Argentina with the "efficiency_oil_global/ efficiency_oil_country" parameter.
  For details see comment for parameter 'average efficiency of oil power plants, global'. The efficiency is based on CAMMESA statistics and calculated with own assumptions (see comment on the "efficiency_oi_l country" parameter for more information.
  Source: CAMMESA "COMPAÑÍA ADMINISTRADORA DEL MERCADO MAYORISTA ELÉCTRICO SOCIEDAD ANÓNIMA". Supporting documentation available at: <http://portalweb.cammesa.com/Memnet1/default.aspx> Additional information can be obtained from CAMMESA under request
  Child exchanges are put into relation to the parent exchanges by means of average efficiency of oil power plants in the country and global average efficiency of oil power plants.".
  properties: carbon content, fossil 0.117257, wet mass 1 kg, water content 0.00200401, dry mass 0.998 kg
  note on carbon content, fossil: Table 3.1, ecoinvent v2.2 report 7, part VII, pg 3. MW CaCO3=100, MW MgCO3=84. C content of limestone is 0.117257 kg/kg DM
- municipal solid waste: -0.000171875 kg; name municipal_waste; = (0.000155895267385992 * relation_global_country)*-1; source Jungbluth, N. 2007; lognormal variance with pedigree 0.0058, pedigree (2,3,3,5,1)
  Average of literature data taken from the GLO 2008 dataset
  production volume 2.21985e6 kg; = apv_electricity * municipal_waste
    (same comment as for bilge oil)
  property price 0 EUR2005; name municipal_waste_price_EUR2005
  properties: water content 0.297017, wet mass 1 kg, carbon content, fossil 0.171549, heating value, net 11.74 MJ, dry mass 0.771 kg, carbon content, non-fossil 0.261655
  note on carbon content, fossil: MSW composition in tab 4.1, ecoinvent v2.2 report 13_I. C content referred to 1 kg DM
- ammonia, anhydrous, liquid: 0.000721569 kg; = 0.000654482227803382 * relation_global_country; source COMPAÑÍA ADMINISTRADORA DEL MERCADO MAYO 2014, p. Tab. 12.11 p. 228; lognormal variance with pedigree 0.0226, pedigree (2,4,4,5,1)
  Literature value/calculated value fro flue gas treatment, adapted from the GLO 2008 dataset using the mathematical relation taken from the original dataset and adapted for Argentina with the "efficiency_oil_global/ efficiency_oil_country" parameter.
  For details see comment for parameter 'average efficiency of oil power plants, global'. The efficiency is based on CAMMESA statistics and calculated with own assumptions (see comment on the "efficiency_oi_l country" parameter for more information.
  Source: CAMMESA "COMPAÑÍA ADMINISTRADORA DEL MERCADO MAYORISTA ELÉCTRICO SOCIEDAD ANÓNIMA". Supporting documentation available at: <http://portalweb.cammesa.com/Memnet1/default.aspx> Additional information can be obtained from CAMMESA under request
  Child exchanges are put into relation to the parent exchanges by means of average efficiency of oil power plants in the country and global average efficiency of oil power plants.".
  properties: dry mass 1 kg, wet mass 1 kg
- oil power plant, 500MW: 1.41092e-11 unit; = 1.27974335560263E-11 * relation_global_country; source COMPAÑÍA ADMINISTRADORA DEL MERCADO MAYO 2014; lognormal variance with pedigree 0.3506, pedigree (2,5,5,5,1)
  Estimation, adapted from the GLO 2008 dataset using the mathematical relation taken from the original dataset and adapted for Argentina with the "efficiency_oil_global/ efficiency_oil_country" parameter.
  For details see comment for parameter 'average efficiency of oil power plants, global'. The efficiency is based on CAMMESA statistics and calculated with own assumptions (see comment on the "efficiency_oi_l country" parameter for more information.
  Source: CAMMESA "COMPAÑÍA ADMINISTRADORA DEL MERCADO MAYORISTA ELÉCTRICO SOCIEDAD ANÓNIMA". Supporting documentation available at: <http://portalweb.cammesa.com/Memnet1/default.aspx> Additional information can be obtained from CAMMESA under request
  Child exchanges are put into relation to the parent exchanges by means of average efficiency of oil power plants in the country and global average efficiency of oil power plants.".
- waste mineral oil: -0.000625598 kg; name waste_oil; = (0.000567434011587811 * relation_global_country)*-1; source Jungbluth, N. 2007; lognormal variance with pedigree 0.0438, pedigree (2,3,5,5,1)
  Average of literature data taken from the GLO 2008 dataset
  production volume 8.07992e6 kg; = apv_electricity *waste_oil
    (same comment as for bilge oil)
  property price 0 EUR2005; name waste_oil_price_EUR2005
  properties: dry mass 0.9 kg, carbon content, fossil 0.864444, heating value, net 34.7 MJ, water content 0.111111, wet mass 1 kg
- fly ash and scrubber sludge: -3.02044e-5 kg; name fly_ash; = (2.73962181380553E-05 * relation_global_country)*-1; source Jungbluth, N. 2007, p. Tab. 12.27, p. 238; lognormal variance with pedigree 0.0433, pedigree (2,2,5,5,1)
  Literature value/calculated value, adapted from the GLO 2008 dataset using the mathematical relation taken from the original dataset and adapted for Argentina with the "efficiency_oil_global/ efficiency_oil_country" parameter.
  For details see comment for parameter 'average efficiency of oil power plants, global'. The efficiency is based on CAMMESA statistics and calculated with own assumptions (see comment on the "efficiency_oi_l country" parameter for more information.
  Source: CAMMESA "COMPAÑÍA ADMINISTRADORA DEL MERCADO MAYORISTA ELÉCTRICO SOCIEDAD ANÓNIMA". Supporting documentation available at: <http://portalweb.cammesa.com/Memnet1/default.aspx> Additional information can be obtained from CAMMESA under request
  Child exchanges are put into relation to the parent exchanges by means of average efficiency of oil power plants in the country and global average efficiency of oil power plants.".
  production volume 390106 kg; = apv_electricity * fly_ash
    (same comment as for bilge oil)
  property price 0 EUR2005; name fly_ash_price_EUR2005
  properties: water content 9, carbon content, fossil 0.167, dry mass 0.1 kg, wet mass 1 kg
- heavy fuel oil: 0.27844 kg; = 0.252552604756268 * relation_global_country; source COMPAÑÍA ADMINISTRADORA DEL MERCADO MAYO 2014; lognormal variance with pedigree 0.0433, pedigree (2,2,5,5,1)
  (same comment as for fly ash and scrubber sludge)
  properties: wet mass 1 kg, heating value, net 41.2 MJ, dry mass 1 kg, carbon content, fossil 0.849
- lignite ash: -0.000648191 kg; name lignite_ash; = (0.000587926601413295 * relation_global_country)*-1; source Jungbluth, N. 2007; lognormal variance with pedigree 0.0438, pedigree (2,3,5,5,1)
  Average of literature data, taken from the GLO 2008 dataset
  production volume 8.37172e6 kg; = apv_electricity * lignite_ash
    (same comment as for bilge oil)
  property price 0 EUR2005; name lignite_ash_price_EUR2005
  properties: wet mass 1 kg, dry mass 1 kg

## Inputs from nature
- Water, cooling, unspecified natural origin [natural resource, in water]: 0.107965 m3; name water_cooling_UNO_input; = ((once_through_andCP_CS_fractio_from_allCS*WWithdrawal_EP_oil_onceT_andCP_CS))/9.737*(1/efficiency_oil_country*3.6); source COMPAÑÍA ADMINISTRADORA DEL MERCADO MAYO 2014, p. Tab. 12.10 p. 228; lognormal variance with pedigree 0.3432, pedigree (2,3,5,5,1)
  Calculated value,
  Water is used for cooling and as feed water in the steam circuit for compensating losses. It is assumed that all plants use once-through cooling systems
  The efficiency has been calculated with information retrieved from CAMMESA for the 2014 year.
  Source: CAMMESA "COMPAÑÍA ADMINISTRADORA DEL MERCADO MAYORISTA ELÉCTRICO SOCIEDAD ANÓNIMA" Informe anual 2014. Supporting documentation available at: <http://portalweb.cammesa.com/Memnet1/default.aspx> .
  Additional information can be obtained from CAMMESA under request

## Emissions to nature
- Sodium [air, urban air close to ground]: 3.42484e-6 kg; = 3.1064245220551E-06 * relation_global_country; source COMPAÑÍA ADMINISTRADORA DEL MERCADO MAYO 2014, p. Tab. 12.25; lognormal variance with pedigree 0.0706, pedigree (3,3,4,5,3)
  (same comment as for fly ash and scrubber sludge)
- Selenium [air, urban air close to ground]: 6.04572e-8 kg; = 5.48363096904992E-08 * relation_global_country; source COMPAÑÍA ADMINISTRADORA DEL MERCADO MAYO 2014; lognormal variance with pedigree 1.2433, pedigree (2,2,5,5,2)
  Literature value/calculated value based on particle emission, adapted from the GLO 2008 dataset using the mathematical relation taken from the original dataset and adapted for Argentina with the "efficiency_oil_global/ efficiency_oil_country" parameter.
  For details see comment for parameter 'average efficiency of oil power plants, global'. The efficiency is based on CAMMESA statistics and calculated with own assumptions (see comment on the "efficiency_oi_l country" parameter for more information.
  Source: CAMMESA "COMPAÑÍA ADMINISTRADORA DEL MERCADO MAYORISTA ELÉCTRICO SOCIEDAD ANÓNIMA". Supporting documentation available at: <http://portalweb.cammesa.com/Memnet1/default.aspx> Additional information can be obtained from CAMMESA under request
  Child exchanges are put into relation to the parent exchanges by means of average efficiency of oil power plants in the country and global average efficiency of oil power plants.".
- Lead [air, urban air close to ground]: 3.97637e-7 kg; = 3.60667186373267E-07 * relation_global_country; source COMPAÑÍA ADMINISTRADORA DEL MERCADO MAYO 2014; lognormal variance with pedigree 1.2433, pedigree (2,2,5,5,2)
  (same comment as for fly ash and scrubber sludge)
- Molybdenum [air, urban air close to ground]: 9.1895e-8 kg; = 8.33512865956363E-08 * relation_global_country; source COMPAÑÍA ADMINISTRADORA DEL MERCADO MAYO 2014; lognormal variance with pedigree 1.2433, pedigree (2,2,5,5,2)
  (same comment as for Selenium)
- Lead [water, surface water]: 5.62554e-8 kg; = 5.10252130314862E-08 * relation_global_country; source COMPAÑÍA ADMINISTRADORA DEL MERCADO MAYO 2014, p. Tab. 12.26, p. 238; lognormal variance with pedigree 0.5333, pedigree (2,2,5,5,2)
  (same comment as for fly ash and scrubber sludge)
- Nitrogen [water, surface water]: 9.20827e-5 kg; = 8.3521456053517E-05 * relation_global_country; source COMPAÑÍA ADMINISTRADORA DEL MERCADO MAYO 2014, p. Tab. 12.26, p. 238; lognormal variance with pedigree 0.0633, pedigree (2,2,5,5,2)
  (same comment as for fly ash and scrubber sludge)
- Hydrocarbons, unspecified [water, surface water]: 4.18374e-7 kg; = 3.79476313314415E-07 * relation_global_country; source Jungbluth, N. 2007, p. Tab. 12.26, p. 238; lognormal variance with pedigree 0.0733, pedigree (2,2,5,5,2)
  (same comment as for fly ash and scrubber sludge)
- Acetone [air, urban air close to ground]: 2.88963e-6 kg; = 2.62096973868199E-06 * relation_global_country; source Jungbluth, N. 2007; lognormal variance with pedigree 0.132, pedigree (1,1,5,5,1)
  Literature value/calculated value based on VOC emission adapted from the GLO 2008 dataset using the mathematical relation taken from the original dataset and adapted for Argentina with the "efficiency_oil_global/ efficiency_oil_country" parameter.
  For details see comment for parameter 'average efficiency of oil power plants, global'. The efficiency is based on CAMMESA statistics and calculated with own assumptions (see comment on the "efficiency_oi_l country" parameter for more information.
  Source: CAMMESA "COMPAÑÍA ADMINISTRADORA DEL MERCADO MAYORISTA ELÉCTRICO SOCIEDAD ANÓNIMA". Supporting documentation available at: <http://portalweb.cammesa.com/Memnet1/default.aspx> Additional information can be obtained from CAMMESA under request
  Child exchanges are put into relation to the parent exchanges by means of average efficiency of oil power plants in the country and global average efficiency of oil power plants.".
- Particulates, > 2.5 um, and < 10um [air, urban air close to ground]: 6.86324e-5 kg; = 6.22514591785016E-05 * relation_global_country; source COMPAÑÍA ADMINISTRADORA DEL MERCADO MAYO 2014, p. Tab. 12.17 / Tab. 12.18; lognormal variance with pedigree 0.1387, pedigree (2,2,4,5,3)
  (same comment as for fly ash and scrubber sludge)
- Particulates, > 10 um [air, urban air close to ground]: 7.25086e-5 kg; = 6.57672660175277E-05 * relation_global_country; source COMPAÑÍA ADMINISTRADORA DEL MERCADO MAYO 2014, p. Tab. 12.17 / Tab. 12.18; lognormal variance with pedigree 0.0587, pedigree (2,2,4,5,3)
  (same comment as for fly ash and scrubber sludge)
- Zinc, ion [water, surface water]: 7.12189e-8 kg; = 6.4597469671174E-08 * relation_global_country; source COMPAÑÍA ADMINISTRADORA DEL MERCADO MAYO 2014, p. Tab. 12.26, p. 238; lognormal variance with pedigree 0.2933, pedigree (2,2,5,5,2)
  (same comment as for fly ash and scrubber sludge)
- Acetic acid [air, urban air close to ground]: 1.1799e-5 kg; = 1.07020073585515E-05 * relation_global_country; source Jungbluth, N. 2007; lognormal variance with pedigree 0.132, pedigree (1,1,5,5,1)
  Literature value/calculated value based on VOC emission, adapted from the GLO 2008 dataset using the mathematical relation taken from the original dataset and adapted for Argentina with the "efficiency_oil_global/ efficiency_oil_country" parameter.
  For details see comment for parameter 'average efficiency of oil power plants, global'. The efficiency is based on CAMMESA statistics and calculated with own assumptions (see comment on the "efficiency_oi_l country" parameter for more information.
  Source: CAMMESA "COMPAÑÍA ADMINISTRADORA DEL MERCADO MAYORISTA ELÉCTRICO SOCIEDAD ANÓNIMA". Supporting documentation available at: <http://portalweb.cammesa.com/Memnet1/default.aspx> Additional information can be obtained from CAMMESA under request
  Child exchanges are put into relation to the parent exchanges by means of average efficiency of oil power plants in the country and global average efficiency of oil power plants.".
- PAH, polycyclic aromatic hydrocarbons [air, urban air close to ground]: 2.02443e-8 kg; = 1.83620897840367E-08 * relation_global_country; source COMPAÑÍA ADMINISTRADORA DEL MERCADO MAYO 2014, p. Tab. 12.21, p. 235; lognormal variance with pedigree 0.3306, pedigree (2,4,4,5,3)
  (same comment as for fly ash and scrubber sludge)
- Hydrocarbons, aliphatic, unsaturated [air, urban air close to ground]: 5.8996e-7 kg; = 5.35109739033632E-07 * relation_global_country; source Jungbluth, N. 2007; lognormal variance with pedigree 0.1233, pedigree (2,2,5,5,2)
  (same comment as for Acetic acid)
- Hydrogen chloride [air, urban air close to ground]: 5.14868e-7 kg; = 4.6699915314895E-07 * relation_global_country; source Jungbluth, N. 2007, p. Tab. 12.25; lognormal variance with pedigree 0.0912, pedigree (2,3,5,5,3)
  (same comment as for fly ash and scrubber sludge)
- Hypochlorite [water, ocean]: 3.94596e-6 kg; = 3.57908785086596E-06 * relation_global_country; source COMPAÑÍA ADMINISTRADORA DEL MERCADO MAYO 2014; lognormal variance with pedigree 0.062, pedigree (3,4,4,5,3)
  (same comment as for fly ash and scrubber sludge)
- Mercury [water, surface water]: 1.41428e-9 kg; = 1.28278935719047E-09 * relation_global_country; source COMPAÑÍA ADMINISTRADORA DEL MERCADO MAYO 2014, p. Tab. 12.26, p. 238; lognormal variance with pedigree 0.5933, pedigree (2,2,5,5,2)
  (same comment as for fly ash and scrubber sludge)
- Hypochlorite [water, surface water]: 4.04534e-6 kg; = 3.66923603392927E-06 * relation_global_country; source COMPAÑÍA ADMINISTRADORA DEL MERCADO MAYO 2014; lognormal variance with pedigree 0.072, pedigree (3,4,4,5,3)
  (same comment as for fly ash and scrubber sludge)
- Mercury [air, urban air close to ground]: 1.71242e-9 kg; = 1.55321226102755E-09 * relation_global_country; source COMPAÑÍA ADMINISTRADORA DEL MERCADO MAYO 2014; lognormal variance with pedigree 1.6633, pedigree (2,2,5,5,2)
  (same comment as for fly ash and scrubber sludge)
- Acetaldehyde [air, urban air close to ground]: 2.88963e-6 kg; = 2.62096973868199E-06 * relation_global_country; source Jungbluth, N. 2007; lognormal variance with pedigree 0.132, pedigree (1,1,5,5,1)
  (same comment as for Acetic acid)
- Particulates, < 2.5 um [air, urban air close to ground]: 0.000100687 kg; = 9.13261684426324E-05 * relation_global_country; source COMPAÑÍA ADMINISTRADORA DEL MERCADO MAYO 2014, p. Tab. 12.17 / Tab. 12.18; lognormal variance with pedigree 0.3187, pedigree (2,2,4,5,3)
  (same comment as for fly ash and scrubber sludge)
- Nitrogen oxides [air, urban air close to ground]: 0.00298829 kg; = 0.00271045614138409 * relation_global_country; source COMPAÑÍA ADMINISTRADORA DEL MERCADO MAYO 2014, p. Tab. 12.15 p. 231; lognormal variance with pedigree 0.0507, pedigree (2,2,4,5,1)
  (same comment as for fly ash and scrubber sludge)
- Sulfur dioxide [air, urban air close to ground]: 0.00493145 kg; = 0.00447296246485209 * relation_global_country; source COMPAÑÍA ADMINISTRADORA DEL MERCADO MAYO 2014, p. Tab. 12.14 p. 230; lognormal variance with pedigree 0.0439, pedigree (2,2,5,5,2)
  (same comment as for fly ash and scrubber sludge)
- Ammonia [air, urban air close to ground]: 1.24119e-6 kg; = 1.12579399262229E-06 * relation_global_country; source Jungbluth, N. 2007, p. p.232; lognormal variance with pedigree 1.0433, pedigree (2,2,5,5,2)
  (same comment as for fly ash and scrubber sludge)
- Ethanol [air, urban air close to ground]: 5.8996e-6 kg; = 5.35109739033632E-06 * relation_global_country; source Jungbluth, N. 2007; lognormal variance with pedigree 0.1233, pedigree (2,2,5,5,2)
  (same comment as for fly ash and scrubber sludge)
- Chromium [air, urban air close to ground]: 1.37898e-7 kg; = 1.25077099991164E-07 * relation_global_country; source Jungbluth, N. 2007, p. Tab. 12.23, Tab. 12.24; lognormal variance with pedigree 1.4553, pedigree (2,2,3,5,2)
  (same comment as for fly ash and scrubber sludge)
- Formaldehyde [air, urban air close to ground]: 8.84945e-6 kg; = 8.02669478279528E-06 * relation_global_country; source Jungbluth, N. 2007, p. Tab. 12.19, Tab. 12.20; lognormal variance with pedigree 0.1233, pedigree (2,2,5,5,2)
  (same comment as for fly ash and scrubber sludge)
- Phosphorus [water, surface water]: 2.0877e-7 kg; = 1.8936030125843E-07 * relation_global_country; source COMPAÑÍA ADMINISTRADORA DEL MERCADO MAYO 2014, p. Tab. 12.26, p. 238; lognormal variance with pedigree 0.0439, pedigree (2,2,5,5,2)
  (same comment as for fly ash and scrubber sludge)
- Zinc [air, urban air close to ground]: 2.90194e-7 kg; = 2.63213980145308E-07 * relation_global_country; source COMPAÑÍA ADMINISTRADORA DEL MERCADO MAYO 2014; lognormal variance with pedigree 1.2433, pedigree (2,2,5,5,2)
  (same comment as for fly ash and scrubber sludge)
- Arsenic [air, urban air close to ground]: 7.98034e-8 kg; = 7.23838706169984E-08 * relation_global_country; source Jungbluth, N. 2007, p. Tab. 12.23, Tab. 12.24; lognormal variance with pedigree 1.1933, pedigree (2,2,5,5,2)
  (same comment as for fly ash and scrubber sludge)
- Cadmium [air, urban air close to ground]: 3.82088e-8 kg; = 3.46564315860632E-08 * relation_global_country; source Jungbluth, N. 2007, p. Tab. 12.23, Tab. 12.24; lognormal variance with pedigree 1.2433, pedigree (2,2,5,5,2)
  (same comment as for fly ash and scrubber sludge)
- AOX, Adsorbable Organic Halogen as Cl [water, surface water]: 7.17619e-8 kg; = 6.50899387734297E-08 * relation_global_country; source Jungbluth, N. 2007, p. Tab. 12.26, p. 238; lognormal variance with pedigree 0.0439, pedigree (2,2,5,5,2)
  (same comment as for fly ash and scrubber sludge)
- Hydrogen fluoride [air, urban air close to ground]: 3.43626e-7 kg; = 3.11677927046195E-07 * relation_global_country; source COMPAÑÍA ADMINISTRADORA DEL MERCADO MAYO 2014, p. Tab. 12.25; lognormal variance with pedigree 0.0912, pedigree (2,3,5,5,3)
  (same comment as for fly ash and scrubber sludge)
- Tin, ion [water, surface water]: 1.34685e-9 kg; = 1.22162689595615E-09 * relation_global_country; source COMPAÑÍA ADMINISTRADORA DEL MERCADO MAYO 2014, p. Tab. 12.26, p. 238; lognormal variance with pedigree 0.0439, pedigree (2,2,5,5,2)
  (same comment as for fly ash and scrubber sludge)
- Water [air, unspecified]: 0.000568228 m3; name water_to_air_unspecified; = (water_softened_input/1000)*fraction_WCS_to_air+water_cooling_UNO_input*fraction_CW_to_air; lognormal variance with pedigree 0.098025, pedigree (4,4,4,2,4)
  (same comment as for fly ash and scrubber sludge)
  property fraction, origin: fresh water 0.0259209; name fraction_origin_fresh_water
  property fraction, origin: unspecified 0.974079; name fraction_origin_unspecified
  property fraction, origin: salt water 0; name fraction_origin_salt_water
- Iron, ion [water, surface water]: 1.41639e-6 kg; = 1.28470679989333E-06 * relation_global_country; source COMPAÑÍA ADMINISTRADORA DEL MERCADO MAYO 2014, p. Tab. 12.26, p. 238; lognormal variance with pedigree 0.2733, pedigree (2,2,5,5,2)
  Literature value/calculated value, adapted from the GLO 2008 dataset using the mathematical relation taken from the original dataset and adapted for Argentina with the "efficiency_oil_global/ efficiency_oil_country" parameter.
  For details see comment for parameter 'average efficiency of oil power plants, global'. The efficiency is based on CAMMESA statistics and calculated with own assumptions (see comment on the "efficiency_oi_l country" parameter for more information.
  Source: CAMMESA "COMPAÑÍA ADMINISTRADORA DEL MERCADO MAYORISTA ELÉCTRICO SOCIEDAD ANÓNIMA". Supporting documentation available at: <http://portalweb.cammesa.com/Memnet1/default.aspx> Additional information can be obtained from CAMMESA under request
  Child exchanges are put into relation to the parent exchanges by means of average efficiency of oil power plants in the country and global average efficiency of oil power plants."
  Original value: Literature data/estimations. See Tab. 12.26 for details: concentration of pollutants in the wastewater of oil power plants and of flue gas treatment as well as in the condensate and feed water preparation. Mean of values for Europe, range of concentrations.
  Slovenské elektrárne (2002) Environment Report 2001, Bratislave, SK, retrieved from: www.seas.sk.
  EDP (2001) Environmental Report 2000. Electricidade de Portugal, S.A., Lisboa, PT, retrieved from: www.edp.pt.
  IPPC (2001b) Integrated Pollution Prevention and Control (IPPC): Draft Reference Document on Best Available Techniques for Large Combustion Plants. European Commission Directorate- General JRC, Joint Research Centre, Seville, Spain, retrieved from: http://eippcb.jrc.es.
- Water [water, unspecified]: 0.107512 m3; name water_to_water_unspecified; = (water_softened_input/1000)*(1-fraction_WCS_to_air)+water_cooling_UNO_input*(1-fraction_CW_to_air); lognormal variance with pedigree 0.098025, pedigree (4,4,4,2,4)
  (same comment as for fly ash and scrubber sludge)
  property fraction, origin: salt water 0; name fraction_origin_salt_water_Ww
  property fraction, origin: unspecified 0.989318; name fraction_origin_unspecified_Ww
  property fraction, origin: fresh water 0.0106825; name fraction_origin_fresh_water_Ww
- Dioxins, measured as 2,3,7,8-tetrachlorodibenzo-p-dioxin [air, urban air close to ground]: 1.16607e-13 kg; = 1.05766153371863E-13 * relation_global_country; source Jungbluth, N. 2007, p. Tab. 12.22 p. 235; lognormal variance with pedigree 0.3452, pedigree (2,4,5,5,2)
  Literature value/calculated value, adapted for Argentina using the mathematical relation used in the GLO 2008 dataset with the "efficiency_oil_global/ efficiency_oil_country" parameter.
  For details see comment for parameter 'average efficiency of oil power plants, global'. The efficiency is based on CAMMESA statistics and calculated with own assumptions (see comment on the "efficiency_oi_l country" parameter for more information.
  Source: CAMMESA "COMPAÑÍA ADMINISTRADORA DEL MERCADO MAYORISTA ELÉCTRICO SOCIEDAD ANÓNIMA". Supporting documentation available at: <http://portalweb.cammesa.com/Memnet1/default.aspx> Additional information can be obtained from CAMMESA under request
  Child exchanges are put into relation to the parent exchanges by means of average efficiency of oil power plants in the country and global average efficiency of oil power plants.".
- Sulfide [water, surface water]: 6.06104e-7 kg; = 5.49752460070304E-07 * relation_global_country; source COMPAÑÍA ADMINISTRADORA DEL MERCADO MAYO 2014, p. Tab. 12.26, p. 238; lognormal variance with pedigree 0.3033, pedigree (2,2,5,5,2)
  (same comment as for fly ash and scrubber sludge)
- Cobalt [air, urban air close to ground]: 4.232e-7 kg; = 3.83853480105306E-07 * relation_global_country; source Jungbluth, N. 2007, p. Tab. 12.23, Tab. 12.24; lognormal variance with pedigree 1.2433, pedigree (2,2,5,5,2)
  (same comment as for fly ash and scrubber sludge)
- Vanadium [air, urban air close to ground]: 1.18127e-5 kg; = 1.07144316567474E-05 * relation_global_country; source COMPAÑÍA ADMINISTRADORA DEL MERCADO MAYO 2014; lognormal variance with pedigree 1.4233, pedigree (2,2,5,5,2)
  (same comment as for fly ash and scrubber sludge)
- Hydrocarbons, aliphatic, alkanes, unspecified [air, urban air close to ground]: 1.1799e-5 kg; = 1.07020073585515E-05 * relation_global_country; source Jungbluth, N. 2007; lognormal variance with pedigree 0.1233, pedigree (2,2,5,5,2)
  (same comment as for Acetic acid)
- Cadmium, ion [water, surface water]: 3.27747e-9 kg; = 2.97275399353465E-09 * relation_global_country; source Jungbluth, N. 2007, p. Tab. 12.26, p. 238; lognormal variance with pedigree 0.4533, pedigree (2,2,5,5,2)
  (same comment as for fly ash and scrubber sludge)
- Cobalt [water, surface water]: 2.69381e-9 kg; = 2.44335526523885E-09 * relation_global_country; source Jungbluth, N. 2007, p. Tab. 12.26, p. 238; lognormal variance with pedigree 0.0439, pedigree (2,2,5,5,2)
  (same comment as for fly ash and scrubber sludge)
- Propane [air, urban air close to ground]: 5.8996e-7 kg; = 5.35109739033632E-07 * relation_global_country; source COMPAÑÍA ADMINISTRADORA DEL MERCADO MAYO 2014, p. Tab. 12.19, Tab. 12.20; lognormal variance with pedigree 0.1233, pedigree (2,2,5,5,2)
  (same comment as for fly ash and scrubber sludge)
- Vanadium, ion [water, surface water]: 4.10306e-7 kg; = 3.72158241611466E-07 * relation_global_country; source COMPAÑÍA ADMINISTRADORA DEL MERCADO MAYO 2014, p. Tab. 12.26, p. 238; lognormal variance with pedigree 0.7033, pedigree (2,2,5,5,2)
  (same comment as for fly ash and scrubber sludge)
- Nickel, ion [water, surface water]: 2.00154e-7 kg; = 1.81544893999945E-07 * relation_global_country; source COMPAÑÍA ADMINISTRADORA DEL MERCADO MAYO 2014, p. Tab. 12.26, p. 238; lognormal variance with pedigree 0.3733, pedigree (2,2,5,5,2)
  (same comment as for fly ash and scrubber sludge)
- DOC, Dissolved Organic Carbon [water, surface water]: 1.11827e-6 kg; = 1.01430469569203E-06 * relation_global_country; source Jungbluth, N. 2007; lognormal variance with pedigree 0.0439, pedigree (2,2,5,5,2)
  (same comment as for water, completely softened)
- Chromium VI [air, urban air close to ground]: 3.55282e-9 kg; = 3.22250125169589E-09 * relation_global_country; source Jungbluth, N. 2007, p. Tab. 12.23, Tab. 12.24; lognormal variance with pedigree 2.2526, pedigree (3,3,4,5,1)
  (same comment as for fly ash and scrubber sludge)
- Methane, fossil [air, urban air close to ground]: 5.8996e-5 kg; = 5.35109739033632E-05 * relation_global_country; source COMPAÑÍA ADMINISTRADORA DEL MERCADO MAYO 2014, p. Tab. 12.19, Tab. 12.20; lognormal variance with pedigree 0.1233, pedigree (2,2,5,5,2)
  (same comment as for fly ash and scrubber sludge)
- Carbon monoxide, fossil [air, urban air close to ground]: 0.000141476 kg; = 0.000128322586737377 * relation_global_country; source Jungbluth, N. 2007, p. Tab. 12.13, p. 229; lognormal variance with pedigree 0.1933, pedigree (2,2,5,5,2)
  (same comment as for fly ash and scrubber sludge)
- Benzene [air, urban air close to ground]: 5.8996e-7 kg; = 5.35109739033632E-07 * relation_global_country; source Jungbluth, N. 2007; lognormal variance with pedigree 0.1233, pedigree (2,2,5,5,2)
  (same comment as for Acetic acid)
- TOC, Total Organic Carbon [water, surface water]: 1.15831e-5 kg; = 1.05061549900062E-05 * relation_global_country; source COMPAÑÍA ADMINISTRADORA DEL MERCADO MAYO 2014, p. Tab. 12.26, p. 238; lognormal variance with pedigree 0.0439, pedigree (2,2,5,5,2)
  (same comment as for fly ash and scrubber sludge)
- Arsenic, ion [water, surface water]: 1.34685e-9 kg; = 1.22162689595615E-09 * relation_global_country; source Jungbluth, N. 2007, p. Tab. 12.26, p. 238; lognormal variance with pedigree 0.0439, pedigree (2,2,5,5,2)
  (same comment as for fly ash and scrubber sludge)
- Copper, ion [water, surface water]: 2.84798e-8 kg; = 2.58319599150767E-08 * relation_global_country; source Jungbluth, N. 2007, p. Tab. 12.26, p. 238; lognormal variance with pedigree 0.7533, pedigree (2,2,5,5,2)
  (same comment as for fly ash and scrubber sludge)
- Oils, unspecified [water, surface water]: 6.38959e-7 kg; = 5.79552688181026E-07 * relation_global_country; source COMPAÑÍA ADMINISTRADORA DEL MERCADO MAYO 2014, p. Tab. 12.26, p. 238; lognormal variance with pedigree 0.0633, pedigree (2,2,5,5,2)
  (same comment as for fly ash and scrubber sludge)
- Sulfite [water, surface water]: 2.0338e-5 kg; = 1.84471359144431E-05 * relation_global_country; source COMPAÑÍA ADMINISTRADORA DEL MERCADO MAYO 2014, p. Tab. 12.26, p. 238; lognormal variance with pedigree 0.0633, pedigree (2,2,5,5,2)
  (same comment as for fly ash and scrubber sludge)
- Fluoride [water, surface water]: 2.28977e-6 kg; = 2.07688744963416E-06 * relation_global_country; source Jungbluth, N. 2007, p. Tab. 12.26, p. 238; lognormal variance with pedigree 0.7933, pedigree (2,2,5,5,2)
  (same comment as for fly ash and scrubber sludge)
- Beryllium [air, urban air close to ground]: 6.36701e-10 kg; = 5.77505028146857E-10 * relation_global_country; source Jungbluth, N. 2007; lognormal variance with pedigree 0.6626, pedigree (3,3,4,5,1)
  (same comment as for fly ash and scrubber sludge)
- Dinitrogen monoxide [air, urban air close to ground]: 4.60226e-5 kg; = 4.17437183887658E-05 * relation_global_country; source Jungbluth, N. 2007, p. Tab. 12.16 p. 232; lognormal variance with pedigree 0.3833, pedigree (2,2,5,5,2)
  (same comment as for fly ash and scrubber sludge)
- Chromium, ion [water, surface water]: 3.43599e-8 kg; = 3.11653979581671E-08 * relation_global_country; source Jungbluth, N. 2007, p. Tab. 12.26, p. 238; lognormal variance with pedigree 0.6633, pedigree (2,2,5,5,2)
  (same comment as for fly ash and scrubber sludge)
- Nickel [air, urban air close to ground]: 3.26413e-6 kg; = 2.96065189134384E-06 * relation_global_country; source COMPAÑÍA ADMINISTRADORA DEL MERCADO MAYO 2014; lognormal variance with pedigree 1.2433, pedigree (2,2,5,5,2)
  (same comment as for Selenium)
- Chloride [water, surface water]: 0.000275571 kg; = 0.000249950716155834 * relation_global_country; source Jungbluth, N. 2007, p. Tab. 12.26, p. 238; lognormal variance with pedigree 0.9233, pedigree (2,2,5,5,2)
  (same comment as for fly ash and scrubber sludge)
- Hydrocarbons, aromatic [air, urban air close to ground]: 1.1799e-7 kg; = 1.07020073585515E-07 * relation_global_country; source Jungbluth, N. 2007; lognormal variance with pedigree 0.1233, pedigree (2,2,5,5,2)
  (same comment as for Acetic acid)
- Carbon dioxide, fossil [air, unspecified]: 0.00705415 kg; = 0.00639830258807689 * relation_global_country; source Jungbluth, N. 2007, p. Tab. 12.29, Tab. 12.30; lognormal variance with pedigree 0.0606, pedigree (2,5,5,5,1)
  (same comment as for fly ash and scrubber sludge)
- Iron [air, urban air close to ground]: 7.9913e-7 kg; = 7.24832388479523E-07 * relation_global_country; source COMPAÑÍA ADMINISTRADORA DEL MERCADO MAYO 2014; lognormal variance with pedigree 0.6806, pedigree (3,3,4,5,3)
  (same comment as for fly ash and scrubber sludge)
- Carbon dioxide, fossil [air, urban air close to ground]: 0.892966 kg; = 0.809944632370249 * relation_global_country; source Jungbluth, N. 2007, p. Tab. 12.12, p. 229; lognormal variance with pedigree 0.0433, pedigree (2,2,5,5,1)
  (same comment as for fly ash and scrubber sludge)
- Calcium [air, urban air close to ground]: 3.42484e-7 kg; = 3.1064245220551E-07 * relation_global_country; source Jungbluth, N. 2007, p. Tab. 12.25; lognormal variance with pedigree 0.0606, pedigree (3,3,4,5,3)
  (same comment as for fly ash and scrubber sludge)
- COD, Chemical Oxygen Demand [water, surface water]: 2.16647e-5 kg; = 1.96505045960835E-05 * relation_global_country; source Jungbluth, N. 2007, p. Tab. 12.26, p. 238; lognormal variance with pedigree 0.5133, pedigree (2,2,5,5,2)
  (same comment as for fly ash and scrubber sludge)
- Benzo(a)pyrene [air, urban air close to ground]: 1.71242e-10 kg; = 1.55321226102755E-10 * relation_global_country; source Jungbluth, N. 2007; lognormal variance with pedigree 0.3726, pedigree (3,3,5,5,3)
  (same comment as for fly ash and scrubber sludge)
- Methanol [air, urban air close to ground]: 5.8996e-6 kg; = 5.35109739033632E-06 * relation_global_country; source COMPAÑÍA ADMINISTRADORA DEL MERCADO MAYO 2014; lognormal variance with pedigree 0.1233, pedigree (2,2,5,5,2)
  (same comment as for fly ash and scrubber sludge)
- Manganese [air, urban air close to ground]: 1.33006e-7 kg; = 1.20639782314836E-07 * relation_global_country; source COMPAÑÍA ADMINISTRADORA DEL MERCADO MAYO 2014, p. Tab. 12.23, Tab. 12.24; lognormal variance with pedigree 1.2433, pedigree (2,2,5,5,2)
  (same comment as for fly ash and scrubber sludge)
- BOD5, Biological Oxygen Demand [water, surface water]: 1.98078e-5 kg; = 1.79661764796503E-05 * relation_global_country; source Jungbluth, N. 2007, p. Tab. 12.26, p. 238; lognormal variance with pedigree 0.3233, pedigree (2,2,5,5,2)
  (same comment as for fly ash and scrubber sludge)
- Manganese [water, surface water]: 4.04065e-8 kg; = 3.66498257602651E-08 * relation_global_country; source COMPAÑÍA ADMINISTRADORA DEL MERCADO MAYO 2014, p. Tab. 12.26, p. 238; lognormal variance with pedigree 0.0439, pedigree (2,2,5,5,2)
  (same comment as for fly ash and scrubber sludge)
- Sulfate [water, surface water]: 0.00225268 kg; = 0.0020432380627013 * relation_global_country; source COMPAÑÍA ADMINISTRADORA DEL MERCADO MAYO 2014, p. Tab. 12.26, p. 238; lognormal variance with pedigree 0.0533, pedigree (2,2,5,5,2)
  (same comment as for fly ash and scrubber sludge)
- Suspended solids, unspecified [water, surface water]: 2.48474e-5 kg; = 2.25373034350681E-05 * relation_global_country; source COMPAÑÍA ADMINISTRADORA DEL MERCADO MAYO 2014, p. Tab. 12.26, p. 238; lognormal variance with pedigree 0.0833, pedigree (2,2,5,5,2)
  (same comment as for fly ash and scrubber sludge)
- Thallium [water, surface water]: 4.17541e-8 kg; = 3.78720561033709E-08 * relation_global_country; source COMPAÑÍA ADMINISTRADORA DEL MERCADO MAYO 2014, p. Tab. 12.26, p. 238; lognormal variance with pedigree 0.0439, pedigree (2,2,5,5,2)
  (same comment as for fly ash and scrubber sludge)
- Copper [air, urban air close to ground]: 5.46176e-7 kg; = 4.95396522447329E-07 * relation_global_country; source Jungbluth, N. 2007, p. Tab. 12.23, Tab. 12.24; lognormal variance with pedigree 1.3433, pedigree (2,2,5,5,2)
  (same comment as for fly ash and scrubber sludge)

## Sampling procedure
This dataset includes different technologies (Gas Turbines, Steam Turbines and Diesel engines) and different oil-derived fuels (Gas Oil and Fuel Oil). The net electricity production in Argentina from these power plants during 2014 was 12.91 TWh.

## Extrapolations
This dataset has been extrapolated from year 2017 to the year of the calculation (2021). The uncertainty has been adjusted accordingly.
