# aluminium sulfate production, powder

Dataset: EcoSpold 2, unit process
Geography: RoW
Time period: 1995-01-01 to 2021-12-31
Technology level: current
Classification: ISIC rev.4 ecoinvent: 2011:Manufacture of basic chemicals
Synonyms: Dialuminum trisulfate; Filter Alum; Papermaker's Alum; Aluminium sulphate; Aluminum sulphate
Scenario: Business-as-Usual
System model: Allocation, cut-off by classification
Generated by: Roland Hischier
Published in: Hischier R. 2007
Database: ecoinvent
isCopyrightProtected: true
accessRestrictedTo: 1

## General comment
This dataset represents the production of 1 kg of aluminium sulfate. Aluminium sulfate (Al2(SO4)3) in its anhydrous forms a white powder, readily soluble in water. Aluminium sulfate is the second most important industrial compound of alumnium after aluminium oxide. Aluminium sulfate is mainly used for treating water and about one half of the total production goes into the paper industry. In Germany and most European countries, aluminium sulfate is produced primarily from aluminium hydroxide and sulfuric acid by the Giulini process. This dataset is based on information provided in a filled in questionnaire by one European company.
References:
Hischier R. (2007) Life Cycle Inventories of Packagings & Graphical Papers. ecoinvent-Report No. 11, Swiss Centre for Life Cycle Inventories, Dübendorf, 2007.
Helmboldt, O., Keith Hudson, L., Misra, C., Wefers, K., Heck, W., Stark, H., Danner, M. and Rösch, N. 2007. Aluminum Compounds, Inorganic. Ullmann's Encyclopedia of Industrial Chemistry. 1–17.

## Included activities start
The activity starts when the raw materials enter the process.

## Included activities end
This activity ends with the production of aluminium sulfate. It includes the processing of the raw input materials, as well as the energy consumption for production. No emissions are included apart from water.

## Geography
Data used are from one single company in Europe. They are assumed to be representative of the global production.

## Technology
Data based on the information from one European producer. The inventory is based on a filled in questionnaire. The technology refers to the production of aluminium sulfate from aluminium hydroxide and sulfuric acid through the Giulini process.
Reference(s):
Hischier R. (2007) Life Cycle Inventories of Packagings & Graphical Papers. ecoinvent-Report No. 11, Swiss Centre for Life Cycle Inventories, Dübendorf, 2007.
Helmboldt, O., Keith Hudson, L., Misra, C., Wefers, K., Heck, W., Stark, H., Danner, M. and Rösch, N. 2007. Aluminum Compounds, Inorganic. Ullmann's Encyclopedia of Industrial Chemistry. 1–17.

## Time period
Data from 1995, confirmed as still valid by the same company.

## Parameters
- fraction, process water, to air: 0.205 dimensionless; name fraction_PW_to_air; lognormal variance with pedigree 0.092025, pedigree (4,4,3,2,4)
  Literature value (Statistics Canada, 2007 & Shaffer, K.H., 2008, Consumptive water use in the Great Lakes Basin, USGS) (Vionnet, S., Quantis Water Database - Technical Report, 2012).

## Reference product
- aluminium sulfate, powder: 1 kg; name RP; CPC 34240: Phosphates of triammonium; salts and peroxysalts of inorganic acids and metals n.e.c.; By-product classification allocatable product; CAS 10043-01-3
  Aluminium sulfate (Al2(SO4)3) in its anhydrous forms a white powder, readily soluble in water. Aluminium sulfate is the second most important industrial compound of alumnium after aluminium oxide. Aluminium sulfate is mainly used for treating water and about one half of the total production goes into the paper industry.
  References:
  Hischier R. (2007) Life Cycle Inventories of Packagings & Graphical Papers. ecoinvent-Report No. 11, Swiss Centre for Life Cycle Inventories, Dübendorf, 2007.
  Helmboldt, O., Keith Hudson, L., Misra, C., Wefers, K., Heck, W., Stark, H., Danner, M. and Rösch, N. 2007. Aluminum Compounds, Inorganic. Ullmann's Encyclopedia of Industrial Chemistry. 1–17.
  production volume 2.87201e9 kg; name RP_PV
    Estimated value. The global production volume is extrapolated from the European production volume based on reports from Cefic (European Chemical Industry Council), and the American Chemistry Council.
    According to Cefic (2016a) the global sales of chemicals in the year 2015 was 3 534 billion euros. The reported share of sales per region are: EU28 14.7%; Other Europe (Switzerland, Norway, Turkey, Russia and Ukraine) 2.7%; NAFTA (US, Canada and Mexico) 16.5%; Latin America 3.8%; China 39.9%; Japan 3.9%; Republic of Korea 3.2%; India 2.2%; Rest of Asia 11.9%; Rest of the World 1.3%. Cefic also reports the US total sales, which amount to 518.7 billion euros out of the global 3 534 billion euros (14.7%). The same share is reported by the American Chemistry Council (2016), according to which the USA sales account for 15% of global sales for the year 2016.
    European production volume:
    Estimated value. According to the European Chemical Agency, the consumption of Aluminium sulphate for the year of 2016 is estimated to be 550000000 kg. The aforementioned value is the average of the range given in the literature. According to the European Chemical Industry Council (Cefic, 2016a), the total sales of chemicals of the European Union in 2016 amounted to 519 billion euros. Chemical imports were valued at 91 billion euros for the first 11 months of 2016. Based on this, the value for the total imports for the year 2016 was extrapolated, yielding a value of 99.3 billion euros. Furthermore, Cefic (2016b) reports a trade surplus (exports-imports) of 46.4 billion euros (once again extrapolated for the whole year using the value of 42 billion euros for the first 11 months of 2016). Considering all the aforementioned information, the total chemical consumption in the EU is calculated to be 472.6 billion euros (total sales-exports+imports). It is therefore calculated that production is 110% of consumption. This value is used to scale the information on chemical consumption to production. The European production volume is therefore 605000000 kg.
    Since no data were found for the global production this value was scaled accordingly.
    References:
    American Chemistry Council 2016. Outlook: U.S. Chemical Industry Continues to Outpace Industrial Output; Accounts for More Than One-Half of Construction Spending by Manufacturing Sector. Accessible at: https://www.americanchemistry.com/Media/PressReleasesTranscripts/ACC-news-releases/US-Chemical-Industry-Continues-to-Outpace-Industrial-Output.html
    European Chemical Agency, Brief profile of Aluminium sulphate, Accessible at: https://echa.europa.eu/brief-profile/-/briefprofile/100.030.110
    Cefic 2016a. Facts and figures 2016 of the European chemical industry. Accessible at: http://www.cefic.org/Facts-and-Figures/Chemicals-Industry-Profile/
    Cefic 2016b. 2016: EU chemicals output posts positive growth for third year running. Accessible at: http://www.cefic.org/Documents/RESOURCES/Chemical%20Trends%20Report/March-2017-Cefic-Chemicals-Trends-Report.pdf
  property price 0.18 EUR2005
    Calculated value based on data from United Nations Commodity Trade Statistics Database (comtrade.un.org). UN comtrade category: 283322 Aluminium sulphate. Using exchange rate of 1EURO = 1.209 USD. Average of price of import into 5 main markets (EU, US, JP, IN and CN).
  property carbon content 0
    carbon content on a dry matter basis (reserved; not for manual entry)
  properties: carbon content, fossil 0, wet mass 1 kg, water content 0, water in wet mass 0 kg, dry mass 1 kg, carbon content, non-fossil 0, carbon allocation 0 kg

## Inputs from technosphere
- sulfuric acid: 0.5 kg; lognormal variance with pedigree 0.0632, pedigree (2,3,5,5,1)
  Data in Habersatter 1998 - verified with producer
  Uncertainty: d
  properties: dry mass 1 kg, wet mass 1 kg
- aluminium hydroxide: 0.25 kg; lognormal variance with pedigree 0.0632, pedigree (2,3,5,5,1)
  Data in Habersatter 1998 - verified with producer
  Uncertainty: d
  properties: wet mass 1 kg, dry mass 1 kg
- electricity, medium voltage: 0 kWh; pedigree (1,1,1,1,1)
  Data in Habersatter 1998 - verified with producer
  Uncertainty: d
- chemical factory, organics: 4e-10 unit; lognormal variance with pedigree 0.3498, pedigree (2,3,5,4,3)
  Calculated based on literature data published by the industry. For this activity, no information was readily available concerning infrastructure and land-use. Therefore, the infrastructure is estimated based on data from two chemical factories, the BASF site of Ludwigshafen and the chemical factory in Gendorf (which are both located in Germany), which produce a wide range of chemical substances. Based on this data, the following assumptions are made: the built area amounts to about 4.2 ha, the plant has an average output of 50'000 t/a and a lifespan of fifty years. The estimated infrastructure amount is therefore 4.00 E-10 units per kg of produced chemical.
  References:
  Althaus H.-J., Chudacoff M., Hischier R., Jungbluth N., Osses M. and Primas A. (2007) Life Cycle Inventories of Chemicals. ecoinvent report No. 8, v2.0. EMPA Dübendorf, Swiss Centre for Life Cycle Inventories, Dübendorf, CH.
  Gendorf (2000) Umwelterklärung 2000, Werk Gendorf. Werk Gendorf, Burgkirchen.
- electricity, medium voltage: 0.00630259, 0.00120857, 0.0202893, 0.29509, 0.0415931, 0.135516 kWh (6 entries); lognormal variance with pedigree 0.0632, pedigree (2,3,5,5,1)
  Data in Habersatter 1998 - verified with producer
  Uncertainty: d

## Inputs from nature
- Water, unspecified natural origin [natural resource, in water]: 0.00025 m3; name water_UNO_input; lognormal variance with pedigree 0.0632, pedigree (2,3,5,5,1)
  Data in Habersatter 1998 - verified with producer
  Uncertainty: d

## Emissions to nature
- Water [air, unspecified]: 5.125e-5 m3; = (water_UNO_input*fraction_PW_to_air); lognormal variance with pedigree 0.0827, pedigree (2,2,5,5,1)
  Calculated as a fraction of the input of water. For more details, refer to the mathematical relation and the parameters.
  property fraction, origin: fresh water 0; name fraction_origin_fresh_water
  property fraction, origin: salt water 0; name fraction_origin_salt_water
  property fraction, origin: unspecified 1; name fraction_origin_unspecified
- Water [water, unspecified]: 0.00019875 m3; = water_UNO_input*(1-fraction_PW_to_air); lognormal variance with pedigree 0.0827, pedigree (2,2,5,5,1)
  (same comment as for Water)
  property fraction, origin: unspecified 1; name fraction_origin_unspecified_Ww
  property fraction, origin: salt water 0; name fraction_origin_salt_water_Ww
  property wet mass 1000 kg; name WM
  property water in wet mass 1000 kg; name WWM
  property fraction, origin: fresh water 0; name fraction_origin_fresh_water_Ww
  property carbon content, fossil 0; name C_content_fossil
  property dry mass 0 kg; name DM
  property carbon content, non-fossil 0; name C_content_non_fossil

## Sampling procedure
Data based on filled in form of one single company and expanded with standard approximations according to methodology of study.

## Extrapolations
This dataset has been copied from an original dataset covering the geography RER. The uncertainty has been adjusted accordingly.

## Review by Emilia Moreno Ruiz 2017-08-08
This dataset was additionally reviewed in a separate review process by Eric Johnson of Atlantic Consulting as well as Emilia Moreno Ruiz and Gregor Wernet of ecoinvent.
