# concrete, all types to generic market for concrete, normal strength

Dataset: EcoSpold 2, unit process
Geography: RoW
Time period: 2019-01-01 to 2021-12-31
Technology level: current
Classification: ISIC rev.4 ecoinvent: 2395:Manufacture of articles of concrete, cement and plaster
Scenario: Business-as-Usual
System model: Allocation, cut-off by classification
Generated by: Lucia Valsasina
Database: ecoinvent
isCopyrightProtected: true
accessRestrictedTo: 1

## General comment
This is a linking (transfering) activity which links the specific concrete types to the generic market for concrete, normal.
The shares of the different types of concrete are set based on production volumes of the respective activities and geographies.

## Included activities start
The activity starts with the reception of a specific concrete.

## Included activities end
The activity ends with concrete, normal which is supplied to the generic market for concrete, normal.

## Reference product
- concrete, normal: 1 m3; By-product classification allocatable product; CPC 37540: Tiles, flagstones, bricks and similar articles, of cement, concrete or artificial stone
  production volume 5.524e8 m3
    PV is calculated assuming that 20% of the regional PV is redirected to the generic market.
  property price 185 EUR2005
    Data are not easily available. Therefore, an average price of products supplied by the activities in the same ISIC 3 code has been applied.This price is obtained as '_49 Concrete, asphalt and other mineral products, EU27 virgin, EU27' in the 'EU & DK Input Output Database' (available in SimaPro). The price is assumed to be valid for both RER2003, RER 2004, world 2003 and world 2004. Multiplied by density.
  property carbon content, non-fossil 0
    cement and gravel. Tab 6.2, ecoinvent v2.2 report 7, part III
  property carbon content, fossil 0
    cement and gravel. Tab 6.2, ecoinvent v2.2 report 7, part III
  property carbon content 0
    carbon content on a dry matter basis (reserved; not for manual entry)
  properties: water in wet mass 190 kg, water content 0.086758, dry mass 2190 kg, wet mass 2380 kg, carbon allocation 0 kg

## Inputs from technosphere
- concrete, 20MPa: 0.121123 m3
  Shares calculated based on the regional production volumes.
- concrete, 25MPa: 0.254742 m3
  Shares calculated based on the regional production volumes.
- concrete, 25-30MPa: 0.427673 m3
  Shares calculated based on the regional production volumes.
- concrete, 35MPa: 0.10244 m3
  Shares calculated based on the regional production volumes.
- concrete, 30MPa: 0.0316301 m3
  Shares calculated based on the regional production volumes.
- concrete, 30-32MPa: 0.0623927 m3
  Shares calculated based on the regional production volumes.
