# natural gas venting from petroleum/natural gas production

Dataset: EcoSpold 2, unit process
Geography: GLO
Time period: 2000-01-01 to 2021-12-31
Technology level: current
Classification: EcoSpold01Categories: oil/production
Classification: ISIC rev.4 ecoinvent: 0610:Extraction of crude petroleum
Tags: ConvertedDataset
Scenario: Business-as-Usual
System model: Allocation, cut-off by classification
Generated by: Niels Jungbluth
Published in: Jungbluth, N. 2007
Database: ecoinvent
isCopyrightProtected: true
accessRestrictedTo: 1

## General comment
Estimation based on average composition of gas.
[This dataset was already contained in the ecoinvent database version 2. It was not individually updated during the transfer to ecoinvent version 3. Life Cycle Impact Assessment results may still have changed, as they are affected by changes in the supply chain, i.e. in other datasets. This dataset was generated following the ecoinvent quality guidelines for version 2. It may have been subject to central changes described in the ecoinvent version 3 change report (http://www.ecoinvent.org/database/ecoinvent-version-3/reports-of-changes/), and the results of the central updates were reviewed extensively. The changes added e.g. consistent water flows and other information throughout the database. The documentation of this dataset can be found in the ecoinvent reports of version 2, which are still available via the ecoinvent website. The change report linked above covers all central changes that were made during the conversion process.]

## Included activities end
Emissions due to the venting of natural gas during crude oil production.

## Geography
Global average.

## Technology
Gas venting during oil and gas exploration.

## Time period
Time of estimation.

## Reference product
- natural gas, vented: 1 m3; CPC 12020: Natural gas, liquefied or in the gaseous state; By-product classification allocatable product; CAS 14493-06-2
  EcoSpold01Location=GLO
  production volume 1.8463e10 m3
    Not known.
    Calculated as 3.5% of natural gas from 'petroleum and gas production, on-shore' and 0.003 m3/kg oil from 'petroleum production, onshore'
  property carbon content, fossil 0.602381
    An average C content of 0.506 kg C/ m3 has been assumed (this average has been calculated using data in Tab 3.5, ecoinvent v2.2 report 6_V
  property heating value, net 39 MJ
    Literature value, Source: United Nations Statistics Division (2018) International Recommendations for Energy Statistics (IRES). Available at: http://unstats.un.org/unsd/statcom/doc11/BG-IRES.pdf.
  property carbon content 0.602381
    carbon content on a dry matter basis (reserved; not for manual entry)
  properties: price 0 EUR2005, water in wet mass 0 kg, dry mass 0.84 kg, carbon content, non-fossil 0, water content 0, wet mass 0.84 kg, carbon allocation 0.506 kg

## Inputs from nature
- Gas, natural, in ground [natural resource, in ground]: 1 m3; lognormal variance with pedigree 0.0627, pedigree (3,3,5,3,1)
  Calculation
  Uncertainty: Calculation

## Emissions to nature
- Radon-222 [air, non-urban air or from high stacks]: 0.1 kBq; lognormal variance with pedigree 1.37, pedigree (1,1,5,1,1)
  Literature, large variations
- Methane, fossil [air, non-urban air or from high stacks]: 0.585 kg; lognormal variance with pedigree 0.0927, pedigree (3,3,5,3,1)
  Literature
  Uncertainty: Literature
- Helium [air, non-urban air or from high stacks]: 0.001 kg; lognormal variance with pedigree 0.0927, pedigree (3,3,5,3,1)
  Literature
  Uncertainty: Literature
- Carbon dioxide, fossil [air, non-urban air or from high stacks]: 0.014 kg; lognormal variance with pedigree 0.0627, pedigree (3,3,5,3,1)
  Literature
  Uncertainty: Literature
- NMVOC, non-methane volatile organic compounds, unspecified origin [air, non-urban air or from high stacks]: 0.271 kg; lognormal variance with pedigree 0.0927, pedigree (3,3,5,3,1)
  Literature
  Uncertainty: Literature
- Mercury [air, non-urban air or from high stacks]: 1.5e-8 kg; lognormal variance with pedigree 0.7027, pedigree (3,3,5,3,1)
  Literature
  Uncertainty: Literature

## Sampling procedure
Literature.

## Extrapolations
This dataset has been extrapolated from year 2000 to the year of the calculation (2021). The uncertainty has been adjusted accordingly.

## Review by Michael Spielmann (obsolete) 2003-07-04
passed.
