# wood preservation facility construction, hot/cold dipping tank

Dataset: EcoSpold 2, unit process
Geography: GLO
Time period: 2012-01-01 to 2021-12-31
Technology level: current
Classification: ISIC rev.4 ecoinvent: 4290:Construction of other civil engineering projects
Tags: Swiss brush-up completed
Scenario: Business-as-Usual
System model: Allocation, cut-off by classification
Generated by: Frank Werner
Database: ecoinvent
isCopyrightProtected: true
accessRestrictedTo: 1

## General comment
The yearly troughput can vary a lot, largely depending on the products to be impregnated. For this dataset, it is assumed that the plant applies 1.35 E5 kg of creosote per year for the hot/cold dipping of the butt end of posts for fruit trees, vineyards, etc, over a life time of 75 years, resulting in a total application of 7.76 E06 kg creosote over its life time. The equipment represents a large scale dipping tank of two compartments (one for hot, the other one for cold creosote) and a total length of 12 m; it also includes a retention tank.
Equipments can also be much smaller, e.g. two compartments with 2 m x 2 m or one single bassin where the creosote is heated first and then left to cool down (see also data set on respective wood preservation service).

Data on land use and on the building hall are taken from pressure vessel processes as no specific data on these infrastructure inputs could be gathered. These values refer to a yearly throughput of 6000 m3 of wood.

## Included activities start
Infrastructure dataset containing the main elements of the facility.

## Included activities end
The land area and the material (production and disposal) needed for a preservative treatment plant for hot-cold dipping including strorage area is included. 120 kg of primer and laquer as well as 80 kg of 2-component laquers are not inventoried.

## Geography
Data from Germany and Switzerland. Location of plant within Europe of minor importance

## Reference product
- wood preservation facility, hot/cold dipping tank: 1 unit; CPC 53269: Other constructions for manufacturing; By-product classification allocatable product
  production volume 100 unit; name p_hot_cold_dipping_equipment
    estimated based on estimated production volume
  property price 117004 EUR2005
    Calculated based on inputs: The price of the product has been calculated as a sum of the values of the material and energy inputs for this product. This value is therefore a rough estimation. It may underestimate the real price since there are additional expenses when producing any product. These expences can include for example labour costs, treatment of waste materials and profit for the producer. Please consider carefully whether this level of data quality is acceptable for your application.
  property lifetime 50 year; name lifetime

## Inputs from technosphere
- concrete, normal: 3 m3; name v_concrete; source Werner F. 2007; lognormal variance with pedigree 0.235, pedigree (5,5,5,5,5)
  Reinforcement for heavy machinery
  properties: dry mass 2190 kg, wet mass 2380 kg, water content 0.086758
- building, hall: 750 m2; source Leuenberger H. 2012
  Estimate for roofed area per pressure vessel
  properties: UVEK_link_1 342, UVEK_relative_amount_1 1
  note on UVEK_link_1: to be used only in special submissions in coordination with ecoinvent and the Swiss FOEN
- steel, low-alloyed, hot rolled: 18000 kg; name m_steel_unalloyed; = 9000+9000; source Hubel M. 2012; lognormal variance with pedigree 0.235, pedigree (5,5,5,5,5)
  Weight of tank and lifting device
  property dry mass 1 kg; name m_steel_unalloyed_DM
  property wet mass 1 kg; name m_steel_unalloyed_WM
  properties: UVEK_relative_amount_1 1, UVEK_link_1 4222, carbon content, fossil 0.0025, UVEK_link_2 2662, UVEK_relative_amount_2 1
- waste electric and electronic equipment: -100 kg; name w_electronics; = (m_electronics)*-1; source Hubel M. 2012; lognormal variance with pedigree 0.203, pedigree (4,5,5,5,5)
  Equivalent to input
  production volume 10000 kg; = p_hot_cold_dipping_equipment*w_electronics
    Calculated from production volume of reference product using the relative outputs.
  property dry mass 1 kg; name w_electronics_DM
  property carbon content, fossil 0.337146; name w_electronics_C_content_fossil
  property carbon content, non-fossil 0.00013442; name w_electronics_C_content_non_fossil
  property water in wet mass 0 kg; name w_electronics_WWM
  property wet mass 1 kg; name w_electronics_WM
  property water content 0; name w_electronics_water_content
  properties: UVEK_link_1 928, UVEK_relative_amount_1 -1
- scrap steel: 0 kg; pedigree (1,1,1,1,1)
  calculated from steel input
  production volume 0 kg
    Calculated from production volume of reference product using the relative outputs.
  properties: dry mass 1 kg, wet mass 1 kg, carbon content, fossil 0.0025
- waste reinforced concrete: 0 kg; name w_concrete; source Werner F. 2007; pedigree (1,1,1,1,1)
  Conversion to kg from volume with 2400 kg/m3
  production volume 0 kg
    Calculated from the production volume of wood preservation facility in proportion to the respective output amounts.
  properties: water content 0.00585407, dry mass 0.99418 kg, UVEK_link_1 883, UVEK_relative_amount_1 -1, wet mass 1 kg
- electronics, for control units: 100 kg; name m_electronics; source Hubel M. 2012; lognormal variance with pedigree 0.235, pedigree (5,5,5,5,5)
  property water in wet mass 0 kg; name WWM
  property wet mass 1 kg; name m_electronics_WM
  property dry mass 1 kg; name m_electronics_DM
  property carbon content, non-fossil 0.00013442; name C_content_non_fossil_electronics
  property water content 0; name water_content
  property carbon content, fossil 0.337146; name C_content_fossil_electronics
  properties: UVEK_link_1 2021, UVEK_relative_amount_1 1
- scrap steel: -4382.91, -5.55299, -13611.5 kg (3 entries); lognormal variance with pedigree 0.203, pedigree (4,5,5,5,5)
  calculated from steel input
  production volume 1.8e6 kg
- waste reinforced concrete: -471.132, -4.992, -6723.88 kg (3 entries); source Werner F. 2007; lognormal variance with pedigree 0.203, pedigree (4,5,5,5,5)
  Conversion to kg from volume with 2400 kg/m3
  production volume 720000 kg

## Inputs from nature
All rows: source Leuenberger H. 2012
- Transformation, from unspecified [natural resource, land]: 9250 m2; = storage_area_in_gravel+asphalted_area; lognormal variance with pedigree 0.358, pedigree (1,1,4,1,1)
  Total area used for building and storage place
- Transformation, to industrial area [natural resource, land]: 1750 m2; name asphalted_area; lognormal variance with pedigree 0.3761, pedigree (3,5,4,3,3)
  Storage place, asphalted
- Transformation, to urban/industrial fallow (non-use) [natural resource, land]: 7500 m2; name storage_area_in_gravel; lognormal variance with pedigree 0.3761, pedigree (3,5,4,3,3)
  Storage place under gravel with partly fallow type vegetation
- Occupation, urban/industrial fallow (non-use) [natural resource, land]: 562500 m2*year; = storage_area_in_gravel*75; lognormal variance with pedigree 0.208, pedigree (1,1,4,1,1)
  Area times service life
- Occupation, industrial area [natural resource, land]: 131250 m2*year; = asphalted_area*75; lognormal variance with pedigree 0.208, pedigree (1,1,4,1,1)
  Area times service life

## Sampling procedure
estimation

## Extrapolations
This dataset has been extrapolated from year 2012 to the year of the calculation (2021). The uncertainty has been adjusted accordingly.
