# treatment of waste polyurethane, sanitary landfill

Dataset: EcoSpold 2, unit process
Geography: RoW
Time period: 1994-01-01 to 2021-12-31
Technology level: current
Classification: EcoSpold01Categories: waste management/sanitary landfill
Classification: ISIC rev.4 ecoinvent: 3821:Treatment and disposal of non-hazardous waste
Synonyms: PU; diol-diisocyanate copolymer; PUR
Tags: ConvertedDataset; Treatment
Scenario: Business-as-Usual
System model: Allocation, cut-off by classification
Generated by: Gabor Doka (obsolete)
Published in: Doka G. 2007
Database: ecoinvent
isCopyrightProtected: true
accessRestrictedTo: 1

## General comment
Inventoried waste contains 100% PU; .
waste composition (wet, in ppm): upper heating value 30.9 MJ/kg; lower heating value 30.67 MJ/kg; H2O 2000; O 178700; H 84276; C 640700; S 203.07; N 60922; P n.a.; B n.a.; Cl 24369; Br 70.934; F 14.896; I n.a.; Ag n.a.; As 1.9253; Ba 188.99; Cd 82.301; Co 32.011; Cr 41.41; Cu 321.89; Hg 0.86045; Mn 80.984; Mo n.a.; Ni 20.874; Pb 473.27; Sb 43.54; Se 2.128; Sn 26.555; V 291.99; Zn 566.54; Be 0.50667; Sc n.a.; Sr 89.68; Ti 1013.3; Tl 0.40534; W n.a.; Si n.a.; Fe 3775.4; Ca n.a.; Al 202.67; K n.a.; Mg n.a.; Na 1485;
Share of carbon in waste that is biogenic 0%.
Overall degradability of waste during 100 years: 1%.
[This dataset was already contained in the ecoinvent database version 2. It was not individually updated during the transfer to ecoinvent version 3. Life Cycle Impact Assessment results may still have changed, as they are affected by changes in the supply chain, i.e. in other datasets. This dataset was generated following the ecoinvent quality guidelines for version 2. It may have been subject to central changes described in the ecoinvent version 3 change report (http://www.ecoinvent.org/database/ecoinvent-version-3/reports-of-changes/), and the results of the central updates were reviewed extensively. The changes added e.g. consistent water flows and other information throughout the database. The documentation of this dataset can be found in the ecoinvent reports of version 2, which are still available via the ecoinvent website. The change report linked above covers all central changes that were made during the conversion process.]

## Included activities end
Waste-specific short-term emissions to air via landfill gas incineration and landfill leachate. Burdens from treatment of short-term leachate (0-100a) in wastewater treatment plant (including WWTP sludge disposal in municipal incinerator). Long-term emissions from landfill to groundwater (after base lining failure).

## Geography
Technology encountered in Switzerland in 2000. Landfill includes base seal, leachate collection system, treatment of leachate in municipal wastewater treatment plant.

## Technology
Swiss municipal sanitary landfill for biogenic or untreated municipal waste ('reactive organic landfill'). Landfill gas and leachate collection system. Recultivation and monitoring for 150 years after closure.

## Reference product
- waste polyurethane: -1 kg; name waste_PE; By-product classification Waste; CPC 39270: Waste, parings and scrap of plastics; CAS 9009-54-5
  EcoSpold01Location=CH
  production volume 2.72238e9 kg; name waste_PE_PV; = (2E6*1000)*(1/0.33059)*0.9*0.5
    Calculated based on literature value and estimates. The amount of polyurethane produced in Europe annually is 2 million tonnes. This value is scaled to global production using GDP.
    Gross domestic product (GDP) at current prices is GDP at prices of the current reporting period. Also known as nominal GDP (United Nations, http://data.un.org/Glossary.aspx?q=GDP+%28current+US%24%29, accessed 20130726 and 20130312).
    It is estimated, that 90% of the waste polyurethane end up at landfill (http://unstats.un.org/unsd/environment/wastetreatment.htm), 50% at inert material landfill and 50% at sanitary landfill.
  property price 0 EUR2005; name waste_PE_price_EUR2005
    Waste products are assigned a price of zero as they are assumed to require further treatment.
  property carbon content, fossil 0.641283
    C content was calculated for 1 kg DM, using data in Tab A.2, ecoinvent v2.2 report 13_I.
  property heating value, net 30.67 MJ
    Value taken from the general comment of the treatment dataset.
  property carbon content 0.641283
    carbon content on a dry matter basis (reserved; not for manual entry)
  properties: water in wet mass 0.002 kg, water content 0.00200401, wet mass 1 kg, dry mass 0.998 kg, carbon content, non-fossil 0, carbon allocation 0.64 kg

## Inputs from technosphere
- sewer grid, 5E9l/year, 110 km: 5.45e-10 km; lognormal variance with pedigree 0.2106, pedigree (5,5,5,5,5)
  burden from wastewater treatment of the short-term leachate (0-100a). Uncertainty calculated from unertainty of the waste composition of this waste, uncertainty in waste decomposition and short-term leaching in sanitary landfill
  EcoSpold01Location=CH
  Uncertainty: . Uncertainty calculated from unertainty of the waste composition of this waste, uncertainty in waste decomposition and short-term leaching in sanitary landfill
- sanitary landfill facility: 5.56e-10 unit; lognormal variance with pedigree 0.042, pedigree (1,1,5,5,1)
  EcoSpold01Location=CH
  demands per kilogram waste. uncertainty is heeded in the module
- quicklime, milled, packed: 1.93e-8 kg; lognormal variance with pedigree 0.342, pedigree (1,1,5,5,1)
  burden from incineration of sludge from wastewater treatment of the short-term leachate (0-100a). uncertainty is calculated from uncertainties in waste composition and transfer coefficients in incinerator and uncertainty of waste decomposition and short-term leaching in sanitary landfill
  EcoSpold01Location=CH
  properties: wet mass 1 kg, dry mass 0.99 kg, water content 0.010101
- waste cement, hydrated: 0 kg; name waste_cement_ByP
  (same comment as for quicklime, milled, packed)
  production volume 0 kg
    Calculated from the production volume of waste polyurethane, 0.2% water in proportion to the respective output amounts.
  property price 0 EUR2005; name waste_cement_ByP_price_EUR2005
  properties: dry mass 1 kg, wet mass 1 kg
- chromium oxide, flakes: 1.25e-9 kg; lognormal variance with pedigree 0.76, pedigree (5,5,5,5,5)
  EcoSpold01Location=RER
  burden from incineration of sludge from wastewater treatment of the short-term leachate (0-100a). Proxy for vanadium pentoxide V2O5 in SCR catalyst, uncertainty calculated from uncertainty in average DeNOx input, uncertainty in the share of thermal NOx, uncertainty of nitrogen content in average municipal waste and the unertainty in nitrogen content in *this* waste and uncertainty of waste decomposition and short-term leaching in sanitary landfill
  Uncertainty: . Proxy for vanadium pentoxide V2O5 in SCR catalyst, uncertainty calculated from uncertainty in average DeNOx input, uncertainty in the share of thermal NOx, uncertainty of nitrogen content in average municipal waste and the unertainty in nitrogen content in *this* waste and uncertainty of waste decomposition and short-term leaching in sanitary landfill
  properties: dry mass 1 kg, wet mass 1 kg
- cement, unspecified: 0 kg; pedigree (1,1,1,1,1)
  (same comment as for quicklime, milled, packed)
  properties: dry mass 1 kg, wet mass 1 kg
- waste plastic, mixture: 0 kg; name waste_plastic_ByP
  EcoSpold01Location=CH
  burden from wastewater treatment of the short-term leachate (0-100a). Uncertainty calculated from unertainty of the waste composition of this waste, uncertainty in waste decomposition and short-term leaching in sanitary landfill
  production volume 0 kg
    (same comment as for waste cement, hydrated)
  property price 0 EUR2005; name waste_plastic_ByP_price_EUR2005
  properties: heating value, net 30.79 MJ, wet mass 1 kg, dry mass 0.847 kg, carbon content, fossil 0.747344, water content 0.180638
  note on heating value, net: Value taken from the general comment of the treatment dataset.
  note on carbon content, fossil: C content in 1 kg DM was calculated using data in Tab A.2, ecoinvent v2.2 report 13_I
- wastewater treatment facility, capacity 5E9l/year: 1.42e-11 unit; lognormal variance with pedigree 0.2106, pedigree (5,5,5,5,5)
  EcoSpold01Location=CH
  burden from wastewater treatment of the short-term leachate (0-100a). Uncertainty calculated from unertainty of the waste composition of this waste, uncertainty in waste decomposition and short-term leaching in sanitary landfill
  Uncertainty: . Uncertainty calculated from unertainty of the waste composition of this waste, uncertainty in waste decomposition and short-term leaching in sanitary landfill
- residual material landfill: 1.95e-15 unit; lognormal variance with pedigree 0.452, pedigree (1,1,5,5,1)
  EcoSpold01Location=CH
  burden from incineration of sludge from wastewater treatment of the short-term leachate (0-100a). uncertainty is calculated from uncertainties in waste composition and transfer coefficients in incinerator and uncertainty of waste decomposition and short-term leaching in sanitary landfill
- heat, central or small-scale, other than natural gas: 0 MJ; pedigree (1,1,1,1,1)
  (same comment as for sewer grid, 5E9l/year, 110 km)
  properties: heating value, net 1 MJ
- process-specific burdens, municipal waste incineration: 0 kg; pedigree (1,1,1,1,1)
  Burden from incineration of sludge from wastewater treatment of the short-term leachate (0-100a).
  EcoSpold01Location=CH
- chemical, inorganic: 4.33e-10 kg; lognormal variance with pedigree 0.672, pedigree (1,1,5,5,1)
  EcoSpold01Location=GLO
  burden from incineration of sludge from wastewater treatment of the short-term leachate (0-100a). uncertainty is calculated from uncertainties in waste composition and transfer coefficients in incinerator and uncertainty of waste decomposition and short-term leaching in sanitary landfill
  properties: wet mass 1 kg, dry mass 1 kg, carbon content, fossil 0.003
  note on carbon content, fossil: This dataset is an unweighted average of 20 inorganic substances (listed in Tab 88.1, ecoinvent v2.2 report 8, part II), being part of the top100 chemicals included in this database. The C-content has also been calculated as an unweighted average of the C content of the substances composing this dataset.
- iron (III) chloride, without water, in 40% solution state: 5.3e-8 kg; lognormal variance with pedigree 0.932, pedigree (1,1,5,5,1)
  (same comment as for residual material landfill)
  properties: dry mass 1 kg, wet mass 1 kg
- electricity, low voltage: 0 kWh; pedigree (1,1,1,1,1)
  (same comment as for wastewater treatment facility, capacity 5E9l/year)
- waste graphical paper: 0 kg; name waste_paper_ByP
  (same comment as for waste plastic, mixture)
  production volume 0 kg
    (same comment as for waste cement, hydrated)
  property price 0 EUR2005; name waste_paper_ByP_price_EUR2005
  properties: heating value, net 14.12 MJ, water content 0.126126, wet mass 1 kg, carbon content, non-fossil 0.454955, dry mass 0.888 kg
- chemical, organic: 2.23e-7 kg; lognormal variance with pedigree 1.622, pedigree (1,1,5,5,1)
  burden from incineration of sludge from wastewater treatment of the short-term leachate (0-100a). uncertainty is calculated from uncertainties in waste composition and transfer coefficients in incinerator and uncertainty of waste decomposition and short-term leaching in sanitary landfill
  EcoSpold01Location=GLO
  properties: carbon content, fossil 0.628, heating value, net 19.03 MJ, dry mass 1 kg, wet mass 1 kg
  note on carbon content, fossil: This dataset is an unweighted average of 20 organic substances (listed in Tab 88.1, ecoinvent v2.2 report 8, part II), being part of the top100 chemicals included in this database. The C-content has also been calculated as an unweighted average of the C content of the substances composing this dataset.
- ammonia, anhydrous, liquid: 0 kg; pedigree (1,1,1,1,1)
  (same comment as for quicklime, milled, packed)
  properties: wet mass 1 kg, dry mass 1 kg
- sodium hydroxide, without water, in 50% solution state: 1.06e-7 kg; lognormal variance with pedigree 0.332, pedigree (1,1,5,5,1)
  burden from incineration of sludge from wastewater treatment of the short-term leachate (0-100a). uncertainty is calculated from uncertainties in waste composition and transfer coefficients in incinerator and uncertainty of waste decomposition and short-term leaching in sanitary landfill
  EcoSpold01Location=RER
  properties: heating value, net 3.03 MJ, wet mass 1 kg, dry mass 1 kg
- heat, district or industrial, natural gas: 0 MJ; pedigree (1,1,1,1,1)
  EcoSpold01Location=RER
  burden from incineration of sludge from wastewater treatment of the short-term leachate (0-100a). uncertainty is calculated from uncertainties in waste composition and transfer coefficients in incinerator and uncertainty of waste decomposition and short-term leaching in sanitary landfill
  properties: heating value, net 1 MJ
- electricity, high voltage: 0 kWh; pedigree (1,1,1,1,1)
  (same comment as for residual material landfill)
- slag landfill: 1.04e-14 unit; lognormal variance with pedigree 0.412, pedigree (1,1,5,5,1)
  (same comment as for residual material landfill)
- process-specific burdens, residual material landfill: 0 kg; pedigree (1,1,1,1,1)
  (same comment as for residual material landfill)
- heat, district or industrial, other than natural gas: 0 MJ; pedigree (1,1,1,1,1)
  (same comment as for quicklime, milled, packed)
  properties: heating value, net 1 MJ
- hydrochloric acid, without water, in 30% solution state: 2.6e-10 kg; lognormal variance with pedigree 0.672, pedigree (1,1,5,5,1)
  (same comment as for heat, district or industrial, natural gas)
  properties: heating value, net 3.32 MJ, dry mass 1 kg, wet mass 1 kg
- process-specific burdens, sanitary landfill: 1 kg; lognormal variance with pedigree 0.042, pedigree (1,1,5,5,1)
  EcoSpold01Location=CH
  demands per kilogram waste. uncertainty is heeded in the module
- titanium dioxide: 6.13e-8 kg; lognormal variance with pedigree 0.642, pedigree (1,1,5,5,1)
  (same comment as for sodium hydroxide, without water, in 50% solution state)
  properties: dry mass 1 kg, wet mass 1 kg
- municipal waste incineration facility: 5.83e-14 unit; lognormal variance with pedigree 0.342, pedigree (1,1,5,5,1)
  EcoSpold01Location=CH
  Burden from incineration of sludge from wastewater treatment of the short-term leachate (0-100a).
- process-specific burdens, slag landfill: 0 kg; pedigree (1,1,1,1,1)
  (same comment as for quicklime, milled, packed)
- waste cement, hydrated: -2.64488e-7, -6.70512e-7 kg (2 entries)
  (same comment as for quicklime, milled, packed)
  production volume 2545.43 kg
- cement, unspecified: 5.4004e-8, 1.12366e-8, 8.23006e-10, 2.34584e-9, 5.30519e-8, 1.56147e-9, 1.71496e-8, 2.07491e-9, 2.31753e-7 kg (9 entries); lognormal variance with pedigree 0.462, pedigree (1,1,5,5,1)
  (same comment as for quicklime, milled, packed)
- waste plastic, mixture: -4.31618e-6, -2.88391e-7, -2.18105e-8, -1.19116e-7, -4.81214e-8, -1.13112e-7, -3.67759e-6, -3.02157e-5 kg (8 entries)
  (same comment as for waste plastic, mixture)
  production volume 105628 kg
- heat, central or small-scale, other than natural gas: 1.80843e-6, 0.000131672 MJ (2 entries); lognormal variance with pedigree 0.36, pedigree (5,5,5,5,5)
  (same comment as for sewer grid, 5E9l/year, 110 km)
- process-specific burdens, municipal waste incineration: 6.59097e-5, 0.00016709 kg (2 entries); lognormal variance with pedigree 0.342, pedigree (1,1,5,5,1)
  (same comment as for process-specific burdens, municipal waste incineration)
- electricity, low voltage: 7.64187e-5, 1.39144e-5, 0.0003141, 0.00109739, 0.000224039, 0.00343971, 0.000556485, 0.00159794 kWh (8 entries); lognormal variance with pedigree 0.41, pedigree (5,5,5,5,5)
  (same comment as for wastewater treatment facility, capacity 5E9l/year)
- waste graphical paper: -1.69726e-6, -2.59179e-7, -2.26629e-8, -9.36524e-7, -9.13189e-8, -1.69041e-7, -4.09465e-6, -3.15294e-5 kg (8 entries)
  (same comment as for waste plastic, mixture)
  production volume 105628 kg
- ammonia, anhydrous, liquid: 4.48572e-7, 3.85601e-8, 5.99896e-8, 1.18861e-7, 1.16452e-7, 1.22054e-8, 5.45628e-8, 1.2908e-6 kg (8 entries); lognormal variance with pedigree 0.412, pedigree (1,1,5,5,1)
  (same comment as for quicklime, milled, packed)
- heat, district or industrial, natural gas: 4.14509e-6, 9.93245e-5, 0.00026895 MJ (3 entries); lognormal variance with pedigree 0.412, pedigree (1,1,5,5,1)
  (same comment as for heat, district or industrial, natural gas)
- electricity, high voltage: 3.96526e-7, 7.60178e-8, 1.75097e-6, 1.28888e-6, 1.85594e-5, 2.94335e-6, 8.48486e-6 kWh (7 entries); lognormal variance with pedigree 0.602, pedigree (1,1,5,5,1)
  (same comment as for residual material landfill)
- process-specific burdens, residual material landfill: 2.64488e-7, 6.70512e-7 kg (2 entries); lognormal variance with pedigree 0.452, pedigree (1,1,5,5,1)
  (same comment as for residual material landfill)
- heat, district or industrial, other than natural gas: 7.94476e-8, 0.000195921 MJ (2 entries); lognormal variance with pedigree 0.342, pedigree (1,1,5,5,1)
  (same comment as for quicklime, milled, packed)
- process-specific burdens, slag landfill: 1.65764e-6, 4.20236e-6 kg (2 entries); lognormal variance with pedigree 0.412, pedigree (1,1,5,5,1)
  (same comment as for quicklime, milled, packed)

## Emissions to nature
- Carbon dioxide, fossil [air, urban air close to ground]: 0.000536 kg; lognormal variance with pedigree 0.862, pedigree (1,1,5,5,1)
  Emissions from short-term leachate treatment and incineration of resulting sludge. Uncertainty calculated depending on waste input and uncertainty of transfer coefficents in landfill, wastewater treatment and incineration model.
- Chromium, ion [water, surface water]: 7.41e-12 kg; lognormal variance with pedigree 2.092, pedigree (1,1,5,5,1)
  (same comment as for Carbon dioxide, fossil)
- NMVOC, non-methane volatile organic compounds, unspecified origin [air, non-urban air or from high stacks]: 1.72e-8 kg; lognormal variance with pedigree 0.462, pedigree (1,1,5,5,1)
  burden from direct release or incineration of landfill biogas. Uncertainty calculated from unertainty of the waste composition of this waste, uncertainty in waste decomposition and short-term leaching in sanitary landfill
- Chloride [water, ground-, long-term]: 0.0237 kg; lognormal variance with pedigree 0.312, pedigree (1,1,5,5,1)
  Emissions from long-term leachate (>100a) directly from MSW landfill and indirectly via incineration of treatement sludge from leachate treatement. Uncertainty calculated depending on waste input and uncertainty of long-term transfer coefficents in landfill.
- Bromine [water, surface water]: 1.79e-6 kg; lognormal variance with pedigree 1.312, pedigree (1,1,5,5,1)
  Emissions from short-term leachate treatment. Uncertainty calculated depending on waste input and uncertainty of transfer coefficents in landfill and wastewater treatment.
- COD, Chemical Oxygen Demand [water, surface water]: 0.000118 kg; lognormal variance with pedigree 0.862, pedigree (1,1,5,5,1)
  (same comment as for Carbon dioxide, fossil)
- Cadmium, ion [water, surface water]: 7.35e-8 kg; lognormal variance with pedigree 1.602, pedigree (1,1,5,5,1)
  (same comment as for Carbon dioxide, fossil)
- Cadmium [air, non-urban air or from high stacks]: 9.65e-10 kg; lognormal variance with pedigree 2.272, pedigree (1,1,5,5,1)
  (same comment as for NMVOC, non-methane volatile organic compounds, unspecified origin)
- Manganese [air, urban air close to ground]: 2.49e-15 kg; lognormal variance with pedigree 1.522, pedigree (1,1,5,5,1)
  (same comment as for Carbon dioxide, fossil)
- Nitrogen, organic bound [water, ground-, long-term]: 0.0396 kg; lognormal variance with pedigree 0.212, pedigree (1,1,5,5,1)
  (same comment as for Chloride)
- Barium [air, non-urban air or from high stacks]: 5.41e-10 kg; lognormal variance with pedigree 2.342, pedigree (1,1,5,5,1)
  (same comment as for NMVOC, non-methane volatile organic compounds, unspecified origin)
- Mercury [water, ground-, long-term]: 8.6e-7 kg; lognormal variance with pedigree 1.622, pedigree (1,1,5,5,1)
  (same comment as for Chloride)
- Aluminium [water, surface water]: 6.08e-9 kg; lognormal variance with pedigree 1.652, pedigree (1,1,5,5,1)
  (same comment as for Carbon dioxide, fossil)
- Cobalt [air, urban air close to ground]: 1.61e-15 kg; lognormal variance with pedigree 1.782, pedigree (1,1,5,5,1)
  (same comment as for Carbon dioxide, fossil)
- Sulfur dioxide [air, non-urban air or from high stacks]: 2.65e-7 kg; lognormal variance with pedigree 1.612, pedigree (1,1,5,5,1)
  (same comment as for NMVOC, non-methane volatile organic compounds, unspecified origin)
- Lead [air, non-urban air or from high stacks]: 9.3e-12 kg; lognormal variance with pedigree 2.852, pedigree (1,1,5,5,1)
  (same comment as for NMVOC, non-methane volatile organic compounds, unspecified origin)
- Vanadium [air, non-urban air or from high stacks]: 7.7e-11 kg; lognormal variance with pedigree 2.592, pedigree (1,1,5,5,1)
  (same comment as for NMVOC, non-methane volatile organic compounds, unspecified origin)
- Manganese [water, surface water]: 4.71e-7 kg; lognormal variance with pedigree 1.382, pedigree (1,1,5,5,1)
  (same comment as for Carbon dioxide, fossil)
- Methane, fossil [air, urban air close to ground]: 1.05e-6 kg; lognormal variance with pedigree 0.912, pedigree (1,1,5,5,1)
  (same comment as for Carbon dioxide, fossil)
- Barium [water, ground-, long-term]: 0.000189 kg; lognormal variance with pedigree 0.902, pedigree (1,1,5,5,1)
  (same comment as for Chloride)
- Nitrogen oxides [air, urban air close to ground]: 1.33e-5 kg; lognormal variance with pedigree 0.322, pedigree (1,1,5,5,1)
  (same comment as for Carbon dioxide, fossil)
- DOC, Dissolved Organic Carbon [water, surface water]: 2.86e-5 kg; lognormal variance with pedigree 0.862, pedigree (1,1,5,5,1)
  (same comment as for Carbon dioxide, fossil)
- Barium [water, surface water]: 1.3e-7 kg; lognormal variance with pedigree 1.292, pedigree (1,1,5,5,1)
  (same comment as for Carbon dioxide, fossil)
- Tin [air, urban air close to ground]: 1.21e-12 kg; lognormal variance with pedigree 2.252, pedigree (1,1,5,5,1)
  (same comment as for Carbon dioxide, fossil)
- Particulates, < 2.5 um [air, non-urban air or from high stacks]: 3.05e-7 kg; lognormal variance with pedigree 0.722, pedigree (1,1,5,5,1)
  (same comment as for NMVOC, non-methane volatile organic compounds, unspecified origin)
- Fluoride [water, ground-, long-term]: 1.48e-5 kg; lognormal variance with pedigree 1.262, pedigree (1,1,5,5,1)
  (same comment as for Chloride)
- Nickel, ion [water, surface water]: 7.36e-9 kg; lognormal variance with pedigree 1.942, pedigree (1,1,5,5,1)
  (same comment as for Carbon dioxide, fossil)
- Hydrogen fluoride [air, non-urban air or from high stacks]: 5.94e-8 kg; lognormal variance with pedigree 1.732, pedigree (1,1,5,5,1)
  (same comment as for NMVOC, non-methane volatile organic compounds, unspecified origin)
- Arsenic, ion [water, surface water]: 3.05e-9 kg; lognormal variance with pedigree 2.102, pedigree (1,1,5,5,1)
  (same comment as for Carbon dioxide, fossil)
- TOC, Total Organic Carbon [water, ground-, long-term]: 0.163 kg; lognormal variance with pedigree 0.512, pedigree (1,1,5,5,1)
  (same comment as for Chloride)
- Mercury [air, urban air close to ground]: 0 kg; pedigree (1,1,1,1,1)
  (same comment as for Carbon dioxide, fossil)
- Vanadium [air, urban air close to ground]: 1.52e-11 kg; lognormal variance with pedigree 1.562, pedigree (1,1,5,5,1)
  (same comment as for Carbon dioxide, fossil)
- Chromium [air, urban air close to ground]: 0 kg; pedigree (1,1,1,1,1)
  (same comment as for Carbon dioxide, fossil)
- Carbon monoxide, fossil [air, non-urban air or from high stacks]: 9.09e-7 kg; lognormal variance with pedigree 1.062, pedigree (1,1,5,5,1)
  (same comment as for NMVOC, non-methane volatile organic compounds, unspecified origin)
- Strontium [air, urban air close to ground]: 2.57e-12 kg; lognormal variance with pedigree 1.792, pedigree (1,1,5,5,1)
  (same comment as for Carbon dioxide, fossil)
- Selenium [water, ground-, long-term]: 6e-7 kg; lognormal variance with pedigree 1.912, pedigree (1,1,5,5,1)
  (same comment as for Chloride)
- Bromine [water, ground-, long-term]: 6.91e-5 kg; lognormal variance with pedigree 1.052, pedigree (1,1,5,5,1)
  (same comment as for Chloride)
- Dinitrogen monoxide [air, urban air close to ground]: 3.75e-6 kg; lognormal variance with pedigree 0.292, pedigree (1,1,5,5,1)
  (same comment as for Carbon dioxide, fossil)
- Titanium [air, non-urban air or from high stacks]: 1.27e-10 kg; lognormal variance with pedigree 2.522, pedigree (1,1,5,5,1)
  (same comment as for NMVOC, non-methane volatile organic compounds, unspecified origin)
- Lead [water, ground-, long-term]: 0.000473 kg; lognormal variance with pedigree 0.802, pedigree (1,1,5,5,1)
  (same comment as for Chloride)
- Zinc [air, non-urban air or from high stacks]: 5.96e-11 kg; lognormal variance with pedigree 2.622, pedigree (1,1,5,5,1)
  (same comment as for NMVOC, non-methane volatile organic compounds, unspecified origin)
- Bromine [air, non-urban air or from high stacks]: 2.5e-8 kg; lognormal variance with pedigree 1.842, pedigree (1,1,5,5,1)
  (same comment as for NMVOC, non-methane volatile organic compounds, unspecified origin)
- Nitrogen oxides [air, non-urban air or from high stacks]: 3.93e-7 kg; lognormal variance with pedigree 0.842, pedigree (1,1,5,5,1)
  (same comment as for NMVOC, non-methane volatile organic compounds, unspecified origin)
- Iron, ion [water, ground-, long-term]: 0.000265 kg; lognormal variance with pedigree 2.292, pedigree (1,1,5,5,1)
  (same comment as for Chloride)
- Antimony [air, non-urban air or from high stacks]: 1.15e-11 kg; lognormal variance with pedigree 2.852, pedigree (1,1,5,5,1)
  (same comment as for NMVOC, non-methane volatile organic compounds, unspecified origin)
- Nitrogen [water, surface water]: 2e-5 kg; lognormal variance with pedigree 0.312, pedigree (1,1,5,5,1)
  (same comment as for Carbon dioxide, fossil)
- Chromium [air, non-urban air or from high stacks]: 1.18e-12 kg; lognormal variance with pedigree 3.132, pedigree (1,1,5,5,1)
  (same comment as for NMVOC, non-methane volatile organic compounds, unspecified origin)
- BOD5, Biological Oxygen Demand [water, surface water]: 3.7e-5 kg; lognormal variance with pedigree 0.872, pedigree (1,1,5,5,1)
  (same comment as for Carbon dioxide, fossil)
- Iron [air, non-urban air or from high stacks]: 1.3e-10 kg; lognormal variance with pedigree 2.512, pedigree (1,1,5,5,1)
  (same comment as for NMVOC, non-methane volatile organic compounds, unspecified origin)
- Sodium [air, non-urban air or from high stacks]: 1.54e-8 kg; lognormal variance with pedigree 1.902, pedigree (1,1,5,5,1)
  (same comment as for NMVOC, non-methane volatile organic compounds, unspecified origin)
- Ammonia [air, urban air close to ground]: 1.36e-6 kg; lognormal variance with pedigree 0.332, pedigree (1,1,5,5,1)
  (same comment as for Carbon dioxide, fossil)
- Manganese [air, non-urban air or from high stacks]: 2.32e-10 kg; lognormal variance with pedigree 2.462, pedigree (1,1,5,5,1)
  (same comment as for NMVOC, non-methane volatile organic compounds, unspecified origin)
- Tin, ion [water, surface water]: 6.55e-10 kg; lognormal variance with pedigree 2.212, pedigree (1,1,5,5,1)
  (same comment as for Carbon dioxide, fossil)
- Iron, ion [water, surface water]: 2.63e-7 kg; lognormal variance with pedigree 1.442, pedigree (1,1,5,5,1)
  (same comment as for Carbon dioxide, fossil)
- Cyanide [air, urban air close to ground]: 3.82e-8 kg; lognormal variance with pedigree 0.422, pedigree (1,1,5,5,1)
  (same comment as for Carbon dioxide, fossil)
- Nitrate [water, surface water]: 0.00269 kg; lognormal variance with pedigree 0.302, pedigree (1,1,5,5,1)
  (same comment as for Carbon dioxide, fossil)
- Mercury [water, surface water]: 1.87e-10 kg; lognormal variance with pedigree 2.342, pedigree (1,1,5,5,1)
  (same comment as for Carbon dioxide, fossil)
- Aluminium [air, urban air close to ground]: 1.49e-10 kg; lognormal variance with pedigree 1.692, pedigree (1,1,5,5,1)
  (same comment as for Carbon dioxide, fossil)
- Chromium VI [water, surface water]: 2.47e-9 kg; lognormal variance with pedigree 2.062, pedigree (1,1,5,5,1)
  (same comment as for Carbon dioxide, fossil)
- Carbon monoxide, fossil [air, urban air close to ground]: 3.71e-7 kg; lognormal variance with pedigree 0.842, pedigree (1,1,5,5,1)
  (same comment as for Carbon dioxide, fossil)
- Aluminium [air, non-urban air or from high stacks]: 2.53e-11 kg; lognormal variance with pedigree 2.732, pedigree (1,1,5,5,1)
  (same comment as for NMVOC, non-methane volatile organic compounds, unspecified origin)
- Zinc, ion [water, surface water]: 8.3e-8 kg; lognormal variance with pedigree 1.522, pedigree (1,1,5,5,1)
  (same comment as for Carbon dioxide, fossil)
- Hydrogen sulfide [water, ground-, long-term]: 1.47e-5 kg; lognormal variance with pedigree 0.912, pedigree (1,1,5,5,1)
  (same comment as for Chloride)
- Sodium, ion [water, ground-, long-term]: 0.00142 kg; lognormal variance with pedigree 0.652, pedigree (1,1,5,5,1)
  (same comment as for Chloride)
- Zinc, ion [water, ground-, long-term]: 0.000468 kg; lognormal variance with pedigree 0.782, pedigree (1,1,5,5,1)
  (same comment as for Chloride)
- Cadmium, ion [water, ground-, long-term]: 8.22e-5 kg; lognormal variance with pedigree 1.032, pedigree (1,1,5,5,1)
  (same comment as for Chloride)
- Manganese [water, ground-, long-term]: 7.87e-5 kg; lognormal variance with pedigree 1.022, pedigree (1,1,5,5,1)
  (same comment as for Chloride)
- Antimony [air, urban air close to ground]: 2.26e-12 kg; lognormal variance with pedigree 2.412, pedigree (1,1,5,5,1)
  (same comment as for Carbon dioxide, fossil)
- Beryllium [water, ground-, long-term]: 5.06e-7 kg; lognormal variance with pedigree 1.692, pedigree (1,1,5,5,1)
  (same comment as for Chloride)
- Aluminium [water, ground-, long-term]: 0.000203 kg; lognormal variance with pedigree 0.912, pedigree (1,1,5,5,1)
  (same comment as for Chloride)
- Thallium [water, surface water]: 1.2e-10 kg; lognormal variance with pedigree 2.452, pedigree (1,1,5,5,1)
  (same comment as for Carbon dioxide, fossil)
- Nitrite [water, surface water]: 1.55e-5 kg; lognormal variance with pedigree 0.472, pedigree (1,1,5,5,1)
  (same comment as for Carbon dioxide, fossil)
- Chloride [water, surface water]: 0.000614 kg; lognormal variance with pedigree 0.562, pedigree (1,1,5,5,1)
  (same comment as for Bromine)
- Cobalt [water, ground-, long-term]: 3.2e-5 kg; lognormal variance with pedigree 1.152, pedigree (1,1,5,5,1)
  (same comment as for Chloride)
- Copper, ion [water, ground-, long-term]: 0.000322 kg; lognormal variance with pedigree 0.852, pedigree (1,1,5,5,1)
  (same comment as for Chloride)
- Vanadium, ion [water, ground-, long-term]: 8.5e-5 kg; lognormal variance with pedigree 1.242, pedigree (1,1,5,5,1)
  (same comment as for Chloride)
- Copper [air, non-urban air or from high stacks]: 4.5e-12 kg; lognormal variance with pedigree 2.942, pedigree (1,1,5,5,1)
  (same comment as for NMVOC, non-methane volatile organic compounds, unspecified origin)
- Beryllium [air, non-urban air or from high stacks]: 7.36e-14 kg; lognormal variance with pedigree 3.502, pedigree (1,1,5,5,1)
  (same comment as for NMVOC, non-methane volatile organic compounds, unspecified origin)
- COD, Chemical Oxygen Demand [water, ground-, long-term]: 0.178 kg; lognormal variance with pedigree 0.512, pedigree (1,1,5,5,1)
  (same comment as for Chloride)
- BOD5, Biological Oxygen Demand [water, ground-, long-term]: 0.0421 kg; lognormal variance with pedigree 0.512, pedigree (1,1,5,5,1)
  (same comment as for Chloride)
- Ammonium, ion [water, ground-, long-term]: 0.0242 kg; lognormal variance with pedigree 0.212, pedigree (1,1,5,5,1)
  (same comment as for Chloride)
- Antimony [water, surface water]: 3.11e-8 kg; lognormal variance with pedigree 1.762, pedigree (1,1,5,5,1)
  (same comment as for Carbon dioxide, fossil)
- Thallium [air, non-urban air or from high stacks]: 5.89e-14 kg; lognormal variance with pedigree 3.532, pedigree (1,1,5,5,1)
  (same comment as for NMVOC, non-methane volatile organic compounds, unspecified origin)
- Sodium, ion [water, surface water]: 6.15e-5 kg; lognormal variance with pedigree 0.852, pedigree (1,1,5,5,1)
  (same comment as for Bromine)
- DOC, Dissolved Organic Carbon [water, ground-, long-term]: 0.163 kg; lognormal variance with pedigree 0.512, pedigree (1,1,5,5,1)
  (same comment as for Chloride)
- Sulfate [water, surface water]: 2.31e-6 kg; lognormal variance with pedigree 1.392, pedigree (1,1,5,5,1)
  (same comment as for Bromine)
- Thallium [air, urban air close to ground]: 1.16e-13 kg; lognormal variance with pedigree 2.492, pedigree (1,1,5,5,1)
  (same comment as for Carbon dioxide, fossil)
- Vanadium, ion [water, surface water]: 1.56e-7 kg; lognormal variance with pedigree 1.512, pedigree (1,1,5,5,1)
  (same comment as for Carbon dioxide, fossil)
- Copper, ion [water, surface water]: 4.09e-9 kg; lognormal variance with pedigree 1.902, pedigree (1,1,5,5,1)
  (same comment as for Carbon dioxide, fossil)
- Lead [air, urban air close to ground]: 9.22e-13 kg; lognormal variance with pedigree 1.882, pedigree (1,1,5,5,1)
  (same comment as for Carbon dioxide, fossil)
- Copper [air, urban air close to ground]: 8.62e-14 kg; lognormal variance with pedigree 1.972, pedigree (1,1,5,5,1)
  (same comment as for Carbon dioxide, fossil)
- Iron [air, urban air close to ground]: 8.53e-12 kg; lognormal variance with pedigree 1.502, pedigree (1,1,5,5,1)
  (same comment as for Carbon dioxide, fossil)
- Nickel [air, urban air close to ground]: 0 kg; pedigree (1,1,1,1,1)
  (same comment as for Carbon dioxide, fossil)
- Antimony [water, ground-, long-term]: 4.38e-6 kg; lognormal variance with pedigree 2.432, pedigree (1,1,5,5,1)
  (same comment as for Chloride)
- Arsenic [air, non-urban air or from high stacks]: 4.85e-11 kg; lognormal variance with pedigree 2.662, pedigree (1,1,5,5,1)
  (same comment as for NMVOC, non-methane volatile organic compounds, unspecified origin)
- Cobalt [air, non-urban air or from high stacks]: 2.57e-11 kg; lognormal variance with pedigree 2.742, pedigree (1,1,5,5,1)
  (same comment as for NMVOC, non-methane volatile organic compounds, unspecified origin)
- Selenium [water, surface water]: 1.5e-9 kg; lognormal variance with pedigree 2.162, pedigree (1,1,5,5,1)
  (same comment as for Carbon dioxide, fossil)
- Strontium [air, non-urban air or from high stacks]: 1.3e-11 kg; lognormal variance with pedigree 2.822, pedigree (1,1,5,5,1)
  (same comment as for NMVOC, non-methane volatile organic compounds, unspecified origin)
- Nickel, ion [water, ground-, long-term]: 2.09e-5 kg; lognormal variance with pedigree 1.212, pedigree (1,1,5,5,1)
  (same comment as for Chloride)
- NMVOC, non-methane volatile organic compounds, unspecified origin [air, urban air close to ground]: 4.76e-9 kg; lognormal variance with pedigree 1.032, pedigree (1,1,5,5,1)
  (same comment as for Carbon dioxide, fossil)
- Selenium [air, urban air close to ground]: 0 kg; pedigree (1,1,1,1,1)
  (same comment as for Carbon dioxide, fossil)
- Fluoride [water, surface water]: 1.09e-8 kg; lognormal variance with pedigree 1.942, pedigree (1,1,5,5,1)
  (same comment as for Bromine)
- Tin [air, non-urban air or from high stacks]: 3.91e-13 kg; lognormal variance with pedigree 3.272, pedigree (1,1,5,5,1)
  (same comment as for NMVOC, non-methane volatile organic compounds, unspecified origin)
- TOC, Total Organic Carbon [water, surface water]: 2.98e-5 kg; lognormal variance with pedigree 0.862, pedigree (1,1,5,5,1)
  (same comment as for Carbon dioxide, fossil)
- Cadmium [air, urban air close to ground]: 3.96e-12 kg; lognormal variance with pedigree 1.662, pedigree (1,1,5,5,1)
  (same comment as for Carbon dioxide, fossil)
- Ammonium, ion [water, surface water]: 0.000737 kg; lognormal variance with pedigree 0.332, pedigree (1,1,5,5,1)
  (same comment as for Carbon dioxide, fossil)
- Arsenic, ion [water, ground-, long-term]: 1.92e-6 kg; lognormal variance with pedigree 1.522, pedigree (1,1,5,5,1)
  (same comment as for Chloride)
- Tin, ion [water, ground-, long-term]: 2.66e-5 kg; lognormal variance with pedigree 1.182, pedigree (1,1,5,5,1)
  (same comment as for Chloride)
- Lead [water, surface water]: 3.07e-9 kg; lognormal variance with pedigree 1.832, pedigree (1,1,5,5,1)
  (same comment as for Carbon dioxide, fossil)
- Carbon dioxide, fossil [air, non-urban air or from high stacks]: 0.016 kg; lognormal variance with pedigree 0.422, pedigree (1,1,5,5,1)
  (same comment as for NMVOC, non-methane volatile organic compounds, unspecified origin)
- Thallium [water, ground-, long-term]: 4.05e-7 kg; lognormal variance with pedigree 1.722, pedigree (1,1,5,5,1)
  (same comment as for Chloride)
- Cobalt [water, surface water]: 5.22e-8 kg; lognormal variance with pedigree 1.652, pedigree (1,1,5,5,1)
  (same comment as for Carbon dioxide, fossil)
- Arsenic [air, urban air close to ground]: 9.74e-13 kg; lognormal variance with pedigree 2.142, pedigree (1,1,5,5,1)
  (same comment as for Carbon dioxide, fossil)
- Chromium VI [water, ground-, long-term]: 1.88e-7 kg; lognormal variance with pedigree 8.402, pedigree (1,1,5,5,1)
  (same comment as for Chloride)
- Titanium, ion [water, surface water]: 2.57e-7 kg; lognormal variance with pedigree 1.442, pedigree (1,1,5,5,1)
  (same comment as for Carbon dioxide, fossil)
- Nickel [air, non-urban air or from high stacks]: 3.03e-12 kg; lognormal variance with pedigree 3.022, pedigree (1,1,5,5,1)
  (same comment as for NMVOC, non-methane volatile organic compounds, unspecified origin)
- Selenium [air, non-urban air or from high stacks]: 5.61e-13 kg; lognormal variance with pedigree 3.242, pedigree (1,1,5,5,1)
  (same comment as for NMVOC, non-methane volatile organic compounds, unspecified origin)
- Beryllium [water, surface water]: 1.5e-10 kg; lognormal variance with pedigree 2.422, pedigree (1,1,5,5,1)
  (same comment as for Carbon dioxide, fossil)
- Sulfate [water, ground-, long-term]: 0.000565 kg; lognormal variance with pedigree 0.912, pedigree (1,1,5,5,1)
  (same comment as for Chloride)
- Zinc [air, urban air close to ground]: 3.03e-12 kg; lognormal variance with pedigree 1.582, pedigree (1,1,5,5,1)
  (same comment as for Carbon dioxide, fossil)
- Nitrate [water, ground-, long-term]: 0.00255 kg; lognormal variance with pedigree 0.212, pedigree (1,1,5,5,1)
  (same comment as for Chloride)
- Titanium [air, urban air close to ground]: 2.49e-10 kg; lognormal variance with pedigree 1.482, pedigree (1,1,5,5,1)
  (same comment as for Carbon dioxide, fossil)
- Titanium, ion [water, ground-, long-term]: 0.00101 kg; lognormal variance with pedigree 0.702, pedigree (1,1,5,5,1)
  (same comment as for Chloride)
- Hydrogen chloride [air, non-urban air or from high stacks]: 8.85e-6 kg; lognormal variance with pedigree 1.092, pedigree (1,1,5,5,1)
  (same comment as for NMVOC, non-methane volatile organic compounds, unspecified origin)
- Beryllium [air, urban air close to ground]: 1.45e-13 kg; lognormal variance with pedigree 2.462, pedigree (1,1,5,5,1)
  (same comment as for Carbon dioxide, fossil)
- Barium [air, urban air close to ground]: 2.03e-9 kg; lognormal variance with pedigree 1.312, pedigree (1,1,5,5,1)
  (same comment as for Carbon dioxide, fossil)
- Mercury [air, non-urban air or from high stacks]: 2.36e-10 kg; lognormal variance with pedigree 2.452, pedigree (1,1,5,5,1)
  (same comment as for NMVOC, non-methane volatile organic compounds, unspecified origin)
- Strontium [water, surface water]: 2.65e-8 kg; lognormal variance with pedigree 1.742, pedigree (1,1,5,5,1)
  (same comment as for Carbon dioxide, fossil)
- Strontium [water, ground-, long-term]: 8.97e-5 kg; lognormal variance with pedigree 1.022, pedigree (1,1,5,5,1)
  (same comment as for Chloride)
- Methane, fossil [air, non-urban air or from high stacks]: 0.00246 kg; lognormal variance with pedigree 0.462, pedigree (1,1,5,5,1)
  (same comment as for NMVOC, non-methane volatile organic compounds, unspecified origin)
- Nitrite [water, ground-, long-term]: 0.00132 kg; lognormal variance with pedigree 0.212, pedigree (1,1,5,5,1)
  (same comment as for Chloride)

## Sampling procedure
Landfill model based on observed leachate concentrations in literature. Extrapolated to 60'000 years heeding chemical characteristics. Initial waste composition from various literature sources.

## Extrapolations
This dataset has been copied from an original dataset covering the geography CH. The uncertainty has been adjusted accordingly.

## Review by Niels Jungbluth 2003-07-21
Passed. Calculation for standard deviation 95 of, i.e., infrastructure,
land occupation, transport services or other services can differ from
standard Pedigree approach used in this project and figures obtained by
this procedure.
