# sodium silicate production, furnace liquor, product in 37% solution state

Dataset: EcoSpold 2, unit process
Geography: RoW
Time period: 1995-01-01 to 2021-12-31
Technology level: current
Classification: EcoSpold01Categories: chemicals/inorganics
Classification: ISIC rev.4 ecoinvent: 2011:Manufacture of basic chemicals
Tags: ConvertedDataset
Scenario: Business-as-Usual
System model: Allocation, cut-off by classification
Generated by: Roland Hischier
Published in: Zah R. 2007
Database: ecoinvent
isCopyrightProtected: true
accessRestrictedTo: 1

## General comment
data based on a EMPA study, commissioned by the CEES.
[This dataset was already contained in the ecoinvent database version 2. It was not individually updated during the transfer to ecoinvent version 3. Life Cycle Impact Assessment results may still have changed, as they are affected by changes in the supply chain, i.e. in other datasets. This dataset was generated following the ecoinvent quality guidelines for version 2. It may have been subject to central changes described in the ecoinvent version 3 change report (http://www.ecoinvent.org/database/ecoinvent-version-3/reports-of-changes/), and the results of the central updates were reviewed extensively. The changes added e.g. consistent water flows and other information throughout the database. The documentation of this dataset can be found in the ecoinvent reports of version 2, which are still available via the ecoinvent website. The change report linked above covers all central changes that were made during the conversion process.]

## Included activities end
This module contains material and energy input, production of waste and emissions for the production of sodium silicate, 37% furnace liquid. Transport and infrastructure have been estimated. The input of compressed air is not reported in the data according to the methodology of the study.

## Geography
average data from 6 Euroopean producers

## Technology
average technology used from these European producers

## Time period
producer information for production year 1995

## Parameters
- fraction, cooling water, to air: 0.3875 dimensionless; name fraction_CW_to_air; = (0.5*fraction_CW_OT_to_air)+(0.5*fraction_CW_R_to_air); lognormal variance with pedigree 0.092025, pedigree (4,4,3,2,4)
  Calculated value based on literature value (see comments of the other parametres present in this dataset) and expert opinion. In the case when no industry/literature data are available about the type of cooling or directly fraction, cooling water, to air specific for the process a default assumption is applied. It is assumed that the once-through cooling system is used in 50% of all cases and recirculating system is used in another 50% of all cases.
- fraction, cooling water, cooling pond system, to air: 0.032 dimensionless; name fraction_CW_CP_to_air; lognormal variance with pedigree 0.0413, pedigree (2,3,1,3,1)
  Calculated based on literature value (Scown, C.D., 2011, Water Footprint of U.S. Transportation Fuels and supplying information of the article) (Vionnet, S., Quantis Water Database - Technical Report, 2012).
- fraction, process water, to air: 0.205 dimensionless; name fraction_PW_to_air; lognormal variance with pedigree 0.092025, pedigree (4,4,3,2,4)
- fraction, cooling water, once-through system, to air: 0.004 dimensionless; name fraction_CW_OT_to_air; lognormal variance with pedigree 0.0413, pedigree (2,3,1,3,1)
  (same comment as for fraction, cooling water, cooling pond system, to air)
- fraction, cooling water, recirculating system, to air: 0.771 dimensionless; name fraction_CW_R_to_air; lognormal variance with pedigree 0.0413, pedigree (2,3,1,3,1)
  (same comment as for fraction, cooling water, cooling pond system, to air)

## Reference product
- sodium silicate, without water, in 37% solution state: 1 kg; By-product classification allocatable product; CPC 34270: Cyanides, cyanide oxides and complex cyanides; fulminates, cyanates and thiocyanates; silicates; borates; perb[…]; CAS 6834-92-0
  EcoSpold01Location=RER
  production volume 2.67763 kg
    This is a placeholder value that does not reflect real-world production volumes. This dataset does not currently require a real-world production volume to work in the database framework, and no actual data were collected yet. This has no negative effect on the results of the ecoinvent database.
  property price 0.471 EUR2005
    From UN trade database. http://data.un.org/ Calculated as average price for all chemicals in the category 'Trade of goods , US$, HS 1992, 28 Inorganic chemicals, precious metal compound, isotope'. Import data from the largest economies of the world are used (Brazil, India, USA, China, Japan and EU-27).
  property carbon content 0
    carbon content on a dry matter basis (reserved; not for manual entry)
  properties: water in wet mass 0 kg, carbon content, non-fossil 0, carbon content, fossil 0, wet mass 1 kg, dry mass 1 kg, water content 0, carbon allocation 0 kg

## Inputs from technosphere
- sodium silicate, solid: 1.01 kg; lognormal variance with pedigree 0.0427, pedigree (2,2,5,5,1)
  Average data from 6 European producers
  EcoSpold01Location=RER
  Uncertainty: Average data from 6 European producers
  properties: wet mass 1 kg, dry mass 1 kg
- heat, district or industrial, natural gas: 0 MJ; pedigree (1,1,1,1,1)
  (same comment as for sodium silicate, solid)
  properties: heating value, net 1 MJ
- heat, district or industrial, other than natural gas: 0 MJ; pedigree (1,1,1,1,1)
  EcoSpold01Location=RER
  Average data from 6 European producers
  Uncertainty: Average data from 6 European producers
  properties: heating value, net 1 MJ
- residue from cooling tower: -0.00257 kg; lognormal variance with pedigree 0.0427, pedigree (2,2,5,5,1)
  EcoSpold01Location=CH
  Average data from 6 European producers
  Uncertainty: Average data from 6 European producers
  production volume 0.00771 kg
    Calculated from the production volume of sodium silicate, without water, in 37% solution state in proportion to the respective output amounts.
  properties: water content 0.428571, dry mass 0.7 kg, carbon content, fossil 0.0544233, wet mass 1 kg
- chemical, organic: 0.00189 kg; lognormal variance with pedigree 0.0427, pedigree (2,2,5,5,1)
  Average data from 6 European producers
  EcoSpold01Location=GLO
  Uncertainty: Average data from 6 European producers
  properties: carbon content, fossil 0.628, wet mass 1 kg, dry mass 1 kg, heating value, net 19.03 MJ
  note on carbon content, fossil: This dataset is an unweighted average of 20 organic substances (listed in Tab 88.1, ecoinvent v2.2 report 8, part II), being part of the top100 chemicals included in this database. The C-content has also been calculated as an unweighted average of the C content of the substances composing this dataset.
- electricity, medium voltage: 0 kWh; pedigree (1,1,1,1,1)
  Average data from 6 European producers
  EcoSpold01Location=UCTE
  Uncertainty: Average data from 6 European producers
- steam, in chemical industry: 0.303 kg; lognormal variance with pedigree 0.0427, pedigree (2,2,5,5,1)
  (same comment as for sodium silicate, solid)
  properties: wet mass 1 kg
- chemical factory, organics: 4e-10 unit; lognormal variance with pedigree 0.588, pedigree (4,5,5,5,5)
  EcoSpold01Location=RER
  Estimation
  Uncertainty: estimation
- inert waste, for final disposal: -5.41e-5 kg; lognormal variance with pedigree 0.0427, pedigree (2,2,5,5,1)
  Average data from 6 European producers
  EcoSpold01Location=CH
  Uncertainty: Average data from 6 European producers
  production volume 0.0001623 kg
    (same comment as for residue from cooling tower)
  properties: water content 0.00502513, wet mass 1 kg, dry mass 0.995 kg
- heat, district or industrial, natural gas: 0.0108676, 0.705132 MJ (2 entries); lognormal variance with pedigree 0.0427, pedigree (2,2,5,5,1)
  (same comment as for sodium silicate, solid)
- heat, district or industrial, other than natural gas: 0.000113699, 0.280386 MJ (2 entries); lognormal variance with pedigree 0.0427, pedigree (2,2,5,5,1)
  (same comment as for heat, district or industrial, other than natural gas)
- electricity, medium voltage: 9.54213e-5, 1.82977e-5, 0.00030718, 0.00446766, 0.000629719, 0.00205172 kWh (6 entries); lognormal variance with pedigree 0.0427, pedigree (2,2,5,5,1)
  (same comment as for electricity, medium voltage)

## Inputs from nature
- Water, unspecified natural origin [natural resource, in water]: 0.00224 m3; name water_UNO_input; source Fawer M. 1997; lognormal variance with pedigree 0.0427, pedigree (2,2,5,5,1)
  Calculated value: calculation based on literature value. The data reported in the literature refer to a 48% solution of sodium silicate. All chemicals in the dataset use a functional unit referring to 100% of sodium silicate, thus the literature values has been multiplied with a factor of 2.08.
  Uncertainty: Average data from 6 European producers
- Water, cooling, unspecified natural origin [natural resource, in water]: 1.08e-6 m3; name water_cooling_UNO_input; source Fawer M. 1997; lognormal variance with pedigree 0.0427, pedigree (2,2,5,5,1)
  (same comment as for Water, unspecified natural origin)

## Emissions to nature
- Water [water, unspecified]: 0.00178146 m3; name water_to_water_unspecified; lognormal variance with pedigree 0.0827, pedigree (2,2,5,5,1)
  Calculated value based on literature values and expert opinion. See comments in the parametres' comment field.
  property fraction, origin: fresh water 0; name fraction_origin_fresh_water_Ww
  property fraction, origin: salt water 0; name fraction_origin_salt_water_Ww
  property fraction, origin: unspecified 1; name fraction_origin_unspecified_Ww
  property carbon content, fossil 0; name C_content_fossil
  property wet mass 1000 kg; name WM
  property carbon content, non-fossil 0; name C_content_non_fossil
  property water in wet mass 1000 kg; name WWM
  property dry mass 0 kg; name DM
- Water [air, unspecified]: 0.000459619 m3; name water_to_air_unspecified; lognormal variance with pedigree 0.0827, pedigree (2,2,5,5,1)
  (same comment as for Water)
  property fraction, origin: salt water 0; name fraction_origin_salt_water
  property fraction, origin: unspecified 1; name fraction_origin_unspecified
  property fraction, origin: fresh water 0; name fraction_origin_fresh_water

## Sampling procedure
sampling of questionnaires

## Extrapolations
see included processes This dataset has been copied from an original dataset covering the geography RER. The uncertainty has been adjusted accordingly.

## Review by Heiko Kunst 2003-07-04
Passed.
