# tetrafluoroethylene production

Dataset: EcoSpold 2, unit process
Geography: RoW
Time period: 1999-01-01 to 2021-12-31
Technology level: current
Classification: ISIC rev.4 ecoinvent: 2013:Manufacture of plastics and synthetic rubber in primary forms
Synonyms: Perfluoroethene; Perfluoroethylene; Ethene tetrafluoro-; TETRAFLUOROETHYLENE; Fluoroplast 4; tetrafluoroethene
Scenario: Business-as-Usual
System model: Allocation, cut-off by classification
Generated by: Niels Jungbluth
Published in: Althaus H.-J. 2007
Database: ecoinvent
isCopyrightProtected: true
accessRestrictedTo: 1

## General comment
This dataset represents the production of 1 kg of tetrafluoroethylene (TFE). TFE is the most important fluoroolefin; it is used mainly for the production of fluoropolymers such as polyfluoroethylene (PTFE). PTFE resin is used primarily in electrical applications such as insulation, flexible printed circuits, and piezoelectric devices. Tetrafluoroethylene is also used in the production of low molecular mass compounds and intermediates, e.g., for the manufacture of iodoperfluoroalkanes (Siegemund et al. 2016).
References:
Althaus H.-J., Chudacoff M., Hischier R., Jungbluth N., Osses M. and Primas A. (2007) Life Cycle Inventories of Chemicals. Final report ecoinvent data v2.0 No. 8. Swiss Centre for Life Cycle Inventories, Dübendorf, CH.
Siegemund, G., Schwertfeger, W., Feiring, A., Smart, B., Behr, F., Vogel, H., McKusick, B. and Kirsch, P. 2016. Fluorine Compounds, Organic. Ullmann's Encyclopedia of Industrial Chemistry.
Gendorf (2016) Umwelterklärung 2015, Werk Gendorf Industriepark, www.gendorf.de.

## Included activities start
The activity starts when the raw materials enter the process.

## Included activities end
This activity includes the inventory for the production, an estimation for the infrastructure, but does not include by-products.

## Geography
The data in this dataset are not geography-specific. Some values are based on data from a large chemical factory located in Germany. These are assumed to be valid for this geography.

## Technology
The production of fluorochemicals and PTFE monomers can be summarized with the following chemical reactions (Cedergren et al. 2001):
CaF2 + H2SO4 -> CaSO4 + 2HF (1)
CH4 + 3Cl2 -> CHCl3 + 3HCl (2)
CHCl3 + 2HF -> CHClF2 + 2HCl (3)
2 CHClF2 + heat -> CF2=CF2 + 2 HCl (4)
This dataset represents the last reaction step (4).
Parts of the production are carried out at high pressure and high temperature, 590 ºC – 900 ºC. The first reaction (1) takes place in the presence of heat and HSO3 - and steam. The inventory for the production of hydrogen fluoride can be found in the report (Jungbluth 2003a). Reaction (2) is used to produce trichloromethane. Reaction 3 for the production of chlorodifluoromethane takes place in the presence of a catalyst. The production of PTFE (4) takes place under high temperature pyrolysis conditions.
Large amounts of hydrochloric acid (HCl) are generated as a couple product during the process and are sold as a 30% aqueous solution. A large number of other by-products and emissions is formed in the processes (benzene, dichloromethane, ethylene oxide, formaldehyde, R134a, and vinyl chloride) and small amounts of the highly toxic perfluoroisobutylene CF2=C(CF3)2. The by-products in the production of monomers can harm the processes of polymerisation. Because of this, the refinement of the production of monomers has to be very narrow. This makes the process complex and it contributes to a high cost for the PTFE-laminates. (Cedergren et al. 2001).
References:
Althaus H.-J., Chudacoff M., Hischier R., Jungbluth N., Osses M. and Primas A. (2007) Life Cycle Inventories of Chemicals. Final report ecoinvent data v2.0 No. 8. Swiss Centre for Life Cycle Inventories, Dübendorf, CH.

## Time period
Time of publication. Some values are based on data published by the Gendorf factory that were collected between 2011 and 2015. The time period has been adjusted accordingly. For more details, see the comments of the exchanges.

## Reference product
- tetrafluoroethylene: 1 kg; name RP; CPC 34730: Polymers of vinyl chloride or other halogenated olefins, in primary forms; By-product classification allocatable product; CAS 9002-84-0
  TFE is the most important fluoroolefin; it is used mainly for the production of fluoropolymers such as polyfluoroethylene (PTFE). PTFE resin is used primarily in electrical applications such as insulation, flexible printed circuits, and piezoelectric devices. Tetrafluoroethylene is also used in the production of low molecular mass compounds and intermediates, e.g., for the manufacture of iodoperfluoroalkanes (Siegemund et al. 2016).
  Reference(s):
  Siegemund, G., Schwertfeger, W., Feiring, A., Smart, B., Behr, F., Vogel, H., McKusick, B. and Kirsch, P. 2016. Fluorine Compounds, Organic. Ullmann's Encyclopedia of Industrial Chemistry.
  production volume 1.95e8 kg; name RP_PV
    Estimated from the production volume of the precursor (chlorodifluoromethane)
  property heating value, net 7.27 MJ
    LHV is calculated based on the Carbon content of the product. More details can be found on the respective documentation.
  property price 11.7 EUR2005
    Literature value (Ntetye, L.; Huberts, R.; van der Walt, I.J.; The determination and optimization of the feeding parameters of CaF2/C-mixtures into a non-transfer-arc plasma system, International Conference on Chemical and Environmental Engineering, 2013, South Africa) 15 USD/kg recalculated to euro.
  property carbon content 0.24
    carbon content on a dry matter basis (reserved; not for manual entry)
  property true value 11.7; name RP_true_value
    allocation property applied in "true value" allocation // value calculated from revenue
  properties: wet mass 1 kg, carbon content, fossil 0.24, dry mass 1 kg, carbon content, non-fossil 0, water content 0, water in wet mass 0 kg, carbon allocation 0.24 kg

## By-products
- hydrochloric acid, without water, in 30% solution state: 0 kg; name BP_hydrochloric_acid; By-product classification allocatable product; CPC 34: Basic chemicals; CAS 7647-01-0
  A large amount of hydrochloric acid (HCl) is generated as a by product during the process and is sold as a 30% aqueous solution.
  production volume 3.51e7 kg; = RP_PV*BP_hydrochloric_acid/ABS(RP)
    Calculated from the production volume of tetrafluoroethylene in proportion to the respective output amounts.
  property price 0.127 EUR2005; name BP_hydrochloric_acid_price_EUR2005
    Temporary price data. Calculated as 90% of purchasers price based on: 2004 Import/Export data (total trades (USD) divided by total weight (kg) in EU27, USA, China, Japan and India) from UN Commodity Trade Statistics Database (http://data.un.org/Explorer.aspxDatabase [Accessed 2 July 2010]). Commodity: Hydrogen chloride (hydrochloric acid).
  property heating value, net 3.32 MJ
    LHV is calculated based on the elemental composition of the substance. Based on the CAS number of the substance (007647-01-0), the chemical formula of the substance is found to be: HCl, (PubChem 2020).
    Reference: Kim, S., Chen, J., Cheng, T., Gindulyte, A., He, J., He, S., Li, Q., Shoemaker, B. A., Thiessen, P. A., Yu, B., Zaslavsky, L., Zhang, J., & Bolton, E. E. (2019). PubChem 2019 update: improved access to chemical data. Nucleic acids research, 47(D1), D1102–D1109. https://doi.org/10.1093/nar/gky1033
  property carbon content 0
    carbon content on a dry matter basis (reserved; not for manual entry)
  property true value 0.02286; name BP_hydrochloric_acid_true_value
    allocation property applied in "true value" allocation // value calculated from revenue
  properties: wet mass 1 kg, water in wet mass 0 kg, water content 0, carbon content, non-fossil 0, dry mass 1 kg, carbon content, fossil 0, carbon allocation 0 kg

## Inputs from technosphere
- chemical factory, organics: 3.9922e-10 unit; lognormal variance with pedigree 0.31, pedigree (2,3,2,4,3)
  Calculated based on literature data published by the industry. For this activity, no information was readily available concerning infrastructure and land-use. Therefore, the infrastructure is estimated based on data from two chemical factories, the BASF site of Ludwigshafen and the chemical factory in Gendorf (which are both located in Germany), which produce a wide range of chemical substances. Based on this data, the following assumptions are made: the built area amounts to about 4.2 ha, the plant has an average output of 50'000 t/a and a lifespan of fifty years. The estimated infrastructure amount is therefore 4.00 E-10 units per kg of produced chemical.
  References:
  Althaus H.-J., Chudacoff M., Hischier R., Jungbluth N., Osses M. and Primas A. (2007) Life Cycle Inventories of Chemicals. ecoinvent report No. 8, v2.0. EMPA Dübendorf, Swiss Centre for Life Cycle Inventories, Dübendorf, CH.
  Gendorf (2000) Umwelterklärung 2000, Werk Gendorf. Werk Gendorf, Burgkirchen.
- municipal solid waste: 0 kg; name BP_municipal_solid_waste; pedigree (1,1,1,1,1)
  Literature, Ros 1994, manufacturing waste
  Uncertainty: L
  production volume 0 kg
    (same comment as for hydrochloric acid, without water, in 30% solution state)
  properties: dry mass 0.771 kg, heating value, net 11.74 MJ, carbon content, non-fossil 0.261655, carbon content, fossil 0.171549, water content 0.297017, wet mass 1 kg
  note on heating value, net: Value taken from the general comment of the treatment dataset.
  note on carbon content, non-fossil: MSW composition in tab 4.1, ecoinvent v2.2 report 13_I. C content referred to 1 kg DM
- nitrogen, liquid: 0.0189629 kg; lognormal variance with pedigree 0.0106, pedigree (2,3,2,4,3)
  Calculated based on literature data published by the industry. This value is a 5-year average of data (2011 - 2015) published by the Gendorf factory (Gendorf, 2016, Umwelterklärung, www.gendorf.de), (Gendorf, 2015, Umwelterklärung, www.gendorf.de), (Gendorf, 2014, Umwelterklärung, www.gendorf.de). The amount of nitrogen used per kg of chemical substance produced is calculated using literature data published by the Gendorf factory based in Germany, which produces a wide range of chemical substances. The factory produced 1657400 tonnes of chemical substances in the year 2015 (Gendorf, 2016, Umwelterklärung, www.gendorf.de) and 740000 tonnes of intermediate products. The reported amount of nitrogen used in 2015 was 33512400 Nm3 (Gendorf, 2016, Umwelterklärung, www.gendorf.de). One Nm3 of nitrogen is equal to 1.2506 kg. The resulting amount of nitrogen - the 5-year average (2011 - 2015, weighted by production volume) is 0.019 kg/kg. Nitrogen is mainly used during the production of chemicals for 'blanketing', which is the process of applying gas to the vapour space of a container or vessel in order to control its composition.
  properties: dry mass 1 kg, wet mass 1 kg
- refinery sludge: -0.00437994 kg; name BP_refinery_sludge; lognormal variance with pedigree 0.0386, pedigree (4,3,4,5,1)
  Literature, Ros 1994, chemical waste and waste with hydrocarbons
  Uncertainty: L
  production volume 855758 kg; = RP_PV*BP_refinery_sludge/ABS(RP)
    (same comment as for hydrochloric acid, without water, in 30% solution state)
  property price 0 EUR2005; name BP_refinery_sludge_price_EUR2005
  properties: water content 8.52381, dry mass 0.105 kg, carbon content, fossil 0.767857, wet mass 1 kg, heating value, net 2.45 MJ
  note on carbon content, fossil: Tab A.6, ecoinvent v2.2 report 13_I. C content has been calculated after data in the tables, and then referred to 1 kg DM
- heat, district or industrial, natural gas: 0 MJ; pedigree (1,1,1,1,1)
  Rough estimation
  Uncertainty: R
  properties: heating value, net 1 MJ
- chlorodifluoromethane: 1.80697 kg; lognormal variance with pedigree 0.0512, pedigree (4,3,5,5,1)
  Stoichiometric calculation, 95% yield
  Uncertainty: S
  properties: heating value, net 5.61 MJ, wet mass 1 kg, dry mass 1 kg, carbon content, fossil 0.139535
- municipal solid waste: -1.72196e-6, -4.33891e-7, -6.20056e-7, -0.00121784 kg (4 entries); lognormal variance with pedigree 0.0386, pedigree (4,3,4,5,1)
  Literature, Ros 1994, manufacturing waste
  Uncertainty: L
  production volume 238485 kg
- heat, district or industrial, natural gas: 0.0719558, 4.66878 MJ (2 entries); lognormal variance with pedigree 0.1206, pedigree (5,3,5,5,3)
  Rough estimation
  Uncertainty: R

## Emissions to nature
- Methane, chlorodifluoro-, HCFC-22 [air, urban air close to ground]: 0.000922368 kg; lognormal variance with pedigree 0.1606, pedigree (4,3,5,5,1)
  Unspecified HCFC. Estimation based on literature and expert judgement.
  Uncertainty: L
- Methanol [air, urban air close to ground]: 0.00891458 kg; lognormal variance with pedigree 0.1606, pedigree (4,3,5,5,1)
  Literature
  Uncertainty: L
- Methane, dichlorodifluoro-, CFC-12 [air, urban air close to ground]: 8.18541e-5 kg; lognormal variance with pedigree 0.1606, pedigree (4,3,5,5,1)
  Estimation based on literature and expert judgement.
  Uncertainty: L
- Nitrogen [air, unspecified]: 0.0189629 kg; lognormal variance with pedigree 0.0106, pedigree (2,3,2,4,3)
  Calculated value. The amount of nitrogen released to air is equal to the amount of nitrogen entering the activity.
- Methane, trichlorofluoro-, CFC-11 [air, urban air close to ground]: 1.14886e-6 kg; lognormal variance with pedigree 0.1606, pedigree (4,3,5,5,1)
  Estimation based on literature and expert judgement.
  Uncertainty: L
- Ethane, 1,1,1,2-tetrafluoro-, HFC-134a [air, urban air close to ground]: 0.00019961 kg; lognormal variance with pedigree 0.1606, pedigree (4,3,5,5,1)
  Estimation. 0.02% of the input of tetrafluoroethylene is assumed to be emitted to air.
  Uncertainty: E

## Sampling procedure
The data is based on literature, company information, stoichiometric calculations and assumptions. Some values are calculated based on data from a large chemical factory located in Germany. For more details, see the comments of the exchanges.

## Extrapolations
This dataset has been copied from an original dataset covering the geography RER. The uncertainty has been adjusted accordingly.

## Review by Emilia Moreno Ruiz 2017-09-07
This dataset was additionally reviewed in a separate review process by Eric Johnson of Atlantic Consulting as well as Emilia Moreno Ruiz and Gregor Wernet of ecoinvent.
