# diesel production, low-sulfur

Dataset: EcoSpold 2, unit process
Geography: CH
Time period: 2005-01-01 to 2021-12-31
Technology level: current
Classification: EcoSpold01Categories: oil/fuels
Classification: ISIC rev.4 ecoinvent: 1920:Manufacture of refined petroleum products
Synonyms: green diesel
Tags: ConvertedDataset
Scenario: Business-as-Usual
System model: Allocation, cut-off by classification
Generated by: Niels Jungbluth
Published in: Jungbluth, N. 2007
Database: ecoinvent
isCopyrightProtected: true
accessRestrictedTo: 1

## General comment
Estimation for the total conversion of refinery production to low-sulphur diesel with a sulphur content < 50ppm (Today 350ppm). A additional energy use (6% of energy use for diesel production in the refinery) has been estimated. Data for additional emissions and additional infrastructure were not available.
[This dataset was already contained in the ecoinvent database version 2. It was not individually updated during the transfer to ecoinvent version 3. Life Cycle Impact Assessment results may still have changed, as they are affected by changes in the supply chain, i.e. in other datasets. This dataset was generated following the ecoinvent quality guidelines for version 2. It may have been subject to central changes described in the ecoinvent version 3 change report (http://www.ecoinvent.org/database/ecoinvent-version-3/reports-of-changes/), and the results of the central updates were reviewed extensively. The changes added e.g. consistent water flows and other information throughout the database. The documentation of this dataset can be found in the ecoinvent reports of version 2, which are still available via the ecoinvent website. The change report linked above covers all central changes that were made during the conversion process.]

## Included activities end
additional energy use for production, no process specific emissions and material use.

## Geography
Estimation for the European situation.

## Technology
Different technologies might be used to reduce the sulphur content, e.g. better catalysts, new hydrodesulphurisation process, higher storage capacities, separate transport systems.

## Time period
Time of publications and information in the literature

## Reference product
- diesel, low-sulfur: 1 kg; By-product classification allocatable product; CPC 33360: Gas oil; CAS 68476-34-6
  EcoSpold01Location=CH
  production volume 4.968e8 kg
    Not known.
    Calculated from an input of 4.6E+9 kg crude petroleum and the corresponding output relations of the refinery dataset, assuming all diesel to be low-sulfur as required by regulation
  property price 0.4 EUR2005
    Assumed the same price as diesel, at refinery. According to the International Energy Agency (http://wds.iea.org/WDS/TableViewer/tableView.aspx downloaded 4 July 2009 for purchased data points). The prices are for Germany and excl. taxes, and they are the same for both industry and household. Applying diesel density of 0.844 kg/litre from IEA, Oil information, Documentation for beyond 2020 files.
  property carbon content, fossil 0.865
    C-content of diesel low-sulfur is 86.5% (ecoinvent v2.2 report 6_IV, Tab 3.14)
  property carbon content 0.865
    carbon content on a dry matter basis (reserved; not for manual entry)
  properties: water content 0, dry mass 1 kg, wet mass 1 kg, water in wet mass 0 kg, carbon content, non-fossil 0, heating value, net 42.8 MJ, carbon allocation 0.865 kg

## Inputs from technosphere
- heat, district or industrial, other than natural gas: 0.093 MJ; lognormal variance with pedigree 0.3686, pedigree (4,3,5,1,1)
  Estimation 6% of refinery energy use, basic uncertainity = 3 based on literature
  Uncertainty: Estimation 6% of refinery energy use, basic uncertainity = 3 based on literature
  properties: heating value, net 1 MJ
- heavy fuel oil, burned in refinery furnace: 0.0215 MJ; lognormal variance with pedigree 0.3686, pedigree (4,3,5,1,1)
  Estimation 6% of refinery energy use, basic uncertainity = 3 based on literature
  EcoSpold01Location=CH
  Uncertainty: Estimation 6% of refinery energy use, basic uncertainity = 3 based on literature
  properties: carbon content, fossil 0.849, dry mass 0.0242718 kg, wet mass 0.0242718 kg
- electricity, medium voltage: 0.000753 kWh; lognormal variance with pedigree 0.3686, pedigree (4,3,5,1,1)
  EcoSpold01Location=CH
  Estimation 6% of refinery energy use, basic uncertainity = 3 based on literature
  Uncertainty: Estimation 6% of refinery energy use, basic uncertainity = 3 based on literature
- diesel: 0 kg; pedigree (1,1,1,1,1)
  Input
  EcoSpold01Location=CH
  Uncertainty: Input
  properties: heating value, net 42.8 MJ, dry mass 1 kg, wet mass 1 kg, carbon content, fossil 0.865
  note on carbon content, fossil: C-content of diesel is 86.5% (ecoinvent v2.2 report 6_IV, Tab 3.14)
- diesel: 1 kg; lognormal variance with pedigree 0.2106, pedigree (5,5,5,5,5)
  Input
  EcoSpold01Location=CH
  Uncertainty: Input

## Sampling procedure
Literature data with calculations based on refinery models.

## Extrapolations
This dataset has been extrapolated from year 2005 to the year of the calculation (2021). The uncertainty has been adjusted accordingly.

## Review by Michael Spielmann (obsolete) 2003-07-04
passed.

## Review by Bo Weidema 2012-03-18
Passed for upload to database, in order to enable calculation check. The dataset will later be re/submitted for a more thorough review.

## Review by Emilia Moreno Ruiz 2018-02-27
Input of diesel linked to the right producer
