# silicon production, single crystal, Czochralski process, electronics

Dataset: EcoSpold 2, unit process
Geography: RoW
Time period: 1992-01-01 to 2021-12-31
Technology level: current
Classification: ISIC rev.4 ecoinvent: 2011:Manufacture of basic chemicals
Classification: EcoSpold01Categories: photovoltaic/production of components
Synonyms: Czochralski process
Tags: ConvertedDataset
Scenario: Business-as-Usual
System model: Allocation, cut-off by classification
Share of production covered: 10 %
Generated by: Niels Jungbluth
Published in: Jungbluth, N. 2007
Database: ecoinvent
isCopyrightProtected: true
accessRestrictedTo: 1

## General comment
Production of a monocrystalline block with a diameter of 130mm and a length of 150cm. Losses of non-recycled material due to block cutting are included.
[This dataset was already contained in the ecoinvent database version 2. It was not individually updated during the transfer to ecoinvent version 3. Life Cycle Impact Assessment results may still have changed, as they are affected by changes in the supply chain, i.e. in other datasets. This dataset was generated following the ecoinvent quality guidelines for version 2. It may have been subject to central changes described in the ecoinvent version 3 change report (http://www.ecoinvent.org/database/ecoinvent-version-3/reports-of-changes/), and the results of the central updates were reviewed extensively. The changes added e.g. consistent water flows and other information throughout the database. The documentation of this dataset can be found in the ecoinvent reports of version 2, which are still available via the ecoinvent website. The change report linked above covers all central changes that were made during the conversion process.]

## Included activities end
Gate to gate inventory for the Czochralski process. Crushing of Si, etching with HNO3, HF and acetic acid. Melting in a silica pot and crystallisation to produce a monocrystalline material. Water emissions roughly estimated. Process emissions to air are not known.

## Geography
Data for a plant in DE and estimation for RER.

## Technology
Czochralski process for production of monocrystalline silicon blocks. Than edges are sliced and blocks are sawn.

## Time period
Most data are published in 2006. Some older data published in 1992.

## Parameters
- fraction, cooling water, cooling pond system, to air: 0.032 dimensionless; name fraction_CW_CP_to_air; lognormal variance with pedigree 0.0413, pedigree (2,3,1,3,1)
  Calculated based on literature value (Scown, C.D., 2011, Water Footprint of U.S. Transportation Fuels and supplying information of the article) (Vionnet, S., Quantis Water Database - Technical Report, 2012).
- fraction, cooling water, recirculating system, to air: 0.771 dimensionless; name fraction_CW_R_to_air; lognormal variance with pedigree 0.0413, pedigree (2,3,1,3,1)
  (same comment as for fraction, cooling water, cooling pond system, to air)
- fraction, cooling water, once-through system, to air: 0.004 dimensionless; name fraction_CW_OT_to_air; lognormal variance with pedigree 0.0413, pedigree (2,3,1,3,1)
  (same comment as for fraction, cooling water, cooling pond system, to air)
- fraction, tap water, to air: 0.15 dimensionless; name fraction_TW_to_air; lognormal variance with pedigree 0.092025, pedigree (4,4,3,2,4)
- fraction, cooling water, to air: 0.3875 dimensionless; name fraction_CW_to_air; = (0.5*fraction_CW_OT_to_air)+(0.5*fraction_CW_R_to_air); lognormal variance with pedigree 0.092025, pedigree (4,4,3,2,4)
  Calculated value based on literature value (see comments of the other parametres present in this dataset) and expert opinion. In the case when no industry/literature data are available about the type of cooling or directly fraction, cooling water, to air specific for the process a default assumption is applied. It is assumed that the once-through cooling system is used in 50% of all cases and recirculating system is used in another 50% of all cases.
- fraction, process water, to air: 0.15 dimensionless; name fraction_PW_to_air; lognormal variance with pedigree 0.092025, pedigree (4,4,3,2,4)

## Reference product
- silicon, single crystal, Czochralski process, electronics: 1 kg; By-product classification allocatable product; CPC 342: Basic inorganic chemicals n.e.c.; CAS 7440-21-3
  EcoSpold01Location=RER
  production volume 2.67763 kg
    This is a placeholder value that does not reflect real-world production volumes. This dataset does not currently require a real-world production volume to work in the database framework, and no actual data were collected yet. This has no negative effect on the results of the ecoinvent database.
  property price 123.522 EUR2005
    Calculated based on inputs: The price of the product has been calculated as a sum of the values of the material and energy inputs for this product. This value is therefore a rough estimation. It may underestimate the real price since there are additional expenses when producing any product. These expences can include for example labour costs, treatment of waste materials and profit for the producer. Please consider carefully whether this level of data quality is acceptable for your application.
  property carbon content, non-fossil 0
    The product is Czochralski singlecrystalline silicon (CZ-sc-Silicon). (ecoinvent v2.2 report 6_XII)
  property carbon content, fossil 0
    (same comment as for silicon, single crystal, Czochralski process, electronics)
  property carbon content 0
    carbon content on a dry matter basis (reserved; not for manual entry)
  properties: water in wet mass 0 kg, water content 0, dry mass 1 kg, wet mass 1 kg, carbon allocation 0 kg

## Inputs from technosphere
- argon, liquid: 5.7944 kg; lognormal variance with pedigree 0.054, pedigree (1,4,5,5,1)
  De Wild 2007, protection gas for crystal growing
  EcoSpold01Location=RER
  Uncertainty: de Wild 2007, protection gas for crystal growing
  properties: wet mass 1 kg, dry mass 1 kg
- hydrogen fluoride: 0.050664 kg; lognormal variance with pedigree 0.074, pedigree (3,4,5,5,3)
  For etching, Hagedorn 1992
  EcoSpold01Location=GLO
  Uncertainty: For etching, Hagedorn 1992
  properties: heating value, net 6.06 MJ, dry mass 1 kg, wet mass 1 kg
- lime, hydrated, packed: 0.19103 kg; lognormal variance with pedigree 0.074, pedigree (3,4,5,5,3)
  EcoSpold01Location=CH
  Waste water treatment, Hagedorn 1992
  Uncertainty: waste water treatment, Hagedorn 1992
  properties: wet mass 1 kg, water content 0.00300903, dry mass 0.997 kg
- electricity, medium voltage: 0 kWh; pedigree (1,1,1,1,1)
  EcoSpold01Location=UCTE
  Environmental report Wacker 2006
  Uncertainty: Environmental report Wacker 2006
- nitric acid, without water, in 50% solution state: 0 kg; pedigree (1,1,1,1,1)
  For etching, Hagedorn 1992
  EcoSpold01Location=RER
  Uncertainty: For etching, Hagedorn 1992
  properties: wet mass 1 kg, dry mass 1 kg
- heat, district or industrial, natural gas: 0 MJ; pedigree (1,1,1,1,1)
  EcoSpold01Location=RER
  Environmental report Wacker 2006
  Uncertainty: Environmental report Wacker 2006
  properties: heating value, net 1 MJ
- silicone factory: 1e-11 unit; lognormal variance with pedigree 0.3601, pedigree (1,2,5,5,3)
  Estimation
  EcoSpold01Location=RER
  Uncertainty: Estimation
- acetone, liquid: 0.049003 kg; lognormal variance with pedigree 0.074, pedigree (3,4,5,5,3)
  EcoSpold01Location=RER
  For etching, Hagedorn 1992
  Uncertainty: For etching, Hagedorn 1992
  properties: heating value, net 31.32 MJ, carbon content, fossil 0.62069, dry mass 1 kg, wet mass 1 kg
- silicon, electronics grade: 1.4286 kg; lognormal variance with pedigree 0.054, pedigree (1,4,5,5,1)
  EcoSpold01Location=DE
  Environmental report Wacker 2006
  Uncertainty: Environmental report Wacker 2006
  properties: dry mass 1 kg, wet mass 1 kg
- ceramic tile: 0.33645 kg; lognormal variance with pedigree 0.054, pedigree (1,4,5,5,1)
  EcoSpold01Location=CH
  De Wild 2007, quartz crucible for melting the silicon
  Uncertainty: de Wild 2007, quartz crucible for melting the silicon
  properties: wet mass 1 kg, dry mass 1 kg
- acetic acid, without water, in 98% solution state: 0.10797 kg; lognormal variance with pedigree 0.074, pedigree (3,4,5,5,3)
  For etching, Hagedorn 1992
  EcoSpold01Location=RER
  Uncertainty: For etching, Hagedorn 1992
  properties: carbon content, fossil 0.400016, wet mass 1 kg, dry mass 1 kg, heating value, net 14.6 MJ
  note on heating value, net: Based on literature, page 10, Althaus H.-J., Chudacoff M., Hischier R., Jungbluth N., Osses M. and Primas A. (2007) Life Cycle Inventories of Chemicals. Final report ecoinvent data v2.0 No. 8. EMPA, Swiss Centre for Life Cycle Inventories, Dübendorf, CH, Online-Version under: www.ecoinvent.org.
- waste, from silicon wafer production, inorganic: -3.6364 kg; lognormal variance with pedigree 0.054, pedigree (1,4,5,5,1)
  EcoSpold01Location=CH
  Environmental report Wacker
  Uncertainty: Environmental report Wacker
  production volume 10.9092 kg
    Calculated from the production volume of silicon, single crystal, Czochralski process, electronics in proportion to the respective output amounts.
  properties: dry mass 0.906 kg, water content 0.103753, carbon content, fossil 0.0347572, wet mass 1 kg
- tap water: 0 kg; name tap_water_input; pedigree (1,1,1,1,1)
  Environmental report Wacker 2006
  EcoSpold01Location=RER
  Uncertainty: Environmental report Wacker 2006
  properties: water content 2962.17, carbon content, fossil 0.00178991, dry mass 0.000337476 kg, wet mass 1 kg
  note on carbon content, fossil: Bicarbonate content is 2.93 mol/m3. CO2 content is 0.1 mol/m3 (ecoinvent v2.2 report 8, Tab 93.1).
- sodium hydroxide, without water, in 50% solution state: 0.041528 kg; lognormal variance with pedigree 0.074, pedigree (3,4,5,5,3)
  EcoSpold01Location=RER
  Waste gas neutralization, Hagedorn 1992
  Uncertainty: waste gas neutralization, Hagedorn 1992
  properties: dry mass 1 kg, wet mass 1 kg, heating value, net 3.03 MJ
- electricity, medium voltage: 2.52104, 0.483427, 8.11573, 118.036, 16.6372, 54.2066 kWh (6 entries); lognormal variance with pedigree 0.054, pedigree (1,4,5,5,1)
  (same comment as for electricity, medium voltage)
- nitric acid, without water, in 50% solution state: 0.0182409, 0.004451, 0.0110688, 0.0337949, 0.00530359, 0.0029956, 0.00443452, 0.0143947 kg (8 entries); lognormal variance with pedigree 0.074, pedigree (3,4,5,5,3)
  For etching, Hagedorn 1992
  EcoSpold01Location=RER
  Uncertainty: For etching, Hagedorn 1992
- heat, district or industrial, natural gas: 3.6883, 239.312 MJ (2 entries); lognormal variance with pedigree 0.054, pedigree (1,4,5,5,1)
  (same comment as for heat, district or industrial, natural gas)
- tap water: 1.46434, 0.176267, 0.291311, 7.34571, 0.191097, 0.543572, 84.0607 kg (7 entries); lognormal variance with pedigree 0.054, pedigree (1,4,5,5,1)
  (same comment as for tap water)

## Inputs from nature
- Water, river [natural resource, in water]: 2.0508 m3; name water_river_input; lognormal variance with pedigree 0.054, pedigree (1,4,5,5,1)
  Environmental report Wacker 2006
  Uncertainty: Environmental report Wacker 2006
- Water, cooling, unspecified natural origin [natural resource, in water]: 2.333 m3; name water_cooling_UNO_input; lognormal variance with pedigree 0.054, pedigree (1,4,5,5,1)
  Environmental report Wacker 2006
  Uncertainty: Environmental report Wacker 2006

## Emissions to nature
- COD, Chemical Oxygen Demand [water, surface water]: 0.13034 kg; lognormal variance with pedigree 0.39, pedigree (5,5,5,5,1)
  Extrapolation for sum parameter
  Uncertainty: Extrapolation for sum parameter
- TOC, Total Organic Carbon [water, surface water]: 0.040475 kg; lognormal variance with pedigree 0.39, pedigree (5,5,5,5,1)
  Extrapolation for sum parameter
  Uncertainty: Extrapolation for sum parameter
- Fluoride [water, surface water]: 0.0023713 kg; lognormal variance with pedigree 0.356, pedigree (3,4,5,5,1)
  Hagedorn 1992, 50% reduction, basic uncertainty = 3
  Uncertainty: Hagedorn 1992, 50% reduction, basic uncertainty = 3
- DOC, Dissolved Organic Carbon [water, surface water]: 0.040475 kg; lognormal variance with pedigree 0.39, pedigree (5,5,5,5,1)
  Extrapolation for sum parameter
  Uncertainty: Extrapolation for sum parameter
- BOD5, Biological Oxygen Demand [water, surface water]: 0.13034 kg; lognormal variance with pedigree 0.39, pedigree (5,5,5,5,1)
  Extrapolation for sum parameter
  Uncertainty: Extrapolation for sum parameter
- Nitrogen [water, surface water]: 0.0091039 kg; lognormal variance with pedigree 0.096, pedigree (3,4,5,5,1)
  Environmental report Wacker 2006, 50% of total emissions
  Uncertainty: Environmental report Wacker 2006, 50% of total emissions
- Water [water, unspecified]: 3.2521 m3; name water_to_water_unspecified; lognormal variance with pedigree 0.0827, pedigree (2,2,5,5,1)
  Calculated value based on literature values and expert opinion. See comments in the parametres' comment field.
  property fraction, origin: salt water 0; name fraction_origin_salt_water_Ww
  property fraction, origin: fresh water 0.560604; name fraction_origin_fresh_water_Ww
  property fraction, origin: unspecified 0.439396; name fraction_origin_unspecified_Ww
  property wet mass 1000 kg; name WM
  property carbon content, fossil 0; name C_content_fossil
  property dry mass 0 kg; name DM
  property water in wet mass 1000 kg; name WWM
  property carbon content, non-fossil 0; name C_content_non_fossil
- Acetic acid [water, surface water]: 0.053987 kg; lognormal variance with pedigree 0.356, pedigree (3,4,5,5,1)
  Hagedorn 1992, 50% emission, basic uncertainty = 3
  Uncertainty: Hagedorn 1992, 50% emission, basic uncertainty = 3
- Water [air, unspecified]: 1.22577 m3; name water_to_air_unspecified; lognormal variance with pedigree 0.0827, pedigree (2,2,5,5,1)
  (same comment as for Water)
  property fraction, origin: salt water 0; name fraction_origin_salt_water
  property fraction, origin: fresh water 0.262473; name fraction_origin_fresh_water
  property fraction, origin: unspecified 0.737527; name fraction_origin_unspecified
- Hydroxide [water, surface water]: 0.0074169 kg; lognormal variance with pedigree 0.356, pedigree (3,4,5,5,1)
  (same comment as for Fluoride)
- Hydrocarbons, unspecified [water, surface water]: 0.022841 kg; lognormal variance with pedigree 0.356, pedigree (3,4,5,5,1)
  (same comment as for Fluoride)

## Sampling procedure
Publication of plant specific (partly aggregated) data.

## Extrapolations
none This dataset has been copied from an original dataset covering the geography RER. The uncertainty has been adjusted accordingly.

## Review by Roberto Dones 2007-09-13
Passed.
none
