# treatment of residue from mechanical treatment, IT accessory, municipal waste incineration

Dataset: EcoSpold 2, unit process
Geography: RoW
Time period: 2006-01-01 to 2021-12-31
Technology level: current
Classification: ISIC rev.4 ecoinvent: 3821:Treatment and disposal of non-hazardous waste
Synonyms: municipal waste incineration; Kehrichtverbrennung; Siedlungsabfallverbrennung
Scenario: Business-as-Usual
System model: Allocation, cut-off by classification
Share of production covered: 1.8 %
Generated by: Gabor Doka
Published in: Doka G. 2013
Database: ecoinvent
isCopyrightProtected: true
accessRestrictedTo: 1

## General comment
This dataset represents the activity of waste disposal of residue from mechanical treatment, IT accessory in a municipal solid waste incinerator (MSWI) // Recommended use of this dataset: Only for incineration of shredder residues generated in the recycling (mechanical treatment) of computer peripherals (keyboards, mouse) // Inventoried waste contains 1.9% rubber; 46.5% Plastics from electronic consumer goods; 46.5% Plastics from electronic industrial goods; 1.57% MSWI iron scrap; 0.353% Alu in MSW; 1.03% Glass; 1.99% wiring copper; 0.0536% Pb in ASR inert; 0.0111% silver; . // Waste composition (wet, in ppm): upper heating value 34.31 MJ/kg; lower heating value 32.89 MJ/kg; H2O 8744.4; O 54844; H 70912; C 774420; S 408.04; N 12381; P 478.01; B n.a.; Cl 6321.9; Br 5119.9; F 232.72; I n.a.; Ag 110.86; As 6.9816; Ba 164.77; Cd 140.31; Co 27.44; Cr 70.858; Cu 23077; Hg 0.79127; Mn 44.112; Mo 2.7927; Ni 482.86; Pb 679.2; Sb 4467.1; Se 1.8241; Sn 199.49; V 4.6241; Zn 717.33; Be 0.43432; Sc n.a.; Sr 76.874; Ti 4167.6; Tl 0.34745; W n.a.; Si 6962.3; Fe 14273; Ca 3650.5; Al 5901.6; K 108.91; Mg n.a.; Na 797.06; // Share of carbon in waste that is biogenic 0%. // Share of metals in waste not oxidised and bulk-recyclable (exclude very small or thin parts) Iron: 89.71%; Alu: 59.48%; Copper: 86.19%. // One kg of this waste produces 0.08462 kg of slag and 0.02111 kg of residues, which are landfilled. Additional solidification with 0.008446 kg of cement. // Net energy production: 4.22MJ/kg electric energy and 8.19MJ/kg thermal energy. // Recovery of metal scrap to recycling: 7.4029g iron scrap, 1.0141g aluminium scrap, 6.0778g copper scrap.

## Included activities start
waste incineration from waste reception gate and delivery into waste bunker at incinerator plant site (without transports to the incinerator)

## Included activities end
Waste-specific short-term emissions to water from leachate. Long-term emissions from landfill to ground water.

## Geography
Specific to the technology mix encountered in Switzerland in 2010. Well applicable to modern incineration practices in Europe, North America or Japan.

## Technology
average Swiss MSWI plants in 2010 (grate incinerators) with electrostatic precipitator for fly ash (ESP), wet flue gas scrubber and 25% SNCR , 42.77% SCR-high dust , 32.68% SCR-low dust -DeNOx facilities and 0% without Denox (weighted according to mass of burnt waste, representing Swiss average). Efficiency of iron scrap separation from slag : 58%. Efficiency of non-ferrous scrap separation from slag : 31%. Gross electric efficiency technology mix 15.84% and Gross thermal efficiency technology mix 28.51%

## Time period
Waste composition as given in literature reference, theoretical data or other source. Transfer coefficients for modern MSWI.

## Reference product
- residue from mechanical treatment, IT accessory: -1 kg; CPC 39: Wastes or scraps; By-product classification Waste
  Main reference product of this activity (supply of disposal service).
  production volume 5.2987e7 kg
    based on estimate on MSW in WTE globally and estimate of share of WEEE residues in Swiss MSW based on unqualified estimate of IT accessories waste in CH and rate of this residue waste per device (from Hischier et al. 2007-V)
  property heating value, net 32.89 MJ
    Value taken from the general comment of the treatment dataset.
  property price 0 EUR2005
    Waste products are assigned a price of zero as they are assumed to require further treatment.
  property carbon content 0.788899
    carbon content on a dry matter basis (reserved; not for manual entry)
  properties: wet mass 1 kg, carbon content, non-fossil 0, water in wet mass 0 kg, carbon content, fossil 0.788899, water content 0, dry mass 1 kg, carbon allocation 0.788899 kg

## By-products
All rows: pedigree (1,1,1,1,1)
- copper scrap, sorted, pressed: 0 kg; CPC 39361: Waste and scrap of copper; By-product classification Recyclable
  Copper scrap recovered from this waste.
  Uncertainty: uncertainty calculated from uncertainty in waste composition, uncertainty of share of recyclable metal, uncertainty of transfer coefficient to bottom ash, uncertainty of the efficiency of scrap removal in MSWI plant.
  production volume 0 kg
    calculated in proportion to reference product waste input to incinerator
  property price 2.84 EUR2005
    Temporary price data. Calculated as 90% of purchasers price based on: Source: USGS Mineral Yearbook 2007, Table 1 in <http://minerals.usgs.gov/minerals/pubs/commodity/recycle/myb1-2007-recyc.pdf>
  property carbon content 0
    carbon content on a dry matter basis (reserved; not for manual entry)
  properties: water content 0, carbon content, non-fossil 0, wet mass 1 kg, water in wet mass 0 kg, dry mass 1 kg, carbon content, fossil 0, carbon allocation 0 kg
- iron scrap, sorted, pressed: 0 kg; CPC 39310: Slag, dross, scalings and other waste from the manufacture of iron or steel; By-product classification Recyclable
  Iron scrap recovered from this waste.
  Uncertainty: uncertainty calculated from uncertainty in waste composition, uncertainty of share of recyclable metal, uncertainty of transfer coefficient to bottom ash, uncertainty of the efficiency of scrap removal in MSWI plant.
  production volume 0 kg
    calculated in proportion to reference product waste input to incinerator
  property price 0.175 EUR2005
    Temporary price data. Calculated as 90% of purchasers price based on: 2005 import and export prices (total trades (USD) divided by total weight (kg) in biggest economies of the world: EU27, USA, Brasil, China, India, Japan and Russia) from UN Commodity Trade Statistics Database (http://data.un.org/Explorer.aspxDatabase [Accessed 2011.06.20]). Commodity: Waste or scrap, of cast iron
  property carbon content 0
    carbon content on a dry matter basis (reserved; not for manual entry)
  properties: carbon content, fossil 0, dry mass 1 kg, carbon content, non-fossil 0, water content 0, water in wet mass 0 kg, wet mass 1 kg, carbon allocation 0 kg
- heat, for reuse in municipal waste incineration only: 0 MJ; name E_th_prod_MSWI; By-product classification allocatable product; CPC 17300: Steam and hot water
  Net electricity generated from this waste and used in internal MSWI plant energy redistribution.
  Uncertainty: uncertainty is calculated from uncertainties in waste composition and uncertainties in energy efficiency and the uncertainty in internal energy demand
  production volume 4.3418e8 MJ
    calculated in proportion to reference product waste input to incinerator
  property true value relation 0.1842; name E_th_prod_MSWI_true_value_relation
    property to calculate "true value" from
  property price 0.0106 EUR2005; name E_th_prod_MSWI_price_EUR2005
    Average European district heat price from Ecoheatcool and Euroheat 2005-2006, Ecoheat Work package 1: The European heat market. Final report. 10.6 EUR/GJ i s the price of district heat. http://www.solarthermalworld.org/files/Ecoheatcool%20WP1%20Web.pdf?download
  property exergy 0.1842 MJ; name E_th_prod_MSWI_exergy
    This exergy property is based on the exergy content of the product.
- aluminium scrap, post-consumer, prepared for melting: 0 kg; By-product classification Recyclable; CPC 39363: Waste and scrap of aluminium
  Aluminium scrap recovered from this waste.
  Uncertainty: uncertainty calculated from uncertainty in waste composition, uncertainty of share of recyclable metal, uncertainty of transfer coefficient to bottom ash, uncertainty of the efficiency of scrap removal in MSWI plant.
  production volume 0 kg
    calculated in proportion to reference product waste input to incinerator
  property price 0.806 EUR2005
    Temporary price data. Calculated as 90% of purchasers price based on: 2005 import and export prices (total trades (USD) divided by total weight (kg) in biggest economies of the world: EU27, USA, Brasil, China, India, Japan and Russia) from UN Commodity Trade Statistics Database (http://data.un.org/Explorer.aspxDatabase [Accessed 2011.06.17]). Commodity: Waste or scrap, aluminium
  property carbon content 0
    carbon content on a dry matter basis (reserved; not for manual entry)
  properties: wet mass 1 kg, carbon content, non-fossil 0, dry mass 1 kg, water content 0, water in wet mass 0 kg, carbon content, fossil 0, carbon allocation 0 kg
- electricity, for reuse in municipal waste incineration only: 0 kWh; name E_el_prod_MSWI; CPC 17100: Electrical energy; By-product classification allocatable product
  (same comment as for heat, for reuse in municipal waste incineration only)
  production volume 6.2097e7 kWh
    calculated in proportion to reference product waste input to incinerator
  property true value relation 3.6; name E_el_prod_MSWI_true_value_relation
    property to calculate "true value" from
  property exergy 3.6 MJ; name E_el_prod_MSWI_exergy
    This exergy property is based on the exergy content of the product.
  property price 0.1 EUR2005; name E_el_prod_MSWI_price_EUR2005
    Estimated to be the same price as in case of electricity, medium voltage.

## Inputs from technosphere
- residual material landfill: 4.3989e-11 unit; lognormal variance with pedigree 0.062214, pedigree (1,1,4,1,1)
  Landfill infrastructure required for landfilling of incineration residues.
  Uncertainty: uncertainty is calculated from uncertainties in waste composition and transfer coefficients in incinerator
- hydrochloric acid, without water, in 30% solution state: 7.9357e-5 kg; lognormal variance with pedigree 0.22131, pedigree (1,1,4,1,1)
  Auxilliary inputs for the wastewater treatment stage of the incinerator plant.
  Uncertainty: uncertainty calculated from uncertainty in average HCl input, of transfer coefficients in the incinerator, and the uncertainty of the waste composition of this waste
  properties: wet mass 1 kg, dry mass 1 kg, heating value, net 3.32 MJ
- sodium hydroxide, without water, in 50% solution state: 0.00089995 kg; lognormal variance with pedigree 0.26023, pedigree (1,1,4,1,1)
  Auxilliary inputs for the flue gas treatment stage of the incinerator plant.
  Uncertainty: uncertainty calculated from uncertainty in average NaOH input, of transfer coefficients in the incinerator, and the uncertainty of the waste composition of this waste
  properties: dry mass 1 kg, wet mass 1 kg, heating value, net 3.03 MJ
- transport, freight, lorry, unspecified: 0 metric ton*km; pedigree (1,1,1,1,1)
  Transport services to transport incineration residues to landfills.
  Uncertainty: uncertainty calculated from uncertainty of the waste composition of this waste, uncertainty of transfer coefficients and the uncertainty in generic transportation distances
- quicklime, milled, packed: 0.0039919 kg; lognormal variance with pedigree 0.33114, pedigree (1,1,4,1,1)
  Auxilliary inputs for the flue gas treatment stage of the incinerator plant.
  Uncertainty: uncertainty calculated from uncertainty in average CaO input, of transfer coefficients in the incinerator, and the uncertainty of the waste composition of this waste
  properties: wet mass 1 kg, dry mass 0.99 kg, water content 0.010101
- process-specific burdens, residual material landfill: 0 kg; pedigree (1,1,1,1,1)
  Mass-specific expenditures required for landfilling of incineration residues.
  Uncertainty: uncertainty is calculated from uncertainties in waste composition and transfer coefficients in incinerator
- chromium oxide, flakes: 2.8151e-6 kg; lognormal variance with pedigree 1.0346, pedigree (1,1,4,1,1)
  Input to DeNOx stage.
  Uncertainty: uncertainty calculated from uncertainty in average DeNOx input, uncertainty in the share of thermal NOx, uncertainty of nitrogen content in average municipal waste and the uncertainty in nitrogen content in *this* waste.
  properties: wet mass 1 kg, dry mass 1 kg
- water, decarbonised: 0 kg; pedigree (1,1,1,1,1)
  Incinerator process water used in flue gas scrubber stage.
  Uncertainty: uncertainty calculated from uncertainty in average water input, and the uncertainty of the waste composition of this waste
  properties: wet mass 1 kg
- municipal waste incineration facility: 2.5e-10 unit
  Demands per kilogram waste.
- chemical, inorganic: 0.00030192 kg; lognormal variance with pedigree 0.22131, pedigree (1,1,4,1,1)
  Auxilliary inputs for the wastewater treatment stage of the incinerator plant. Proxy for Polyelectrolyte.
  Uncertainty: uncertainty calculated from uncertainty in average Polyelectrolyte input, of transfer coefficients in the incinerator, and the uncertainty of the waste composition of this waste
  properties: wet mass 1 kg, carbon content, fossil 0.003, dry mass 1 kg
- chemical, organic: 5.0014e-5 kg; lognormal variance with pedigree 0.75343, pedigree (1,1,4,1,1)
  Auxilliary inputs for the wastewater treatment stage of the incinerator plant. Proxy for (pure) Trisodium-trimercapto-s-triazine (CAS 17766-26-6), used as 15% diluted solution, aka TMT15.
  Uncertainty: uncertainty calculated from uncertainty in average TMT15 input, of transfer coefficients in the incinerator, and the uncertainty of the waste composition of this waste
  properties: carbon content, fossil 0.628, wet mass 1 kg, dry mass 1 kg, heating value, net 19.03 MJ
- cement, unspecified: 0 kg; pedigree (1,1,1,1,1)
  Cement required for solidification of landfilled residual material.
  Uncertainty: Uncertainty calculated from uncertainty of the waste composition of this waste, of transfer coefficients in the incinerator and of the solidification recipe.
  properties: wet mass 1 kg, dry mass 1 kg
- iron (III) chloride, without water, in 40% solution state: 0.00012917 kg; lognormal variance with pedigree 0.26522, pedigree (1,1,4,1,1)
  Auxilliary inputs for the wastewater treatment stage of the incinerator plant.
  Uncertainty: uncertainty calculated from uncertainty in average FeCl3 input, of transfer coefficients in the incinerator, and the uncertainty of the waste composition of this waste
  properties: dry mass 1 kg, wet mass 1 kg
- titanium dioxide: 0.00013794 kg; lognormal variance with pedigree 1.0346, pedigree (1,1,4,1,1)
  Input to DeNOx stage (TiO2 catalyst carrier)
  Uncertainty: uncertainty calculated from uncertainty in average DeNOx input, uncertainty in the share of thermal NOx, uncertainty of nitrogen content in average municipal waste and the uncertainty in nitrogen content in *this* waste.
  properties: dry mass 1 kg, wet mass 1 kg
- slag landfill: 1.4767e-10 unit; lognormal variance with pedigree 0.045742, pedigree (1,1,4,1,1)
  Landfill infrastructure required for landfilling of bottom ash.
  Uncertainty: uncertainty is calculated from uncertainties in waste composition and transfer coefficients in incinerator
- ammonia, anhydrous, liquid: 0 kg; pedigree (1,1,1,1,1)
  Input to DeNOx stage (100% NH3).
  Uncertainty: uncertainty calculated from uncertainty in average DeNOx input, uncertainty in the share of thermal NOx, uncertainty of nitrogen content in average municipal waste and the uncertainty in nitrogen content in *this* waste.
  properties: dry mass 1 kg, wet mass 1 kg
- waste cement, hydrated: 0 kg; pedigree (1,1,1,1,1)
  Hydrated cement output for solidification of landfilled residual material.
  Uncertainty: Uncertainty calculated from uncertainty of the waste composition of this waste and transfer coefficients in the incinerator and of the solidification recipe.
  production volume 0 kg
    calculated in proportion to reference product waste input to incinerator
  properties: dry mass 1 kg, wet mass 1 kg
- heat, district or industrial, natural gas: 0 MJ; pedigree (1,1,1,1,1)
  Input to DeNOx stage, to heat up flue gas in low-dust SCR.
  Uncertainty: uncertainty calculated from uncertainty in average DeNOx input, uncertainty in the share of thermal NOx, uncertainty of nitrogen content in average municipal waste and the uncertainty in nitrogen content in *this* waste.
  properties: heating value, net 1 MJ
- process-specific burdens, slag landfill: 0 kg; pedigree (1,1,1,1,1)
  Mass-specific expenditures required for landfilling of bottom ash.
  Uncertainty: uncertainty is calculated from uncertainties in waste composition and transfer coefficients in incinerator
- copper scrap, sorted, pressed: -0.0060778 kg; lognormal variance with pedigree 0.28835, pedigree (1,1,4,1,1)
  (same comment as for copper scrap, sorted, pressed)
  production volume 322040 kg
  properties: price 2.84 EUR2005, wet mass 1 kg, dry mass 1 kg
- iron scrap, sorted, pressed: -0.0074029 kg; lognormal variance with pedigree 0.34316, pedigree (1,1,4,1,1)
  (same comment as for iron scrap, sorted, pressed)
  production volume 392260 kg
  properties: dry mass 1 kg, price 0.175 EUR2005, wet mass 1 kg
- aluminium scrap, post-consumer, prepared for melting: -0.0010141 kg; lognormal variance with pedigree 0.44945, pedigree (1,1,4,1,1)
  (same comment as for aluminium scrap, post-consumer, prepared for melting)
  production volume 53732 kg
  properties: price 0.806 EUR2005, wet mass 1 kg, dry mass 1 kg
- transport, freight, lorry, unspecified: 0.000476909, 7.46664e-5, 0.00361572 metric ton*km (3 entries); lognormal variance with pedigree 0.034339, pedigree (1,1,4,1,1)
  (same comment as for transport, freight, lorry, unspecified)
- process-specific burdens, residual material landfill: 0.00597289, 0.0151421 kg (2 entries); lognormal variance with pedigree 0.062214, pedigree (1,1,4,1,1)
  (same comment as for process-specific burdens, residual material landfill)
- water, decarbonised: 0.0322745, 0.0839781, 0.338703, 0.0827095, 0.0166738, 0.0548268, 0.00302676, 0.0431307, 0.100469, 0.630216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 kg (12 entries); lognormal variance with pedigree 0.26522, pedigree (1,1,4,1,1)
  (same comment as for water, decarbonised)
- cement, unspecified: 0.00121955, 0.000253753, 1.85856e-5, 5.29751e-5, 0.00119805, 3.52621e-5, 0.000387282, 4.68568e-5, 0.00523358 kg (9 entries); lognormal variance with pedigree 0.071298, pedigree (1,1,4,1,1)
  (same comment as for cement, unspecified)
- ammonia, anhydrous, liquid: 0.000461505, 3.96719e-5, 6.17192e-5, 0.000122288, 0.00011981, 1.25573e-5, 5.6136e-5, 0.00132801 kg (8 entries); lognormal variance with pedigree 0.67751, pedigree (1,1,4,1,1)
  (same comment as for ammonia, anhydrous, liquid)
- waste cement, hydrated: -0.00597289, -0.0151421 kg (2 entries); lognormal variance with pedigree 0.071298, pedigree (1,1,4,1,1)
  (same comment as for waste cement, hydrated)
  production volume 1.1188e6 kg
- heat, district or industrial, natural gas: 0.0045824, 0.109803, 0.297324 MJ (3 entries); lognormal variance with pedigree 0.67751, pedigree (1,1,4,1,1)
  (same comment as for heat, district or industrial, natural gas)
- process-specific burdens, slag landfill: 0.0234975, 0.0595695 kg (2 entries); lognormal variance with pedigree 0.045742, pedigree (1,1,4,1,1)
  (same comment as for process-specific burdens, slag landfill)

## Inputs from nature
- Oxygen [natural resource, in air]: 2.6768 kg; lognormal variance with pedigree 0.0175015, pedigree (1,1,4,1,1)
  Oxygen from ambient air needed to combust and oxidise this waste. Net demand, i.e. without O2 leaving the plant in flue gas uncombusted.
  Uncertainty: uncertainty is calculated from uncertainties in waste composition and transfer coefficients to flue gas and soild residues in incinerator

## Emissions to nature
- TOC, Total Organic Carbon [water, ground-, long-term]: 0.0023013 kg; lognormal variance with pedigree 0.021597, pedigree (1,1,4,1,1)
  Long-term emissions from landfilling of incineration residues.
  Uncertainty: uncertainty is calculated from uncertainties in waste composition and transfer coefficients in incinerator and landfills.
- Phenol, pentachloro- [air, urban air close to ground]: 6.0596e-12 kg; lognormal variance with pedigree 0.07553, pedigree (1,1,4,1,1)
  Incomplete combustion product emitted to air.
  Uncertainty: uncertainty calculated from uncertainty in average operation emissions, and the uncertainty of the flue gas volume from this waste.
- Calcium, ion [water, ground-, long-term]: 0.0029081 kg; lognormal variance with pedigree 0.4717, pedigree (1,1,4,1,1)
  (same comment as for TOC, Total Organic Carbon)
- Phosphate [water, ground-, long-term]: 6.2874e-5 kg; lognormal variance with pedigree 4.8963, pedigree (1,1,4,1,1)
  (same comment as for TOC, Total Organic Carbon)
- Particulates, > 2.5 um, and < 10um [air, urban air close to ground]: 8.3482e-9 kg; lognormal variance with pedigree 0.17098, pedigree (1,1,4,1,1)
  (same comment as for Phenol, pentachloro-)
- Silver, ion [water, surface water]: 3.849e-9 kg; lognormal variance with pedigree 2.0519, pedigree (1,1,4,1,1)
  Emissions to water from waste composition and transfer coefficients in incinerator and landfills.
  Uncertainty: uncertainty is calculated from uncertainties in waste composition and transfer coefficients in incinerator and landfills
- Chloride [water, surface water]: 0.0048564 kg; lognormal variance with pedigree 0.34373, pedigree (1,1,4,1,1)
  (same comment as for Silver, ion)
- Nickel, ion [water, surface water]: 3.2374e-7 kg; lognormal variance with pedigree 1.3285, pedigree (1,1,4,1,1)
  (same comment as for Silver, ion)
- Fluoride [water, ground-, long-term]: 0.00020865 kg; lognormal variance with pedigree 0.47957, pedigree (1,1,4,1,1)
  (same comment as for TOC, Total Organic Carbon)
- Phosphorus [air, urban air close to ground]: 4.73e-7 kg; lognormal variance with pedigree 0.78174, pedigree (1,1,4,1,1)
  Emission to air from waste composition and transfer coefficients.
  Uncertainty: uncertainty is calculated from uncertainties in waste composition and transfer coefficients in incinerator
- Calcium, ion [water, surface water]: 3.5359e-5 kg; lognormal variance with pedigree 0.40735, pedigree (1,1,4,1,1)
  (same comment as for Silver, ion)
- Cadmium [air, urban air close to ground]: 7.1487e-8 kg; lognormal variance with pedigree 0.95041, pedigree (1,1,4,1,1)
  (same comment as for Phosphorus)
- Antimony [water, ground-, long-term]: 0.0028391 kg; lognormal variance with pedigree 0.45736, pedigree (1,1,4,1,1)
  (same comment as for TOC, Total Organic Carbon)
- Dinitrogen monoxide [air, urban air close to ground]: 0.00018466 kg; lognormal variance with pedigree 1.1241, pedigree (1,1,4,1,1)
  Nitrogen species emitted to air after DeNOx stage.
  Uncertainty: uncertainty calculated from uncertainty in average N-emissions and uncertainty in the share of thermal NOx and the uncertainty in nitrogen content in *this* waste.
- Benzo(a)pyrene [air, urban air close to ground]: 3.0964e-13 kg; lognormal variance with pedigree 0.37577, pedigree (1,1,4,1,1)
  (same comment as for Phenol, pentachloro-)
- Titanium, ion [water, ground-, long-term]: 0.0012459 kg; lognormal variance with pedigree 0.63863, pedigree (1,1,4,1,1)
  (same comment as for TOC, Total Organic Carbon)
- Barium [water, ground-, long-term]: 8.298e-5 kg; lognormal variance with pedigree 2.2615, pedigree (1,1,4,1,1)
  (same comment as for TOC, Total Organic Carbon)
- Barium [water, surface water]: 2.2176e-8 kg; lognormal variance with pedigree 1.2019, pedigree (1,1,4,1,1)
  (same comment as for Silver, ion)
- Sodium, ion [water, ground-, long-term]: 0.00067929 kg; lognormal variance with pedigree 0.63653, pedigree (1,1,4,1,1)
  (same comment as for TOC, Total Organic Carbon)
- Benzene, pentachloro- [air, urban air close to ground]: 7.3515e-11 kg; lognormal variance with pedigree 0.07553, pedigree (1,1,4,1,1)
  (same comment as for Phenol, pentachloro-)
- Methane, fossil [air, urban air close to ground]: 2.0872e-7 kg; lognormal variance with pedigree 0.07553, pedigree (1,1,4,1,1)
  (same comment as for Phenol, pentachloro-)
- Mercury [water, surface water]: 8.5934e-10 kg; lognormal variance with pedigree 1.1365, pedigree (1,1,4,1,1)
  (same comment as for Silver, ion)
- Chromium [air, urban air close to ground]: 4.2675e-8 kg; lognormal variance with pedigree 1.0387, pedigree (1,1,4,1,1)
  (same comment as for Phosphorus)
- Zinc [air, urban air close to ground]: 4.7858e-7 kg; lognormal variance with pedigree 0.73076, pedigree (1,1,4,1,1)
  (same comment as for Phosphorus)
- Phosphate [water, surface water]: 2.6252e-7 kg; lognormal variance with pedigree 0.56885, pedigree (1,1,4,1,1)
  (same comment as for Silver, ion)
- Manganese [water, ground-, long-term]: 4.165e-5 kg; lognormal variance with pedigree 1.0867, pedigree (1,1,4,1,1)
  (same comment as for TOC, Total Organic Carbon)
- Strontium [water, surface water]: 4.8402e-8 kg; lognormal variance with pedigree 1.7167, pedigree (1,1,4,1,1)
  (same comment as for Silver, ion)
- Copper, ion [water, surface water]: 8.7223e-7 kg; lognormal variance with pedigree 1.00477, pedigree (1,1,4,1,1)
  (same comment as for Silver, ion)
- BOD5, Biological Oxygen Demand [water, surface water]: 0.00089427 kg; lognormal variance with pedigree 0.033545, pedigree (1,1,4,1,1)
  (same comment as for Silver, ion)
- Strontium [air, urban air close to ground]: 7.6874e-9 kg; lognormal variance with pedigree 1.0387, pedigree (1,1,4,1,1)
  (same comment as for Phosphorus)
- Zinc, ion [water, ground-, long-term]: 0.00022045 kg; lognormal variance with pedigree 2.8158, pedigree (1,1,4,1,1)
  (same comment as for TOC, Total Organic Carbon)
- Dioxins, measured as 2,3,7,8-tetrachlorodibenzo-p-dioxin [air, urban air close to ground]: 2.7827e-14 kg; lognormal variance with pedigree 0.37577, pedigree (1,1,4,1,1)
  (same comment as for Phenol, pentachloro-)
- Molybdenum [water, ground-, long-term]: 2.0262e-6 kg; lognormal variance with pedigree 1.4419, pedigree (1,1,4,1,1)
  (same comment as for TOC, Total Organic Carbon)
- Beryllium [water, ground-, long-term]: 3.9694e-7 kg; lognormal variance with pedigree 1.6043, pedigree (1,1,4,1,1)
  (same comment as for TOC, Total Organic Carbon)
- Copper [air, urban air close to ground]: 2.7233e-7 kg; lognormal variance with pedigree 0.32758, pedigree (1,1,4,1,1)
  (same comment as for Phosphorus)
- Vanadium [air, urban air close to ground]: 1.4807e-8 kg; lognormal variance with pedigree 1.39, pedigree (1,1,4,1,1)
  (same comment as for Phosphorus)
- Toluene [air, urban air close to ground]: 2.7829e-8 kg; lognormal variance with pedigree 0.07553, pedigree (1,1,4,1,1)
  (same comment as for Phenol, pentachloro-)
- Titanium [air, urban air close to ground]: 3.4576e-6 kg; lognormal variance with pedigree 0.50235, pedigree (1,1,4,1,1)
  (same comment as for Phosphorus)
- Selenium [water, ground-, long-term]: 1.1848e-6 kg; lognormal variance with pedigree 1.1006, pedigree (1,1,4,1,1)
  (same comment as for TOC, Total Organic Carbon)
- TOC, Total Organic Carbon [water, surface water]: 0.00039561 kg; lognormal variance with pedigree 0.033028, pedigree (1,1,4,1,1)
  (same comment as for Silver, ion)
- Potassium, ion [water, surface water]: 2.3708e-5 kg; lognormal variance with pedigree 0.58925, pedigree (1,1,4,1,1)
  (same comment as for Silver, ion)
- Tin, ion [water, ground-, long-term]: 8.2786e-5 kg; lognormal variance with pedigree 1.6216, pedigree (1,1,4,1,1)
  (same comment as for TOC, Total Organic Carbon)
- Sodium, ion [water, surface water]: 0.00011671 kg; lognormal variance with pedigree 0.57381, pedigree (1,1,4,1,1)
  (same comment as for Silver, ion)
- Thallium [water, ground-, long-term]: 2.0275e-7 kg; lognormal variance with pedigree 1.2874, pedigree (1,1,4,1,1)
  (same comment as for TOC, Total Organic Carbon)
- Cyanide [air, urban air close to ground]: 3.9671e-5 kg; lognormal variance with pedigree 1.1241, pedigree (1,1,4,1,1)
  (same comment as for Dinitrogen monoxide)
- Titanium, ion [water, surface water]: 1.5539e-6 kg; lognormal variance with pedigree 0.40259, pedigree (1,1,4,1,1)
  (same comment as for Silver, ion)
- Potassium, ion [water, ground-, long-term]: 8.4667e-5 kg; lognormal variance with pedigree 0.5323, pedigree (1,1,4,1,1)
  (same comment as for TOC, Total Organic Carbon)
- Silicon [water, ground-, long-term]: 0.00031472 kg; lognormal variance with pedigree 5.6507, pedigree (1,1,4,1,1)
  (same comment as for TOC, Total Organic Carbon)
- Nitrate [water, surface water]: 0.00015782 kg; lognormal variance with pedigree 0.25211, pedigree (1,1,4,1,1)
  (same comment as for Silver, ion)
- Nickel [air, urban air close to ground]: 5.8587e-7 kg; lognormal variance with pedigree 0.78174, pedigree (1,1,4,1,1)
  (same comment as for Phosphorus)
- DOC, Dissolved Organic Carbon [water, ground-, long-term]: 0.0023013 kg; lognormal variance with pedigree 0.021597, pedigree (1,1,4,1,1)
  (same comment as for TOC, Total Organic Carbon)
- Hydrogen fluoride [air, urban air close to ground]: 1.5701e-6 kg; lognormal variance with pedigree 0.86882, pedigree (1,1,4,1,1)
  (same comment as for Phosphorus)
- Sulfate [water, ground-, long-term]: 0.0010136 kg; lognormal variance with pedigree 0.4698, pedigree (1,1,4,1,1)
  (same comment as for TOC, Total Organic Carbon)
- Iron, ion [water, ground-, long-term]: 0.0035506 kg; lognormal variance with pedigree 0.44255, pedigree (1,1,4,1,1)
  (same comment as for TOC, Total Organic Carbon)
- Benzene, hexachloro- [air, urban air close to ground]: 2.9095e-11 kg; lognormal variance with pedigree 0.07553, pedigree (1,1,4,1,1)
  (same comment as for Phenol, pentachloro-)
- DOC, Dissolved Organic Carbon [water, surface water]: 0.00039561 kg; lognormal variance with pedigree 0.033028, pedigree (1,1,4,1,1)
  (same comment as for Silver, ion)
- Tin, ion [water, surface water]: 5.1676e-9 kg; lognormal variance with pedigree 1.5202, pedigree (1,1,4,1,1)
  (same comment as for Silver, ion)
- Lead [air, urban air close to ground]: 1.1306e-8 kg; lognormal variance with pedigree 0.75986, pedigree (1,1,4,1,1)
  (same comment as for Phosphorus)
- Nickel, ion [water, ground-, long-term]: 0.00046414 kg; lognormal variance with pedigree 0.73851, pedigree (1,1,4,1,1)
  (same comment as for TOC, Total Organic Carbon)
- COD, Chemical Oxygen Demand [water, ground-, long-term]: 0.0058157 kg; lognormal variance with pedigree 0.021597, pedigree (1,1,4,1,1)
  (same comment as for TOC, Total Organic Carbon)
- Bromine [water, ground-, long-term]: 0.00049347 kg; lognormal variance with pedigree 0.46604, pedigree (1,1,4,1,1)
  (same comment as for TOC, Total Organic Carbon)
- Thallium [water, surface water]: 2.1285e-10 kg; lognormal variance with pedigree 1.8867, pedigree (1,1,4,1,1)
  (same comment as for Silver, ion)
- Cobalt [air, urban air close to ground]: 4.9905e-8 kg; lognormal variance with pedigree 1.1563, pedigree (1,1,4,1,1)
  (same comment as for Phosphorus)
- Chromium, ion [water, surface water]: 3.7947e-9 kg; lognormal variance with pedigree 1.0543, pedigree (1,1,4,1,1)
  (same comment as for Silver, ion)
- Sulfur dioxide [air, urban air close to ground]: 4.2123e-6 kg; lognormal variance with pedigree 0.79537, pedigree (1,1,4,1,1)
  (same comment as for Phosphorus)
- Nitrate [water, ground-, long-term]: 0.0004453 kg; lognormal variance with pedigree 0.3578, pedigree (1,1,4,1,1)
  (same comment as for TOC, Total Organic Carbon)
- Iron [air, urban air close to ground]: 2.6326e-9 kg; lognormal variance with pedigree 0.41998, pedigree (1,1,4,1,1)
  (same comment as for Phosphorus)
- Heat, waste [air, urban air close to ground]: 25.272 MJ; lognormal variance with pedigree 0.023709, pedigree (1,1,4,1,1)
  Waste heat generated from heating value of this waste plus any electricity required to process it.
  Uncertainty: uncertainty is calculated from uncertainties in waste composition and uncertainties in energy efficiency and the uncertainty in internal energy demand
- Cobalt [water, surface water]: 4.9715e-9 kg; lognormal variance with pedigree 1.4561, pedigree (1,1,4,1,1)
  (same comment as for Silver, ion)
- Particulates, < 2.5 um [air, urban air close to ground]: 1.6613e-6 kg; lognormal variance with pedigree 0.37577, pedigree (1,1,4,1,1)
  (same comment as for Phenol, pentachloro-)
- Aluminium [water, ground-, long-term]: 0.0037834 kg; lognormal variance with pedigree 0.42557, pedigree (1,1,4,1,1)
  (same comment as for TOC, Total Organic Carbon)
- Arsenic, ion [water, surface water]: 4.8363e-6 kg; lognormal variance with pedigree 1.2163, pedigree (1,1,4,1,1)
  (same comment as for Silver, ion)
- Chromium VI [water, ground-, long-term]: 4.627e-6 kg; lognormal variance with pedigree 2.0678, pedigree (1,1,4,1,1)
  (same comment as for TOC, Total Organic Carbon)
- Molybdenum [water, surface water]: 7.6273e-7 kg; lognormal variance with pedigree 1.00729, pedigree (1,1,4,1,1)
  (same comment as for Silver, ion)
- Calcium [air, urban air close to ground]: 2.2798e-5 kg; lognormal variance with pedigree 0.50931, pedigree (1,1,4,1,1)
  (same comment as for Phosphorus)
- Strontium [water, ground-, long-term]: 7.6774e-5 kg; lognormal variance with pedigree 1.00457, pedigree (1,1,4,1,1)
  (same comment as for TOC, Total Organic Carbon)
- Chloride [water, ground-, long-term]: 0.001462 kg; lognormal variance with pedigree 0.42788, pedigree (1,1,4,1,1)
  (same comment as for TOC, Total Organic Carbon)
- Heat, waste [water, surface water]: 5.8145 MJ; lognormal variance with pedigree 0.023709, pedigree (1,1,4,1,1)
  (same comment as for Heat, waste)
- Mercury [water, ground-, long-term]: 5.0397e-8 kg; lognormal variance with pedigree 3.164, pedigree (1,1,4,1,1)
  (same comment as for TOC, Total Organic Carbon)
- Cadmium, ion [water, surface water]: 1.3472e-8 kg; lognormal variance with pedigree 0.80151, pedigree (1,1,4,1,1)
  (same comment as for Silver, ion)
- Copper, ion [water, ground-, long-term]: 0.016681 kg; lognormal variance with pedigree 0.27714, pedigree (1,1,4,1,1)
  (same comment as for TOC, Total Organic Carbon)
- Bromine [air, urban air close to ground]: 2.5574e-6 kg; lognormal variance with pedigree 0.48153, pedigree (1,1,4,1,1)
  (same comment as for Phosphorus)
- Fluoride [water, surface water]: 1.7795e-5 kg; lognormal variance with pedigree 0.52836, pedigree (1,1,4,1,1)
  (same comment as for Silver, ion)
- Barium [air, urban air close to ground]: 6.4672e-7 kg; lognormal variance with pedigree 0.91365, pedigree (1,1,4,1,1)
  (same comment as for Phosphorus)
- Antimony [water, surface water]: 0.0015385 kg; lognormal variance with pedigree 0.48756, pedigree (1,1,4,1,1)
  (same comment as for Silver, ion)
- Lead [water, surface water]: 2.3021e-8 kg; lognormal variance with pedigree 1.1852, pedigree (1,1,4,1,1)
  (same comment as for Silver, ion)
- Iron, ion [water, surface water]: 8.3807e-8 kg; lognormal variance with pedigree 1.2742, pedigree (1,1,4,1,1)
  (same comment as for Silver, ion)
- Cadmium, ion [water, ground-, long-term]: 1.0292e-5 kg; lognormal variance with pedigree 6.3776, pedigree (1,1,4,1,1)
  (same comment as for TOC, Total Organic Carbon)
- Potassium [air, urban air close to ground]: 5.3809e-7 kg; lognormal variance with pedigree 0.97248, pedigree (1,1,4,1,1)
  (same comment as for Phosphorus)
- Manganese [air, urban air close to ground]: 1.2267e-9 kg; lognormal variance with pedigree 1.1196, pedigree (1,1,4,1,1)
  (same comment as for Phosphorus)
- Selenium [air, urban air close to ground]: 2.1762e-8 kg; lognormal variance with pedigree 1.5056, pedigree (1,1,4,1,1)
  (same comment as for Phosphorus)
- Benzene [air, urban air close to ground]: 1.3915e-8 kg; lognormal variance with pedigree 0.07553, pedigree (1,1,4,1,1)
  (same comment as for Phenol, pentachloro-)
- Vanadium, ion [water, surface water]: 2.8564e-9 kg; lognormal variance with pedigree 1.6293, pedigree (1,1,4,1,1)
  (same comment as for Silver, ion)
- Zinc, ion [water, surface water]: 6.4519e-8 kg; lognormal variance with pedigree 0.60977, pedigree (1,1,4,1,1)
  (same comment as for Silver, ion)
- COD, Chemical Oxygen Demand [water, surface water]: 0.00090591 kg; lognormal variance with pedigree 0.032961, pedigree (1,1,4,1,1)
  (same comment as for Silver, ion)
- Water [water, surface water]: 0.00047168 m3; lognormal variance with pedigree 1.1343, pedigree (1,1,4,1,1)
  Process water released to surface water.
  Uncertainty: uncertainty calculated from uncertainty in process water input and the uncertainty of fraction to surface water.
- Thallium [air, urban air close to ground]: 3.4745e-10 kg; lognormal variance with pedigree 1.7339, pedigree (1,1,4,1,1)
  (same comment as for Phosphorus)
- Arsenic, ion [water, ground-, long-term]: 2.0907e-6 kg; lognormal variance with pedigree 1.324, pedigree (1,1,4,1,1)
  (same comment as for TOC, Total Organic Carbon)
- Arsenic [air, urban air close to ground]: 5.4689e-8 kg; lognormal variance with pedigree 1.3318, pedigree (1,1,4,1,1)
  (same comment as for Phosphorus)
- Selenium [water, surface water]: 6.1623e-7 kg; lognormal variance with pedigree 1.1944, pedigree (1,1,4,1,1)
  (same comment as for Silver, ion)
- Ammonia [air, urban air close to ground]: 2.5886e-6 kg; lognormal variance with pedigree 0.73269, pedigree (1,1,4,1,1)
  (same comment as for Dinitrogen monoxide)
- Vanadium, ion [water, ground-, long-term]: 7.0916e-7 kg; lognormal variance with pedigree 2.2341, pedigree (1,1,4,1,1)
  (same comment as for TOC, Total Organic Carbon)
- Bromine [water, surface water]: 0.0046238 kg; lognormal variance with pedigree 0.19173, pedigree (1,1,4,1,1)
  (same comment as for Silver, ion)
- Lead [water, ground-, long-term]: 0.00060831 kg; lognormal variance with pedigree 1.00601, pedigree (1,1,4,1,1)
  (same comment as for TOC, Total Organic Carbon)
- Silicon [air, urban air close to ground]: 4.2989e-9 kg; lognormal variance with pedigree 0.49539, pedigree (1,1,4,1,1)
  (same comment as for Phosphorus)
- Tin [air, urban air close to ground]: 1.2344e-10 kg; lognormal variance with pedigree 0.95041, pedigree (1,1,4,1,1)
  (same comment as for Phosphorus)
- Sodium [air, urban air close to ground]: 1.0662e-6 kg; lognormal variance with pedigree 0.71624, pedigree (1,1,4,1,1)
  (same comment as for Phosphorus)
- Chromium VI [water, surface water]: 1.3665e-6 kg; lognormal variance with pedigree 1.0981, pedigree (1,1,4,1,1)
  (same comment as for Silver, ion)
- Silicon [water, surface water]: 8.3176e-7 kg; lognormal variance with pedigree 0.68364, pedigree (1,1,4,1,1)
  (same comment as for Silver, ion)
- Hydrogen chloride [air, urban air close to ground]: 3.59e-6 kg; lognormal variance with pedigree 0.45436, pedigree (1,1,4,1,1)
  (same comment as for Phosphorus)
- Beryllium [water, surface water]: 2.7202e-10 kg; lognormal variance with pedigree 2.1987, pedigree (1,1,4,1,1)
  (same comment as for Silver, ion)
- NMVOC, non-methane volatile organic compounds, unspecified origin [air, urban air close to ground]: 6.3325e-7 kg; lognormal variance with pedigree 0.07553, pedigree (1,1,4,1,1)
  (same comment as for Phenol, pentachloro-)
- Carbon monoxide, fossil [air, urban air close to ground]: 2.3653e-5 kg; lognormal variance with pedigree 0.75079, pedigree (1,1,4,1,1)
  (same comment as for Phenol, pentachloro-)
- Sulfate [water, surface water]: 0.00020421 kg; lognormal variance with pedigree 0.38054, pedigree (1,1,4,1,1)
  (same comment as for Silver, ion)
- Water [air, urban air close to ground]: 0.0014799 m3; lognormal variance with pedigree 0.75426, pedigree (1,1,4,1,1)
  Water vapour from waste humidity, hydrogen oxidation and part of the process water.
  Uncertainty: Uncertainty calculated from uncertainty in waste composition, process water input and the uncertainty of fraction to air.
- Manganese [water, surface water]: 2.9288e-9 kg; lognormal variance with pedigree 1.7748, pedigree (1,1,4,1,1)
  (same comment as for Silver, ion)
- Carbon dioxide, fossil [air, urban air close to ground]: 2.8224 kg; lognormal variance with pedigree 0.010045, pedigree (1,1,4,1,1)
  (same comment as for Phosphorus)
- Aluminium [water, surface water]: 2.7633e-7 kg; lognormal variance with pedigree 0.77719, pedigree (1,1,4,1,1)
  (same comment as for Silver, ion)
- Silver, ion [water, ground-, long-term]: 0.00011086 kg; lognormal variance with pedigree 0.9563, pedigree (1,1,4,1,1)
  (same comment as for TOC, Total Organic Carbon)
- BOD5, Biological Oxygen Demand [water, ground-, long-term]: 0.0019023 kg; lognormal variance with pedigree 0.021597, pedigree (1,1,4,1,1)
  (same comment as for TOC, Total Organic Carbon)
- Cobalt [water, ground-, long-term]: 2.2353e-5 kg; lognormal variance with pedigree 1.067, pedigree (1,1,4,1,1)
  (same comment as for TOC, Total Organic Carbon)
- Molybdenum [air, urban air close to ground]: 3.6745e-9 kg; lognormal variance with pedigree 1.4624, pedigree (1,1,4,1,1)
  (same comment as for Phosphorus)
- Nitrogen oxides [air, urban air close to ground]: 0.00081972 kg; lognormal variance with pedigree 0.73269, pedigree (1,1,4,1,1)
  Sum of fuel-Nox and thermal-NOx emitted to air after DeNOx stage.
  Uncertainty: uncertainty calculated from uncertainty in average N-emissions and uncertainty in the share of thermal NOx and the uncertainty in nitrogen content in *this* waste.
- Aluminium [air, urban air close to ground]: 1.8189e-9 kg; lognormal variance with pedigree 0.52329, pedigree (1,1,4,1,1)
  (same comment as for Phosphorus)
- Antimony [air, urban air close to ground]: 3.5758e-9 kg; lognormal variance with pedigree 0.54436, pedigree (1,1,4,1,1)
  (same comment as for Phosphorus)
- Mercury [air, urban air close to ground]: 2.2435e-8 kg; lognormal variance with pedigree 1.6132, pedigree (1,1,4,1,1)
  (same comment as for Phosphorus)
