# heat and power co-generation, hard coal

Dataset: EcoSpold 2, unit process
Geography: RoW
Time period: 1980-01-01 to 2021-12-31
Technology level: modern
Classification: EcoSpold01Categories: hard coal/power plants
Classification: ISIC rev.4 ecoinvent: 3510:Electric power generation, transmission and distribution
Synonyms: other bituminous coal; anthracite; coking coal
Tags: hard coal power; fossil fuels; coal power
Scenario: Business-as-Usual
System model: Allocation, cut-off by classification
Generated by: Karin Treyer
Published in: Röder, A. 2007
Database: ecoinvent
isCopyrightProtected: true
accessRestrictedTo: 1

## General comment
This dataset represents the production of high voltage electricity and district heat in an average combined heat and power hard coal power plant on the world in 2012. The exchanges are valid for 1MJ of hard coal burned. 'Hard coal' includes anthracite, coking coal and other bituminous coal according to the definition of the IEA electricity information 2014.
All exchanges in this dataset except for emissions of SO2, NOx and particles are production-weighted averages of the figures in the datasets in ecoinvent version two, which are valid for the following 14 countries: AT, BE, ES, FR, IT, NL, PT, DE, CZ, HR, PL, SK, CN, US. The exception values are production-weighted averages of version 2 countries and the new countries in version 3 (AU, CA, CL, ID, IN, KR, MX, MY, PE, RU, TH, TR, TW, TZ, UA, ZA){{children_only}}
Comments on the inventory data of emissions:
- For the assessment of main characteristics (sulphur and ash content of coal, efficiency of the plant) and CO2 a bottom-up approach has been used. It consists in the collection of information about single plants.
- The size distribution of particle emissions has been derived from German data.
- Halogene emissions have been estimated on the basis of the content of the species in the country-specific coal input mix, assuming average retention rates.
- For CO and particle emissions average values for the former UCTE are included (Union for the Coordination of the Transmission of Electricity, since 2009 replaced by ENTSO-E European Network of Transmission System Operators for Electricity).
- The country specific emission depend on the share of DeNOx.
- Emissions of trace elements were calculated by means of a formula (CORINAIR) using the ash content in the country-specific coal input mix and average transfer coefficients for coal power plants, taking into account the share of DeSOx installed.
- Emission of uranium and thorium radioactive isotopes were assumed proportional to the corresponding element emitted with particles; the other non-gaseous radioactive isotopes of the uranium and thorium decay chain were assumed proportional to the emitted U-238 or Th-232.
- The emission of gaseous radon and K-40 are taken from the literature.
IEA. 2014. Electricity Information 2014. ISBN 978-92-64-21692-1. International Energy Agency (IEA), Paris Cedex (FR)
European Environment Agency (1991) CORINAIR Inventory; VOC's Default Emission Factors
[This dataset is meant to replace the following datasets:]

## Included activities start
From the constructed hard coal power plant ready to produce electricity.
From reception of hard coal and operating materials at power plant gate. Functional unit is the combustion of 1MJ of hard coal.

## Included activities end
This activity ends with heat and electricity generated in a CHP power plant.
This dataset includes:
- all operation and maintenance activities and materials of the power plants.
- Use of fuel oil for startup
- Particle removal (dedusting of the flue gas)

- Desulfurisation and denitrification. These processes are described in separate modules; it can be decided by changing the values of NOx and SOx retained whether and how much DeNOx and DeSOx are installed.
- Cooling: It is assumed that all plants use wet cooling with a cooling tower. No cooling tower is included in this dataset (will be implemented in future versions)
- Loss of feed water

This dataset doesn't include
- raw materials extraction, decommissioning and waste treatment as these activities are already included in the infrastructure datasets
- transformation of the electricity produced
- The disposal of non-recycled ashes is modelled separately.

## Technology
POWER PLANT:
Hard coal power plant input is a market mix of 100MWe power plants (representing all power plants with a capacity <250MWe and 7% of the installed capacity) and 500MWe power plants (representing all power plants with a capacity >250MWe and 93% of the installed capacity). The plants are used for middle load with 4000 hours of operation at full capacity per year. The plants are assumed to operate 150000 hours during its lifetime.
OTHER DATA:
{{children_only_technology}}
- Share of installed capacity with desulfurisation 2% (rough estimation based on sulfur mass balance
- Average efficiency of desulfurisation installations: 92% (rough estimation based on Dones et al. 27
- Share of installed capacity with denitrification (primary and/or secondary installations): 73% (figure based on IEA 212 )
- Average efficiency of denitrification installations: 8% (estimation based on Dones et al. 27, p.128. Valid for selective catalytic reaction systems)
- Share of installed capacity with particle filters: 98% (figure based on IEA 212 )
- Average efficiency of particle filters: 98% (figure based on IEA 212 )
- IEA 2012. Coal Power Database. International Energy Agency Clean Coal Centre, London
- IEA/OECD. 2010. Electricity Information 2010. International Energy Agency (IEA), Paris Cedex (FR). Part IV. Detailed OECD Electricity And Heat Data.
- Dones, R., Bauer, C., Röder, A. (2007) Kohle. In: Dones, R. (Ed.) et al., Sachbilanzen von Energiesystemen: Grundlagen für den ökologischen Vergleich von Energiesystemen und den Einbezug von Energiesystemen in Ökobilanzen für die Schweiz. Final report ecoinvent No.

## Time period
The Annual Production Volume is valid for the year 2012.

## Parameters
- water consumption, electricity production from hard coal, once-through and cooli: 0.0014 m3/kWh; name WConsumption_EP_HC_once_through_andCP_CS; lognormal variance with pedigree 0.092025, pedigree (4,4,3,2,4)
  Estimated based on literature (Scown, 2011, Water Footprint of U.S. Transportation Fuels, SI). The amount of water consumed while burning lignite and peat is assumed to be the same as in case of coal.
- water consumption, electricity production from hard coal, recirculating CS: 0.0018 m3/kWh; name WConsumption_EP_HC_recirculatingCS; lognormal variance with pedigree 0.092025, pedigree (4,4,3,2,4)
  (same comment as for water consumption, electricity production from hard coal, once-through)
- recirculating cooling system as a fraction of all cooling systems: 0.375 dimensionless; name recirculating_CS_fraction_from_allCS; lognormal variance with pedigree 0.092025, pedigree (4,4,3,2,4)
  Calculated as an average of data available for Europe (Floerke, 2008, Future changes of freshwater needs in the electricity production sector) and USA (NERL, 2011, Estimating freshwater needs to meet future thermoelectric generation requirements).
- efficiency: 0.297 dimensionless; lognormal variance with pedigree 0.003325, pedigree (3,2,1,2,2)
  Literature value/calculated value. Net electrical efficiency based on the lower heating value (LHV).
  For all OECD countries, the IEA Electricity information 2014 provides data for the year 2012 on fuel input (TJ, Net calorific value NCV) and gross electricity production (GWh) as well as heat production (TJ) in tables 8 and 9 for each country for electricity only and Combined Heat and Power (CHP) plants each. Together with the information on own use (see parameter 'losses'), the net electrical efficiency based on the NCV is calculated.
  For all non-OECD countries, data from the IEA Energy balances of non-OECD countries 2014 have been used. These tables do not always provide information on how much of the electricity has been produced in electricity only and in CHP plants, but often give the total value only.
  IEA. 2014. Electricity Information 2014. ISBN 978-92-64-21692-1. International Energy Agency (IEA), Paris Cedex (FR).
  IEA/OECD. 2014. Energy balances of non-OECD countries 2014. International Energy Agency (IEA), Paris Cedex (FR).
- water withdrawal, electricity production from hard coal, once-through and coolin: 0.0815 m3/kWh; name WWithdrawal_EP_HC_once_through_andCP_CS; lognormal variance with pedigree 0.092025, pedigree (4,4,3,2,4)
  Estimated based on literature (Scown, 2011, Water Footprint of U.S. Transportation Fuels, SI). The amount of water withdrawn while burning lignite and peat is assumed to be the same as in case of coal.
- gross electricity production: 2.33169e11 kWh; name gross_electricity; lognormal variance with pedigree 0.001225, pedigree (2,1,1,2,1)
  Literature value/statistics. Taken from the IEA electricity information 2014, table 1.3.
  IEA. 2014. Electricity Information 2014. ISBN 978-92-64-21692-1. International Energy Agency (IEA), Paris Cedex (FR).
- fraction, cooling water, to air: 0.0299662 dimensionless; name fraction_CW_to_air; = (WConsumption_EP_HC_recirculatingCS*recirculating_CS_fraction_from_allCS+WConsumption_EP_HC_once_through_andCP_CS*once_through_andCP_CS_fractio_from_allCS)/(WWithdrawal_EP_HC_recirculating_CS*recirculating_CS_fraction_from_allCS+WWithdrawal_EP_HC_once_through_andCP_CS*once_through_andCP_CS_fractio_from_allCS); lognormal variance with pedigree 0.092025, pedigree (4,4,3,2,4)
  Calculated value
- factor: input of MJ for the production of 1 kWh: 12.1212 MJ/kWh; name factor_MJ_kWh; = 1*3.6/efficiency; lognormal variance with pedigree 0.0532, pedigree (4,4,3,4,4)
  Calculated value. 3.6 MJ = 1kWh.
- once-through and cooling pond cooling systems as a fraction of all cooling syste: 0.625 dimensionless; name once_through_andCP_CS_fractio_from_allCS; lognormal variance with pedigree 0.092025, pedigree (4,4,3,2,4)
  (same comment as for recirculating cooling system as a fraction of all cooling systems)
- fraction, water, decarbonised, to air: 0.0299662 dimensionless; name fraction_WDC_to_air; = fraction_CW_to_air; lognormal variance with pedigree 0.092025, pedigree (4,4,3,2,4)
  Calculated value. See comments in the other parametres present in this dataset. Decarbonised water is considered to be always used as cooling water, thus cooling water fractions to air are applied to all carbonised water input flows to calculate the amount of water consumed in the processes.
- fraction, water, completely softened, to air: 0.15 dimensionless; name fraction_WCS_to_air; = fraction_PW_to_air; lognormal variance with pedigree 0.092025, pedigree (4,4,3,2,4)
  Calculated value. See comment in the other parametres present in this dataset. Water, completely softened is considered to be always used as process water, thus process water fractions to air are applied to all water, completely softened input flows to calculate the amount of water consumed in the processes.
- water withdrawal, electricity production from hard coal, recirculating CS: 0.0021 m3/kWh; name WWithdrawal_EP_HC_recirculating_CS; lognormal variance with pedigree 0.092025, pedigree (4,4,3,2,4)
  (same comment as for water withdrawal, electricity production from hard coal, once-through )
- fraction, process water, to air: 0.15 dimensionless; name fraction_PW_to_air; lognormal variance with pedigree 0.092025, pedigree (4,4,3,2,4)
  Literature value. In case when no industry/process specific data are available, default evaporation fraction value is used. This value is 15% and is based on literature (Statistics Canada, 2007 & Shaffer, K.H., 2008, Consumptive water use in the Great Lakes Basin, USGS & Shiklomanov, 2003, World Water Resources at the Beginning of the 21st Century) and has been approved by an expert.
- losses from gross electricity production: 0.07 dimensionless; name gross_net_electricity; lognormal variance with pedigree 0.0012, pedigree (2,1,1,1,1)
  Calculated value. Own use of electricity plants in this country in 2012. For the OECD countries, the OECD iLibrary provides gross and net electricity values for the specific sector 'Total Fuel Combustion', from which the loss value is being calculated. This value is then applied to all fossil fuel datasets, as no data on a more detailed level were available.
  OECD. 2014. IEA Electricity Information Statistics: OECD - Electricity and heat generation. OECD iLibrary. Online database. DOI : 10.1787/elect-data-en

## Reference product
- heat, district or industrial, other than natural gas: 1 MJ; name heat; By-product classification allocatable product; CPC 17300: Steam and hot water
  Literature value/calculated value. Net thermal efficiency based on the lower heating value (LHV).
  For all OECD countries, the IEA Electricity information 2014 provides data for the year 2012 on fuel input (TJ, Net calorific value NCV) and gross electricity production (GWh) as well as heat production (TJ) in tables 8 and 9 for each country for electricity only and Combined Heat and Power (CHP) plants each. Together with the information on own use (see parameter 'losses'), the net electrical efficiency based on the NCV is calculated.
  For all non-OECD countries, data from the IEA Energy balances of non-OECD countries 2014 have been used. These tables do not always provide information on how much of the electricity has been produced in electricity only and in CHP plants, but often give the total value only.
  IEA. 2014. Electricity Information 2014. ISBN 978-92-64-21692-1. International Energy Agency (IEA), Paris Cedex (FR).
  IEA/OECD. 2014. Energy balances of non-OECD countries 2014. International Energy Agency (IEA), Paris Cedex (FR).
  production volume 1.00012e10 MJ
    Literature value/statistics. Taken from the IEA electricity information 2014. The global value is the sum of all hard coal CHP datasets in ecoinvent.
    IEA. 2014. Electricity Information 2014. ISBN 978-92-64-21692-1. International Energy Agency (IEA), Paris Cedex (FR).
  property true value relation 0.1842; name heat_true_value_relation
    property to calculate "true value" from
  property exergy 0.1842 MJ; name heat_exergy
    This exergy property is based on the exergy content of the product.
  property price 0.0106 EUR2005; name heat_price_EUR2005
    Average European district heat price from Ecoheatcool and Euroheat 2005-2006, Ecoheat Work package 1: The European heat market. Final report. 10.6 EUR/GJ i s the price of district heat. http://www.solarthermalworld.org/files/Ecoheatcool%20WP1%20Web.pdf?download
  property true value 0.00145694; name heat_true_value
    allocation property applied in "true value" allocation // value calculated from true value relation
  properties: corresponding fuel use, propane, furnace >100kW 0 MJ, heating value, net 1 MJ

## By-products
- electricity, high voltage: 0 kWh; name electricity; By-product classification allocatable product; CPC 17100: Electrical energy; undefined min 0.112233, max 0.112233, standardDeviation95 0, pedigree (1,1,3,1,1)
  Electricity output per MJ of hard coal burned.
  production volume 7.09768e9 kWh; name electricity_apv; = gross_electricity*(1-gross_net_electricity)
    Calculated value
  property price 0.0977 EUR2005; name electricity_price_EUR2005
    Temporary price data. Calculated as 90% of purchasers price based on: 94% of the average price (to account for a 6% loss in transformation and transmission) for electricity for industrial consumersin 2005 (excluded taxes). From IEA.
  property true value relation 3.6; name electricity_true_value_relation
    property to calculate "true value" from
  property exergy 3.6 MJ; name electricity_exergy
    This exergy property is based on the exergy content of the product.
  property true value 0.00928511; name electricity_true_value
    (same comment as for heat, district or industrial, other than natural gas)

## Inputs from technosphere
- SOx retained, in hard coal flue gas desulfurisation: 8.88962e-5 kg; name sox_retained; = 0.00201*(efficiency/3.6); source Itten R. 2012; lognormal variance with pedigree 0.093, pedigree (4,4,5,5,4)
  Calculated value. Weighted average from all figures from countries in ecoinvent version 2 (AT, BE, BR, CN, CZ, DE, DK, ES, FI, FR, GB, ES, FI, FR, GB, HR, HU, IE, IT, JP, NL, NO, PL, PT, RO, SE, SI, SK) and the new countries for version 3 (AU, CA regions, CL, IN, KR, MX, MY, PE, RU, TH, TR, TW, TZ, UA, US regions, ZA). Weighting was made with net electricity production 2008 in these countries (Itten&Frischknecht 2012).
  BA and BG were not included in the calculation of the GLO average as they inherit all GLO values at the moment.
  properties: wet mass 1 kg, dry mass 1 kg
- chlorine, liquid: 0 kg; pedigree (1,1,3,1,1)
  Exchange present due to parent child relationship
- water, completely softened: 0.00321651 kg; name water_completely_softened; lognormal variance with pedigree 0.086, pedigree (4,5,5,5,3)
  Literature value/calculated value. Feed water for the steam circuit lost when producing 1kWh of electricity from hard coal, based on the value for burning 1MJ of hard coal. Röder et al. 2007, Tab. 9.65 and Tab. 9.66, p. 160f.
  properties: wet mass 1 kg
- hard coal power plant: 5.89693e-13 unit; name hard_coal_power_plant; = 1/ (150000*500*1000)*(efficiency/3.6); source Röder, A. 2007; lognormal variance with pedigree 0.4006, pedigree (5,3,5,5,3)
  Calculated value. At the moment, the hard coal power plant input consists of a market mix of a 100MWe power plant and a 500MWe power plant
  .
  For this calculation, 4000 load hours per year are assumed. It is assumed that a total of 150'000h is reached during the lifetime. A capacity of 500MW is taken for the calculation.
- hard coal ash: -0.00400991 kg; name amount_ash; lognormal variance with pedigree 0.1306, pedigree (5,3,5,5,3)
  Literature value/calculated value. Hard coal ash produced when producing 1kWh of electricity from hard coal, based on the value for burning 1MJ of hard coal. Weighted average with electricity production data (Itten&Frischknecht 2012) and values of 12 countries
  (AT, BE, ES, FR, IT, NL, PT, DE, CZ, HR, PL, SK). These values were valid for the ash being disposed off. Now, total amount of ash has been calculated (disposed+recycled) with the data in Tab. 9.69 p. 165 in Röder et al. 2007. Globally, 74% of the lignite ash are recycled, 26% go to disposal.
  Source:
  Itten R. and Frischknecht R. (2012) Life Cycle Inventories of Electricity Mixes and Grid. ESU-services Ltd., Uster, Switzerland.
  production volume 1.43461e10 kg; = amount_ash/electricity*electricity_apv+1.65*10^10
    Calculated from the production volume of electricity produced in proportion to the respective output amounts. An extra amount has been added to the global dataset due to parent child relationship.
  property price 0 EUR2005; name amount_ash_price_EUR2005
  properties: dry mass 1 kg, wet mass 1 kg
- residue from cooling tower: -2.68042e-6 kg; name amount_residue; lognormal variance with pedigree 0.1132, pedigree (5,3,5,5,2)
  Literature value/calculated value. Amount of cooling tower needed for producing 1kWh of electricity from hard coal, based on the value for burning 1MJ of hard coal. Weighted average with electricity production data (Itten&Frischknecht 2012) and values of 14 countries
  (AT, BE, ES, FR, IT, NL, PT, DE, CZ, HR, PL, SK, CN, US) (Röder et al. 2007) .
  Country values calculated from mass balance.
  Source:
  Itten R. and Frischknecht R. (2012) Life Cycle Inventories of Electricity Mixes and Grid. ESU-services Ltd., Uster, Switzerland.
  production volume 0 kg; = amount_residue/electricity*electricity_apv+3857747
    Value has been set to zero because it was not significant and below 0.05% of the production volume of this product in the GLO dataset.
  property price 0 EUR2005; name amount_residue_price_EUR2005
  properties: wet mass 1 kg, dry mass 0.7 kg, carbon content, fossil 0.0544233, water content 0.428571
- hard coal: 0.0018511 kg; pedigree (1,1,3,1,1)
  activityLink to ID
  properties: heating value, net 27.91 MJ
  note on heating value, net: Based on the Characterization factor of Hard coal in the CED method
- NOx retained, by selective catalytic reduction: 3.22857e-5 kg; name nox_retained; = 0.00073*(efficiency/3.6); source Itten R. 2012; lognormal variance with pedigree 0.093, pedigree (4,4,5,5,4)
  (same comment as for SOx retained, in hard coal flue gas desulfurisation)
  properties: wet mass 1 kg, dry mass 1 kg
- hard coal: 0.001889 kg; pedigree (1,1,3,1,1)
  activityLink to AU
- light fuel oil: 0 kg; name light_fuel_oil; pedigree (1,1,1,1,1)
  Literature value/calculated value. Light fuel oil use per 1MJ of hard coal burned, use for start-up of the power plant after shut down. Weighted average with electricity production data (Itten&Frischknecht 2012) and ight fuel oil use values of 14 countries
  (AT, BE, ES, FR, IT, NL, PT, DE, CZ, HR, PL, SK, CN, US) (Röder et al. 2007)
  Country values are typical values for hard coal plants.
  Source:
  Itten R. and Frischknecht R. (2012) Life Cycle Inventories of Electricity Mixes and Grid. ESU-services Ltd., Uster, Switzerland.
  properties: heating value, net 42.6 MJ, dry mass 1 kg, carbon content, fossil 0.862, wet mass 1 kg
- water, decarbonised: 0 kg; name water_decarbonised_user; pedigree (1,1,1,1,1)
  Literature value/calculated value. Cooling water, decarbonised, for the cooling water circuit lost when producing 1kWh of electricity from hard coal, based on the value for burning 1MJ of hard coal. Röder et al. 2007, Tab. 9.65 and Tab. 9.66, p. 160f. These tables give an amount of 0.15 kg/MJ burned, which is valid for the assumption of 75% wet cooling and 25% run-through cooling. However, this revised dataset assumes 100% wet cooling.
  properties: wet mass 1 kg
- hard coal: 0.00275977 kg; pedigree (1,1,3,1,1)
  activityLink to RNA
- hard coal: 0 kg; name hard_coal; pedigree (1,1,1,1,1)
  Literature value/calculated value. Hard coal use when producing 1kWh of electricity from hard coal, based on the value for burning 1MJ of hard coal. Weighted average with electricity production data (Itten&Frischknecht 2012) and hard coal use values of 14 countries
  (AT, BE, ES, FR, IT, NL, PT, DE, CZ, HR, PL, SK, CN, US) (Röder et al. 2007)
  Source:
  Itten R. and Frischknecht R. (2012) Life Cycle Inventories of Electricity Mixes and Grid. ESU-services Ltd., Uster, Switzerland.
  properties: wet mass 1 kg, dry mass 0.94 kg, carbon content, fossil 0.845, water content 0.0638298, heating value, net 27.91 MJ
  note on carbon content, fossil: C content 75-94% (specified in Tab 1.1, report 6, part VI). A mean content of 0.845 kg C/ kg dry hard coal was considered
- light fuel oil: 2.52013e-6, 6.80512e-7, 5.08623e-6, 3.37516e-7, 4.89048e-7 kg (5 entries); lognormal variance with pedigree 0.056, pedigree (3,4,5,5,1)
  (same comment as for light fuel oil)
- water, decarbonised: 0.0028669, 0.00745968, 4.66511e-6, 0.0300866, 0.00148112, 0.0048702, 0.000268864, 0.00383125, 0.0559814, 0.000366223 kg (10 entries); lognormal variance with pedigree 0.086, pedigree (4,5,5,5,3)
  (same comment as for water, decarbonised)
- hard coal: 0, 0, 0 kg (3 entries); pedigree (1,1,1,1,1)
  (same comment as for hard coal)
- hard coal: 0.0131006, 0.00307667, 0.000803317 kg (3 entries); lognormal variance with pedigree 0.0532, pedigree (3,3,5,5,3)
  (same comment as for hard coal)

## Inputs from nature
- Water, cooling, unspecified natural origin [natural resource, in water]: 0.00245172 m3; name water_cooling_UNO_input; = ((recirculating_CS_fraction_from_allCS*WWithdrawal_EP_HC_recirculating_CS)+(once_through_andCP_CS_fractio_from_allCS*WWithdrawal_EP_HC_once_through_andCP_CS))/11.31*factor_MJ_kWh*(efficiency/3.6); lognormal variance with pedigree 0.130025, pedigree (4,4,5,2,4)
  Calculated based on literature data.

## Emissions to nature
- Propane [air, non-urban air or from high stacks]: 1.10969e-8 kg; name propane; lognormal variance with pedigree 0.112, pedigree (3,5,5,5,1)
  Literature value/calculated value. Emissions when producing 1kWh of electricity from hard coal, based on the value for burning 1MJ of hard coal. Weighted average with electricity production data (Itten&Frischknecht 2012) and emission values of 14 countries
  (AT, BE, ES, FR, IT, NL, PT, DE, CZ, HR, PL, SK, CN, US) (Röder et al. 2007)
  Country emissions values based on literature.
  Source:
  Itten R. and Frischknecht R. (2012) Life Cycle Inventories of Electricity Mixes and Grid. ESU-services Ltd., Uster, Switzerland.
- Pentane [air, non-urban air or from high stacks]: 4.66393e-8 kg; name pentane; lognormal variance with pedigree 0.112, pedigree (3,5,5,5,1)
  (same comment as for Propane)
- Dioxins, measured as 2,3,7,8-tetrachlorodibenzo-p-dioxin [air, non-urban air or from high stacks]: 5.68249e-15 kg; name dioxins; lognormal variance with pedigree 0.372, pedigree (3,5,5,5,1)
  (same comment as for Propane)
- Nitrogen oxides [air, non-urban air or from high stacks]: 0.00013445 kg; name nitrogen_oxides; = 0.00304*(efficiency/3.6); source Itten R. 2012; lognormal variance with pedigree 0.093, pedigree (4,4,5,5,4)
  (same comment as for SOx retained, in hard coal flue gas desulfurisation)
- Boron [air, non-urban air or from high stacks]: 2.0532e-7 kg; name boron; lognormal variance with pedigree 0.7806, pedigree (5,3,5,5,3)
  Literature value/calculated value. Emissions when producing 1kWh of electricity from hard coal, based on the value for burning 1MJ of hard coal. Weighted average with electricity production data (Itten&Frischknecht 2012) and emission values of 14 countries
  (AT, BE, ES, FR, IT, NL, PT, DE, CZ, HR, PL, SK, CN, US) (Röder et al. 2007)
  Country emissions values calculated from trace element balance, input uncertain
  Source:
  Itten R. and Frischknecht R. (2012) Life Cycle Inventories of Electricity Mixes and Grid. ESU-services Ltd., Uster, Switzerland.
- Cobalt [air, non-urban air or from high stacks]: 1.79052e-9 kg; name cobalt; lognormal variance with pedigree 0.7806, pedigree (5,3,5,5,3)
  (same comment as for Boron)
- Chromium [air, non-urban air or from high stacks]: 4.39589e-9 kg; name chromium; lognormal variance with pedigree 0.7806, pedigree (5,3,5,5,3)
  (same comment as for Boron)
- Thorium-228 [air, non-urban air or from high stacks]: 1.76908e-6 kBq; name throium_228; lognormal variance with pedigree 0.4306, pedigree (5,3,5,5,3)
  (same comment as for Boron)
- Hydrocarbons, aliphatic, alkanes, unspecified [air, non-urban air or from high stacks]: 7.23714e-8 kg; name hydrocarbons_al_al_unspec; lognormal variance with pedigree 0.112, pedigree (3,5,5,5,1)
  (same comment as for Propane)
- Methane, dichloro-, HCC-30 [air, non-urban air or from high stacks]: 1.28124e-9 kg; name methane_dichloro; lognormal variance with pedigree 0.2106, pedigree (5,3,5,5,3)
  (same comment as for Propane)
- Ethene, tetrachloro- [air, non-urban air or from high stacks]: 1.89774e-10 kg; name ethene_tetrachloro; lognormal variance with pedigree 0.2106, pedigree (5,3,5,5,3)
  (same comment as for Propane)
- Formaldehyde [air, non-urban air or from high stacks]: 1.94599e-8 kg; name formaldehyde; lognormal variance with pedigree 0.112, pedigree (3,5,5,5,1)
  (same comment as for Propane)
- Uranium-234 [air, non-urban air or from high stacks]: 1.08289e-6 kBq; name uranium_234; lognormal variance with pedigree 0.3906, pedigree (5,3,5,5,3)
  (same comment as for Propane)
- Cadmium [air, non-urban air or from high stacks]: 5.57528e-10 kg; name cadmium; lognormal variance with pedigree 0.7806, pedigree (5,3,5,5,3)
  (same comment as for Boron)
- Methane, fossil [air, non-urban air or from high stacks]: 4.83548e-7 kg; name methane_fossil; lognormal variance with pedigree 0.106, pedigree (3,4,5,5,1)
  (same comment as for Propane)
- Carbon disulfide [air, non-urban air or from high stacks]: 5.7361e-10 kg; name carbon_disulfide; lognormal variance with pedigree 0.3526, pedigree (3,3,5,5,3)
  Literature value/calculated value. Emissions when producing 1kWh of electricity from hard coal, based on the value for burning 1MJ of hard coal. Weighted average with electricity production data (Itten&Frischknecht 2012) and emission values of 14 countries
  (AT, BE, ES, FR, IT, NL, PT, DE, CZ, HR, PL, SK, CN, US) (Röder et al. 2007)
  Source:
  Itten R. and Frischknecht R. (2012) Life Cycle Inventories of Electricity Mixes and Grid. ESU-services Ltd., Uster, Switzerland.
- Aldehydes, unspecified [air, non-urban air or from high stacks]: 4.19754e-9 kg; name aldehydes_unspecified; lognormal variance with pedigree 0.1726, pedigree (3,3,5,5,3)
  (same comment as for Propane)
- Bromine [air, non-urban air or from high stacks]: 1.67794e-7 kg; name bromine; lognormal variance with pedigree 0.2126, pedigree (3,3,5,5,3)
  (same comment as for Boron)
- Ethane, 1,1,1-trichloro-, HCFC-140 [air, non-urban air or from high stacks]: 8.84539e-11 kg; name ethane_trichloro; lognormal variance with pedigree 0.1726, pedigree (3,3,5,5,3)
  (same comment as for Propane)
- Strontium [air, non-urban air or from high stacks]: 3.17362e-8 kg; name strontium; lognormal variance with pedigree 0.7806, pedigree (5,3,5,5,3)
  (same comment as for Boron)
- Copper [air, non-urban air or from high stacks]: 4.40125e-9 kg; name copper; lognormal variance with pedigree 0.7806, pedigree (5,3,5,5,3)
  (same comment as for Boron)
- Particulates, < 2.5 um [air, non-urban air or from high stacks]: 1.46834e-5 kg; name particulates_lt2_5; = 0.000332*(efficiency/3.6); source Itten R. 2012; lognormal variance with pedigree 0.093, pedigree (4,4,5,5,4)
  (same comment as for SOx retained, in hard coal flue gas desulfurisation)
- Benzene [air, non-urban air or from high stacks]: 7.45157e-8 kg; name benzene; lognormal variance with pedigree 0.12, pedigree (3,5,5,5,3)
  (same comment as for Propane)
- Acrolein [air, non-urban air or from high stacks]: 1.28124e-9 kg; name acrolein; lognormal variance with pedigree 0.3906, pedigree (5,3,5,5,3)
  (same comment as for Propane)
- Sulfate [air, non-urban air or from high stacks]: 2.11217e-10 kg; name sulfate; lognormal variance with pedigree 0.2106, pedigree (5,3,5,5,3)
  (same comment as for Propane)
- Chloroform [air, non-urban air or from high stacks]: 4.33156e-10 kg; name chloroform; lognormal variance with pedigree 0.1726, pedigree (3,3,5,5,3)
  (same comment as for Carbon disulfide)
- Actinides, radioactive, unspecified [air, non-urban air or from high stacks]: 9.16704e-6 kBq; name actinides_radioactive_unspecified; lognormal variance with pedigree 0.3526, pedigree (3,3,5,5,3)
  (same comment as for Propane)
- Barium [air, non-urban air or from high stacks]: 3.47919e-8 kg; name barium; lognormal variance with pedigree 0.7806, pedigree (5,3,5,5,3)
  (same comment as for Boron)
- Dinitrogen monoxide [air, non-urban air or from high stacks]: 7.07631e-7 kg; name dinitrogen_monoxide; lognormal variance with pedigree 0.106, pedigree (3,4,5,5,1)
  (same comment as for Propane)
- Hydrogen fluoride [air, non-urban air or from high stacks]: 1.51712e-6 kg; name hydrogen_fluoride; lognormal variance with pedigree 0.2506, pedigree (5,3,5,5,3)
  (same comment as for Boron)
- NMVOC, non-methane volatile organic compounds, unspecified origin [air, non-urban air or from high stacks]: 4.98559e-7 kg; name nmvoc; lognormal variance with pedigree 0.1726, pedigree (3,3,5,5,3)
  (same comment as for Propane)
- Chromium VI [air, non-urban air or from high stacks]: 7.50518e-10 kg; name chromium_vi; lognormal variance with pedigree 0.5326, pedigree (3,3,5,5,3)
  Literature value/calculated value. Emissions when producing 1kWh of electricity from hard coal, based on the value for burning 1MJ of hard coal. Weighted average with electricity production data (Itten&Frischknecht 2012) and emission values of 14 countries
  (AT, BE, ES, FR, IT, NL, PT, DE, CZ, HR, PL, SK, CN, US) (Röder et al. 2007)
  Country emissions values based on range of data.
  Source:
  Itten R. and Frischknecht R. (2012) Life Cycle Inventories of Electricity Mixes and Grid. ESU-services Ltd., Uster, Switzerland.
- Iodine [air, non-urban air or from high stacks]: 8.52374e-8 kg; name iodine; lognormal variance with pedigree 0.2506, pedigree (5,3,5,5,3)
  (same comment as for Boron)
- Carbon monoxide, fossil [air, non-urban air or from high stacks]: 4.72826e-6 kg; name carbon_monoxide_fossil; lognormal variance with pedigree 0.706, pedigree (3,4,5,5,1)
  (same comment as for Propane)
- Cyanide [air, non-urban air or from high stacks]: 1.10433e-8 kg; name cyanide; lognormal variance with pedigree 0.2106, pedigree (5,3,5,5,3)
  (same comment as for Carbon disulfide)
- Radon-222 [air, non-urban air or from high stacks]: 0.00026697 kBq; name radon_222; lognormal variance with pedigree 0.4306, pedigree (5,3,5,5,3)
  (same comment as for Boron)
- Particulates, > 2.5 um, and < 10um [air, non-urban air or from high stacks]: 1.82657e-6 kg; name particulates_2_5_to_10; = 0.0000413*(efficiency/3.6); source Itten R. 2012; lognormal variance with pedigree 0.093, pedigree (4,4,5,5,4)
  (same comment as for SOx retained, in hard coal flue gas desulfurisation)
- Styrene [air, non-urban air or from high stacks]: 1.09361e-10 kg; name styrene; lognormal variance with pedigree 0.1726, pedigree (3,3,5,5,3)
  (same comment as for Propane)
- Magnesium [air, non-urban air or from high stacks]: 4.85692e-8 kg; name magnesium; lognormal variance with pedigree 0.7406, pedigree (5,3,5,5,3)
  (same comment as for Propane)
- Radon-220 [air, non-urban air or from high stacks]: 0.000271795 kBq; name radon_220; lognormal variance with pedigree 0.4306, pedigree (5,3,5,5,3)
  (same comment as for Boron)
- Ethane [air, non-urban air or from high stacks]: 1.30269e-8 kg; name ethane; lognormal variance with pedigree 0.112, pedigree (3,5,5,5,1)
  (same comment as for Propane)
- Beryllium [air, non-urban air or from high stacks]: 9.27426e-11 kg; name beryllium; lognormal variance with pedigree 0.7026, pedigree (3,3,5,5,3)
  (same comment as for Carbon disulfide)
- Thorium-234 [air, non-urban air or from high stacks]: 5.52167e-7 kBq; name thorium_234; lognormal variance with pedigree 0.3526, pedigree (3,3,5,5,3)
  (same comment as for Propane)
- Ethane, 1,2-dichloro- [air, non-urban air or from high stacks]: 1.76372e-10 kg; name ethane_dichloro; lognormal variance with pedigree 0.2106, pedigree (5,3,5,5,3)
  (same comment as for Propane)
- Xylene [air, non-urban air or from high stacks]: 2.92702e-7 kg; name xylene; lognormal variance with pedigree 0.112, pedigree (3,5,5,5,1)
  (same comment as for Propane)
- Benzene, ethyl- [air, non-urban air or from high stacks]: 4.15465e-10 kg; name benzene_ethyl; lognormal variance with pedigree 0.1726, pedigree (3,3,5,5,3)
  (same comment as for Carbon disulfide)
- Benzo(a)pyrene [air, non-urban air or from high stacks]: 2.31052e-13 kg; name benzo_a_pyrene; lognormal variance with pedigree 0.112, pedigree (3,5,5,5,1)
  (same comment as for Propane)
- Phenol [air, non-urban air or from high stacks]: 7.07631e-11 kg; name phenol; lognormal variance with pedigree 0.1726, pedigree (3,3,5,5,3)
  (same comment as for Propane)
- Manganese [air, non-urban air or from high stacks]: 1.91918e-8 kg; name manganese; lognormal variance with pedigree 0.7806, pedigree (5,3,5,5,3)
  (same comment as for Boron)
- Carbon dioxide, fossil [air, non-urban air or from high stacks]: 0.0511961 kg; name carbon_dioxide_fossil; lognormal variance with pedigree 0.0526, pedigree (3,3,5,5,3)
  (same comment as for Propane)
- Thorium-230 [air, non-urban air or from high stacks]: 5.52167e-7 kBq; name thorium_230; lognormal variance with pedigree 0.3906, pedigree (5,3,5,5,3)
  (same comment as for Propane)
- Potassium-40 [air, non-urban air or from high stacks]: 1.23299e-5 kBq; name potassium_40; lognormal variance with pedigree 0.4306, pedigree (5,3,5,5,3)
  (same comment as for Boron)
- Hydrocarbons, aliphatic, alkanes, cyclic [air, non-urban air or from high stacks]: 2.55712e-9 kg; name hydrocarbons_al_al_cyclic; lognormal variance with pedigree 0.1726, pedigree (3,3,5,5,3)
  (same comment as for Propane)
- Protactinium-234 [air, non-urban air or from high stacks]: 5.52167e-7 kBq; name protactinium_234; lognormal variance with pedigree 0.3526, pedigree (3,3,5,5,3)
  (same comment as for Propane)
- Butane [air, non-urban air or from high stacks]: 6.00415e-9 kg; name butane; lognormal variance with pedigree 0.112, pedigree (3,5,5,5,1)
  (same comment as for Propane)
- Water [air, unspecified]: 9.75652e-6 m3; name water_to_air_unspecified; = (water_completely_softened/1000)*fraction_WCS_to_air+(water_decarbonised_user/1000)*fraction_WDC_to_air+water_cooling_UNO_input*fraction_CW_to_air*(efficiency/3.6); lognormal variance with pedigree 0.130025, pedigree (4,4,5,2,4)
  Calculated value based on literature values and expert opinion. See comments in the parametres' comment field.
  property fraction, origin: fresh water 0.047882; name fraction_origin_fresh_water
  property fraction, origin: salt water 0; name fraction_origin_salt_water
  property fraction, origin: unspecified 0.952118; name fraction_origin_unspecified
- Sulfur dioxide [air, non-urban air or from high stacks]: 0.000268015 kg; name sulfur_dioxide; = 0.00606*(efficiency/3.6); source Itten R. 2012; lognormal variance with pedigree 0.093, pedigree (4,4,5,5,4)
  (same comment as for SOx retained, in hard coal flue gas desulfurisation)
- Water [water, unspecified]: 0.000302944 m3; name water_to_water_unspecified; = (water_completely_softened/1000)*(1-fraction_WCS_to_air)+(water_decarbonised_user/1000)*(1-fraction_WDC_to_air)+water_cooling_UNO_input*(1-fraction_CW_to_air)*(efficiency/3.6); lognormal variance with pedigree 0.130025, pedigree (4,4,5,2,4)
  (same comment as for Water)
  property fraction, origin: unspecified 0.957054; name fraction_origin_unspecified_Ww
  property fraction, origin: fresh water 0.0429463; name fraction_origin_fresh_water_Ww
  property fraction, origin: salt water 0; name fraction_origin_salt_water_Ww
- Thorium-232 [air, non-urban air or from high stacks]: 2.58929e-6 kBq; name thorium_232; lognormal variance with pedigree 0.4306, pedigree (5,3,5,5,3)
  (same comment as for Boron)
- Cumene [air, non-urban air or from high stacks]: 2.40702e-11 kg; name cumene; lognormal variance with pedigree 0.124, pedigree (1,1,3,5,1)
  (same comment as for Carbon disulfide)
- Vanadium [air, non-urban air or from high stacks]: 7.93405e-9 kg; name vanadium; lognormal variance with pedigree 0.7806, pedigree (5,3,5,5,3)
  (same comment as for Boron)
- Furan [air, non-urban air or from high stacks]: 2.20867e-14 kg; name furan; lognormal variance with pedigree 0.1726, pedigree (3,3,5,5,3)
  (same comment as for Propane)
- Molybdenum [air, non-urban air or from high stacks]: 6.16497e-10 kg; name molybdenum; lognormal variance with pedigree 0.7806, pedigree (5,3,5,5,3)
  (same comment as for Boron)
- Selenium [air, non-urban air or from high stacks]: 8.84539e-9 kg; name selenium; lognormal variance with pedigree 0.7806, pedigree (5,3,5,5,3)
  (same comment as for Boron)
- Propene [air, non-urban air or from high stacks]: 5.07672e-9 kg; name propene; lognormal variance with pedigree 0.112, pedigree (3,5,5,5,1)
  (same comment as for Propane)
- Nickel [air, non-urban air or from high stacks]: 1.07217e-8 kg; name nickel; lognormal variance with pedigree 0.7806, pedigree (5,3,5,5,3)
  (same comment as for Boron)
- Polonium-210 [air, non-urban air or from high stacks]: 6.59384e-5 kBq; name polonium_210; lognormal variance with pedigree 0.4306, pedigree (5,3,5,5,3)
  (same comment as for Boron)
- Radium-228 [air, non-urban air or from high stacks]: 3.16826e-6 kBq; name radium_228; lognormal variance with pedigree 0.4306, pedigree (5,3,5,5,3)
  (same comment as for Boron)
- Uranium-238 [air, non-urban air or from high stacks]: 8.52374e-6 kBq; name uranium_238; lognormal variance with pedigree 0.4306, pedigree (5,3,5,5,3)
  (same comment as for Boron)
- Radium-226 [air, non-urban air or from high stacks]: 9.81034e-6 kBq; name radium_226; lognormal variance with pedigree 0.3907, pedigree (3,3,5,3,3)
  (same comment as for Boron)
- Lead-210 [air, non-urban air or from high stacks]: 3.71507e-5 kBq; name lead_210; lognormal variance with pedigree 0.4306, pedigree (5,3,5,5,3)
  (same comment as for Boron)
- Lead [air, non-urban air or from high stacks]: 1.98887e-8 kg; name lead; lognormal variance with pedigree 0.7806, pedigree (5,3,5,5,3)
  (same comment as for Boron)
- Toluene [air, non-urban air or from high stacks]: 3.56496e-8 kg; name toluene; lognormal variance with pedigree 0.112, pedigree (3,5,5,5,1)
  (same comment as for Propane)
- Arsenic [air, non-urban air or from high stacks]: 5.34476e-9 kg; name arsenic; lognormal variance with pedigree 0.7806, pedigree (5,3,5,5,3)
  (same comment as for Boron)
- Antimony [air, non-urban air or from high stacks]: 6.43301e-10 kg; name antimony; lognormal variance with pedigree 0.7806, pedigree (5,3,5,5,3)
  (same comment as for Boron)
- Hexane [air, non-urban air or from high stacks]: 2.97527e-10 kg; name hexane; lognormal variance with pedigree 0.2106, pedigree (5,3,5,5,3)
  (same comment as for Propane)
- Acenaphthene [air, non-urban air or from high stacks]: 2.25155e-12 kg; name acenaphthene; lognormal variance with pedigree 0.1726, pedigree (3,3,5,5,3)
  (same comment as for Propane)
- PAH, polycyclic aromatic hydrocarbons [air, non-urban air or from high stacks]: 4.01527e-9 kg; name pah; lognormal variance with pedigree 0.372, pedigree (3,5,5,5,1)
  (same comment as for Propane)
- Hydrocarbons, chlorinated [air, non-urban air or from high stacks]: 8.95261e-10 kg; name hydrocarbons_chlorinated; lognormal variance with pedigree 0.2106, pedigree (5,3,5,5,3)
  (same comment as for Propane)
- Zinc [air, non-urban air or from high stacks]: 2.23011e-8 kg; name zinc; lognormal variance with pedigree 0.7806, pedigree (5,3,5,5,3)
  (same comment as for Boron)
- Hydrogen chloride [air, non-urban air or from high stacks]: 1.42062e-5 kg; name hydrogen_chloride; lognormal variance with pedigree 0.2506, pedigree (5,3,5,5,3)
  (same comment as for Boron)
- Hydrocarbons, aliphatic, unsaturated [air, non-urban air or from high stacks]: 6.86188e-8 kg; name hydrocarbons_aliphatic_unsaturated; lognormal variance with pedigree 0.112, pedigree (3,5,5,5,1)
  (same comment as for Propane)
- Particulates, > 10 um [air, non-urban air or from high stacks]: 3.95831e-6 kg; name particulates_gt10; = 0.0000895*(efficiency/3.6); source Itten R. 2012; lognormal variance with pedigree 0.093, pedigree (4,4,5,5,4)
  (same comment as for SOx retained, in hard coal flue gas desulfurisation)
- Mercury [air, non-urban air or from high stacks]: 1.44743e-9 kg; name mercury; lognormal variance with pedigree 0.7806, pedigree (5,3,5,5,3)
  (same comment as for Boron)
- Methane, monochloro-, R-40 [air, non-urban air or from high stacks]: 2.34269e-9 kg; name methane_monochloro; lognormal variance with pedigree 0.1726, pedigree (3,3,5,5,3)
  (same comment as for Propane)

## Sampling procedure
literature and statistics

## Extrapolations
Original emission data from 1993 have been updated for the years 2000 (v1.0), and 2004-2005 (v2.0). Uncertainty was adjusted accordingly.

Most of the exchanges were extrapolated through production-weighted averages of the datasets of the following 14 countries: AT, BE, ES, FR, IT, NL, PT, DE, CZ, HR, PL, SK, CN, US.

## Review by Carl Vadenbo 2015-07-02
The update of the whole electricity sector for the ecoinvent v3.2 database consist of hundreds of datasets. All these datasets have passed through a streamlined review processes where the underlying modelling of production volumes, technology shares and efficiencies was reviewed in detail prior to the datasets being submitted to the database.
