# transport, passenger car, medium size, petrol, EURO 5

Dataset: EcoSpold 2, unit process
Geography: RER
Time period: 2012-01-01 to 2021-12-31
Technology level: current
Classification: ISIC rev.4 ecoinvent: 4922:Other passenger land transport
Tags: internal combustion engine
Scenario: Business-as-Usual
System model: Allocation, cut-off by classification
Generated by: Andrew Simons
Database: ecoinvent
isCopyrightProtected: true
accessRestrictedTo: 1

## General comment
This dataset represents the service of transport in a passenger car for a journey length of 1vkm and is valid for Europe. Fuel consumption and emissions are for average vehicle use and not representative of a specific driving cycle. The dataset is parametrized with respect to vehicle size, fuel consumption and vehicle lifetime.
Datasets for three different passenger car categories are available in ecoinvent in view of size: small, medium and large.
The category “small” includes passenger cars with engine size up to 1.4 liters. The average weight of this category is estimated to be 1200 kg.
The category “medium” includes passenger cars with engine size between 1.4 and 2.0 liters. The average weight of this category is estimated to be 1600 kg.
The category “large” includes passenger cars with engine size larger than 2.0 liters. The average weight of this category is estimated to be 2000 kg.
The passenger car size influences the amount of both exhaust and non-exhaust emissions. The exhaust emissions caused by the burning of fuel are divided into two groups: fuel dependent emissions (dependent on fuel type and quantity) and Euro class dependent emissions which reflect the emission standards which the vehicle complies with. Three classes of Euro engine type are considered: Euro 3, Euro 4 and Euro 5. The higher the class (e.g. Euro 5), the lower the emissions and viceversa. The Euro engine regulation is set by the European Commission “in order to limit as much as possible the negative impact of road vehicles on the environment and health” (European Commission 2012). This dataset considers a small petrol passenger car of Euro 5 class. Also included within the direct exchanges to the environment are the fuel evaporation emissions from the fuel tank, relevant to petrol vehicles only.

Non-exhaust emissions are those resulting from tyre, brake and road wear. These emissions are considered as by-products.

## Included activities start
From combustion of fuel in the engine. The dataset takes as input the infrastructure of the car and road network, the materials and efforts needed for maintenance of these and the fuel consumed in the vehicle for the journey.

## Included activities end
The activity ends with the transport over 1vkm and the emissions of exhaust and non-exhaust emissions into air, water and soil.

The dataset includes the construction, operation, maintenance and disposal of the vehicle and road infrastructure. Operation of the vehicle includes all the direct emissions produced by fuel combustion and evaporation as well as from tyre, brake and road wear.

The dataset doesn't specifically model cold start emissions. These are assumed to be included in the data for average driving which was used.

## Technology
Transport in a passenger car with internal combustion engine, fueled by petrol. The size is small, with engine size up to 2.0 litres and average weight of 1600 kg.
Technology classifications are based on those used widely within the works of the European Environment Agency, particularly in the Emissions Inventory Guidebook. The Tremove model - which is also used to generate fuel consumption and emission factors for the datasets presented here - follows this classification system.

## Parameters
All rows: lognormal variance with pedigree 0.0015, pedigree (2,2,2,1,1)
- emissions from tyre abrasion: 5.725e-8 kg/kg vehicle; name tyre_wear_emissions; = LiveLink('\\FS01\Gabe\_LCA\Ecoinvent\v3\v3 data\Livelink data for ecoeditor\All_non_exhaust_emissions.xls','Tyres','C118','', 'Automatic')
  Average (small, medium and large weight class) emissions produced per kg vehicle.
  Calculation of non-exhaust emissions (tyre, brake and road wear emissions as well as petrol evaporation emissions) are based on: Ntziachristos, L., Boulter, P. (2009). EMEP/EEA air pollutant emissions inventory guidebook 2009: Road vehicle tyre and brake wear; Road surface wear. Copenhagen, European Environment Agency
  Uncertainty: B
- co2 emissions per kg petrol: 3.18 kg; name co2_kg_petrol
  Constant for all petrol vehicles
- emissions from brake friction: 4.45e-9 kg/kg vehicle; name brake_wear_emissions; = LiveLink('\\FS01\Gabe\_LCA\Ecoinvent\v3\v3 data\Livelink data for ecoeditor\All_non_exhaust_emissions.xls','Brakes','C43','', 'Automatic')
  (same comment as for emissions from tyre abrasion)
- annual total vkm: 1.31872e11 km; name annual_vkm; = 1.31872E+11
  Based on Tremove (2009)
- passengers: 1.62 unit
  Average number of passengers in passenger car 1.62
- lifetime of the vehicle: 150000 km; name vehicle_lifetime_km
  Distance capacity in the assumed vehicle lifetime.
  Reference: Spielmann (2007) ecoinvent report 14. Ecoinvent centre, Dübendorf.
- gross vehicle weight: 1697.2 kg; name gross_vehicle_weight; = vehicle_weight+LF_passengers
  Weight of vehicle and passengers
- scaling factor: 1.29032 dimensionless; name scaling_factor; = (vehicle_weight/basis_vehicle_weight)
  The mass of a vehicle influences a range of different exchanges. These are fuel consumption (and thus fuel dependant emissions), non-exhaust emissions and vehicle and road infrastructures. For the infrastructres a scaling factor is used to extrapolate the values appropriate to the basis vehicle. The scaling factor is given by vehicle weight divided by the basis vehicle weight (1240kg).
- weight of the vehicle: 1600 kg/unit; name vehicle_weight
  Empty vehicle weight (curb weight) according to each vehicle class used: small cars (<1.4 litres) 1200kg;
  medium size cars (1.4 - 2.0 litres) 1600kg;
  large size cars (>2.0 litres) 2000kg
- so2 emissions per kg petrol: 2e-5 kg; name so2_kg_petrol; = 2.0e-5
  Constant for all petrol vehicles
- weight of the basis vehicle: 1240 kg/unit; name basis_vehicle_weight
  The basis vehicle is the one on which the original life cycle inventory was conducted. It is representative of a VW Golf.
- emissions from road abrasion: 9.79e-9 kg/kg vehicle; name road_wear_emissions
  (same comment as for emissions from tyre abrasion)
- passenger load factor: 97.2 kg; name LF_passengers; = passengers*60
  Number of passengers multiplied by 60 kg per passenger
- fuel consumption constant: 2.9288e-5 dimensionless; name fc_constant; = 2.9288E-05
  Determined from analysing the fuel consumption for vehicles in the Tremove model (2009)
- fuel consumption of basis vehicle: 0.05922 dimensionless; name fc_basis_vehicle
  Fuel consumption as derived from the source data for each vehicle type, size and emissions standard

## Reference product
- transport, passenger car, medium size, petrol, EURO 5: 1 km; CPC 64119: Other land transportation services of passengers, n.e.c.; By-product classification allocatable product
  production volume 1.31872e11 km; name transport_RP_PV; = annual_vkm
    Based on Tremove model (2009)
  property price 0.170956 EUR2005
    Calculated based on inputs: The price of the product has been calculated as a sum of the values of the material and energy inputs for this product. This value is therefore a rough estimation. It may underestimate the real price since there are additional expenses when producing any product. These expences can include for example labour costs, treatment of waste materials and profit for the producer. Please consider carefully whether this level of data quality is acceptable for your application.

## Inputs from technosphere
- petrol, low-sulfur: 0 kg; name petrol_use; source TREMOVE 2007; pedigree (1,1,1,1,1)
  Calculation, based on data from TREMOVE (2007)
  Fuel consumption is influenced by vehicle weight. Fuel input exchanges (petrol low-sulphur, diesel low-sulphur and natural gas) are scaled according to the specific vehicle weight inserted by the ecoinvent user. Calculation of the fuel consumption uses a fuel specific constant. This corresponds to:
  ((specific gross vehicle weight - basis vehicle weight) * constant + basis vehicle fuel consumption
  property water in wet mass 0 kg; name WWM
  property carbon content, non-fossil 0; name C_content_non_fossil
  property dry mass 1 kg; name DM
  property wet mass 1 kg; name WM
  property water content 0; name water_content
  property carbon content, fossil 0.865; name C_content_fossil
  properties: heating value, net 42.5 MJ
  note on heating value, net: Based on literature, page 611, Report 17: Jungbluth, N., Chudacoff, M., Dauriat, A., Dinkel, F., Doka, G., Faist Emmenegger, M., Gnansounou, E., Kljun, N., Schleiss, K., Spielmann, M., Stettler, C., Sutter, J. 2007: Life Cycle Inventories of Bioenergy. ecoinvent report No. 17, Swiss Centre for Life Cycle Inventories, Dübendorf, CH.
- tyre wear emissions, passenger car: -9.71647e-5 kg; name tyre_emissions; = (tyre_wear_emissions*gross_vehicle_weight)*-1; source Ntziachristos, L. 2009; lognormal variance with pedigree 0.0413, pedigree (2,2,5,1,1)
  Quantity of emissions based on values from Ntziachristos, L., Boulter, P. (2009) EMEP/EEA air pollutant emissions inventory guidebook 2009: Road vehicle tyre and brake wear; Road surface wear. Copenhagen, European Environment Agency. Quantities given in the source assumed to represent medium sized vehicles. Quantities for small and large vehicles taken from the bounds of the ranges given.
  production volume 1.28133e7 kg; = tyre_emissions*transport_RP_PV
    Calculated from production volume of reference product using the relative outputs.
  property price 0 EUR2005; name tyre_emissions_price_EUR2005
- passenger car maintenance: 8.60215e-6 unit; = (1/vehicle_lifetime_km)*scaling_factor; source Spielmann M. 2007; lognormal variance with pedigree 0.0413, pedigree (2,2,5,1,1)
  The dataset is for a medium size passenger car. In order to make the demand appropriate to the particular vehicle in question a scaling factor is applied which is the product of the vehicle weight devided by the weight of the medium size vehicle.
- brake wear emissions, passenger car: -7.55254e-6 kg; name brake_emissions; = (brake_wear_emissions* gross_vehicle_weight)*-1; source Ntziachristos, L. 2009; lognormal variance with pedigree 0.0413, pedigree (2,2,5,1,1)
  (same comment as for tyre wear emissions, passenger car)
  production volume 995969 kg; = brake_emissions*transport_RP_PV
    Calculated from production volume of reference product using the relative outputs.
  property price 0 EUR2005; name brake_emissions_price_EUR2005
- road maintenance: 0.000265427 m*year; lognormal variance with pedigree 0.0413, pedigree (2,2,5,1,1)
  This input indicates the unit of road per vkm used during the transport activity. The road input is composed by two demand factors: - Road infrastructure and disposal (RI&D), which varies according to the gross vehicle weight. - Road operations & maintenance (RO&M), which does not vary according to the gross vehicle weight.
- road wear emissions, passenger car: -1.66156e-5 kg; name road_emissions; = (road_wear_emissions* gross_vehicle_weight)*-1; source Ntziachristos, L. 2009; lognormal variance with pedigree 0.0413, pedigree (2,2,5,1,1)
  (same comment as for tyre wear emissions, passenger car)
  production volume 2.19113e6 kg; = road_emissions*transport_RP_PV
    Calculated from production volume of reference product using the relative outputs.
  property price 0 EUR2005; name road_emissions_price_EUR2005
- passenger car, petrol/natural gas: 0.0106667 kg; name passenger_car; = (1/vehicle_lifetime_km)*vehicle_weight; source Spielmann M. 2007; lognormal variance with pedigree 0.0413, pedigree (2,2,5,1,1)
  The dataset is calculated from the LCI of VW Golf. The infrastructure demand is scaled according to the weight of the specific vehicle in question.
- road: 0.000911396 m*year; name road_use; = 5.37E-07*gross_vehicle_weight; source Spielmann M. 2007; lognormal variance with pedigree 0.0413, pedigree (2,2,5,1,1)
  This input indicates the unit of road per vkm used during the transport activity.
  The road input is composed by two demand factors:
  - Road infrastructure and disposal (RI&D), which varies according to the gross vehicle weight.
  - Road operations & maintenance (RO&M), which does not vary according to the gross vehicle weight.
- petrol, low-sulfur: 0.0609059, 0.00116086 kg (2 entries); source TREMOVE 2007; lognormal variance with pedigree 0.0413, pedigree (2,2,5,1,1)
  (same comment as for petrol, low-sulfur)
  properties: dry mass 1 kg, wet mass 1 kg, heating value, net 42.5 MJ, carbon content, fossil 0.865

## Emissions to nature
All rows: lognormal variance with pedigree 0.0413, pedigree (2,2,5,1,1)
- Ethane [air, urban air close to ground]: 1.03e-6 kg; source Ntziachristos, L. 2009
  emissions dependent on engine Euro class (Euro 3, Euro 4 and Euro 5). Includes petrol evaporation.
- Propene [air, urban air close to ground]: 1.481e-7 kg; source Mellios, G. 2009
  petrol evaporation emissions
- Benzaldehyde [air, urban air close to ground]: 4.915e-8 kg; source Ntziachristos, L. 2009
  Emissions dependent on engine Euro class (Euro 3, Euro 4 and Euro 5).
- Particulates, < 2.5 um [air, urban air close to ground]: 1.022e-6 kg; source TREMOVE 2007
  Emissions dependent on engine Euro class (Euro 3, Euro 4 and Euro 5).
- Toluene [air, urban air close to ground]: 7.339e-6 kg; source Ntziachristos, L. 2009
  (same comment as for Ethane)
- PAH, polycyclic aromatic hydrocarbons [air, urban air close to ground]: 2.15992e-9 kg; = 3.48000E-08*petrol_use; source Ntziachristos, L. 2009
  3.48000E-08 is the emission value of PAH per kg of petrol used
- Dinitrogen monoxide [air, urban air close to ground]: 8.06868e-6 kg; = 1.30000E-04*petrol_use; source Ntziachristos, L. 2009
  1.30000E-04 is the emission value of dinitrogen monoxide per kg of petrol used
- Propylene oxide [air, urban air close to ground]: 8.534e-7 kg; source Ntziachristos, L. 2009
  Emissions dependent on engine Euro class (Euro 3, Euro 4 and Euro 5).
- Sulfur dioxide [air, urban air close to ground]: 1.24134e-6 kg; = so2_kg_petrol*petrol_use; source TREMOVE 2007
  1.99998E-05 is the emission value of sulphur dioxide per kg of petrol used
- Cadmium [air, urban air close to ground]: 6.20668e-10 kg; = 1.00000E-08*petrol_use; source Ntziachristos, L. 2009
  1.00000E-08 is the emission value of cadmium per kg of petrol used
- Chromium IV [air, urban air close to ground]: 6.20668e-12 kg; = 1.00000E-10*petrol_use; source Ntziachristos, L. 2009
  1.00000E-10 is the emission value of chromium IV per kg of petrol used
- Formaldehyde [air, urban air close to ground]: 3.798e-7 kg; source Ntziachristos, L. 2009
  Emissions dependent on engine Euro class (Euro 3, Euro 4 and Euro 5).
- o-Xylene [air, urban air close to ground]: 7.387e-7 kg; source Ntziachristos, L. 2009
  (same comment as for Ethane)
- Carbon monoxide, fossil [air, urban air close to ground]: 0.0003866 kg; source TREMOVE 2007
  Emissions dependent on engine Euro class (Euro 3, Euro 4 and Euro 5).
- Styrene [air, urban air close to ground]: 2.256e-7 kg; source Ntziachristos, L. 2009
  Emissions dependent on engine Euro class (Euro 3, Euro 4 and Euro 5).
- NMVOC, non-methane volatile organic compounds, unspecified origin [air, urban air close to ground]: 6.653e-5 kg; source TREMOVE 2007
  (same comment as for Ethane)
- Acrolein [air, urban air close to ground]: 4.245e-8 kg; source Ntziachristos, L. 2009
  Emissions dependent on engine Euro class (Euro 3, Euro 4 and Euro 5).
- Copper [air, urban air close to ground]: 1.05514e-7 kg; = 1.70000E-06*petrol_use; source Ntziachristos, L. 2009
  1.70000E-06 is the emission value of copper per kg of petrol used
- Hexane [air, urban air close to ground]: 3.597e-7 kg; source Ntziachristos, L. 2009
  Emissions dependent on engine Euro class (Euro 3, Euro 4 and Euro 5).
- m-Xylene [air, urban air close to ground]: 3.171e-6 kg; source Ntziachristos, L. 2009
  (same comment as for Ethane)
- Zinc [air, urban air close to ground]: 6.20668e-8 kg; = 1.00000E-06*petrol_use; source Ntziachristos, L. 2009
  1.00000E-06 is the emission value of zinc per kg of petrol used
- Methyl ethyl ketone [air, urban air close to ground]: 1.117e-8 kg; source Ntziachristos, L. 2009
  Emissions dependent on engine Euro class (Euro 3, Euro 4 and Euro 5).
- Lead [air, urban air close to ground]: 9.31002e-11 kg; = 1.50000E-09*petrol_use; source Ntziachristos, L. 2009
  1.50000E-09 is the emission value of lead per kg of petrol used
- Benzene [air, urban air close to ground]: 3.715e-6 kg; source Ntziachristos, L. 2009
  (same comment as for Ethane)
- Chromium [air, urban air close to ground]: 3.10334e-9 kg; = 5.00000E-08*petrol_use; source Ntziachristos, L. 2009
  5.00000E-08 is the emission value of chromium per kg of petrol used
- 2-Methyl pentane [air, urban air close to ground]: 7.417e-6 kg; source Mellios, G. 2009
  petrol evaporation emissions
- Nitrogen oxides [air, urban air close to ground]: 3.101e-5 kg; source TREMOVE 2007
  Emissions dependent on engine Euro class (Euro 3, Euro 4 and Euro 5).
- Butane [air, urban air close to ground]: 7.371e-6 kg; source Ntziachristos, L. 2009
  (same comment as for Ethane)
- Ammonia [air, urban air close to ground]: 1.862e-6 kg; = 3.00000E-05* petrol_use; source Ntziachristos, L. 2009
  3.00000E-05 is the emission value of ammonia per kg of petrol used
- Ethene [air, urban air close to ground]: 2.645e-8 kg; source Mellios, G. 2009
  petrol evaporation emissions
- Carbon dioxide, fossil [air, urban air close to ground]: 0.197372 kg; = co2_kg_petrol*petrol_use; source TREMOVE 2007
  Calculated based on the amount of petrol used and the emission of CO2 per kg of petrol.
- Cyclohexane (for all cycloalkanes) [air, urban air close to ground]: 2.547e-7 kg; source Ntziachristos, L. 2009
  Emissions dependent on engine Euro class (Euro 3, Euro 4 and Euro 5).
- Selenium [air, urban air close to ground]: 6.20668e-10 kg; = 1.00000E-08*petrol_use; source Ntziachristos, L. 2009
  1.00000E-08 is the emission value of selenium per kg of petrol used
- Methane [air, urban air close to ground]: 1.587e-5 kg; source Ntziachristos, L. 2009
  Emissions dependent on engine Euro class (Euro 3, Euro 4 and Euro 5).
- Acetaldehyde [air, urban air close to ground]: 1.675e-7 kg; source Ntziachristos, L. 2009
  Emissions dependent on engine Euro class (Euro 3, Euro 4 and Euro 5).
- Mercury [air, urban air close to ground]: 4.34468e-12 kg; = 7.00000E-11*petrol_use; source Ntziachristos, L. 2009
  7.00000E-11 is the emission value of mercury per kg of petrol used
- Propane [air, urban air close to ground]: 5.594e-6 kg; source Ntziachristos, L. 2009
  (same comment as for Ethane)
- Nickel [air, urban air close to ground]: 4.34468e-9 kg; = 7.00000E-08* petrol_use; source Ntziachristos, L. 2009
  7.00000E-08 is the emission value of nickel per kg of petrol used
- Heptane [air, urban air close to ground]: 1.653e-7 kg; source Ntziachristos, L. 2009
  Emissions dependent on engine Euro class (Euro 3, Euro 4 and Euro 5).
- Pentane [air, urban air close to ground]: 8.648e-6 kg; source Ntziachristos, L. 2009
  (same comment as for Ethane)
- Ethylene oxide [air, urban air close to ground]: 1.631e-6 kg; source Ntziachristos, L. 2009
  Emissions dependent on engine Euro class (Euro 3, Euro 4 and Euro 5).
- Acetone [air, urban air close to ground]: 1.363e-7 kg; source Ntziachristos, L. 2009
  Emissions dependent on engine Euro class (Euro 3, Euro 4 and Euro 5).
- 1-Pentene [air, urban air close to ground]: 2.457e-8 kg; source Ntziachristos, L. 2009
  Emissions dependent on engine Euro class (Euro 3, Euro 4 and Euro 5).

## Sampling procedure
Literature

## Extrapolations
This dataset has been extrapolated from year 2012 to the year of the calculation (2021). The uncertainty has been adjusted accordingly.
