# operation, printer, laser, black/white, per kg printed paper

Dataset: EcoSpold 2, unit process
Geography: CA-QC
Time period: 2002-01-01 to 2021-12-31
Technology level: current
Classification: ISIC rev.4 ecoinvent: 8219:Photocopying, document preparation and other specialized office support act
Classification: EcoSpold01Categories: electronics/services
Tags: Operation; recontextualization
Scenario: Business-as-Usual
System model: Allocation, cut-off by classification
Generated by: Pascal Lesage
Published in: Hischier R. 2007
Database: ecoinvent
isCopyrightProtected: false
accessRestrictedTo: 1

## General comment
The laser jet printer use (b/w, office) is calculated via the active mode electricity consumption taken from literature information. The dataset includes the share of the printer production (assumed life span 4 years), the energy consumption for the different modes in the use-phase, the toner usage as well as the benzene emissions for the printing of 1 kg of paper.
Reccomended printing volume for this kind of printer is 20,000 pages/months (http://www.epson.de/de/en/viewcon/corporatesite/products/mainunits/specs/9538). Paper quality assumptions; one sheet of paper weights 5g (80g/m2 as an average printing paper).
Child dataset exchanges identical to GLO dataset. Created to enable linking to regional markets (e.g. for electricity). Data quality indicators adjusted accordingly.

## Included activities end
Describes the use of a laser jet printer (monochrome) in an office. Calculated per 1 kg of printed paper. UCTE production mix applied for electricity consumption (low voltage).

## Geography
The data is based on information by international printer manufacturers and literature. Due to relatively vague literature data for laser jet printer life span and mode splits, assumptions had to be made.
Child dataset exchanges identical to GLO dataset. Created to enable linking to regional markets (e.g. for electricity). Data quality indicators adjusted accordingly.

## Technology
No technology involved, except for the production of printer and toner, which are represented in the individual subdatasets.

## Parameters
- Quebec gross domestic product 2011: 3.11e11 USD(2011); name quebecGDP2011; lognormal variance with pedigree 0.0006, pedigree (1,1,1,1,1)
  Quebec Gross domestic product for 2011, expressed in 2011 USD. Source: Institut de la statistique du Québec. Converted from CAD to USD using a yearly average exchange rate of 0.989 CAD/USD (Source: bank of Canada).
- world gross domestic product 2011: 7e13 USD(2011); name worldGDP2011; lognormal variance with pedigree 0.0006, pedigree (1,1,1,1,1)
  World Gross domestic product for 2011, expressed in 2011 USD. Source: World Bank.

## Reference product
- printed paper: 1 kg; name printed_paper_RP; CPC 32129: Other uncoated paper and paperboard, of a kind used for writing, printing or other graphic purposes, and punch[…]; By-product classification allocatable product
  production volume 8.35992e7 kg; name RP_PV_1
    Gross approximation of Quebec production volume using relative value of Quebec GDP to world GDP
  property water in wet mass 0.055 kg; name printed_paper_RP_WWM; = printed_paper_RP_WM-printed_paper_RP_DM
  property wet mass 1 kg; name printed_paper_RP_WM
  property carbon content, non-fossil 0.247; name printed_paper_RP_C_content_non_fossil
    biogene carbon content on a dry matter basis
  property price 5.44846 EUR2005; name printed_paper_RP_price_EUR2005
    Calculated based on inputs: The price of the product has been calculated as a sum of the values of the material and energy inputs for this product. This value is therefore a rough estimation. It may underestimate the real price since there are additional expenses when producing any product. These expences can include for example labour costs, treatment of waste materials and profit for the producer. Please consider carefully whether this level of data quality is acceptable for your application.
  property water content 0.0582011; name printed_paper_RP_water_content; = printed_paper_RP_WWM/printed_paper_RP_DM
  property dry mass 0.945 kg; name printed_paper_RP_DM
  property carbon content, fossil 0.032531; name printed_paper_RP_C_content_fossil
    fossil carbon content on a dry matter basis
  property carbon content 0.279531
    carbon content on a dry matter basis (reserved; not for manual entry)
  properties: heating value, net 14.11 MJ, carbon allocation 0.264157 kg

## By-products
- used toner module, laser printer, black/white: 0 kg; CPC 39990: Other wastes n.e.c.; By-product classification Recyclable; pedigree (1,1,1,1,1)
  Measured value. The weight of 1 toner module is 0.88 kg.
  production volume 0 kg
    (same comment as for printed paper)
  properties: price 0 EUR2005

## Inputs from technosphere
- toner module, laser printer, black/white: 0.04 unit; name toner_module_LP_BW_input; = printed_paper_RP/(5000*0.005); lognormal variance with pedigree 0.0512, pedigree (2,3,5,1,1)
  Calculated based on literature and estimates. Toner module capacity is 5000 pages, one page weight 0.005 kg, thus total weight of paper one toner module can print on is (5000*0.005=) 25 kg. In order to print on paper of total weight of 1 kg (1/25=) 0.04 units of toner module is needed.
  properties: dry mass 1.14 kg, carbon content, fossil 0.510352, wet mass 1.14 kg
  note on carbon content, fossil: C content was calculated as the addition of C content in the components
- paper, woodcontaining, lightweight coated: 1 kg
  properties: water content 0.0582011, wet mass 1 kg, carbon content, fossil 0.032531, carbon content, non-fossil 0.247213, heating value, net 14.11 MJ, dry mass 0.945 kg
- electricity, low voltage: 0.077 kWh; lognormal variance with pedigree 0.0432, pedigree (2,3,5,5,1)
- printer, laser, black/white: 0.000208333 unit; = printed_paper_RP/(20000*12*4*0.005); lognormal variance with pedigree 0.0546, pedigree (3,3,5,5,1)
  Calculated based on literature values and estimates. The monthly production volume of this type of printer is 20,000 pg (http://www.epson.de/de/en/viewcon/corporatesite/products/mainunits/specs/9538). The weight of one page is 0.005kg. The lifetime of a printer is estimated to be 4 years. In its lifetime the printer is able to print on (20,000*12*4=) 960,000 pages, of total weight (960,000*0.005=) 4800 kg.
  property lifetime 4 year; name printer_LT
  properties: carbon content, fossil 0.571055, wet mass 6 kg, lifetime capacity [kg] 4800 kg, dry mass 6 kg
  note on carbon content, fossil: Calculated as the addition of C contents in the product composition, then referred to 1 kg DM
  note on lifetime capacity [kg]: Calculated value; reccomended printing volume for this kind of printer is 20,000 pages/months (http://www.epson.de/de/en/viewcon/corporatesite/products/mainunits/specs/9538). Paper quality assumptions; one sheet of paper weights 5g (80g/m2 as an average printing paper). The lifetime of a printer is estimated to be 4 years.
- used toner module, laser printer, black/white: -0.0352 kg; lognormal variance with pedigree 0.0526, pedigree (4,4,5,5,1)
  Measured value. The weight of 1 toner module is 0.88 kg.
  production volume 2.94269e6 kg

## Emissions to nature
- Benzene [air, unspecified]: 1.8462e-7 kg; lognormal variance with pedigree 0.1806, pedigree (2,5,5,5,1)

## Sampling procedure
Manufacturers, literature and own assumptions.

## Extrapolations
This dataset has been extrapolated from year 2006 to the year of the calculation (2021). The uncertainty has been adjusted accordingly.
