# ventilation of dwellings, central, 1 x 720 m3/h, polyethylene ducts, with earth tube heat exchanger

Dataset: EcoSpold 2, unit process
Geography: RoW
Time period: 2003-01-01 to 2021-12-31
Technology level: current
Classification: ISIC rev.4 ecoinvent: 4322:Plumbing, heat and air-conditioning installation
Classification: EcoSpold01Categories: ventilation/ventilation systems
Tags: ConvertedDataset
Scenario: Business-as-Usual
System model: Allocation, cut-off by classification
Generated by: Alex Primas
Published in: Hässig, W. 2007
Database: ecoinvent
isCopyrightProtected: true
accessRestrictedTo: 1

## General comment
Life time of system and ducts 50 years. Life time of ventilation unit 20 years. Life time of filters 1 year. Ventilation system for a multi family house. The house considered in the investigation includes 6 flats with 130 m2 floor area each and a ventilation rate of 120 m3/h. The influence of a smaller concrete demand due to embedment of ventilation tubes in the concrete of the floor (-4.86 kg concrete per m2 floor area) is not included.
[This dataset was already contained in the ecoinvent database version 2. It was not individually updated during the transfer to ecoinvent version 3. Life Cycle Impact Assessment results may still have changed, as they are affected by changes in the supply chain, i.e. in other datasets. This dataset was generated following the ecoinvent quality guidelines for version 2. It may have been subject to central changes described in the ecoinvent version 3 change report (http://www.ecoinvent.org/database/ecoinvent-version-3/reports-of-changes/), and the results of the central updates were reviewed extensively. The changes added e.g. consistent water flows and other information throughout the database. The documentation of this dataset can be found in the ecoinvent reports of version 2, which are still available via the ecoinvent website. The change report linked above covers all central changes that were made during the conversion process.]

## Included activities end
Materials used for the construction and renewal of the ventilation system. Electricity for the operation of the system on 12 month per year included. Transport of the components to the construction site. Disposal of the components included. Influence of ventilation ducts on building construction not included.

## Geography
Data representative for a building in Zurich, Switzerland

## Technology
Electricity demand of ventilator (0.4 Wh/m3) representative for DC- or EC-motors and a system design with low pressure drops. Electricity demand of control unit 10 W. Central ventilation system including 4 parallel polyethylene ground heat exchanger tubes (200 mm diameter). Air distribution from the central ventilation unit with a galvanised steel tube (400 mm diameter) to the distribution housings in the 6 flats. Distribution of fresh- and exhaust-air within the flat with polyethylene tubes (75 mm diameter). Exhaust air from the air collection housings in the 6 flats with a galvanised steel tube (400 mm diameter) to the central ventilation unit. Exhaust air from the ventilation unit to the outside air with a galvanised steel tube (400 mm diameter).

## Time period
Amount of material investigated in 2003

## Reference product
- ventilation of dwellings, central, 1 x 720 m3/h: 1 m2*year; CPC 44815: Fans and ventilating or recycling hoods of the domestic type; By-product classification allocatable product
  EcoSpold01Location=CH
  production volume 3.96633 m2*year
    This is a placeholder value that does not reflect real-world production volumes. This dataset does not currently require a real-world production volume to work in the database framework, and no actual data were collected yet. This has no negative effect on the results of the ecoinvent database.
  property price 0.527181 EUR2005
    Calculated based on inputs: The price of the product has been calculated as a sum of the values of the material and energy inputs for this product. This value is therefore a rough estimation. It may underestimate the real price since there are additional expenses when producing any product. These expences can include for example labour costs, treatment of waste materials and profit for the producer. Please consider carefully whether this level of data quality is acceptable for your application.

## Inputs from technosphere
- used air filter central unit, 600 m3/h: -0.00251 unit; lognormal variance with pedigree 0.046, pedigree (3,4,5,5,1)
  Questionnaire, Data related to building considered
  EcoSpold01Location=CH
  Uncertainty: Questionnaire, Data related to building considered
  production volume 0 unit
    Calculated from the production volume of ventilation of dwellings, central, 1 x 720 m3/h in proportion to the respective output amounts.
  properties: carbon content, fossil 0.085325, wet mass 0.4 kg, dry mass 0.4 kg
- air filter, central unit, 600 m3/h: 0.00251 unit; lognormal variance with pedigree 0.046, pedigree (3,4,5,5,1)
  EcoSpold01Location=RER
  Questionnaire, Data related to building considered
  Uncertainty: Questionnaire, Data related to building considered
  properties: carbon content, fossil 0.085325, dry mass 0.4 kg, wet mass 0.4 kg
  note on carbon content, fossil: C content was calculated as an addition of C content in the product components (Bag filter made of polyester fleece, frame galvanised steel). Then, it was referred to 1 kg DM
- silencer, steel, DN 315, 50 mm: 0.000103 unit; lognormal variance with pedigree 0.046, pedigree (3,4,5,5,1)
  (same comment as for used air filter central unit, 600 m3/h)
  properties: dry mass 20 kg, carbon content, fossil 0.00451943, wet mass 20 kg
  note on carbon content, fossil: C content was calculated as an addition of C content in the product components
- air filter, in exhaust air valve: 0.0226 unit; lognormal variance with pedigree 0.046, pedigree (3,4,5,5,1)
  (same comment as for air filter, central unit, 600 m3/h)
  properties: carbon content, fossil 0.65625, dry mass 0.04 kg, wet mass 0.04 kg
  note on carbon content, fossil: C content was calculated as an addition of C content in the product components (Mat filter made of polyester fleece). Then, it was referred to 1 kg DM
- ventilation system, central, 1 x 720 m3/h, polyethylene ducts, with earth tube heat exchanger: 2.56e-5 unit; lognormal variance with pedigree 0.046, pedigree (3,4,5,5,1)
  EcoSpold01Location=CH
  Questionnaire, Data related to building considered
  Uncertainty: Questionnaire, Data related to building considered
- used flexible duct aluminium/PET, DN of 125: -0.000513 m; lognormal variance with pedigree 0.046, pedigree (3,4,5,5,1)
  (same comment as for ventilation system, central, 1 x 720 m3/h, polyethylene ducts, with ea)
  production volume 0 m
    (same comment as for used air filter central unit, 600 m3/h)
  properties: carbon content, fossil 0.436512, wet mass 0.205 kg, dry mass 0.205 kg
- used ventilation control and wiring central unit: -5.13e-5 unit; lognormal variance with pedigree 0.046, pedigree (3,4,5,5,1)
  (same comment as for ventilation system, central, 1 x 720 m3/h, polyethylene ducts, with ea)
  production volume 0 unit
    (same comment as for used air filter central unit, 600 m3/h)
  properties: carbon content, non-fossil 1.68025e-5, carbon content, fossil 0.262305, wet mass 4.8 kg, dry mass 4.8 kg
- used air filter in exhaust air valve: -0.0226 unit; lognormal variance with pedigree 0.046, pedigree (3,4,5,5,1)
  (same comment as for ventilation system, central, 1 x 720 m3/h, polyethylene ducts, with ea)
  production volume 0 unit
    (same comment as for used air filter central unit, 600 m3/h)
  properties: carbon content, fossil 0.65625, wet mass 0.04 kg, dry mass 0.04 kg
- ventilation control and wiring, central unit: 5.13e-5 unit; lognormal variance with pedigree 0.046, pedigree (3,4,5,5,1)
  Questionnaire, Data related to building considered
  EcoSpold01Location=RER
  Uncertainty: Questionnaire, Data related to building considered
  properties: wet mass 4.8 kg, carbon content, fossil 0.262305, carbon content, non-fossil 1.68025e-5, dry mass 4.8 kg
  note on carbon content, fossil: C content was calculated as an addition of C content in the product components, then it was referred to 1 kg DM
- used blower and heat exchange unit central, 600-1200 m3/h: -5.13e-5 unit; lognormal variance with pedigree 0.046, pedigree (3,4,5,5,1)
  (same comment as for used air filter central unit, 600 m3/h)
  production volume 0 unit
    (same comment as for used air filter central unit, 600 m3/h)
  properties: carbon content, non-fossil 5.13903e-7, carbon content, fossil 0.00852676, dry mass 143 kg, wet mass 143 kg
- silencer, steel, DN 125: 0.000615 unit; lognormal variance with pedigree 0.046, pedigree (3,4,5,5,1)
  (same comment as for ventilation system, central, 1 x 720 m3/h, polyethylene ducts, with ea)
  properties: carbon content, fossil 0.00483456, wet mass 8.3 kg, dry mass 8.3 kg
- flexible duct, aluminium/PET, DN of 125: 0.000513 m; lognormal variance with pedigree 0.046, pedigree (3,4,5,5,1)
  (same comment as for air filter, central unit, 600 m3/h)
  properties: dry mass 0.205 kg, wet mass 0.205 kg, carbon content, fossil 0.436512
  note on carbon content, fossil: C content was calculated as an addition of C content in the product components (Flexible tube made of PET, laminated with aluminium foil and strengthened with galvanised steel spiral wire)
- used silencer steel, DN 125: -0.000615 unit; lognormal variance with pedigree 0.046, pedigree (3,4,5,5,1)
  (same comment as for ventilation system, central, 1 x 720 m3/h, polyethylene ducts, with ea)
  production volume 0 unit
    (same comment as for used air filter central unit, 600 m3/h)
  properties: wet mass 8.3 kg, carbon content, fossil 0.00483456, dry mass 8.3 kg
- blower and heat exchange unit, central, 600-1200 m3/h: 5.13e-5 unit; lognormal variance with pedigree 0.046, pedigree (3,4,5,5,1)
  (same comment as for air filter, central unit, 600 m3/h)
  properties: carbon content, fossil 0.00852676, carbon content, non-fossil 5.13903e-7, wet mass 143 kg, dry mass 143 kg
- used silencer steel, DN 315: -0.000103 unit; lognormal variance with pedigree 0.046, pedigree (3,4,5,5,1)
  (same comment as for used air filter central unit, 600 m3/h)
  production volume 0 unit
    (same comment as for used air filter central unit, 600 m3/h)
  properties: wet mass 20 kg, dry mass 20 kg, carbon content, fossil 0.00451943
- electricity, low voltage: 0 kWh; pedigree (1,1,1,1,1)
  EcoSpold01Location=CH
  Questionnaire, tecnical informations, related to system used
  Uncertainty: Questionnaire, tecnical informations, related to system used
- electricity, low voltage: 0.034973, 0.00636792, 0.143748, 0.502223, 0.102531, 1.57418, 0.254675, 0.731296 kWh (8 entries); lognormal variance with pedigree 0.0432, pedigree (2,3,5,5,1)
  (same comment as for electricity, low voltage)

## Sampling procedure
Questionnaire, technical information and assumptions. Data valid for example building used.

## Extrapolations
none This dataset has been copied from an original dataset covering the geography CH. The uncertainty has been adjusted accordingly.

## Review by Rolf Frischknecht 2007-08-16
passed
none
