# frozen fish sticks production, hake

Dataset: EcoSpold 2, unit process
Geography: RoW
Time period: 2011-01-01 to 2021-12-31
Technology level: current
Classification: ISIC rev.4 ecoinvent: 1075:Manufacture of prepared meals and dishes
Scenario: Business-as-Usual
System model: Allocation, cut-off by classification
Generated by: [System]
Published in: Vázquez-Rowe, I. 2013
Database: ecoinvent
isCopyrightProtected: true
accessRestrictedTo: 1

## General comment
This activity represents the processing of a multi-ingredient hake product, referred to as fish sticks or fish fingers, at a fish processing factory. The main product is fish blocks of Patagonian grenadier (Macrunorus magellanicus). These fish blocks are marine freighted and once they arrive at the port"s premises, they are delivered in refrigerated lorries to the processing plant. Two other important products are breadcrumbs and a wheat flour mix that are used in the battering. These are produced in a mill near the seafood processing plant and transported by truck.

## Included activities start
Seafood processing factory in SouthWest Europe activities include the reception of hake fish blocks and their processing until they are transformed into fish fingers in a multi-ingredient final product.

## Included activities end
Distribution from factory to wholesalers was excluded. Packaging is excluded. Packaging in this particular product is constituted by 22.98 grams of carton and 1.17 grams of polyethylene.

## Technology
Mainly with machinery. Manual process is limited to detecting amorphous fish sticks that are separated prior to packaging.

## Time period
Data were collected for average conditions in year 2011.

## Parameters
- Sunflower Oil: 0.01121 kg; name sunoil; lognormal variance with pedigree 0.0026, pedigree (1,1,3,1,1)
  Amount of sunflower oil used.
- Sunflower seed conversion to oil: 0.4 kg/kg; name sunflower; triangular min 0.35, mostLikely 0.4, max 0.45, pedigree (4,4,3,3,2)
  The conversion of sunflower seed to sunflower oil was obtained from a report from FAO (http://www.fao.org/docrep/012/al375e/al375e.pdf). A 40% conversion rate was assumed.
- OilMillProdVol: 4e6 kg; name oilMillProdVol; lognormal variance with pedigree 0.013225, pedigree (4,4,3,2,2)
  Amount of refined sunflower oil for a reference mill in Spain.

## Reference product
- frozen fish sticks, hake: 1 kg; name RP_amount_1; By-product classification allocatable product
  323.47 grams of fish sticks is the mass content of the ten (10) fish sticks (i.e., fish fingers) contained in one cardboard package ready for distribution and sale. The package itself weighs 25.97 grams.
  production volume 0.7108 kg; name RP_PV_1
    Global GDP value.
  property price 3.5 EUR2005; name RP_amount_1_price_EUR2005
    Based on expert judgement the price for this product is estimated to be 3.5 EUR per kg
  property carbon content 0.48
    carbon content on a dry matter basis (reserved; not for manual entry)
  property true value 1.13214; name RP_amount_1_true_value
    allocation property applied in "true value" allocation // value calculated from revenue
  properties: water in wet mass 0.45 kg, dry mass 0.55 kg, ash content 0.015 kg, wet mass 1 kg, carbon content, fossil 0, protein content 0.13, water content 0.818182, carbon content, non-fossil 0.48, carbon allocation 0.264 kg

## By-products
- protein feed, 100% crude: 0 kg; name BP_amount_1; source Vázquez-Rowe, I. 2013; CPC 23319: Preparations used in animal feeding n.e.c.; By-product classification allocatable product; pedigree (1,1,1,1,1)
  Residual breadcrumbs and broken fish blocks that are destined for animal feed.
  Uncertainty: U
  production volume 0.0217325 kg; = RP_PV_1 * (BP_amount_1 / RP_amount_1)
    Calculated from production volume of reference product using the relative outputs.
  property price 0.424 EUR2005; name BP_amount_1_price_EUR2005
    Based on protein content and energy feed, gross content in soybean meal and prices per kg of soybean meal. Assumed soybean meal is the most used feed. Soybean meal 2004 prices for World import/export data (tonnes and US$) from FaoStat statistics (http://faostat.fao.org/site/535/default.aspx#ancor, TRADE)- [Accessed 24 May 2010]. See calculations for protein /energy content
  property carbon content 0.53
    carbon content on a dry matter basis (reserved; not for manual entry)
  property true value 0.00419336; name BP_amount_1_true_value
    allocation property applied in "true value" allocation // value calculated from revenue
  properties: carbon content, fossil 0, water in wet mass 0 kg, wet mass 1 kg, water content 0, dry mass 1 kg, carbon content, non-fossil 0.53, carbon allocation 0.53 kg

## Inputs from technosphere
All rows: source Vázquez-Rowe, I. 2013
- sodium hydroxide, without water, in 50% solution state: 0.000151262 kg; lognormal variance with pedigree 0.0507, pedigree (1,2,5,5,3)
  Detergents for cleaning purposes.
  properties: heating value, net 3.03 MJ, wet mass 1 kg, dry mass 1 kg
- breadcrumbs: 0.240245 kg; lognormal variance with pedigree 0.0426, pedigree (1,1,5,5,1)
  Breadcrumbs produced at a grain mill factory.
  Uncertainty: D
  properties: water content 0.102536, dry mass 0.907 kg, wet mass 1 kg, carbon content, non-fossil 0.475
- waste paperboard: 0 kg; pedigree (1,1,1,1,1)
  Includes approximately 15% content of paperboard waste from final packaging. The remaining waste arrives from the fish block packaging.
  Uncertainty: D
  production volume 0 kg
    Global GDP value.
  properties: dry mass 0.804 kg, heating value, net 15.92 MJ, carbon content, non-fossil 0.483259, water content 0.243781, wet mass 1 kg
  note on heating value, net: Value taken from the general comment of the treatment dataset.
  note on carbon content, non-fossil: C content was calculated for 1 kg DM, using data in Tab A.3, ecoinvent v2.2 report 13_I.
- ammonia, anhydrous, liquid: 0 kg; pedigree (1,1,1,1,1)
  Ammonium used in the processing.
  Uncertainty: D
  properties: dry mass 1 kg, wet mass 1 kg
- fish block, hake: 0.554412 kg; lognormal variance with pedigree 0.0426, pedigree (1,1,5,5,1)
  Amount of fish block necessary to produce 1 standard package of fish sticks (i.e, 323.47 grams of final product).
  Uncertainty: D
  properties: carbon content, non-fossil 0.48, water content 0.82, wet mass 0.3276 kg, dry mass 0.18 kg
- wheat flour mix: 0.0690551 kg; lognormal variance with pedigree 0.0426, pedigree (1,1,5,5,1)
  Amount of wheat flour used.
  properties: carbon content, non-fossil 0.475, dry mass 0.87 kg, water content 0.149425, wet mass 1 kg
  note on carbon content, non-fossil: Biogenic carbon content of vegetation and vegetation processed products on a dry mass basis (47.5% DM) derived from FAOSTAT. Reference: http://www.fao.org/forestry/17111/en
- waste mineral oil: -9.57901e-6 kg; = (oil)*-1; lognormal variance with pedigree 0.0433, pedigree (2,2,5,5,1)
  Waste oil generated due to the use of lubricating oil in plant machinery.
  Uncertainty: D
  production volume 0.7108 kg
    Global GDP value.
  properties: carbon content, fossil 0.864444, dry mass 0.9 kg, heating value, net 34.7 MJ, water content 0.111111, wet mass 1 kg
  note on carbon content, fossil: Tab A.6, ecoinvent v2.2 report 13_I. C content has been calculated after data in the tables, and then referred to 1 kg DM
- wastewater from vegetable oil refinery: -9.73302e-6 m3; lognormal variance with pedigree 0.0447, pedigree (3,2,5,5,1)
  Wastewater from excess of batter
  Uncertainty: D
  production volume 0.7108 m3
    Global GDP value.
  properties: water content 1146.05, dry mass 0.871801 kg, carbon content, non-fossil 0.993118, wet mass 1000 kg
- lubricating oil: 9.57901e-6 kg; name oil; lognormal variance with pedigree 0.0426, pedigree (1,1,5,5,1)
  Lubricating oil used in the machinery at the plant.
  Uncertainty: D
  properties: dry mass 1 kg, heating value, net 40.2 MJ, wet mass 1 kg, carbon content, fossil 0.75
  note on heating value, net: Literature value, Source: IPCC 2006, 2006 IPCC Guidelines for National Greenhouse Gas Inventories, Prepared by the National Greenhouse Gas Inventories Programme, Eggleston H.S., Buendia L., Miwa K., Ngara T. and Tanabe K. (eds). Published: IGES, Japan
  note on carbon content, fossil: Lubricating oil is produced from diesel. C-content/dry mass of fats and oils considered 75%, from: ecoinvent v2.2 report, n 15a, pg 40
- sodium hypochlorite, without water, in 15% solution state: 1.07802e-6 kg; lognormal variance with pedigree 0.0433, pedigree (2,2,5,5,1)
  flow used to approximate bleach used for cleaning purposes
  Uncertainty: D
  properties: dry mass 1 kg, wet mass 1 kg
- waste plastic, mixture: 0 kg; pedigree (1,1,1,1,1)
  Waste from the fish block packaging.
  Uncertainty: D
  production volume 0 kg
    Global GDP value.
  properties: carbon content, fossil 0.747344, dry mass 0.847 kg, water content 0.180638, heating value, net 30.79 MJ, wet mass 1 kg
- sunflower seed: 0.0863189 kg; lognormal variance with pedigree 0.0606, pedigree (4,4,5,5,3)
  Amount of sunflower seeds needed for sunflower oil in the cooking of the fish sticks.
  properties: dry mass 0.94 kg, water content 0.0638298, wet mass 1 kg, carbon content, non-fossil 0.574
- tap water: 0 kg; pedigree (1,1,1,1,1)
  Amount of tap water used in the processing. Includes water for non-additive purposes, including water for cleanng at the premises.
  Uncertainty: D
  properties: water content 2962.17, dry mass 0.000337476 kg, carbon content, fossil 0.00178991, wet mass 1 kg
  note on carbon content, fossil: Bicarbonate content is 2.93 mol/m3. CO2 content is 0.1 mol/m3 (ecoinvent v2.2 report 8, Tab 93.1).
- oil mill: 8.63189e-9 unit; lognormal variance with pedigree 0.36, pedigree (4,4,5,5,3)
  Oil mill used to refine sunflower seeds for the production of sunflower oil added in the process.
  Uncertainty: D
  properties: lifetime capacity [kg] 1.1e9 kg
- electricity, medium voltage: 0 kWh; pedigree (1,1,1,1,1)
  Electricity is used in the following activities at the fish stick producing plant: air conditioning, illumination, cold chambers, hydraulic consumption, unwrapping, cutting, battering, breadcrumb addition, frying, freezing, packaging and wastewater treatment.
  Uncertainty: D
- waste paperboard: -0.00260139, -0.000397243, -3.47353e-5, -0.00143541, -0.000139964, -0.000259088, -0.048325 kg (7 entries); lognormal variance with pedigree 0.0427, pedigree (1,2,5,5,1)
  (same comment as for waste paperboard)
  production volume 0.7108 kg
- ammonia, anhydrous, liquid: 8.45765e-9, 7.27037e-10, 1.13108e-9, 2.24107e-9, 2.19566e-9, 2.30129e-10, 1.02876e-9, 2.43375e-8 kg (8 entries); lognormal variance with pedigree 0.0427, pedigree (1,2,5,5,1)
  Ammonium used in the processing.
  Uncertainty: D
- waste plastic, mixture: -0.00230133, -0.000153766, -1.16291e-5, -6.3511e-5, -2.56577e-5, -6.03096e-5, -0.0161106 kg (7 entries); lognormal variance with pedigree 0.0427, pedigree (1,2,5,5,1)
  Waste from the fish block packaging.
  Uncertainty: D
  production volume 0.7108 kg
- tap water: 0.00254489, 0.000306336, 0.000506271, 0.0127662, 0.000332108, 0.000944676, 0.14609 kg (7 entries); lognormal variance with pedigree 0.0446, pedigree (3,1,5,5,1)
  (same comment as for tap water)
- electricity, medium voltage: 0.00862839, 0.00165455, 0.0277765, 0.403985, 0.0569419, 0.185525 kWh (6 entries); lognormal variance with pedigree 0.0426, pedigree (1,1,5,5,1)
  (same comment as for electricity, medium voltage)

## Sampling procedure
Data were reported by technical staff at the seafood processing industry. Extrapolated from RER conditions. Uncertainty was adjusted accordingly.
