# cement factory construction

Dataset: EcoSpold 2, unit process
Geography: CH
Time period: 1997-01-01 to 2021-12-31
Technology level: current
Classification: ISIC rev.4 ecoinvent: 4290:Construction of other civil engineering projects
Classification: EcoSpold01Categories: construction materials/others
Synonyms: Cement plant; Zementwerk
Tags: ConvertedDataset
Scenario: Business-as-Usual
System model: Allocation, cut-off by classification
Generated by: Daniel Kellenberger (obsolete)
Published in: Kellenberger D. 2004
Database: ecoinvent
isCopyrightProtected: true
accessRestrictedTo: 1

## General comment
The lifespan of the infrastructure and the land occupation are assumed to be 50 years. The module is valid for a yearly production volume of 340'000 t/a
[This dataset was already contained in the ecoinvent database version 2. It was not individually updated during the transfer to ecoinvent version 3. Life Cycle Impact Assessment results may still have changed, as they are affected by changes in the supply chain, i.e. in other datasets. This dataset was generated following the ecoinvent quality guidelines for version 2. It may have been subject to central changes described in the ecoinvent version 3 change report (http://www.ecoinvent.org/database/ecoinvent-version-3/reports-of-changes/), and the results of the central updates were reviewed extensively. The changes added e.g. consistent water flows and other information throughout the database. The documentation of this dataset can be found in the ecoinvent reports of version 2, which are still available via the ecoinvent website. The change report linked above covers all central changes that were made during the conversion process.]

## Included activities end
includes the infrastructure (buildings, paved roads, etc.) and the land-use for the cement production, rotary kiln excluded (see 'clinker, at plant'

## Geography
For some exchanges RER-modules have been used as proxy

## Technology
Average Swiss cement plant

## Reference product
- cement factory: 1 unit; CPC 53269: Other constructions for manufacturing; By-product classification allocatable product
  production volume 0.0336675 unit
    This is a placeholder value that does not reflect real-world production volumes. This dataset does not currently require a real-world production volume to work in the database framework, and no actual data were collected yet. This has no negative effect on the results of the ecoinvent database. The placeholder value of this activity was scaled according to the nominal GDP of 2005 (source: United Nations, http://data.un.org/Glossary.aspx?q=GDP+%28current+US%24%29, accessed 20130726) to reflect an appropriate share of the global production volume, which is also a placeholder value.
  property price 5.1e7 EUR2005
    Literature value. The value is taken from http://www.cembureau.be/about-cement/cement-industry-main-characteristics, accessed 20151214. The source indicates a value of 150M EUR per million tonnes annual capacity. A similar values was found in http://www.ethioembassy.org.uk/trade_and_investment/Selected%20Investment%20Project%20Profiles/Manufacturing/Non-metalic%20Products/Mini%20Cement.pdf, accessed 20151214, a project for mini cement plant in Ethiopia. The investement cost per kg was calculatated to be 0.13 EUR/kg (given an exchange rate for 2005 of 0.16 (UN treasury link to exchange rates history (2005-2015), Accessed 20150924). Both source do not report a date. Through the data it is presumed that the study in Ethiopia was conducted in 2003 for future construction of a plant and it is presumed that the cembureau information is up-to-date. It is therefore assumed that this price is valid for year 2005 to 2015.

## Inputs from technosphere
- industrial machine, heavy, unspecified: 400000 kg; lognormal variance with pedigree 0.370025, pedigree (3,5,5,2,1)
  activityLink introduced to establish a direct link to the corresponding regional supply of this product
- building, hall, steel construction: 23500 m2; lognormal variance with pedigree 0.37, pedigree (3,5,5,1,1)
  This exchange has an activity link directly to the producing activity because the product is primarily consumed in the same geographical area where it is produced.
- conveyor belt: 750 m; lognormal variance with pedigree 0.370025, pedigree (3,5,5,2,1)
  (same comment as for industrial machine, heavy, unspecified)
- building, multi-storey: 121000 m3; lognormal variance with pedigree 0.370025, pedigree (3,5,5,2,1)
  (same comment as for industrial machine, heavy, unspecified)

## Inputs from nature
- Transformation, from unspecified [natural resource, land]: 148000 m2; lognormal variance with pedigree 0.1712, pedigree (2,3,5,1,1)
- Occupation, industrial area [natural resource, land]: 4.32e6 m2*year; lognormal variance with pedigree 0.0912, pedigree (2,3,5,1,1)
- Occupation, traffic area, road network [natural resource, land]: 3.07e6 m2*year; lognormal variance with pedigree 0.0912, pedigree (2,3,5,1,1)
- Transformation, to industrial area [natural resource, land]: 86400 m2; lognormal variance with pedigree 0.1712, pedigree (2,3,5,1,1)
- Transformation, to traffic area, road network [natural resource, land]: 61400 m2; lognormal variance with pedigree 0.1712, pedigree (2,3,5,1,1)

## Sampling procedure
most data measured by all Swiss plants (8 plants)

## Extrapolations
This dataset has been extrapolated from year 2001 to the year of the calculation (2021). The uncertainty has been adjusted accordingly.

## Review by Roberto Dones 2004-04-14
passed
