# oil mill construction

Dataset: EcoSpold 2, unit process
Geography: CH
Time period: 2004-01-01 to 2021-12-31
Technology level: current
Classification: ISIC rev.4 ecoinvent: 4290:Construction of other civil engineering projects
Classification: EcoSpold01Categories: biomass/fuels
Tags: ConvertedDataset
Scenario: Business-as-Usual
System model: Allocation, cut-off by classification
Share of production covered: 0 %
Generated by: Edgard Gnansounou
Published in: Jungbluth N. 2007
Database: ecoinvent
isCopyrightProtected: true
accessRestrictedTo: 1

## General comment
Oil mill with a daily production of 63 t vegetable oil. Life time of plant taken as 50 years.
[This dataset was already contained in the ecoinvent database version 2. It was not individually updated during the transfer to ecoinvent version 3. Life Cycle Impact Assessment results may still have changed, as they are affected by changes in the supply chain, i.e. in other datasets. This dataset was generated following the ecoinvent quality guidelines for version 2. It may have been subject to central changes described in the ecoinvent version 3 change report (http://www.ecoinvent.org/database/ecoinvent-version-3/reports-of-changes/), and the results of the central updates were reviewed extensively. The changes added e.g. consistent water flows and other information throughout the database. The documentation of this dataset can be found in the ecoinvent reports of version 2, which are still available via the ecoinvent website. The change report linked above covers all central changes that were made during the conversion process.]

## Included activities end
This process includes land use and occupation, buildings and facilities of a typical industrial oil mill in the Swiss context. Storage of the seeds is included in the infrastructure. Energy use for construction and related emissions and/or waste effluents are not included.

## Geography
Data from biodiesel producer in CH, adapted to the plant size considered.

## Technology
Typical oil mill designed for vegetable oil extraction (for use in the biodiesel industry), with pre-pressing of rape seeds, Swiss context.

## Reference product
- oil mill: 1 unit; CPC 53290: Other civil engineering works; By-product classification allocatable product
  production volume 0.0129091 unit
    Production of rape oil for biodiesel was approx. 2 kt in 2004 in CH
    FAOSTAT data for groundnut oil, linseed oil, rapeseed oil, soybean oil and sunflower oil: 47.2 million kg oil; oil mill produces 22 million kg oil per year; lifetime 50 years
  property price 1.35103e6 EUR2005
    Calculated based on inputs: The price of the product has been calculated as a sum of the values of the material and energy inputs for this product. This value is therefore a rough estimation. It may underestimate the real price since there are additional expenses when producing any product. These expences can include for example labour costs, treatment of waste materials and profit for the producer. Please consider carefully whether this level of data quality is acceptable for your application.

## Inputs from technosphere
- building, hall: 2500 m2; lognormal variance with pedigree 0.43, pedigree (3,5,5,1,4)
  Data from biodiesel producer in CH, industrial data
  This exchange has an activity link directly to the producing activity because the product is primarily consumed in the same geographical area where it is produced.
- building, hall, steel construction: 5170 m2; lognormal variance with pedigree 0.43, pedigree (3,5,5,1,4)
  (same comment as for building, hall)
- steel, low-alloyed, hot rolled: 738000 kg; lognormal variance with pedigree 0.13, pedigree (3,5,5,1,4)
  Data from biodiesel producer in CH, industrial data
  Data from biodiesel producer in CH, industrial data
  properties: carbon content, fossil 0.005, dry mass 1 kg, wet mass 1 kg
  note on carbon content, fossil: Low alloyed steel composition given in Tab. 3.2 ecoinvent v2.2 report 10_partII. Steel assumed to have a C content of 0.5%

## Inputs from nature
- Transformation, to industrial area [natural resource, land]: 15340 m2; lognormal variance with pedigree 0.25, pedigree (3,5,5,1,4)
  Data from biodiesel producer in CH, industrial data
- Occupation, construction site [natural resource, land]: 30680 m2*year; lognormal variance with pedigree 0.17, pedigree (3,5,5,1,4)
  Data from biodiesel producer in CH, industrial data
- Occupation, industrial area [natural resource, land]: 767000 m2*year; lognormal variance with pedigree 0.17, pedigree (3,5,5,1,4)
  Data from biodiesel producer in CH, industrial data
- Transformation, from unspecified [natural resource, land]: 15340 m2; lognormal variance with pedigree 0.25, pedigree (3,5,5,1,4)
  Data from biodiesel producer in CH, industrial data

## Sampling procedure
Adapted to reference capacity with data from one plant in CH

## Extrapolations
This dataset has been extrapolated from year 2008 to the year of the calculation (2021). The uncertainty has been adjusted accordingly.

## Review by Niels Jungbluth 2006-07-12
Passed.
none
