# pipeline construction, petroleum

Dataset: EcoSpold 2, unit process
Geography: RER
Time period: 1981-01-01 to 2021-12-31
Technology level: current
Classification: EcoSpold01Categories: oil/production
Classification: ISIC rev.4 ecoinvent: 4220:Construction of utility projects
Tags: ConvertedDataset
Scenario: Business-as-Usual
System model: Allocation, cut-off by classification
Generated by: Niels Jungbluth
Published in: Jungbluth, N. 2007
Database: ecoinvent
isCopyrightProtected: true
accessRestrictedTo: 1

## General comment
Rough estimation based on use of materials and information for construction works by one company.
[This dataset was already contained in the ecoinvent database version 2. It was not individually updated during the transfer to ecoinvent version 3. Life Cycle Impact Assessment results may still have changed, as they are affected by changes in the supply chain, i.e. in other datasets. This dataset was generated following the ecoinvent quality guidelines for version 2. It may have been subject to central changes described in the ecoinvent version 3 change report (http://www.ecoinvent.org/database/ecoinvent-version-3/reports-of-changes/), and the results of the central updates were reviewed extensively. The changes added e.g. consistent water flows and other information throughout the database. The documentation of this dataset can be found in the ecoinvent reports of version 2, which are still available via the ecoinvent website. The change report linked above covers all central changes that were made during the conversion process.]

## Included activities end
Materials, land use, energy use of construction company and dismantling of pipelines.

## Geography
Globally operating company.

## Technology
Construction of pipelines.

## Time period
Data for materials published in 1980. Environmental data for construction of pipelines in 2000.

## Parameters
- fraction, process water, to air: 0.15 dimensionless; name fraction_PW_to_air; lognormal variance with pedigree 0.092025, pedigree (4,4,3,2,4)
  Literature value. In case when no industry/process specific data are available, default evaporation fraction value is used. This value is 15% and is based on literature (Statistics Canada, 2007 & Shaffer, K.H., 2008, Consumptive water use in the Great Lakes Basin, USGS & Shiklomanov, 2003, World Water Resources at the Beginning of the 21st Century) and has been approved by an expert.

## Reference product
- pipeline, petroleum: 1 km; CPC 53251: Local pipelines; By-product classification allocatable product
  EcoSpold01Location=RER
  production volume 1.32237 km
    This is a placeholder value that does not reflect real-world production volumes. This dataset does not currently require a real-world production volume to work in the database framework, and no actual data were collected yet. This has no negative effect on the results of the ecoinvent database. The placeholder value of this activity was scaled according to the nominal GDP of 2005 (source: United Nations, http://data.un.org/Glossary.aspx?q=GDP+%28current+US%24%29, accessed 20130726) to reflect an appropriate share of the global production volume, which is also a placeholder value.
  property price 289450 EUR2005
    UNdata;(Average prices of EU27; 1.291 EUR/kg) http://data.un.org/Data.aspx?q=pipeline&d=ComTrade&f=_l1Code%3a74%3bcmdCode%3a730410. Pipes, line, iron or steel, for oil or gas pipelines. Weight 280 t (excl. sand).

## Inputs from technosphere
- steel, low-alloyed, hot rolled: 15000 kg; lognormal variance with pedigree 0.0427, pedigree (3,3,5,3,1)
  EcoSpold01Location=RER
  Literature
  Uncertainty: Literature
  properties: carbon content, fossil 0.005, dry mass 1 kg, wet mass 1 kg
  note on carbon content, fossil: Low alloyed steel composition given in Tab. 3.2 ecoinvent v2.2 report 10_partII. Steel assumed to have a C content of 0.5%
- sand: 660000 kg; lognormal variance with pedigree 0.0427, pedigree (3,3,5,3,1)
  EcoSpold01Location=CH
  Literature
  Uncertainty: Literature
  properties: dry mass 1 kg, wet mass 1 kg
- municipal solid waste: -1260 kg; lognormal variance with pedigree 0.0412, pedigree (2,3,5,1,1)
  Environmental report
  EcoSpold01Location=CH
  Uncertainty: Environmental report
  production volume 1260 kg
    Calculated from the production volume of pipeline, petroleum in proportion to the respective output amounts.
  properties: carbon content, fossil 0.171549, water content 0.297017, dry mass 0.771 kg, carbon content, non-fossil 0.261655, wet mass 1 kg, heating value, net 11.74 MJ
  note on carbon content, fossil: MSW composition in tab 4.1, ecoinvent v2.2 report 13_I. C content referred to 1 kg DM
  note on heating value, net: Value taken from the general comment of the treatment dataset.
- drawing of pipe, steel: 140000 kg; lognormal variance with pedigree 0.0427, pedigree (3,3,5,3,1)
  EcoSpold01Location=RER
  Estimation
  Uncertainty: Estimation
- hazardous waste, for incineration: 0 kg; pedigree (1,1,1,1,1)
  Environmental report
  EcoSpold01Location=CH
  Uncertainty: Environmental report
  production volume 0 kg
    (same comment as for municipal solid waste)
  properties: water content 0.333333, carbon content, fossil 0.554667, wet mass 1 kg, dry mass 0.75 kg, heating value, net 17 MJ
  note on carbon content, fossil: Tab A.6, ecoinvent v2.2 report 13_I. C content has been calculated after data in the tables, and then referred to 1 kg DM
- reinforcing steel: 125000 kg; lognormal variance with pedigree 0.0427, pedigree (3,3,5,3,1)
  Literature
  EcoSpold01Location=RER
  Uncertainty: Literature
  properties: dry mass 1 kg, carbon content, fossil 0.004, wet mass 1 kg
- diesel, burned in building machine: 2.53e6 MJ; lognormal variance with pedigree 0.0412, pedigree (2,3,5,1,1)
  Environmental report
  EcoSpold01Location=GLO
  Uncertainty: Environmental report
  properties: heating value, net 1 MJ
- hazardous waste, for incineration: -1101.21, -28.7851 kg (2 entries); lognormal variance with pedigree 0.0412, pedigree (2,3,5,1,1)
  Environmental report
  EcoSpold01Location=CH
  Uncertainty: Environmental report
  production volume 1130 kg

## Inputs from nature
- Transformation, from forest, unspecified [natural resource, land]: 2000 m2; lognormal variance with pedigree 0.1806, pedigree (3,3,5,1,3)
  Calculation for gas pipeline
  Uncertainty: Calculation for gas pipeline
- Transformation, to heterogeneous, agricultural [natural resource, land]: 2000 m2; lognormal variance with pedigree 0.1806, pedigree (3,3,5,1,3)
  Calculation for gas pipeline
  Uncertainty: Calculation for gas pipeline
- Occupation, construction site [natural resource, land]: 3330 m2*year; lognormal variance with pedigree 0.1006, pedigree (3,3,5,1,3)
  Occupation during construction
  Uncertainty: Occupation during construction
- Water, unspecified natural origin [natural resource, in water]: 805 m3; name water_UNO_input; lognormal variance with pedigree 0.0412, pedigree (2,3,5,1,1)
  Environmental report
  Uncertainty: Environmental report

## Emissions to nature
- Water [air, unspecified]: 120.75 m3; name water_to_air_unspecified; = (water_UNO_input*fraction_PW_to_air); lognormal variance with pedigree 0.0807, pedigree (2,2,5,1,1)
  Calculated value based on literature values and expert opinion. See comments in the parametres' comment field.
  property fraction, origin: salt water 0; name fraction_origin_salt_water
  property fraction, origin: unspecified 1; name fraction_origin_unspecified
  property fraction, origin: fresh water 0; name fraction_origin_fresh_water
- Water [water, unspecified]: 684.25 m3; name water_to_water_unspecified; = water_UNO_input*(1-fraction_PW_to_air); lognormal variance with pedigree 0.0807, pedigree (2,2,5,1,1)
  (same comment as for Water)
  property wet mass 1000 kg; name WM
  property carbon content, non-fossil 0; name C_content_non_fossil
  property water in wet mass 1000 kg; name WWM
  property fraction, origin: fresh water 0; name fraction_origin_fresh_water_Ww
  property fraction, origin: unspecified 1; name fraction_origin_unspecified_Ww
  property fraction, origin: salt water 0; name fraction_origin_salt_water_Ww
  property dry mass 0 kg; name DM
  property carbon content, fossil 0; name C_content_fossil

## Sampling procedure
Literature and environmental report of a multinational company.

## Extrapolations
This dataset has been extrapolated from year 2001 to the year of the calculation (2021). The uncertainty has been adjusted accordingly.

## Review by Michael Spielmann (obsolete) 2003-07-04
passed.
