# geothermal power plant construction

Dataset: EcoSpold 2, unit process
Geography: NI
Time period: 2015-01-01 to 2021-12-31
Technology level: current
Classification: ISIC rev.4 ecoinvent: 4220:Construction of utility projects
Tags: power plant; geothermal energy
Scenario: Business-as-Usual
System model: Allocation, cut-off by classification
Generated by: Florentine Brunner
Published in: S Hirchberg, S Wiemer, P Burgherr 2015
Database: ecoinvent
isCopyrightProtected: true
accessRestrictedTo: 1

## General comment
This dataset was created as copy of the corresponding Swiss activity. It is meant to be used temporarily until a region specific power plant construction dataset is available.
This dataset represents the construction of the geothermal power plant at the surface, resulting in a coupled underground and surface system. It collects all parts necessary to build a geothermal power plant: deep well drilling, stimulation, and surface power generation installations. It further includes the implementation of a downhole pump connected with the power generator.
Detailed information on this dataset is presented in the book "Energy from the Earth. 2015. Hirschberg, Wiemer, Burgherr (eds.) (see field "Data Generator and Publication").

## Included activities start
Includes all "components" of a 5.5MWel deep geothermal power plant.

## Included activities end
Electricity generation facility, deep geothermal power.

## Geography
Represents installation of a deep geothermal power plant in Switzerland. Used as first approximation for this geography. Uncertainties adjusted accordingly.

## Reference product
- geothermal power plant, 5.5MWel: 1 unit; name RP_amount_1; source S Hirchberg, S Wiemer, P Burgherr 2015; CPC 53262: Power plants; By-product classification allocatable product
  production volume 0.37115 unit; name RP_PV_1
    Placeholder value. While no Enhanced Geothermal Systems (EGS) are in commercial operation yet, the production volume of this datasets was approximated with the amount of power plant input required to provide deep geothermal electricity production of the respective geography according to IEA statistics for the year 2016. (See production volume and amount of power plant input in the activity "electricity production, deep geothermal" for the corresponding geography.
  property price 2.18525e7 EUR2005
    Calculated based on inputs: The price of the product has been calculated as a sum of the values of the material and energy inputs for this product. This value is therefore a rough estimation. It may underestimate the real price since there are additional expenses when producing any product. These expences can include for example labour costs, treatment of waste materials and profit for the producer. Please consider carefully whether this level of data quality is acceptable for your application.

## Inputs from technosphere
All rows: source S Hirchberg, S Wiemer, P Burgherr 2015
- deep well, drilled, for geothermal power: 32000 m; lognormal variance with pedigree 0.1433, pedigree (2,2,5,5,2)
  2*3 wells of 5000 m plus an exploration well of 2000 m
- stimulation, deep well: 40000 m3; lognormal variance with pedigree 0.1433, pedigree (2,2,5,5,2)
  Rough assumption that needs further sensitivity analysis, see Section 5.5.2.
- steel, low-alloyed: 223132 kg; name steel; lognormal variance with pedigree 0.1433, pedigree (2,2,5,5,2)
  One pump in each of the two production wells with a lifetime of 5 years - see also describing text below.
  Source: Sonderegger, M. (2013). Personal Communication with M. Sonderegger, Sankt Galler Stadtwerke, Switzerland.
  Pletl, C. (2010). Geothermal projects of SWM. Stadtwerke München, Sauerlach hydrothermal plant, Germany.
  This item of the LCI belongs to the category; Downhole pump and rising pipes.
  properties: wet mass 1 kg, carbon content, fossil 0.005, dry mass 1 kg
- heat and power co-generation unit, 1MWel, 6.4MWth: 5.05 unit; lognormal variance with pedigree 0.141325, pedigree (2,2,5,2,2)
  Extrapolation according to Section 5.5.3 in the book.
- inert waste, for final disposal: -223132 kg; name BP_amount_1; = (steel)*-1; lognormal variance with pedigree 0.1433, pedigree (2,2,5,5,2)
  calculated based on the mass of material to be disposed of
  production volume 82815.4 kg; = RP_PV_1 * (BP_amount_1 / RP_amount_1)
    Calculated from production volume of reference product using the relative outputs.
  property price 0 EUR2005; name BP_amount_1_price_EUR2005
  properties: wet mass 1 kg, dry mass 0.995 kg, water content 0.00502513

## Inputs from nature
- Transformation, from unspecified, natural (non-use) [natural resource, land]: 8000 m2; name transformation_from; lognormal variance with pedigree 0.1433, pedigree (2,2,5,5,2)
  Estimation. The ORC unit has an area of 500m2; additional space is needed for the surroundings.
  The process of Transformation to Industrial area belongs to Land use category of the LCI.
- Occupation, industrial area [natural resource, land]: 240000 m2*year; source S Hirchberg, S Wiemer, P Burgherr 2015; lognormal variance with pedigree 0.1433, pedigree (2,2,5,5,2)
  Lifetime of 30 years.
- Transformation, to industrial area [natural resource, land]: 8000 m2; = transformation_from; source S Hirchberg, S Wiemer, P Burgherr 2015; lognormal variance with pedigree 0.1433, pedigree (2,2,5,5,2)
  (same comment as for Transformation, from unspecified, natural (non-use))

## Sampling procedure
Literature

## Extrapolations
This dataset has been extrapolated from year 2015 to the year of the calculation (2021). The uncertainty has been adjusted accordingly.
