# anaerobic digestion plant construction, for biowaste

Dataset: EcoSpold 2, unit process
Geography: RoW
Time period: 2000-01-01 to 2021-12-31
Technology level: current
Classification: EcoSpold01Categories: biomass/fuels
Classification: ISIC rev.4 ecoinvent: 4290:Construction of other civil engineering projects
Tags: ConvertedDataset
Scenario: Business-as-Usual
System model: Allocation, cut-off by classification
Share of production covered: 100 %
Generated by: Michael Spielmann (obsolete)
Published in: Jungbluth N. 2007
Database: ecoinvent
isCopyrightProtected: true
accessRestrictedTo: 1

## General comment
Infrastructure expenditures are recorded for a plant with a yearly capacity of 10'000t and a lifetime of 25 years. For stationary machines a lifetime of 10 years is assumed. As a first approximation, the machines are taken into account as cast iron.
[This dataset was already contained in the ecoinvent database version 2. It was not individually updated during the transfer to ecoinvent version 3. Life Cycle Impact Assessment results may still have changed, as they are affected by changes in the supply chain, i.e. in other datasets. This dataset was generated following the ecoinvent quality guidelines for version 2. It may have been subject to central changes described in the ecoinvent version 3 change report (http://www.ecoinvent.org/database/ecoinvent-version-3/reports-of-changes/), and the results of the central updates were reviewed extensively. The changes added e.g. consistent water flows and other information throughout the database. The documentation of this dataset can be found in the ecoinvent reports of version 2, which are still available via the ecoinvent website. The change report linked above covers all central changes that were made during the conversion process.]

## Included activities end
Infrastructure for the pre-treatment process, digestion of bio-waste and the succsesive treatment of the fermented material (de-watering and post composting).

## Geography
Data represents a Swiss plant.

## Technology
Thermophile, single stage digestion with post composting.

## Time period
Data is obtained from a recent LCA study.

## Reference product
- anaerobic digestion plant, for biowaste: 1 unit; CPC 53290: Other civil engineering works; By-product classification allocatable product
  EcoSpold01Location=CH
  production volume 3.96633 unit
    This is a placeholder value that does not reflect real-world production volumes. This dataset does not currently require a real-world production volume to work in the database framework, and no actual data were collected yet. This has no negative effect on the results of the ecoinvent database.
  property price 1.23987e7 EUR2005
    Convert from EU 27 price to the world by currency exchange rate.

## Inputs from technosphere
- gravel, round: 1.9725e6 kg; lognormal variance with pedigree 0.056, pedigree (3,4,5,5,1)
  EcoSpold01Location=CH
  Literature studies
  Uncertainty: literature studies
  properties: wet mass 1 kg, dry mass 1 kg
- aluminium, cast alloy: 320 kg; lognormal variance with pedigree 0.056, pedigree (3,4,5,5,1)
  Literature studies
  EcoSpold01Location=RER
  Uncertainty: literature studies
  properties: wet mass 1 kg, dry mass 1 kg
- sand: 0 kg; pedigree (1,1,1,1,1)
  EcoSpold01Location=CH
  Literature studies
  Uncertainty: literature studies
  properties: dry mass 1 kg, wet mass 1 kg
- aluminium, wrought alloy: 680 kg; lognormal variance with pedigree 0.056, pedigree (3,4,5,5,1)
  Literature studies
  EcoSpold01Location=RER
  Uncertainty: literature studies
  properties: wet mass 1 kg, dry mass 1 kg
- polystyrene, high impact: 3920 kg; lognormal variance with pedigree 0.056, pedigree (3,4,5,5,1)
  EcoSpold01Location=RER
  Literature studies
  Uncertainty: literature studies
  properties: heating value, net 38.67 MJ, carbon content, fossil 0.923077, dry mass 1 kg, wet mass 1 kg
  note on carbon content, fossil: Chemical formula of polystyrene is (C8H8)n (ecoinvent v2.2 report 11_II)
- polyvinylchloride, emulsion polymerised: 446.81 kg; lognormal variance with pedigree 0.056, pedigree (3,4,5,5,1)
  EcoSpold01Location=RER
  Literature studies
  Uncertainty: literature studies
  properties: dry mass 1 kg, carbon content, fossil 0.387097, wet mass 1 kg, heating value, net 21.5 MJ
  note on carbon content, fossil: Monomer is vynyl chloride, C2H3Cl (ecoinvent v2.2 report 11_II). MW=62 g/mol
- waste polyvinylchloride: 0 kg; pedigree (1,1,1,1,1)
  Literature studies
  EcoSpold01Location=CH
  Uncertainty: literature studies
  production volume 0 kg
    Calculated from the production volume of anaerobic digestion plant, for biowaste in proportion to the respective output amounts.
  properties: water content 0.00200401, dry mass 0.998 kg, wet mass 1 kg, heating value, net 21.51 MJ, carbon content, fossil 0.440882
  note on heating value, net: Value taken from the general comment of the treatment dataset.
  note on carbon content, fossil: C content in 1 kg DM was calculated using data in Tab A.1, ecoinvent v2.2 report 13_I
- waste reinforced concrete: 0 kg; pedigree (1,1,1,1,1)
  EcoSpold01Location=CH
  Literature studies
  Uncertainty: literature studies
  production volume 0 kg
    (same comment as for waste polyvinylchloride)
  properties: dry mass 0.99418 kg, water content 0.00585407, wet mass 1 kg
- waste asphalt: -117550 kg; lognormal variance with pedigree 0.056, pedigree (3,4,5,5,1)
  Literature studies
  EcoSpold01Location=CH
  Uncertainty: literature studies
  production volume 352650 kg
    (same comment as for waste polyvinylchloride)
  properties: carbon content, fossil 0.0440796, dry mass 0.999 kg, wet mass 1 kg, water content 0.001001
  note on carbon content, fossil: The waste contains 94.7% inert material (see Tab A.5 for details) 5.3% bitumen (see Tab A.6 for details), ecoinvent v2.2 report 13_I
- cast iron: 188000 kg; lognormal variance with pedigree 0.056, pedigree (3,4,5,5,1)
  EcoSpold01Location=RER
  Literature studies
  Uncertainty: literature studies
  properties: carbon content, fossil 0.04, wet mass 1 kg, dry mass 1 kg
  note on carbon content, fossil: Cast iron is made by remelting pig iron in small furnaces (e.g. cupola furnaces or electric arc furnaces) and poured into moulds to make castings. It usually contains 2% to 6% carbon (ecoinvent v2.2 report 10_partII). An average content of 4% was considered
- waste polystyrene: 0 kg; pedigree (1,1,1,1,1)
  EcoSpold01Location=CH
  Literature studies
  Uncertainty: literature studies
  production volume 0 kg
    (same comment as for waste polyvinylchloride)
  properties: dry mass 0.998 kg, carbon content, fossil 0.922579, wet mass 1 kg, heating value, net 38.67 MJ, water content 0.00200401
- copper, cathode: 3000 kg; lognormal variance with pedigree 0.056, pedigree (3,4,5,5,1)
  EcoSpold01Location=RER
  Literature studies
  Uncertainty: literature studies
  properties: dry mass 1 kg, wet mass 1 kg
- pitch: 0 kg; pedigree (1,1,1,1,1)
  EcoSpold01Location=CH
  Literature studies
  Uncertainty: literature studies
  properties: wet mass 1 kg, carbon content, fossil 0.83, dry mass 1 kg, heating value, net 28 MJ
- reinforcing steel: 120000 kg; lognormal variance with pedigree 0.056, pedigree (3,4,5,5,1)
  EcoSpold01Location=RER
  Literature studies
  Uncertainty: literature studies
  properties: wet mass 1 kg, carbon content, fossil 0.004, dry mass 1 kg
- concrete, normal: 0 m3; pedigree (1,1,1,1,1)
  EcoSpold01Location=CH
  Literature studies
  Uncertainty: literature studies
  properties: dry mass 2190 kg, water content 0.086758, wet mass 2380 kg
- polyvinylchloride, suspension polymerised: 3053.19 kg; lognormal variance with pedigree 0.056, pedigree (3,4,5,5,1)
  EcoSpold01Location=RER
  Literature studies
  Uncertainty: literature studies
  properties: heating value, net 21.5 MJ, dry mass 1 kg, wet mass 1 kg, carbon content, fossil 0.387097
- sand: 1610.14, 8.35912, 104781 kg (3 entries); lognormal variance with pedigree 0.056, pedigree (3,4,5,5,1)
  EcoSpold01Location=CH
  Literature studies
  Uncertainty: literature studies
- waste polyvinylchloride: -389.347, -26.0146, -1.96744, -10.745, -4.34085, -10.2034, -331.741, -2725.64 kg (8 entries); lognormal variance with pedigree 0.056, pedigree (3,4,5,5,1)
  Literature studies
  EcoSpold01Location=CH
  Uncertainty: literature studies
  production volume 10500 kg
- waste reinforced concrete: -267160, -3.81284e6 kg (2 entries); lognormal variance with pedigree 0.056, pedigree (3,4,5,5,1)
  EcoSpold01Location=CH
  Literature studies
  Uncertainty: literature studies
  production volume 1.224e7 kg
- waste polystyrene: -436.068, -29.1364, -2.20354, -12.0344, -4.86175, -11.4278, -371.55, -3052.72 kg (8 entries); lognormal variance with pedigree 0.056, pedigree (3,4,5,5,1)
  EcoSpold01Location=CH
  Literature studies
  Uncertainty: literature studies
  production volume 11760 kg
- pitch: 511.17, 29.1325, 1693.9, 1318.53, 59.102, 84.3737, 7453.79 kg (7 entries); lognormal variance with pedigree 0.056, pedigree (3,4,5,5,1)
  EcoSpold01Location=CH
  Literature studies
  Uncertainty: literature studies
- concrete, normal: 41.9434, 4.37045, 35.3818, 19.9023, 84.2806, 2.84273, 1665.78 m3 (7 entries); lognormal variance with pedigree 0.056, pedigree (3,4,5,5,1)
  EcoSpold01Location=CH
  Literature studies
  Uncertainty: literature studies

## Inputs from nature
- Transformation, from unspecified [natural resource, land]: 3000 m2; lognormal variance with pedigree 0.1746, pedigree (2,4,5,5,1)
  Literature studies
  Uncertainty: literature studies
- Occupation, industrial area [natural resource, land]: 75000 m2*year; lognormal variance with pedigree 0.0946, pedigree (2,4,5,5,1)
  Literature studies
  Uncertainty: literature studies
- Occupation, construction site [natural resource, land]: 3000 m2*year; lognormal variance with pedigree 0.0946, pedigree (2,4,5,5,1)
  Literature studies
  Uncertainty: literature studies
- Transformation, to industrial area [natural resource, land]: 3000 m2; lognormal variance with pedigree 0.1746, pedigree (2,4,5,5,1)
  Literature studies
  Uncertainty: literature studies

## Sampling procedure
Literature data

## Extrapolations
none This dataset has been copied from an original dataset covering the geography CH. The uncertainty has been adjusted accordingly.

## Review by Niels Jungbluth 2005-12-02
Passed.
