# bleaching and dyeing, yarn

Dataset: EcoSpold 2, unit process
Geography: BD
Time period: 2017-01-01 to 2021-12-31
Technology level: current
Classification: ISIC rev.4 ecoinvent: 1313:Finishing of textiles
Scenario: Business-as-Usual
System model: Allocation, cut-off by classification
Generated by: Mireille Faist Emmenegger
Database: ecoinvent
isCopyrightProtected: true
accessRestrictedTo: 1

## General comment
The yarn dyeing process covers hot wash with chemical after bleaching, neutralisation, dyeing, neutralisation after dyeing, washing, and finishing. This dataset covers all relevant input and output flows for bleaching and dyeing of 1 kg greige yarn as a service activity. The inventory is mainly based on industry data and is supplemented, where necessary, with secondary processing energy data from machinery manufacturers.
Bleaching:
This activity bleaches greige yarn. Bleaching improves whiteness by removing natural coloration and remaining trace impurities from the cotton; the degree of bleaching necessary is determined
by the required whiteness and absorbency.
Dyeing:
This inventory is for dyeing 40/2 CW count greige yarn to the dye shade 18-309.
This activity is modeled as a service, so no input of yarn is considered.

## Included activities start
The bleaching activity starts with loading the greige yarn into the dyeing machine. However, this activity is modeled as a service, so no input of greige yarn is considered in the inputs from technosphere.

## Included activities end
This datasets ends with 1 kg of this service which has to be used with 1 kg of yarn. Drying is incuded in this dataset.

## Geography
Bangladesh

## Technology
Autoclave.

## Reference product
- bleaching and dyeing, yarn: 1 kg; By-product classification allocatable product; CPC 9715: Dyeing and colouring services
  production volume 3.15e8 kg; name PV_RP
    Literature Value. The annual yarn dyeing capacity data from Bangladesh Textile Mills Association (BTMA).
  property price 0.723913 EUR2005
    Calculated based on inputs: The price of the product has been calculated as a sum of the values of the material and energy inputs for this product. This value is therefore a rough estimation. It may underestimate the real price since there are additional expenses when producing any product. These expences can include for example labour costs, treatment of waste materials and profit for the producer. Please consider carefully whether this level of data quality is acceptable for your application.

## Inputs from technosphere
- sodium hydroxide, without water, in 50% solution state: 0.015 kg; lognormal variance with pedigree 0.0106, pedigree (4,1,3,1,1)
  Industry data. This value is attributed only to the bleaching part of the process.
  properties: dry mass 1 kg, heating value, net 3.03 MJ, wet mass 1 kg
- wastewater from textile production: -0.12566 m3; name WW; = (0.00566+0.12)*-1
  Industry data. 0.00566 m3 refer only to the process of bleaching while the rest 0.12 m3 of wastewater are attributed to the dyeing process.
  production volume 3.95829e7 m3; = PV_RP*WW
    Calculated from production volume of reference product using the relative outputs.
  property price 0 EUR2005; name WW_price_EUR2005
- electricity, medium voltage: 0.782071 kWh; = 0.325208333+0.4568625; lognormal variance with pedigree 0.0106, pedigree (4,1,3,1,1)
  Industry data. 0.325208333 kWh of electricity refer only to the process of bleaching while the rest 0.4568625 kWh are attributed to the dyeing process.
- sodium sulfate, anhydrite: 0.16 kg; lognormal variance with pedigree 0.02, pedigree (4,1,3,1,1)
  Industry data. This value is attributed only to the dyeing part of the process.
  properties: dry mass 1 kg, wet mass 1 kg
- soda ash, light, crystalline, heptahydrate: 0.12 kg; lognormal variance with pedigree 0.02, pedigree (4,1,3,1,1)
  Industry data. This value is attributed only to the dyeing part of the process.
  properties: dry mass 1 kg, wet mass 1 kg, carbon content, fossil 0.0517241, heating value, net 3.43 MJ
- acetic acid, without water, in 98% solution state: 0.0072 kg; lognormal variance with pedigree 0.02, pedigree (4,1,3,1,1)
  Industry data. This value is attributed only to the dyeing part of the process.
  properties: carbon content, fossil 0.400016, dry mass 1 kg, wet mass 1 kg, heating value, net 14.6 MJ
  note on heating value, net: Based on literature, page 10, Althaus H.-J., Chudacoff M., Hischier R., Jungbluth N., Osses M. and Primas A. (2007) Life Cycle Inventories of Chemicals. Final report ecoinvent data v2.0 No. 8. EMPA, Swiss Centre for Life Cycle Inventories, Dübendorf, CH, Online-Version under: www.ecoinvent.org.
- heat, district or industrial, natural gas: 0.65 MJ
  Industry data reported in 2030 Water Resources Group report - An analysis of Industrial water use in Bangladesh with a focus on the textile and leather industries.
  properties: heating value, net 1 MJ
- steam, in chemical industry: 4.87 kg
  (same comment as for heat, district or industrial, natural gas)
  properties: dry mass 1 kg, wet mass 1 kg
- hydrogen peroxide, without water, in 50% solution state: 0.015 kg; lognormal variance with pedigree 0.0106, pedigree (4,1,3,1,1)
  Industry data. This value is attributed only to the bleaching part of the process.
  properties: wet mass 1 kg, heating value, net 7.13 MJ, dry mass 1 kg
- building, hall, steel construction: 1.64361e-5 m2; lognormal variance with pedigree 0.02, pedigree (4,1,3,1,1)
  Industry data. This value is attributed only to the dyeing part of the process.
- chemical, inorganic: 0.0909224 kg; lognormal variance with pedigree 0.0106, pedigree (4,1,3,1,1)
  Industry data. 0.09 kg of chemical, inorganic, refer only to the process of bleaching while the rest 0.081922 kg are attributed to the dyeing process. Chemical, inorganic involves dyestuffs.
  properties: carbon content, fossil 0.003, wet mass 1 kg, dry mass 1 kg
  note on carbon content, fossil: This dataset is an unweighted average of 20 inorganic substances (listed in Tab 88.1, ecoinvent v2.2 report 8, part II), being part of the top100 chemicals included in this database. The C-content has also been calculated as an unweighted average of the C content of the substances composing this dataset.

## Inputs from nature
- Water, well, in ground [natural resource, in water]: 0.12566 m3; = 0.00566+0.12
  Industry data. 0.00566 m3 refer only to the process of bleaching while the rest 0.12 m3 of water input are attributed to the dyeing process.

## Sampling procedure
Industry data. Representative mills in Bangladesh. The mills were chosen to provide data based on their technical representation of the current state of business and their willingness to participate.

## Extrapolations
This dataset has been extrapolated from year 2017 to the year of the calculation (2021). The uncertainty has been adjusted accordingly.
