# treatment of sulfidic tailings, from nickel mine operation, tailings impoundment

Dataset: EcoSpold 2, unit process
Geography: RU
Time period: 2015-01-01 to 2021-12-31
Technology level: current
Classification: ISIC rev.4 ecoinvent: 3822:Treatment and disposal of hazardous waste
Synonyms: sulphidic; pond; tailing; tails
Scenario: Business-as-Usual
System model: Allocation, cut-off by classification
Share of production covered: 80 %
Generated by: David Turner
Database: ecoinvent
isCopyrightProtected: true
accessRestrictedTo: 1

## General comment
This dataset represents the activity of waste disposal of sulfidic tailings, from nickel mine operation in a tailings impoundment in the Russian Federation.
Background: Tailings, a waste material produced during mineral concentration (beneficiation), often contain significant quantities of mobile toxic metals and are typically produced in large quantities. To manage these wastes, tailings are commonly stored behind dammed impoundments, known as tailings ponds. These ponds pose a significant long-term pollution risk as metals may leach out into the surrounding environment, potentially over very long timeframes.
Modelling approach: This dataset was produced using a model developed specifically for assessing the long-term emissions of tailings disposal (see Doka, 2017). The tailings disposal model is based on the modelling framework applied in existing landfill process models used in ecoinvent and is based on a top-down approach. Literature data on measurements of deposited tailings compositions (solids) and measured current concentrations in leachate (liquid) form the basis of the model and are used to characterise pollutant mobility and calculate the currently occurring rate of emissions of the landfill. Heeding chief parameters, such as hydrology, pH development and elemental chemistry, these emissions are then projected into the future. Tailings composition is based on the typical composition of tailings at nickel mine sites worldwide; i.e. composition is not region-specific. Land use was calculated following the approach described by Doka (2008). Based on an assumed generic final height of a tailings impoundment of 60 m and an assumed tailings density of 2200 kg/m3, a land area of 7.58E-06 m2 is required per kilogram of sulfidic tailings. The land is assumed to be converted from unknown origin to a disposal site. After an operational phase of 30 years, spontaneous restoration of a consolidated state is assumed to be reached after one hundred years. The total occupation time is therefore 130 years and the land occupation per kilogram tailings is 9.85E-04 m2.
Waste composition (wet, in ppm): H2O 300000; O 623400; H na; C 6145; S 359.53; N 5.0454; P 223.04; B 54.583; Cl 102.61; Br 0.22894; F 772.88; I na; Ag 8.5672; As 54.876; Ba 349.73; Cd 4.2073; Co 14.437; Cr 55.949; Cu 649.95; Hg 0.26107; Mn 191.27; Mo 11.985; Ni 730.27; Pb 164.15; Sb 28.927; Se 6.5496; Sn 27.855; V 127.15; Zn 232.03; Be 1.1555; Sc 12.867; Sr 98.34; Ti 227.57; Tl 2.8558; W 9.9784; Si 37291; Fe 10762; Ca 3218.1; Al 10317; K 1762.7; Mg 1565.1; Na 1013. // Share of carbon in waste that is biogenic 0%.
Activity extent: The dataset includes all potential emissions to the environment and land use changes. Input exchanges of infrastructure, materials, energy, and water are not included here but are accounted for in the activity, nickel mine operation.
References
Doka, G. (2008). Life Cycle Inventory data of mining waste: Emissions from sulfidic tailings disposal. Zürich, Switzerland: Doka Life Cycle Assessments.
Doka, G. (2017). A model for waste-specific and climate-specific life cycle inventories of tailings impoundments. Zürich, Switzerland: Doka Life Cycle Assessments.

## Included activities start
The activity starts at the point of waste deposition in the impoundment. All upstream activities, including the pumping of tailings to the site, any dewatering or treatment, or other transport-related activities are excluded.

## Included activities end
Waste-specific short- and long-term emissions to the environment via impoundment leachate; land transformation and occupation. Note that the structural integrity of the site is assumed to be unwavering during the entie modelled time horizon; i.e. accidental releases of leachate (due to impoundment failure) are not considered.

## Geography
Given name of site is 'Nickel deposits; Russia'. Impoundment site with mean annual temperature (MAT) of -0.852415806925 degC, mean annual precipitation (MAP) of 533.8249773565 mm/year, mean annual actual evaporation (EAT) of 88.227222258 mm/year, and net infiltration of 489.7113662275 mm/year (using half of natural surface evapotranspiration).
Temperature at site can result in permafrost conditions, which slows down water flow by a factor of 0.986.

## Technology
This is an inventory for an impoundment of copper ore beneficiation tailings waste. The following assumptions were made concerning technology: final impoundment height is 60 meters; operation phase duration is 30 years; and impoundment leachates are released into the environment untreated.

## Time period
'Data on average composition of tailings and tailings-derived leachates from literature sources published between 1994 and 2017 (mean publication date: 2009±6). Mean annual temperature and precipitation data for 1970-2000 (source: Fick and Hijmans, 2017); mean annual evapotranspiration for 1950-2000 (source: Fekete et al., 2002). Production volume based on world mine production data from the USGS Minerals Yearbook 2015. Transfer coefficients from prospective, tailings-specific model.
References:
Fekete, B. M., Vorosmarty, C. J. & Grabs, W. (2002). High-resolution fields of global runoff combining observed river discharge and simulated water balances. Global Biogeochemical Cycles, 16, 15-1 - 15-10.
Fick, S. E. & Hijmans, R. J. (2017). Worldclim 2: New 1-km spatial resolution climate surfaces for global land areas. International Journal of Climatology, 37, 4302-4315.'

## Reference product
- sulfidic tailings, from nickel mine operation: -1 kg; By-product classification Waste
  main reference product of this activity (supply of disposal service).
  production volume 2.24e10 kg
    Estimate of the national tailings production volume from the mining and concentration of sulfidic nickel ores, based on national mine production of nickel from sulfide mineral deposits (kg) multiplied by an estimated tailings generation rate per kg nickel concentrate produced (83.0 kg per kg nickel in concentrate).
  property price 0 EUR2005
    Waste products are assigned a price of zero as they are assumed to require further treatment.
  property carbon content 0.0087785
    carbon content on a dry matter basis (reserved; not for manual entry)
  properties: aluminium content 0.014738, barium content 0.00049962, potassium content 0.0025181, water in wet mass 0.3 kg, oxygen content 0.89057, molybdenum content 1.7121e-5, carbon content, fossil 0.0087785, magnesium content 0.0022359, tungsten content 1.4255e-5, lead content 0.0002345, zinc content 0.00033146, bromine content 3.2706e-7, manganese content 0.00027325, chlorine content 0.00014659, phosphorus content 0.00031862, copper content 0.0009285, antimony content 4.1325e-5, silver content 1.2239e-5, silicon content 0.053273, thallium content 4.0797e-6, dry mass 0.7 kg, sodium content 0.0014472, nickel content 0.0010432, nitrogen content 7.2076e-6, sulfur content 0.00051362, cobalt content 2.0624e-5, vanadium content 0.00018165, strontium content 0.00014049, water content 0.42857, beryllium content 1.6507e-6, iron content 0.015374, arsenic content 7.8394e-5, fluorine content 0.0011041, wet mass 1 kg, mercury content 3.7296e-7, selenium content 9.3566e-6, boron content 7.7976e-5, carbon content, non-fossil 0, calcium content 0.0045972, chromium content 7.9928e-5, scandium content 1.8381e-5, cadmium content 6.0104e-6, titanium content 0.0003251, tin content 3.9792e-5, carbon allocation 0.00614495 kg

## Inputs from nature
- Occupation, dump site [natural resource, land]: 0.00098485 m2*year; lognormal variance with pedigree 0.14986, pedigree (1,1,2,1,1)
  for impoundment operation phase and 100 year renaturation phase.
  Uncertainty: U
- Transformation, to dump site [natural resource, land]: 7.5758e-6 m2; lognormal variance with pedigree 0.030796, pedigree (1,1,2,1,1)
  conversion to impoundment area.
  Uncertainty: U
- Transformation, from unspecified [natural resource, land]: 7.5758e-6 m2; lognormal variance with pedigree 0.030796, pedigree (1,1,2,1,1)
  conversion of impoundment area.
  Uncertainty: U

## Emissions to nature
- Thallium [water, ground-]: 5.8593e-10 kg; lognormal variance with pedigree 0.57351, pedigree (1,1,2,1,1)
  burden from short-term leachate to groundwater in uncontrolled impoundment in moist cimate.
  Uncertainty: U
- DOC, Dissolved Organic Carbon [water, ground-, long-term]: 0.00067932 kg; lognormal variance with pedigree 0.40995, pedigree (1,1,2,1,1)
  Emissions from long-term leachate (>100a) directly from tailings impoundment.
  Uncertainty: U
- Tin, ion [water, ground-]: 3.2008e-8 kg; lognormal variance with pedigree 0.44194, pedigree (1,1,2,1,1)
  (same comment as for Thallium)
- DOC, Dissolved Organic Carbon [water, ground-]: 1.1341e-6 kg; lognormal variance with pedigree 0.32545, pedigree (1,1,2,1,1)
  (same comment as for Thallium)
- Thallium [water, ground-, long-term]: 2.8552e-6 kg; lognormal variance with pedigree 0.35839, pedigree (1,1,2,1,1)
  (same comment as for DOC, Dissolved Organic Carbon)
- COD, Chemical Oxygen Demand [water, ground-]: 1.033e-7 kg; lognormal variance with pedigree 0.32545, pedigree (1,1,2,1,1)
  (same comment as for Thallium)
- Sulfate [water, ground-, long-term]: 0.00042277 kg; lognormal variance with pedigree 0.20041, pedigree (1,1,2,1,1)
  (same comment as for DOC, Dissolved Organic Carbon)
- Copper, ion [water, ground-]: 3.4602e-7 kg; lognormal variance with pedigree 0.36246, pedigree (1,1,2,1,1)
  (same comment as for Thallium)
- Strontium [water, ground-]: 1.521e-7 kg; lognormal variance with pedigree 0.3904, pedigree (1,1,2,1,1)
  (same comment as for Thallium)
- COD, Chemical Oxygen Demand [water, ground-, long-term]: 6.1877e-5 kg; lognormal variance with pedigree 0.40995, pedigree (1,1,2,1,1)
  (same comment as for DOC, Dissolved Organic Carbon)
- Strontium [water, ground-, long-term]: 9.8188e-5 kg; lognormal variance with pedigree 0.24126, pedigree (1,1,2,1,1)
  (same comment as for DOC, Dissolved Organic Carbon)
- Cobalt [water, ground-, long-term]: 1.4287e-5 kg; lognormal variance with pedigree 0.30503, pedigree (1,1,2,1,1)
  (same comment as for DOC, Dissolved Organic Carbon)
- Sulfate [water, ground-]: 0.00040447 kg; lognormal variance with pedigree 0.20189, pedigree (1,1,2,1,1)
  (same comment as for Thallium)
- Copper, ion [water, ground-, long-term]: 0.0006496 kg; lognormal variance with pedigree 0.1787, pedigree (1,1,2,1,1)
  (same comment as for DOC, Dissolved Organic Carbon)
- Sodium, ion [water, ground-]: 1.0756e-5 kg; lognormal variance with pedigree 0.25353, pedigree (1,1,2,1,1)
  (same comment as for Thallium)
- Chromium VI [water, ground-, long-term]: 5.16e-7 kg; lognormal variance with pedigree 1.6325, pedigree (1,1,2,1,1)
  (same comment as for DOC, Dissolved Organic Carbon)
- Silver, ion [water, ground-, long-term]: 8.5661e-6 kg; lognormal variance with pedigree 0.32228, pedigree (1,1,2,1,1)
  (same comment as for DOC, Dissolved Organic Carbon)
- Cobalt [water, ground-]: 1.4983e-7 kg; lognormal variance with pedigree 0.39505, pedigree (1,1,2,1,1)
  (same comment as for Thallium)
- Sodium, ion [water, ground-, long-term]: 0.0010006 kg; lognormal variance with pedigree 0.16419, pedigree (1,1,2,1,1)
  (same comment as for DOC, Dissolved Organic Carbon)
- Chromium VI [water, ground-]: 9.1332e-9 kg; lognormal variance with pedigree 0.48271, pedigree (1,1,2,1,1)
  (same comment as for Thallium)
- Silver, ion [water, ground-]: 1.1126e-9 kg; lognormal variance with pedigree 0.55252, pedigree (1,1,2,1,1)
  (same comment as for Thallium)
- Chloride [water, ground-, long-term]: 8.2877e-5 kg; lognormal variance with pedigree 0.24038, pedigree (1,1,2,1,1)
  (same comment as for DOC, Dissolved Organic Carbon)
- Silicon [water, ground-, long-term]: 0.00022969 kg; lognormal variance with pedigree 1.6738, pedigree (1,1,2,1,1)
  (same comment as for DOC, Dissolved Organic Carbon)
- Chloride [water, ground-]: 1.9733e-5 kg; lognormal variance with pedigree 0.25673, pedigree (1,1,2,1,1)
  (same comment as for Thallium)
- Silicon [water, ground-]: 4.0464e-6 kg; lognormal variance with pedigree 0.2909, pedigree (1,1,2,1,1)
  (same comment as for Thallium)
- Calcium, ion [water, ground-, long-term]: 0.0031565 kg; lognormal variance with pedigree 0.12702, pedigree (1,1,2,1,1)
  (same comment as for DOC, Dissolved Organic Carbon)
- Scandium [water, ground-]: 4.3391e-8 kg; lognormal variance with pedigree 0.43323, pedigree (1,1,2,1,1)
  (same comment as for Thallium)
- Cadmium, ion [water, ground-]: 1.6182e-8 kg; lognormal variance with pedigree 0.46597, pedigree (1,1,2,1,1)
  (same comment as for Thallium)
- Selenium [water, ground-, long-term]: 3.1915e-7 kg; lognormal variance with pedigree 0.90167, pedigree (1,1,2,1,1)
  (same comment as for DOC, Dissolved Organic Carbon)
- Cadmium, ion [water, ground-, long-term]: 4.1911e-6 kg; lognormal variance with pedigree 0.34569, pedigree (1,1,2,1,1)
  (same comment as for DOC, Dissolved Organic Carbon)
- Selenium [water, ground-]: 5.7667e-9 kg; lognormal variance with pedigree 0.49848, pedigree (1,1,2,1,1)
  (same comment as for Thallium)
- Calcium, ion [water, ground-]: 6.1547e-5 kg; lognormal variance with pedigree 0.19932, pedigree (1,1,2,1,1)
  (same comment as for Thallium)
- Scandium [water, ground-, long-term]: 1.2823e-5 kg; lognormal variance with pedigree 0.30884, pedigree (1,1,2,1,1)
  (same comment as for DOC, Dissolved Organic Carbon)
- Bromine [water, ground-]: 2.7839e-10 kg; lognormal variance with pedigree 0.5968, pedigree (1,1,2,1,1)
  (same comment as for Thallium)
- Phosphate [water, ground-, long-term]: 0.00064075 kg; lognormal variance with pedigree 0.21412, pedigree (1,1,2,1,1)
  (same comment as for DOC, Dissolved Organic Carbon)
- Boron [water, ground-, long-term]: 1.1965e-6 kg; lognormal variance with pedigree 1.173, pedigree (1,1,2,1,1)
  (same comment as for DOC, Dissolved Organic Carbon)
- Potassium, ion [water, ground-]: 6.6277e-7 kg; lognormal variance with pedigree 0.34139, pedigree (1,1,2,1,1)
  (same comment as for Thallium)
- Bromine [water, ground-, long-term]: 1.1834e-7 kg; lognormal variance with pedigree 0.46711, pedigree (1,1,2,1,1)
  (same comment as for DOC, Dissolved Organic Carbon)
- Potassium, ion [water, ground-, long-term]: 0.00035539 kg; lognormal variance with pedigree 0.30649, pedigree (1,1,2,1,1)
  (same comment as for DOC, Dissolved Organic Carbon)
- Beryllium [water, ground-]: 3.316e-9 kg; lognormal variance with pedigree 0.51733, pedigree (1,1,2,1,1)
  (same comment as for Thallium)
- Phosphate [water, ground-]: 4.275e-5 kg; lognormal variance with pedigree 0.255, pedigree (1,1,2,1,1)
  (same comment as for Thallium)
- Boron [water, ground-]: 2.1317e-8 kg; lognormal variance with pedigree 0.45477, pedigree (1,1,2,1,1)
  (same comment as for Thallium)
- BOD5, Biological Oxygen Demand [water, ground-]: 2.066e-9 kg; lognormal variance with pedigree 0.32545, pedigree (1,1,2,1,1)
  (same comment as for Thallium)
- Nickel, ion [water, ground-, long-term]: 0.00072777 kg; lognormal variance with pedigree 0.17488, pedigree (1,1,2,1,1)
  (same comment as for DOC, Dissolved Organic Carbon)
- BOD5, Biological Oxygen Demand [water, ground-, long-term]: 1.2375e-6 kg; lognormal variance with pedigree 0.40995, pedigree (1,1,2,1,1)
  (same comment as for DOC, Dissolved Organic Carbon)
- Molybdenum [water, ground-, long-term]: 5.863e-6 kg; lognormal variance with pedigree 0.34281, pedigree (1,1,2,1,1)
  (same comment as for DOC, Dissolved Organic Carbon)
- Beryllium [water, ground-, long-term]: 1.1522e-6 kg; lognormal variance with pedigree 0.38787, pedigree (1,1,2,1,1)
  (same comment as for DOC, Dissolved Organic Carbon)
- Molybdenum [water, ground-]: 1.4344e-7 kg; lognormal variance with pedigree 0.39701, pedigree (1,1,2,1,1)
  (same comment as for Thallium)
- Barium [water, ground-, long-term]: 0.00021021 kg; lognormal variance with pedigree 0.21533, pedigree (1,1,2,1,1)
  (same comment as for DOC, Dissolved Organic Carbon)
- Mercury [water, ground-, long-term]: 2.608e-7 kg; lognormal variance with pedigree 0.43573, pedigree (1,1,2,1,1)
  (same comment as for DOC, Dissolved Organic Carbon)
- Barium [water, ground-]: 2.2963e-9 kg; lognormal variance with pedigree 0.52791, pedigree (1,1,2,1,1)
  (same comment as for Thallium)
- Nickel, ion [water, ground-]: 2.4969e-6 kg; lognormal variance with pedigree 0.29883, pedigree (1,1,2,1,1)
  (same comment as for Thallium)
- Zinc, ion [water, ground-, long-term]: 0.0002309 kg; lognormal variance with pedigree 0.21273, pedigree (1,1,2,1,1)
  (same comment as for DOC, Dissolved Organic Carbon)
- Antimony [water, ground-]: 1.3127e-8 kg; lognormal variance with pedigree 0.47096, pedigree (1,1,2,1,1)
  (same comment as for Thallium)
- Mercury [water, ground-]: 2.6947e-10 kg; lognormal variance with pedigree 0.59791, pedigree (1,1,2,1,1)
  (same comment as for Thallium)
- Zinc, ion [water, ground-]: 1.121e-6 kg; lognormal variance with pedigree 0.32592, pedigree (1,1,2,1,1)
  (same comment as for Thallium)
- Aluminium [water, ground-, long-term]: 0.010309 kg; lognormal variance with pedigree 0.091119, pedigree (1,1,2,1,1)
  (same comment as for DOC, Dissolved Organic Carbon)
- Manganese [water, ground-, long-term]: 0.00018983 kg; lognormal variance with pedigree 0.21914, pedigree (1,1,2,1,1)
  (same comment as for DOC, Dissolved Organic Carbon)
- Vanadium, ion [water, ground-, long-term]: 1.8825e-7 kg; lognormal variance with pedigree 2.8858, pedigree (1,1,2,1,1)
  (same comment as for DOC, Dissolved Organic Carbon)
- Aluminium [water, ground-]: 7.5728e-6 kg; lognormal variance with pedigree 0.26438, pedigree (1,1,2,1,1)
  (same comment as for Thallium)
- Manganese [water, ground-]: 1.4418e-6 kg; lognormal variance with pedigree 0.31874, pedigree (1,1,2,1,1)
  (same comment as for Thallium)
- Tungsten [water, ground-, long-term]: 1.2226e-6 kg; lognormal variance with pedigree 0.59259, pedigree (1,1,2,1,1)
  (same comment as for DOC, Dissolved Organic Carbon)
- Antimony [water, ground-, long-term]: 7.3547e-7 kg; lognormal variance with pedigree 1.1247, pedigree (1,1,2,1,1)
  (same comment as for DOC, Dissolved Organic Carbon)
- Lead [water, ground-, long-term]: 0.00016413 kg; lognormal variance with pedigree 0.22422, pedigree (1,1,2,1,1)
  (same comment as for DOC, Dissolved Organic Carbon)
- Vanadium, ion [water, ground-]: 3.3189e-9 kg; lognormal variance with pedigree 0.51605, pedigree (1,1,2,1,1)
  (same comment as for Thallium)
- Nitrate [water, ground-, long-term]: 1.1248e-5 kg; lognormal variance with pedigree 0.34128, pedigree (1,1,2,1,1)
  (same comment as for DOC, Dissolved Organic Carbon)
- Magnesium [water, ground-, long-term]: 0.0015347 kg; lognormal variance with pedigree 0.15007, pedigree (1,1,2,1,1)
  (same comment as for DOC, Dissolved Organic Carbon)
- Nitrate [water, ground-]: 7.093e-6 kg; lognormal variance with pedigree 0.34596, pedigree (1,1,2,1,1)
  (same comment as for Thallium)
- Magnesium [water, ground-]: 3.0462e-5 kg; lognormal variance with pedigree 0.22187, pedigree (1,1,2,1,1)
  (same comment as for Thallium)
- Tungsten [water, ground-]: 2.3006e-8 kg; lognormal variance with pedigree 0.45363, pedigree (1,1,2,1,1)
  (same comment as for Thallium)
- Arsenic, ion [water, ground-, long-term]: 8.7994e-7 kg; lognormal variance with pedigree 1.3282, pedigree (1,1,2,1,1)
  (same comment as for DOC, Dissolved Organic Carbon)
- Hydrogen sulfide [water, ground-, long-term]: 4.5494e-5 kg; lognormal variance with pedigree 0.20041, pedigree (1,1,2,1,1)
  (same comment as for DOC, Dissolved Organic Carbon)
- TOC, Total Organic Carbon [water, ground-, long-term]: 0.00067932 kg; lognormal variance with pedigree 0.40995, pedigree (1,1,2,1,1)
  (same comment as for DOC, Dissolved Organic Carbon)
- Arsenic, ion [water, ground-]: 1.563e-8 kg; lognormal variance with pedigree 0.46498, pedigree (1,1,2,1,1)
  (same comment as for Thallium)
- Lead [water, ground-]: 2.0046e-8 kg; lognormal variance with pedigree 0.4565, pedigree (1,1,2,1,1)
  (same comment as for Thallium)
- TOC, Total Organic Carbon [water, ground-]: 1.1341e-6 kg; lognormal variance with pedigree 0.32545, pedigree (1,1,2,1,1)
  (same comment as for Thallium)
- Ammonium, ion [water, ground-, long-term]: 7.1262e-7 kg; lognormal variance with pedigree 0.34128, pedigree (1,1,2,1,1)
  (same comment as for DOC, Dissolved Organic Carbon)
- Iron, ion [water, ground-, long-term]: 0.010756 kg; lognormal variance with pedigree 0.089859, pedigree (1,1,2,1,1)
  (same comment as for DOC, Dissolved Organic Carbon)
- Ammonium, ion [water, ground-]: 4.4937e-7 kg; lognormal variance with pedigree 0.34596, pedigree (1,1,2,1,1)
  (same comment as for Thallium)
- Iron, ion [water, ground-]: 5.6842e-6 kg; lognormal variance with pedigree 0.27387, pedigree (1,1,2,1,1)
  (same comment as for Thallium)
- Tin, ion [water, ground-, long-term]: 2.7823e-5 kg; lognormal variance with pedigree 0.28323, pedigree (1,1,2,1,1)
  (same comment as for DOC, Dissolved Organic Carbon)
- Fluoride [water, ground-]: 9.398e-7 kg; lognormal variance with pedigree 0.32991, pedigree (1,1,2,1,1)
  (same comment as for Thallium)
- Titanium, ion [water, ground-, long-term]: 0.00022756 kg; lognormal variance with pedigree 0.21337, pedigree (1,1,2,1,1)
  (same comment as for DOC, Dissolved Organic Carbon)
- Fluoride [water, ground-, long-term]: 0.00039949 kg; lognormal variance with pedigree 0.20022, pedigree (1,1,2,1,1)
  (same comment as for DOC, Dissolved Organic Carbon)
- Titanium, ion [water, ground-]: 9.5188e-9 kg; lognormal variance with pedigree 0.48111, pedigree (1,1,2,1,1)
  (same comment as for Thallium)
- Hydrogen sulfide [water, ground-]: 4.3525e-5 kg; lognormal variance with pedigree 0.20189, pedigree (1,1,2,1,1)
  (same comment as for Thallium)

## Sampling procedure
Tailings model based on observed leachate concentrations in literature. Extrapolated to 60'000 years heeding chemical characteristics. Initial waste composition from various literature sources. Climate information for national copper deposits (identified from the USGS Major Mineral Deposits database) from literature as follows: global mean annual temperature and precipitation data from Fick and Hijmans (2017); global mean annual evapotranspiration data from Fekete et al. (2002).

References:
Fekete, B. M., Vorosmarty, C. J. & Grabs, W. (2002). High-resolution fields of global runoff combining observed river discharge and simulated water balances. Global Biogeochemical Cycles, 16, 15-1 - 15-10.
Fick, S. E. & Hijmans, R. J. (2017). Worldclim 2: New 1-km spatial resolution climate surfaces for global land areas. International Journal of Climatology, 37, 4302-4315.

## Extrapolations
This dataset has been extrapolated from year 2019 to the year of the calculation (2021). The uncertainty has been adjusted accordingly.
