# wood preservation, dipping/immersion, water-based preservative, indoor use, occasionally wet

Dataset: EcoSpold 2, unit process
Geography: RER
Time period: 2012-01-01 to 2021-12-31
Technology level: current
Classification: ISIC rev.4 ecoinvent: 1610:Sawmilling and planing of wood
Synonyms: open tank impregnation
Tags: Swiss brush-up completed
Scenario: Business-as-Usual
System model: Allocation, cut-off by classification
Generated by: Frank Werner
Database: ecoinvent
isCopyrightProtected: true
accessRestrictedTo: 1

## General comment
This dataset covers the treatment of wood in open tank impregnation. The dipping/immersion process is considered to be a surface treatment and not a deep penetraton treatment. Wood preservatives do not penetrate the wood more than three milimeters. We can distinguish two main typse of industrial branches apllying dipping/immersion for wood preservation purposes: a) sawmilling where freshly cut wood is treated with fungicides to prevent the discoloration caused by blue stain forming fungi; this treatment aims for a short-term preservation of wood until it is further processed, and b) joinery industry and carpentry shops: "joinery applications" are industrial processes to creating wood articles that have been made to shape, for example fence panels, composites, window, doors and door frames, floors, architrave, decorative features, etc; carpentry shops fabricate wooden construction materials and treat them for long term protection against insects and fungi. Despite some small differences in the operation and infrastructure, dipping/immersion applied by the two industrial sectors can be described by a generic "dipping/immersion" emission scenario (OECD 2000).
Both automatic and manual dipping/immersion are batch processes. It involves submerging a pack or a single piece of wood into the dipping tank filled with a solution containing the preservative. Packs of wood are loaded on automatic equipment (e.g. hydraulic elevator) and lowered into a dipping tank. Wood remains there for a period usually between a few minutes and an hour (it is less than 30 seconds fro sawmill anti-sapstain treatments but can last for several days for other applications, e.g. for cold soaking or steeping) during which the wood absorbs the preservative through capillary forces and diffusion. Dipping baths can be heated in cold climate conditions. The treated wood is held over the dipping vat, usually for 30 minutes to an hour, in order the excess of the preservative solution to drain. Drips are usually collected and recycled into the process. Then the treated wood is removed to storage. Dipping facilities may be open or encapsulated, equipped with vapour trapping and air emission control.
Application: 200 g/m2;
Characterisation of preservative: active agent: 0.45% iodopropinyl butylcarbamat, 0.075% Permethrin, 0.7% Tebocunazol; concentration for application: 100% v/v

Wood is not included in the dataset.

## Included activities start
Service starting with the reception of the concentrated wood preservative at the factory gate

## Included activities end
The data set contains the treatment service of dried wood with a water-based wood preservative (primer) for use class 2 (indoor use, occasinally wet) in the dipping/immersion process. It covers the necessary inputs of the wood preservative, electricity as well as some infrastructure. For the inventorying of emissions into surface water and air, see general comment. The dataset does not include wood. Also eventual waste streams (e.g. saw dust recollected from the dipping/immersion vat) are not included.

## Parameters
- share of collected rainwater: 0.5 dimensionless; name share_collected_rainwater
- efficiency of air filter: 0.75 dimensionless; name efficiency_air_filter

## Reference product
- wood preservation, dipping/immersion method, water-based, indoor use, occasionally wet: 1 kg; CPC 54730: Painting services; By-product classification allocatable product
  production volume 9.05816e6 kg; name p_preservation; = 22300 * 1000/3429519*16584000 * 0.9* 0.28/3
    Total production in DE (2000): 22300 t (OECD 2000), extrapolated to RER via GDP, assuming 90% waterborne preservatives, a slit of 1/3 each between use classes 1-3 and a share of 72% spraying/deluging and 28% dipping (split in Germany for 2000, according to OECD 2000)
  property price 1.75612 EUR2005
    Calculated based on inputs: The price of the product has been calculated as a sum of the values of the material and energy inputs for this product. This value is therefore a rough estimation. It may underestimate the real price since there are additional expenses when producing any product. These expences can include for example labour costs, treatment of waste materials and profit for the producer. Please consider carefully whether this level of data quality is acceptable for your application.

## Inputs from technosphere
- wood preservation facility, dipping/immersion tank: 2.22222e-7 unit; = 1/75/6000/50/0.2; source Hubel M. 2012; lognormal variance with pedigree 0.568, pedigree (3,5,4,1,1)
  1 plant per 75 years of service life at 6000 m3/year, 50 m2/m3 and an input of 0.2 kg of wood preservative
- electricity, medium voltage: 0.000714286 kWh; = 3/60*2/14/50/0.2; source Künniger T. 2000; lognormal variance with pedigree 0.037, pedigree (1,4,4,5,1)
  2 minutes with 3 kW motor per 14 m3, 50 m2/m3 and 0.2 kg/m2
  properties: UVEK_link_1 1779, UVEK_relative_amount_1 1
  note on UVEK_link_1: to be used only in special submissions in coordination with ecoinvent and the Swiss FOEN
- waste mineral oil: 0 kg; name w_mineral_oil; source Hubel M. 2012; pedigree (1,1,1,1,1)
  calculated from input of lubricating oil
  production volume 0 kg
    Calculated from production volume of reference product using the relative outputs.
  properties: dry mass 0.9 kg, UVEK_link_1 1113, heating value, net 34.7 MJ, carbon content, fossil 0.864444, water content 0.111111, UVEK_relative_amount_1 -1, wet mass 1 kg
  note on heating value, net: Value taken from the general comment of the treatment dataset.
- wood preservative, water-based, indoor use, occasionally wet: 1 kg; name preservative_concentration
  properties: UVEK_link_8 4417, UVEK_relative_amount_8 0.1, UVEK_link_9 4433
  note on UVEK_link_8: This link has been introduced to model transport specifically for the SAM model; to be used only in special submissions in coordination with ecoinvent and the Swiss FOEN.
  note on UVEK_relative_amount_8: No scaling needed as transport is modelled in market dataset that has been part of the brush-up
- lubricating oil: 0.000194444 kg; name m_lubricating_oil; = 35/3/6000/50/0.2; source Hubel M. 2012; lognormal variance with pedigree 0.037, pedigree (1,4,4,5,1)
  35 kg every 3 years at an annual production o 6000 m3, equalling 50 m2/m3 at 200 ml wood preservative/m2
  property dry mass 1 kg; name m_lubricating_oil_DM
  properties: UVEK_link_1 2866, heating value, net 40.2 MJ, wet mass 1 kg, UVEK_relative_amount_1 1, carbon content, fossil 0.75
  note on heating value, net: Literature value, Source: IPCC 2006, 2006 IPCC Guidelines for National Greenhouse Gas Inventories, Prepared by the National Greenhouse Gas Inventories Programme, Eggleston H.S., Buendia L., Miwa K., Ngara T. and Tanabe K. (eds). Published: IGES, Japan
- waste mineral oil: -0.000189747, -4.69738e-6 kg (2 entries); source Hubel M. 2012; lognormal variance with pedigree 0.0342, pedigree (2,3,4,1,1)
  calculated from input of lubricating oil
  production volume 1761.31 kg

## Emissions to nature
- Monoethanolamine [air, non-urban air or from high stacks]: 1.25e-5 kg; = (1-efficiency_air_filter)*0.005*preservative_concentration*0.01; source OECD 2000; lognormal variance with pedigree 0.4001, pedigree (3,5,5,3,1)
  scenario according to (OECD 2000, p. 38ff); proxy for other aminio alcohol
  property carbon content, fossil 0.393264; name C_content_fossil_Monoethanolamine
- Hydrocarbons, aromatic [air, non-urban air or from high stacks]: 6.25e-6 kg; = (1-efficiency_air_filter)*0.0001* preservative_concentration*0.25; source OECD 2000; lognormal variance with pedigree 0.2501, pedigree (3,5,5,3,1)
  scenario according to (OECD 2000, p. 38ff); proxy
  property carbon content, fossil 0.911297; name C_content_fossil_HC_aromatic
- Water [air, unspecified]: 0.00052 m3; lognormal variance with pedigree 0.208, pedigree (1,1,4,1,1)
  tap water plus water in preservative
- Diethylene glycol [air, non-urban air or from high stacks]: 0.00575937 kg; = (1-efficiency_air_filter)*0.02375* preservative_concentration*0.97; source OECD 2000; lognormal variance with pedigree 0.4001, pedigree (3,5,5,3,1)
  scenario according to (OECD 2000, p. 38ff); proxy for comparable glycol
  property carbon content, fossil 0.452726; name C_content_fossil_Diethylene_glycol
- Permethrin [air, non-urban air or from high stacks]: 1.875e-7 kg; = (1-efficiency_air_filter)*0.00075* preservative_concentration*0.001; source OECD 2000; lognormal variance with pedigree 0.4001, pedigree (3,5,5,3,1)
  scenario according to (OECD 2000, p. 38ff)
  property carbon content, fossil 0.644027; name C_content_fossil_Permethrin
- Methyl ethyl ketone [air, non-urban air or from high stacks]: 0.0002425 kg; = (1-efficiency_air_filter)*0.001* preservative_concentration*0.97; source OECD 2000; lognormal variance with pedigree 0.4001, pedigree (3,5,5,3,1)
  scenario according to (OECD 2000, p. 38ff); proxy for similar ketone
  property carbon content, fossil 0.666288; name C_content_fossil_Methyl_ethyl_ketone
- Monoethanolamine [water, unspecified]: 7.5e-5 kg; = (1-share_collected_rainwater)*0.005*preservative_concentration*0.03; source OECD 2000; lognormal variance with pedigree 0.6001, pedigree (3,5,5,3,1)
  scenario according to (OECD 2000, p. 38ff); proxy for other aminio alcohol
- Ethylene glycol monoethyl ether [water, surface water]: 9.75e-5 kg; = (1-share_collected_rainwater)*0.0065* preservative_concentration*0.03; source OECD 2000; lognormal variance with pedigree 0.6001, pedigree (3,5,5,3,1)
  scenario according to (OECD 2000); proxy for similar ether
- Butylcarbamate, iodopropynyl [air, non-urban air or from high stacks]: 2.25e-5 kg; = (1-efficiency_air_filter)*0.0045* preservative_concentration*0.02; source OECD 2000; lognormal variance with pedigree 0.6001, pedigree (3,5,5,3,1)
  scenario according to (OECD 2000, p. 38ff)
  property carbon content, fossil 0.341527; name C_content_fossil_IPBC
- Tebuconazole [water, surface water]: 0.000105 kg; = (1-share_collected_rainwater)*0.007* preservative_concentration*0.03; source OECD 2000; lognormal variance with pedigree 0.6001, pedigree (3,5,5,3,1)
  scenario according to (OECD 2000, p. 38ff)
- NMVOC, non-methane volatile organic compounds, unspecified origin [air, non-urban air or from high stacks]: 0.00396487 kg; name nmvoc; = (1-efficiency_air_filter)*((0.0251-0.01225)+0.0035)* preservative_concentration*0.97; source OECD 2000; lognormal variance with pedigree 0.2501, pedigree (3,5,5,3,1)
  scenario according to (OECD 2000); proxy (corrected for amount of active substances, which are inventoried explicitly)
  property carbon content, non-fossil 0; name C_content_non_fossil_NMVOC
  property carbon content, fossil 0.854049; name C_content_fossil_NMVOC
- Diethylene glycol [water, surface water]: 0.00035625 kg; = (1-share_collected_rainwater)*0.02375* preservative_concentration*0.03; source OECD 2000; lognormal variance with pedigree 0.6001, pedigree (3,5,5,3,1)
  scenario according to (OECD 2000, p. 38ff); proxy for comparable glycol
- Ethylene glycol monoethyl ether [air, non-urban air or from high stacks]: 0.00157625 kg; = (1-efficiency_air_filter)*0.0065* preservative_concentration*0.97; source OECD 2000; lognormal variance with pedigree 0.2501, pedigree (3,5,5,3,1)
  scenario according to (OECD 2000); proxy for similar ether
  property carbon content, fossil 0.533098; name C_content_fossil_Ethylene_glocol_MET
- Hydrocarbons, aromatic [water, surface water]: 1.5e-6 kg; = (1-share_collected_rainwater)*0.0001* preservative_concentration*0.03; source OECD 2000; lognormal variance with pedigree 0.2501, pedigree (3,5,5,3,1)
  scenario according to (OECD 2000, p. 38ff); proxy
- Methyl ethyl ketone [water, surface water]: 1.5e-5 kg; = (1-share_collected_rainwater)*0.001* preservative_concentration*0.03; source OECD 2000; lognormal variance with pedigree 0.6001, pedigree (3,5,5,3,1)
  scenario according to (OECD 2000, p. 38ff); proxy for similar ketone
- Hydrocarbons, unspecified [water, surface water]: 0.00024525 kg; = (1-share_collected_rainwater)*((0.0251-0.01225)+0.0035)* preservative_concentration*0.03; source OECD 2000; lognormal variance with pedigree 0.2501, pedigree (3,5,5,3,1)
  scenario according to (OECD 2000, p. 38ff); proxy (corrected for amount of active substances, which are inventoried explicitly)
- Carbon dioxide, fossil [air, non-urban air or from high stacks]: 0.077165 kg; = (0.00075* preservative_concentration*0.001* C_content_fossil_Permethrin+0.02375* preservative_concentration*0.97* C_content_fossil_Diethylene_glycol+0.007* preservative_concentration*0.001*C_content_fossil_Tebuconazole+0.0045* preservative_concentration*0.02* C_content_fossil_IPBC +0.0065* preservative_concentration*0.97* C_content_fossil_Ethylene_glocol_MET +0.001* preservative_concentration*0.97* C_content_fossil_Methyl_ethyl_ketone +0.0001* preservative_concentration*0.25* C_content_fossil_HC_aromatic +((0.0251-0.01225)+0.0035)* preservative_concentration*0.97* C_content_fossil_NMVOC +0.005*preservative_concentration*0.01* C_content_fossil_Monoethanolamine)*efficiency_air_filter/12*44; lognormal variance with pedigree 0.073, pedigree (5,1,4,1,1)
  assuming that all C retained in the filter is finally converted to CO2, irrespective of the filter technology
- Tebuconazole [air, non-urban air or from high stacks]: 1.75e-6 kg; = (1-efficiency_air_filter)*0.007* preservative_concentration*0.001; source OECD 2000; lognormal variance with pedigree 0.4001, pedigree (3,5,5,3,1)
  scenario according to (OECD 2000, p. 38ff)
  property carbon content, fossil 0.624307; name C_content_fossil_Tebuconazole
- Permethrin [water, unspecified]: 1.125e-5 kg; = (1-share_collected_rainwater)*0.00075* preservative_concentration*0.03; source OECD 2000; lognormal variance with pedigree 0.6001, pedigree (3,5,5,3,1)
  scenario according to (OECD 2000, p. 38ff)
- Butylcarbamate, iodopropynyl [water, surface water]: 6.75e-5 kg; = (1-share_collected_rainwater)*0.0045* preservative_concentration*0.03; source OECD 2000; lognormal variance with pedigree 0.6001, pedigree (3,5,5,3,1)
  scenario according to (OECD 2000, p. 38ff)

## Sampling procedure
Plant measurements for input of energy, water, etc. Estimates based on literature for air-borne emissions and emissions into water.

## Extrapolations
This dataset has been extrapolated from year 2012 to the year of the calculation (2021). The uncertainty has been adjusted accordingly.
