# treatment of road wear emissions, passenger car

Dataset: EcoSpold 2, unit process
Geography: RER
Time period: 2012-01-01 to 2021-12-31
Technology level: current
Classification: ISIC rev.4 ecoinvent: 3821:Treatment and disposal of non-hazardous waste
Scenario: Business-as-Usual
System model: Allocation, cut-off by classification
Generated by: Andrew Simons
Published in: Ntziachristos L., Paul P. 2009
Database: ecoinvent
isCopyrightProtected: true
accessRestrictedTo: 1

## General comment
This dataset represents the treatment of non-exhaust emissions produced by road abrasion from an average passenger car. The datasets are treatments because they represent a removal of substances from the technosphere (removal of road material).

This dataset is valid for Europe and represents the operation of an average passenger car.

Calculation of non-exhaust emissions (tyre, brake and road wear emissions as well as petrol evaporation emissions) are based on: Ntziachristos, L., Boulter, P. (2009). EMEP/EEA air pollutant emissions inventory guidebook 2009: Road vehicle tyre and brake wear; Road surface wear. Copenhagen, European Environment Agency.

The emission factors relate to 1kg road wear. The quantity of road wear emissions per kg vehicle and km is then defined in the transport datasets.

The road wear emissions are to air, water and soil. All particulates are accounted for as emissions to air and have particle sizes below 100um. Anything above this does not remain airborne over longer periods. Total particulates equals total of all air emission substances. The fractions to water and soil are calculated by deducting the airborne emissions from the total tyre wear. This remaining amount is then simply split 50/50 between water and soil.

## Included activities start
The activity starts with the road abrasion induced by passenger car

## Included activities end
The activity ends with emissions of road abrasion induced by passenger car

## Reference product
- road wear emissions, passenger car: -1 kg; source Ntziachristos L., Paul P. 2009; CPC 53211: Highways (except elevated highways), streets and roads; By-product classification Waste
  Calculations
  production volume 9.837e7 kg; = 6.558e12*1.5e-5
    Estimation. Calculated from production volume of reference product using the relative outputs.
    Total vkm/yr expresses the total annual kilometers driven by a vehicle
    Total vkm/yr= pkm/yr * p/v = 4.099E+12 pkm/yr * 1.6 p/v = 6.558E+12 vkm/yr
    Annual production volume of non-exhaust road wear emissions = total vkm/yr * total kg emissions = 6.558E+12 vkm/yr * 1.50E-05 kg/vkm
    pkm expresses the unit of measure representing the transport of one passenger over one kilometre. The pkm/year is 4.099E+12. p/v represents the number of passengers per vehicle, which corresponds to 1.6. Source: EU and EEA
    <http://ec.europa.eu/transport/publications/statistics/doc/pb2010_3_transport.pdf>
    <http://www.eea.europa.eu/data-and-maps/figures/term29-occupancy-rates-in-passenger-transport-1>
    Total kg emissions represents the total amount of non-exhaust road wear emissions per vehicle. Total kg non-exhaust road wear emissions= 1.50E-05 kg/vkm. This is the value for a medium sized passenger car. Source: Ntziachristos, L., Boulter, P. (2009b). EMEP/EEA air pollutant emissions inventory guidebook 2009: Road vehicle tyre and brake wear; Road surface wear. Copenhagen, European Environment Agency.
  property price 0 EUR2005
    Waste products are assigned a price of zero as they are assumed to require further treatment.

## Emissions to nature
- Particulates, < 2.5 um [air, urban air close to ground]: 0.27 kg; = LiveLink('\\FS01\Gabe\_LCA\Ecoinvent\v3\v3 data\Livelink data for ecoeditor\All_non_exhaust_emissions.xls','Road','D7','', 'Automatic'); source Ntziachristos L., Paul P. 2009; lognormal variance with pedigree 0.0413, pedigree (2,2,5,1,1)
  Literature value. The three classes of particulates are included in the total emissions together with other air emissions. This implies a (minor) double-counting of mass as by Ecoinvent quality guidelines in “Overview and methodology, final draft revision 2, Weidema et al., 2012
- Particulates, > 10 um [air, urban air close to ground]: 0.5 kg; = LiveLink('\\FS01\Gabe\_LCA\Ecoinvent\v3\v3 data\Livelink data for ecoeditor\All_non_exhaust_emissions.xls','Road','D5','', 'Automatic'); source Ntziachristos L., Paul P. 2009; lognormal variance with pedigree 0.0413, pedigree (2,2,5,1,1)
  (same comment as for Particulates, < 2.5 um)
- Particulates, > 2.5 um, and < 10um [air, urban air close to ground]: 0.23 kg; = LiveLink('\\FS01\Gabe\_LCA\Ecoinvent\v3\v3 data\Livelink data for ecoeditor\All_non_exhaust_emissions.xls','Road','D6','', 'Automatic'); source Ntziachristos L., Paul P. 2009; lognormal variance with pedigree 0.0413, pedigree (2,2,5,1,1)
  (same comment as for Particulates, < 2.5 um)

## Sampling procedure
Literature

## Extrapolations
This dataset has been extrapolated from year 2012 to the year of the calculation (2021). The uncertainty has been adjusted accordingly.
