# dolomite production

Dataset: EcoSpold 2, unit process
Geography: RER
Time period: 2007-01-01 to 2021-12-31
Technology level: current
Classification: ISIC rev.4 ecoinvent: 0891:Mining of chemical and fertilizer minerals
Synonyms: Calcium magnesium carbonate
Scenario: Business-as-Usual
System model: Allocation, cut-off by classification
Generated by: Anna Kounina
Database: ecoinvent
isCopyrightProtected: true
accessRestrictedTo: 1

## General comment
This dataset represents the production of 1 kg of dolomite from dolomite in ground, at the mine. Raw material, energy and water consumption, infrastructure for the site and machineries, land use, and emissions to air are a first approximation based on limestone production. The dataset includes raw materials, machineries, energy consumption, emissions to air, and infrastructure of the site. The dataset doesn't include emissions to water. An overall yield of 95% is assumed.
The main data source for this dataset is Althaus et al (2007).
References:
Althaus H.-J., Chudacoff M., Hischier R., Jungbluth N., Osses M. and Primas A. (2007) Life Cycle Inventories of Chemicals. ecoinvent report No. 8, v2.0. EMPA Dübendorf, Swiss Centre for Life Cycle Inventories, Dübendorf, CH.

## Included activities start
The activity starts from dolomite in ground.

## Included activities end
This activites ends with the production of 1 kg of dolomite. The dataset includes raw materials, machineries, energy consumption, emissions to air, and infrastructure of the site. The dataset doesn't include emissions to water.

## Geography
The dataset is representative of limestone mining in Europe.

## Technology
This datasets corresponds to the technology used in Europe for limestone mining. Crushing and milling assumed as a first approximation. An overall yield of 95% is assumed.

## Time period
Primary data were collected on fertiliser production for the year 2011. These data were based on annual average data for the year 2011.

## Reference product
- dolomite: 1 kg; name RP; CPC 16330: Chalk and dolomite; By-product classification allocatable product; CAS 7000-29-5
  production volume 7.67907e10 kg; name PVRP
    Estimated value. Total production of dolomite in the UK in 2004 was 1.22E+10 Kg (British Geological Survey, Mineral Planning Factsheet, Dolomite, 2006). The European PV was scaled based on the proportion of the nominal GDP of the UK and Europe for the global GDP in 2004 (retrieved from: https://unstats.un.org/unsd/snaama/Basic, accessed 20200512). The nominal GDP corresponds to GDP at current price-US Dollars (source: United Nations, http://data.un.org/Glossary.aspx?q=GDP+%28current+US%24%29, accessed 20200512).
  property price 0.016 EUR2005; name RP_price_EUR2005
    Calculated value based on data from United Nations Commodity Trade Statistics Database (comtrade.un.org). UN comtrade category: 251810 Dolomite not calcined. Year 2005. Using exchange rate of 1EURO = 1.209 USD. Average of price of import into 5 main markets (EU, US, JP, IN and CN).
  property carbon content, fossil 0.130267
    Carbon content, fossil is calculated based on the chemical formula of the substance.
  property oxygen content 0.520586
    Oxygen content (on a dry matter basis) of dolomite is calculated from the molecular formula of the substance (CaMgC2O6).
  property magnesium content 0.131805
    Magnesium content (on a dry matter basis) of dolomite is calculated from the molecular formula of the substance (CaMgC2O6).
  property calcium content 0.217342
    Calcium content (on a dry matter basis) of dolomite is calculated from the molecular formula of the substance (CaMgC2O6).
  property heating value, net 3.95 MJ
    LHV is calculated based on the Carbon content of the product. More details can be found on the respective documentation.
  property carbon content 0.130267
    carbon content on a dry matter basis (reserved; not for manual entry)
  properties: carbon content, non-fossil 0, water content 0, wet mass 1 kg, dry mass 1 kg, water in wet mass 0 kg, carbon allocation 0.130267 kg

## Inputs from technosphere
- industrial machine, heavy, unspecified: 0.000231 kg; lognormal variance with pedigree 0.3407, pedigree (2,2,5,1,1)
  Estimation, based on various data sources (Althaus et al. 2007).
- dolomite quarry infrastructure: 5.25e-11 unit; lognormal variance with pedigree 0.3407, pedigree (2,2,5,1,1)
- diesel, burned in building machine: 0.00371504 MJ; lognormal variance with pedigree 0.0413, pedigree (2,2,5,1,1)
  Data from Fertilizer Europe (2014).
  properties: heating value, net 1 MJ
- recultivation, dolomite mine: 6.52e-6 m2; lognormal variance with pedigree 0.3407, pedigree (2,2,5,1,1)
- blasting: 7.73e-5 kg; lognormal variance with pedigree 0.0413, pedigree (2,2,5,1,1)
  Estimation, based on various data sources (Althaus et al. 2007).
- conveyor belt: 2.78e-8 m; lognormal variance with pedigree 0.3407, pedigree (2,2,5,1,1)
  Estimation, based on various data sources (Althaus et al. 2007).
- electricity, low voltage: 0.111111 kWh; lognormal variance with pedigree 0.0413, pedigree (2,2,5,1,1)
  Data from Fertilizer Europe (2014).

## Inputs from nature
- Dolomite, in ground [natural resource, in ground]: 1 kg; lognormal variance with pedigree 0.0413, pedigree (2,2,5,1,1)
  Data from Fertilizer Europe (2014).
- Water, river [natural resource, in water]: 2.93e-5 m3; lognormal variance with pedigree 0.0413, pedigree (2,2,5,1,1)
  Estimation, based on various data sources (Althaus et al. 2007).
- Transformation, to mineral extraction site [natural resource, land]: 6.52e-6 m2; lognormal variance with pedigree 0.1607, pedigree (2,2,5,1,1)
  Estimation, based on various data sources (Althaus et al. 2007).
- Occupation, mineral extraction site [natural resource, land]: 8.48e-5 m2*year; lognormal variance with pedigree 0.0807, pedigree (2,2,5,1,1)
  Estimation, based on various data sources (Althaus et al. 2007).
- Transformation, from forest, unspecified [natural resource, land]: 6.52e-6 m2; lognormal variance with pedigree 0.1607, pedigree (2,2,5,1,1)
  Estimation, based on various data sources (Althaus et al. 2007).

## Emissions to nature
- Water [water, unspecified]: 2.4905e-5 m3; lognormal variance with pedigree 0.0807, pedigree (2,2,5,1,1)
  Estimation, based on various data sources (Althaus et al. 2007).
- Particulates, > 2.5 um, and < 10um [air, low population density, long-term]: 0.0005 kg; lognormal variance with pedigree 0.1607, pedigree (2,2,5,1,1)
  Data from Fertilizer Europe (2014).
- Water [air, non-urban air or from high stacks]: 4.395e-6 m3; lognormal variance with pedigree 0.0807, pedigree (2,2,5,1,1)
  Estimation, based on various data sources (Althaus et al. 2007).

## Extrapolations
This dataset has been extrapolated from year 2007 to the year of the calculation (2021). The uncertainty has been adjusted accordingly.
