# cocoon production, silkworm rearing

Dataset: EcoSpold 2, unit process
Geography: IN
Time period: 2015-04-01 to 2021-03-31
Technology level: current
Classification: ISIC rev.4 ecoinvent: 0149:Raising of other animals
Classification: EcoSpold01Categories: textiles/processing
Scenario: Business-as-Usual
System model: Allocation, cut-off by classification
Generated by: Madhuri Nigam
Published in: Faist Emmenegger, M. 2018
Database: ecoinvent
isCopyrightProtected: true
accessRestrictedTo: 1

## General comment
Inventory refers to 1 kg cocoons
This dataset represents the production of 65 kg of cocoons from 100 dfls (disease free layings). Sericulture is a well organised and to a large extent government supported activity in this region. It is promoted as a local revenue source for government and employment for the poor. Disinfected eggs are available at distribution centres where farmers can collect them at appropriate time and establish them at their rearing centres, where they have a mulberry garden adjacent to silkworm rearing hall (75 m2)

## Included activities start
Activities start from reception of eggs.

## Included activities end
This activity ends with produced 1 kg cocoons. The datasets includes use of water and disinfectants, mulberry leaves consumption, electricity consumption for heat and light, and plastic tray. Emissions from disinfectants are not modelled while potential N2O emissions from silkworms are modelled based in results from other insects.

## Geography
Average based on data collected from farmer at Guna district in the state of Madhya Pradesh (Central India). Data was also collected from Manager of District Coocoon bank, which is Government operated cocoon distribution centre.Sericulture is a well organised and to a large extent government monitored activity to promote it as a local revenue source for goverment and employment for the poor.

## Reference product
- cocoons: 1 kg; name RP_amount_1; By-product classification allocatable product
  Cocoons are not dried in this process, hence wet weight and properties are considered here
  production volume 1.52e8 kg; name RP_PV_1
    Annual production of cocoons has been sourced from literature: <http://texmin.nic.in/sites/default/files/3_Mulberry_Silk_Production_0.pdf> for 2015-16 accessed on 15.08.2017
  property price 8.2557 EUR2005; name RP_amount_1_price_EUR2005
    Litarature value. Values reported from the Indian Ministry of Textile range between 560and 469 rupied per kg, Price Data for textile, Prices (Month End) for 2018 (retrieved from: http://texmin.nic.in/sites/default/files/monthend_jan2018_1.pdf, accessed 6March 2018). A price of 500 rupies per kg is here assumed.
  property carbon content, fossil 0
    Carbon content fossil is considered zero in all agricultural products and by-products.
  property carbon content, non-fossil 0.475
    Biogenic carbon content of vegetation on a dry mass basis (47.5% DM) derived from FAOSTAT.
    Reference: http://www.fao.org/forestry/17111/en
  property carbon content 0.475
    carbon content on a dry matter basis (reserved; not for manual entry)
  properties: wet mass 1 kg, water in wet mass 0.5 kg, dry mass 0.5 kg, water content 1, carbon allocation 0.2375 kg

## Inputs from technosphere
- thermoforming of plastic sheets: 0.0116279 kg; = 0.011/0.946; lognormal variance with pedigree 0.0066, pedigree (1,4,3,5,1)
  This activity should be used as follows: If an activity requires 1 kg of plastic sheets (produced by an inline plastic sheets and thermoforming process) the user should list (i) 1/0.946 = 1.0571 kg of the service and 1.0571 kg of the plastic type processed.
- chemical, inorganic: 0.0066 kg; lognormal variance with pedigree 0.0046, pedigree (1,4,3,1,1)
  sum of chemicals and disinfectants used during the process. Chemicals include: Bleaching powder, Sanaitech, Lime and Chlorophate. Primary data.
  properties: dry mass 1 kg, wet mass 1 kg, carbon content, fossil 0.003
  note on carbon content, fossil: This dataset is an unweighted average of 20 inorganic substances (listed in Tab 88.1, ecoinvent v2.2 report 8, part II), being part of the top100 chemicals included in this database. The C-content has also been calculated as an unweighted average of the C content of the substances composing this dataset.
- electricity, low voltage: 1.228 kWh; lognormal variance with pedigree 0.0046, pedigree (1,4,3,1,1)
  sum of electricity used for heaters and lighting. Utilities considred here as the process is dependent on it. Heaters are only used during winters to maintain the temprature at aorund 23-25 degree C. This is primary data collected through interview.
- building, hall: 0.00384615 m2; = 75/(390*50); lognormal variance with pedigree 0.3026, pedigree (2,1,3,1,1)
  square meters of building divided by production per year and life time of the plant.
- polyethylene terephthalate, granulate, amorphous: 0.0116279 kg; = 0.011/0.946; lognormal variance with pedigree 0.0066, pedigree (1,4,3,5,1)
  (same comment as for thermoforming of plastic sheets)
  properties: carbon content, fossil 0.625, wet mass 1 kg, dry mass 1 kg, heating value, net 22.95 MJ
- paper, newsprint: 0.0583 kg; lognormal variance with pedigree 0.0046, pedigree (1,4,3,1,1)
  Newspaper used for laying
  properties: dry mass 0.945 kg, water content 0.0582011, wet mass 1 kg, carbon content, non-fossil 0.378026, carbon content, fossil 0.0116283, heating value, net 14.11 MJ
- mulberry leaves: 23 kg; lognormal variance with pedigree 0.0046, pedigree (1,4,3,1,1)
  Amount originate from primary data collection.
  properties: carbon content, non-fossil 0.475, water content 7.11688, wet mass 1 kg, dry mass 0.1232 kg
- biowaste: -8.54 kg; name BP_amount_1; = (4.27*2)*-1; lognormal variance with pedigree 0.0046, pedigree (1,4,3,1,1)
  the rearing process produces a lot of organic waste, (unfed leaves and excreta of silkworms). This is estimated from In Astudillo et al. 2014, this was estimated to be about 4.27 kg of organic waste per kg cocoon on a dry basis, approximately double in wet basis.
  production volume 1.29808e9 kg; = RP_PV_1 * (BP_amount_1 / RP_amount_1)
    Calculated from production volume of reference product using the relative outputs.
  property price 0 EUR2005; name BP_amount_1_price_EUR2005
  properties: carbon content, non-fossil 0.1624, wet mass 1 kg, water content 1.5, heating value, net 4.29 MJ, dry mass 0.4 kg
  note on heating value, net: Value taken from the general comment of the treatment dataset.

## Inputs from nature
- Water, well, in ground [natural resource, in water]: 0.0031964 m3; name water; = 3.1964/1000; lognormal variance with pedigree 0.0046, pedigree (1,4,3,1,1)
  3.1964 kg transformed in cubic meters. Ground water is used here, Primary data collected from silk reeling centre.

## Emissions to nature
- Suspended solids, unspecified [water, surface water]: 0.00089 kg
  According to data collected circe 0.002557 m3 of wastewater are produced in this process. Assuming a strong wastewater composition (FAOSTAT), direct emissions to a surface water body are modelled for: Dissolved solids, Suspended solids, Nitrogen (as N), Phosphorus (as P), Chloride, Grease (oils, non fossil) and BOD5. Alkalinity of water is reported to be 200 mg/L as CaCO3.
  Composition (mg/L): Dissolved solids (850), Suspended solids (350), Nitrogen-as N (85), Phosphorus-as P (20), Chloride (100), Grease-oils, non fossil (150) and BOD5 (300).
  Total emission (kg): Dissolved solids (0.002173552), Suspended solids (0.000894992), Nitrogen-as N (0.00022), Phosphorus-as P (0.00005), Chloride (0.00026), Grease-oils, non fossil (0.00038) and BOD5 (0.00077).
  Reference:Wastewater treatment and use in agriculture - FAO irrigation and drainage paper 47, Chapter 1, Wastewater characteristics and effluent quality parameters, accessed at: http://www.fao.org/docrep/t0551e/t0551e03.htm#TopOfPage on 13 of April 2018.
- Nitrogen [water, surface water]: 0.00022 kg
  (same comment as for Suspended solids, unspecified)
- Chloride [water, surface water]: 0.00026 kg
  (same comment as for Suspended solids, unspecified)
- Phosphorus [water, surface water]: 5e-5 kg
  (same comment as for Suspended solids, unspecified)
- Dissolved solids [water, surface water]: 0.00217 kg
  (same comment as for Suspended solids, unspecified)
- TOC, Total Organic Carbon [water, surface water]: 0.00057037 kg; name toc; = cod/2.7
  COD=2.7*TOC
- COD, Chemical Oxygen Demand [water, surface water]: 0.00154 kg; name cod; = 2*bod5
  It is assumed that COD is two times BOD5.
- DOC, Dissolved Organic Carbon [water, surface water]: 0.00057037 kg; = toc
  assumed TOC=DOC
- Oils, non-fossil [water, surface water]: 0.00038 kg
  (same comment as for Suspended solids, unspecified)
- BOD5, Biological Oxygen Demand [water, surface water]: 0.00077 kg; name bod5
  (same comment as for Suspended solids, unspecified)
- Water [water, surface water]: 0.00255712 m3
  80% disposed to a surface water body
- Dinitrogen monoxide [air, non-urban air or from high stacks]: 2.62752e-5 kg; = 7.83/298/1000; lognormal variance with pedigree 0.0046, pedigree (1,4,3,1,1)
  Taking into account the parameters in Astudillo et al. (2014) it is 7.83 g CO2eq / kg cocoon from N2O emissions, This is divided by the GWP of N2O used in that publication (298). Reference: http://www.sciencedirect.com/science/article/pii/S0959652614005939
- Water [air, unspecified]: 0.00063928 m3; = water*.20; lognormal variance with pedigree 0.0126, pedigree (4,4,3,1,1)
  20% evaporation rate

## Sampling procedure
Field data. Farmers and representatives from cocoon bank were interviewed to provide data based on the representativeness of currently used technology, and their willingness to participate.
Data has been supplemented with information from literature.
Literature Sources: Gururaj, S.R. & Magadum, D.S.B., 2009. YOUNG AGE SILKWORM REARING - TRAINER’SGIUIDE,(P 9)
Sivaprasad, V. et al., 2015. Commercial Chawki Rearing, Mysore (P-13)

## Extrapolations
This dataset has been extrapolated from year 2016 to the year of the calculation (2021). The uncertainty has been adjusted accordingly.
