# olive production

Dataset: EcoSpold 2, unit process
Geography: RoW
Time period: 2001-01-01 to 2021-12-31
Technology level: current
Classification: ISIC rev.4 ecoinvent: 0126:Growing of oleaginous fruits
Tags: WFLDB
Scenario: Business-as-Usual
System model: Allocation, cut-off by classification
Generated by: [System]
Database: ecoinvent
isCopyrightProtected: true
accessRestrictedTo: 1

## General comment
This dataset is a weighted average of the regional datasets, with weights based on production volume of the reference product. Detailed comments and sources about the exchanges can be found in the regional datasets.
The geographicalCorrelation score of every pedigree matrix of was changed to '5'.
Sum of regional production volumes: 9.624e+9 kg
ES: PV = 6.460e+9 kg; weight = 0.6712
IT: PV = 3.164e+9 kg; weight = 0.3288
Yield of the global dataset = 4783.27265716 kg/ha, calculated as a weighted average of the regional yields.
The comments below were part of the ES regional dataset.
This dataset represents the production of 1 kg of olives. The average yield from 2009 - 2012 is 5 t/ha. The data are representative for olive production in Spain (Andalusia) used for the export market. Mineral NPK fertiliser input is 60-60-60 kg/ha. No organic fertilisers are applied. Total active ingredients (a.i.) applied as pesticides amount to 2.15 kg a.i./ha.
The dataset was modelled within the project 'World Food LCA database (WFLDB)'. The aim of this project was to provide inventories of a broad variety of agricultural products and processes and to cover for each product at least 50% of the global export market. The share of olives produced in Spain amounts to 37% of the global production (tonnage produced in 2010). The production system regarded in this dataset aimed at representing olives produced in Spain for the export market.
PEF-Quality: data quality rating (DQR) = 1.5 (i.e. excellent quality). This dataset refers to an average situation; for specific situations exchanges might differ substantially due to site specific parameters

## Included activities start
This activity starts with the nursery producing fruit tree seedlings, i.e. grafted young trees to be planted.

## Included activities end
This activity ends with the waste treatment after the clearing of the orchard (rooting up the trees). The dataset includes all activities of a year in a year in the productive phase of the orchard including the establishment phase per year of lifetime (40 years, 250 trees/ha planted), the clearing of the orchard including waste treatment.
The establishment phase of the orchard includes tree nursery, soil cultivation, planting trees, sowing grass, and irrigation. Fertiliser and pesticide use in a year of the establishment phase is assumed to be half of the amount of a year in the productive phase.
The productive phase of the orchard includes machine operations, corresponding infrastructure, fuel use and sheds. Machine operations in the productive phase are: soil cultivation (mulching, mowing), fertiliser and pesticide application, harvesting and irrigation. Further, direct field emissions and land use change are included. At the end of the productive phase the orchard is cleared by rooting up the trees.
Heavy metal uptake by the crop is considered. The inputs of seedlings, fertilisers and pesticides as well as packaging of fertilisers and pesticides are considered.

## Reference product
- olive: 1 kg; CPC 01450: Olives; By-product classification allocatable product
  production volume 9.51777e9 kg
    Source: FAOSTAT. Average, 2009-2012
  property price 0.63 EUR2005
    Calculated value based on data from United Nations Commodity Trade Statistics Database (comtrade.un.org). UN comtrade category: 70992 Edible vegetables and certain roots and tubers // Other vegetables, fresh or chilled. // - Other : // -- Olives. Year: 2014. Using exchange rate of 1EURO = 1.209 USD. Average of price of import into 5 main markets (EU, US, JP, IN and CN).
  property carbon content, non-fossil 0.599452
    calculation: C-content of components according to ecoinvent report No. 15a. Source of composition: Souci, S.W., Fachmann, W., Kraut, H. (Hg.: Bundesminsiterium fur Ernahrung, Landwirtschaft und Forsten, Bonn) 'Die Zusammensetzung der Lebensmittel - Nahrwerttabellen', medpharm Scientific Publishers Stuttgart, CRC Press; 2000.
  property carbon content 0.599452
    carbon content on a dry matter basis (reserved; not for manual entry)
  properties: carbon content, fossil 0, water content 0.748, dry mass 0.572082 kg, water in wet mass 0.427918 kg, wet mass 1 kg, carbon allocation 0.342936 kg

## Inputs from technosphere
- mowing, by motor mower: 0.00061668 ha; lognormal variance with pedigree 0.126177, pedigree (2,1,4,5,1)
  Proxy: Similar crop and country used.
- glyphosate: 0.00109777 kg; lognormal variance with pedigree 0.0158498, pedigree (2,2,4,5,1)
  Literature value or expert estimation (Mohamad et al. 2014).
  properties: wet mass 1 kg, dry mass 1 kg, carbon content, fossil 0.214286
- fruit tree seedling, for planting: 0.00131356 unit; lognormal variance with pedigree 0.126177, pedigree (2,1,4,5,1)
  Literature value or expert estimation (). This is the number of trees per ha divided by the lifetime years of the orchard.
  properties: dry mass 0.578035 kg, water content 0.73, carbon content, non-fossil 0.439481, wet mass 1 kg
  note on carbon content, non-fossil: calculation: C-content of components according to ecoinvent report No. 15a. Source of composition: https://ndb.nal.usda.gov/ndb/search/. Unspecific seedling used as proxy.
- urea: 0 kg; pedigree (1,1,1,1,1)
  The exchange has been updated from 'urea, as N' into 'urea' and therefore its amount has been scaled (multiplied) from 0.0019 kg by 2.1438 kg of 'urea' per kg of 'urea, as N'. Original comment of the exchange is: Calculated based on literature values or expert estimation: The total amount of nutrient (Pergola et al. 2013) multiplied by the share of fertiliser type (Expert estimation, 2015). See supporting documentation 'WFLDB-Documentation.pdf' chapter 'Fertiliser application' for L3 and L4 data (https://ecoquery.ecoinvent.org/File/Reports).
  properties: wet mass 1 kg, dry mass 1 kg, carbon content, fossil 0.2
- application of plant protection product, by field sprayer: 0.00108928 ha; lognormal variance with pedigree 0.126664, pedigree (2,2,4,5,1)
  Literature value or expert estimation (Mohamad et al. 2014). Field sprayer used as a proxy for pesticide application in orchards. Corresponds to 9 applications per year.
- potassium sulfate: 0.0082032 kg; lognormal variance with pedigree 0.126177, pedigree (2,1,4,5,1)
  The exchange has been updated from 'potassium sulfate, as K2O' into 'potassium sulfate' and therefore its amount has been scaled (multiplied) from 0.0044 kg by 1.85 kg of 'potassium sulfate' per kg of 'potassium sulfate, as K2O'. Original comment of the exchange is: 3bCalculated based on literature values or expert estimation: The total amount of nutrient (Personal written communication, Fiorenzo Pasquali, Yara, 2015) multiplied by the share of fertiliser type (Personal written communication, Fiorenzo Pasquali, Yara, 2015). See supporting documentation 'WFLDB-Documentation.pdf' chapter 'Fertiliser application' for L3 and L4 data (https://ecoquery.ecoinvent.org/File/Reports).
  Corresponds to 21.9 kg/ha
  properties: dry mass 1 kg, wet mass 1 kg
- fertilising, by broadcaster: 0.00042034 ha; lognormal variance with pedigree 0.126177, pedigree (2,1,4,5,1)
  Estimation based on a modified MEXALCA-approach (Roches et al. 2010; Nemecek et al. 2012): See supporting documentation 'WFLDB-Documentation.pdf' chapter 'Machinery processes' for L2 data (https://ecoquery.ecoinvent.org/File/Reports). Corresponds to 2 applications per year.
- transport, tractor and trailer, agricultural: 0.002 metric ton*km; lognormal variance with pedigree 0.164439, pedigree (4,1,4,5,1)
  On-farm transport: Yield (in tonnes) multiplied by the average distance from field to farm. The distance was assumed to be 2 km (proxy).
- establishing orchard: 0.00131356 unit; lognormal variance with pedigree 0.126177, pedigree (2,1,4,5,1)
  (same comment as for fruit tree seedling, for planting)
- tillage, harrowing, by rotary harrow: 0.00042034 ha; lognormal variance with pedigree 0.126177, pedigree (2,1,4,5,1)
  Literature value or expert estimation (Mohamad et al. 2014).
- ammonium sulfate: 0.00395153 kg; lognormal variance with pedigree 0.126177, pedigree (2,1,4,5,1)
  3bCalculated based on literature values or expert estimation: The total amount of nutrient (Pergola et al. 2013) multiplied by the share of fertiliser type (Personal written communication, Fiorenzo Pasquali, Yara, 2015). See supporting documentation 'WFLDB-Documentation.pdf' chapter 'Fertiliser application' for L3 and L4 data (https://ecoquery.ecoinvent.org/File/Reports).
  Corresponds to 18.0 kg/ha
  properties: dry mass 1 kg, wet mass 1 kg
- potassium chloride: 0.0055011 kg; lognormal variance with pedigree 0.126177, pedigree (2,1,4,5,1)
  The exchange has been updated from 'potassium chloride, as K2O' into 'potassium chloride' and therefore its amount has been scaled (multiplied) from 0.0035 kg by 1.5829 kg of 'potassium chloride' per kg of 'potassium chloride, as K2O'. Original comment of the exchange is: 3bCalculated based on literature values or expert estimation: The total amount of nutrient (Personal written communication, Fiorenzo Pasquali, Yara, 2015) multiplied by the share of fertiliser type (Personal written communication, Fiorenzo Pasquali, Yara, 2015). See supporting documentation 'WFLDB-Documentation.pdf' chapter 'Fertiliser application' for L3 and L4 data (https://ecoquery.ecoinvent.org/File/Reports).
  Corresponds to 8.1 kg/ha
  properties: dry mass 1 kg, wet mass 1 kg
- ammonium nitrate: 0 kg; pedigree (1,1,1,1,1)
  The exchange has been updated from 'ammonium nitrate, as N' into 'ammonium nitrate' and therefore its amount has been scaled (multiplied) from 0.0031 kg by 2.8573 kg of 'ammonium nitrate' per kg of 'ammonium nitrate, as N'. Original comment of the exchange is: Calculated based on literature values or expert estimation: The total amount of nutrient (Pergola et al. 2013) multiplied by the share of fertiliser type (Expert estimation, 2015). See supporting documentation 'WFLDB-Documentation.pdf' chapter 'Fertiliser application' for L3 and L4 data (https://ecoquery.ecoinvent.org/File/Reports).
  Corresponds to 24.0 kg/ha
  properties: wet mass 1 kg, dry mass 1 kg
- phosphate rock, beneficiated: 0 kg; pedigree (1,1,1,1,1)
  The exchange has been updated from 'phosphate rock, as P2O5, beneficiated, dry' into 'phosphate rock, beneficiated' and therefore its amount has been scaled (multiplied) from 0.0005 kg by 3.125 kg of 'phosphate rock, beneficiated' per kg of 'phosphate rock, as P2O5, beneficiated, dry'. Original comment of the exchange is: 3bCalculated based on literature values or expert estimation: The total amount of nutrient (Personal written communication, Fiorenzo Pasquali, Yara, 2015) multiplied by the share of fertiliser type (Personal written communication, Fiorenzo Pasquali, Yara, 2015). See supporting documentation 'WFLDB-Documentation.pdf' chapter 'Fertiliser application' for L3 and L4 data (https://ecoquery.ecoinvent.org/File/Reports).
  Corresponds to -0.0525 kg/ha
  properties: wet mass 1 kg, dry mass 1 kg
- diphenylether-compound: 2.67415e-5 kg; lognormal variance with pedigree 0.0158498, pedigree (2,2,4,5,1)
  Literature value or expert estimation (Hermosin et al. 2013).
  properties: wet mass 1 kg, carbon content, fossil 0.560061, dry mass 1 kg
- planting tree: 0.00131356 unit; lognormal variance with pedigree 0.126177, pedigree (2,1,4,5,1)
  (same comment as for fruit tree seedling, for planting)
- inorganic potassium fertiliser, as K2O: 0 kg; pedigree (1,1,1,1,1)
  Calculated based on literature values or expert estimation: The total amount of nutrient (Personal written communication, Luis Angel Lopez, Yara, 2015) multiplied by the share of fertiliser type (Personal written communication, Luis Angel Lopez, Yara, 2015). See supporting documentation 'WFLDB-Documentation.pdf' chapter 'Fertiliser application' for L3 and L4 data (https://ecoquery.ecoinvent.org/File/Reports).
  Corresponds to 18.0 kg/ha
  properties: wet mass 1 kg, dry mass 1 kg
- inorganic phosphorus fertiliser, as P2O5: 0 kg; pedigree (1,1,1,1,1)
  3bCalculated based on literature values or expert estimation: The total amount of nutrient (Personal written communication, Fiorenzo Pasquali, Yara, 2015) multiplied by the share of fertiliser type (Personal written communication, Fiorenzo Pasquali, Yara, 2015). See supporting documentation 'WFLDB-Documentation.pdf' chapter 'Fertiliser application' for L3 and L4 data (https://ecoquery.ecoinvent.org/File/Reports).
  Corresponds to 14.7 kg/ha
  properties: wet mass 1 kg, dry mass 1 kg
- [sulfonyl]urea-compound: 0.000167134 kg; lognormal variance with pedigree 0.0158498, pedigree (2,2,4,5,1)
  Literature value or expert estimation (Hermosin et al. 2013).
  properties: carbon content, fossil 0.540853, wet mass 1 kg, dry mass 1 kg
- organophosphorus-compound, unspecified: 0.000183163 kg; lognormal variance with pedigree 0.0158498, pedigree (2,2,4,5,1)
  Literature value or expert estimation (Mohamad et al. 2014).
  properties: wet mass 1 kg, dry mass 1 kg, carbon content, fossil 0.260898
- manure, liquid, cattle: 0.114772 kg; lognormal variance with pedigree 0.126177, pedigree (2,1,4,5,1)
  Calculated based on literature values: The total amount of manure (Expert estimation, 2015) multiplied by the country-share of manure per animal category (FAOSTAT 2015). See supporting documentation 'WFLDB-Documentation.pdf' chapter 'Fertiliser application' (https://ecoquery.ecoinvent.org/File/Reports).
  Corresponds to 1.5 m3/ha
  properties: dry mass 0.075 kg, water content 12.333, carbon content, non-fossil 0.68, wet mass 1 kg
- mulching: 0.000241275 ha; lognormal variance with pedigree 0.126177, pedigree (2,1,4,5,1)
  Proxy: Similar crop and country used.
- manure, liquid, swine: 0.0328703 kg; lognormal variance with pedigree 0.126177, pedigree (2,1,4,5,1)
  Calculated based on literature values: The total amount of manure (Expert estimation, 2015) multiplied by the country-share of manure per animal category (FAOSTAT 2015). See supporting documentation 'WFLDB-Documentation.pdf' chapter 'Fertiliser application' (https://ecoquery.ecoinvent.org/File/Reports).
  Corresponds to 0.43 m3/ha
  properties: carbon content, non-fossil 0.64, wet mass 1 kg, water content 19, dry mass 0.05 kg
- inorganic nitrogen fertiliser, as N: 0 kg; pedigree (1,1,1,1,1)
  Calculated based on literature values or expert estimation: The total amount of nutrient (Pergola et al. 2013) multiplied by the share of fertiliser type (Expert estimation, 2015). See supporting documentation 'WFLDB-Documentation.pdf' chapter 'Fertiliser application' for L3 and L4 data (https://ecoquery.ecoinvent.org/File/Reports).
  Corresponds to 6.0 kg/ha
  properties: wet mass 1 kg, dry mass 1 kg
- poultry manure, fresh: 0.00264128 kg; lognormal variance with pedigree 0.126177, pedigree (2,1,4,5,1)
  Calculated based on literature values: The total amount of manure (Expert estimation, 2015) multiplied by the country-share of manure per animal category (FAOSTAT 2015). See supporting documentation 'WFLDB-Documentation.pdf' chapter 'Fertiliser application' (https://ecoquery.ecoinvent.org/File/Reports).
  Corresponds to 0.0691 m3/ha
  properties: wet mass 1 kg, water content 1.63158, carbon content, non-fossil 0.33389, dry mass 0.38 kg
- waste wood, untreated: 0 kg; pedigree (1,1,1,1,1)
  Wood from trees after 1-2 years of sorrage at the field (20% water) per lifetime year (20 years) of the orchard
  production volume 0 kg
    Calculated from reference product production volume, reference product amount and byproduct amount.
  properties: dry mass 0.8 kg, carbon content, non-fossil 0.48632, wet mass 1 kg, water content 0.25, heating value, net 13.99 MJ
  note on heating value, net: Value taken from the general comment of the treatment dataset.
- manure, solid, cattle: 0.116176 kg; lognormal variance with pedigree 0.126177, pedigree (2,1,4,5,1)
  Calculated based on literature values: The total amount of manure (Expert estimation, 2015) multiplied by the country-share of manure per animal category (FAOSTAT 2015). See supporting documentation 'WFLDB-Documentation.pdf' chapter 'Fertiliser application' (https://ecoquery.ecoinvent.org/File/Reports).
  Corresponds to 1520.0 kg/ha
  properties: water content 3.5454, dry mass 0.22 kg, carbon content, non-fossil 0.441, wet mass 1 kg
- packaging, for pesticides: 0.00295027 kg; lognormal variance with pedigree 0.0592, pedigree (4,3,4,5,4)
  Total amount of active substance/s of pesticides needed for the production of olive is calculated to be circa 1.48E-03 kg. Pesticide/s used in this dataset is/are: '[sulfonyl]urea-compound', 'copper oxide', 'diphenylether-compound', 'glyphosate', 'organophosphorus-compound, unspecified'. The total amount of active substance/s is doubled in order to account for the packaging of the dilluted product of pesticide/s that is/are applied. Therefore, 2.95E-03 kg of packaging for pesticides is justified with this exchange.
  properties: dry mass 1 kg, price 0.0642 EUR2005, wet mass 1 kg, heating value, net 25.97 MJ, carbon content, fossil 0.85714
- poultry manure, dried: 0.0367485 kg; lognormal variance with pedigree 0.126177, pedigree (2,1,4,5,1)
  Calculated based on literature values: The total amount of manure (Expert estimation, 2015) multiplied by the country-share of manure per animal category (FAOSTAT 2015). See supporting documentation 'WFLDB-Documentation.pdf' chapter 'Fertiliser application' (https://ecoquery.ecoinvent.org/File/Reports).
  Corresponds to 481.0 kg/ha
  properties: mercury content 2e-7, nickel content 4e-5, nitrogen content 0.532, dry mass 0.865 kg, zinc content 0.000349, copper content 4.38e-5, water content 0.156069, lead content 2.92e-6, potassium content 0.024, wet mass 1 kg, cadmium content 2.92e-7, carbon content, non-fossil 0.33389, phosphorus content 0.0167
- liquid manure spreading, by vacuum tanker: 0.000152925 m3; lognormal variance with pedigree 0.126177, pedigree (2,1,4,5,1)
  This amount corresponds to the input of liquid manure.
- packaging, for fertilisers: 0.0680149 kg; lognormal variance with pedigree 0.0592, pedigree (4,3,4,5,4)
  Total amount of active substance/s of fertilisers needed for the production of 'olive' is calculated to be circa 3.40E-02 kg. Fertiliser/s used in this dataset is/are: 'ammonium nitrate, as N', 'ammonium sulfate, as N', 'nitrogen fertiliser, as N', 'phosphate fertiliser, as P2O5', 'phosphate rock, as P2O5, beneficiated, dry', 'potassium chloride, as K2O', 'potassium fertiliser, as K2O', 'potassium sulfate, as K2O', 'urea, as N'. The total amount of active substance/s is doubled in order to account for the packaging of the dilluted product of fertiliser/s that is/are applied. Therefore, 6.80E-02 kg of packaging for fertilisers is justified with this exchange.
  properties: dry mass 1 kg, carbon content, fossil 0.825301, heating value, net 25.01 MJ, price 0.0642 EUR2005, wet mass 1 kg
  note on carbon content, fossil: Considering a chemical formula (C2H4)n for polyethylene, carbon content-fossil is calculated to be 0.856286 kg of Carbon per kg of dry mass.
- solid manure loading and spreading, by hydraulic loader and spreader: 0.152925 kg; lognormal variance with pedigree 0.126177, pedigree (2,1,4,5,1)
  This amount corresponds the input of solid manure.
- irrigation: 0 m3; pedigree (1,1,1,1,1)
  008f9e; Calculated value: The total amount of water used for irrigation (Metzidakis et al. 2008) multiplied by the country-share of irrigation technique (Mohamad et al. 2014). See supporting documentation 'WFLDB-Documentation.pdf' chapter 'Water use for irrigation' (https://ecoquery.ecoinvent.org/File/Reports).
  properties: water content 9089.91, dry mass 0.11 kg, wet mass 1000 kg
- copper oxide: 3.20184e-7 kg; lognormal variance with pedigree 0.0158498, pedigree (2,2,4,5,1)
  Literature value or expert estimation (Mohamad et al. 2014).
  properties: wet mass 1 kg, dry mass 1 kg
- urea: 0.00174027, 0.000257744, 0.00203795 kg (3 entries); lognormal variance with pedigree 0.126177, pedigree (2,1,4,5,1)
  (same comment as for urea)
- ammonium nitrate: 0.00157457, 0.0020486, 0.00534522 kg (3 entries); lognormal variance with pedigree 0.126177, pedigree (2,1,4,5,1)
  (same comment as for ammonium nitrate)
- phosphate rock, beneficiated: 2.16253e-5, 2.16253e-5, 0.00162892 kg (3 entries); lognormal variance with pedigree 0.126177, pedigree (2,1,4,5,1)
  (same comment as for phosphate rock, beneficiated)
- inorganic potassium fertiliser, as K2O: 5.39998e-8, 1.56516e-6, 1.296e-6, 7.75603e-6, 4.08737e-7, 1.57314e-5, 1.67443e-6, 5.15075e-7, 0.000194499, 1.39236e-5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 kg (62 entries); lognormal variance with pedigree 0.126177, pedigree (2,1,4,5,1)
  (same comment as for inorganic potassium fertiliser, as K2O)
- inorganic phosphorus fertiliser, as P2O5: 8.05551e-7, 6.67426e-5, 4.27932e-6, 8.65927e-5, 9.53314e-7, 6.93377e-5, 1.87273e-6, 9.86151e-6, 0.000542913, 0.000114398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 kg (62 entries); lognormal variance with pedigree 0.126177, pedigree (2,1,4,5,1)
  (same comment as for inorganic phosphorus fertiliser, as P2O5)
- inorganic nitrogen fertiliser, as N: 4.3419e-7, 2.31385e-5, 2.90096e-6, 3.32585e-5, 8.42138e-7, 2.97253e-5, 3.90151e-6, 9.44483e-6, 0.00010442, 6.23612e-5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 kg (62 entries); lognormal variance with pedigree 0.126177, pedigree (2,1,4,5,1)
  (same comment as for inorganic nitrogen fertiliser, as N)
- waste wood, untreated: -0.000118681, -0.000389056, -0.000214892, -0.00036266, -0.000414972, -0.0174619, -0.000369568, -0.00216816, -0.000158517, -7.90245e-5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 kg (41 entries); lognormal variance with pedigree 0.126177, pedigree (2,1,4,5,1)
  (same comment as for waste wood, untreated)
  production volume 2.66646e9 kg
- irrigation: 0.00214499, 9.10483e-5, 3.64193e-6, 0.0191748, 0.000314224, 1.57125e-5, 0.000145221, 0.0368478, 0.000708302, 0.000242081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 m3 (15 entries); lognormal variance with pedigree 0.126177, pedigree (2,1,4,5,1)
  (same comment as for irrigation)

## Inputs from nature
- Energy, gross calorific value, in biomass [natural resource, biotic]: 7.16169 MJ; lognormal variance with pedigree 0.0158498, pedigree (2,2,4,5,1)
  Gross energy content is related to MJ/kg dry matter of product. Source: ecoinvent data
- Carbon dioxide, in air [natural resource, in air]: 0.553527 kg; lognormal variance with pedigree 0.0158498, pedigree (2,2,4,5,1)
  CO2 uptake by biomass
- Transformation, to permanent crop, irrigated [natural resource, land]: 0.105085 m2; lognormal variance with pedigree 0.0462144, pedigree (2,1,4,5,1)
  10000 m2 divided by the life time of the perennial crop (20 years).
- Transformation, from permanent crop, irrigated [natural resource, land]: 0.105085 m2; lognormal variance with pedigree 0.0462144, pedigree (2,1,4,5,1)
  10000 m2 divided by the life time of the perennial crop (20 years).
- Occupation, permanent crop, irrigated [natural resource, land]: 2.10737 m2*year; lognormal variance with pedigree 0.0220616, pedigree (2,1,4,5,1)
  Related to the duration from harvest date of previous crop to harvest date of main crop.

## Emissions to nature
- Copper [soil, agricultural]: 4.00664e-7 kg
  Comment on mathematicalRelation:
  5.27813953488e-06 from Calculated value - Freiermuth (2006). See 'WFLDB-Guidelines.pdf', available at https://ecoquery.ecoinvent.org/File/Reports.
  -1.6699788e-06 from Crop, default, heavy metals uptake model
  Heavy metal uptake can be excluded by setting the parameter heavyMetalUptakeSwitch to zero.
- Zinc [soil, agricultural]: 9.96122e-6 kg
  Comment on mathematicalRelation:
  -8.069796e-06 from Crop, default, heavy metals uptake model
  Heavy metal uptake can be excluded by setting the parameter heavyMetalUptakeSwitch to zero.
- Chromium, ion [water, surface water]: 7.9774e-7 kg; lognormal variance with pedigree 0.358938, pedigree (2,2,4,5,1)
  Calculated value - Freiermuth (2006). See 'WFLDB-Guidelines.pdf', available at https://ecoquery.ecoinvent.org/File/Reports.
- Water [water, surface water]: 0.0170271 m3; lognormal variance with pedigree 0.126177, pedigree (2,1,4,5,1)
  Calculated value - Emission calculated from water balance. See 'WFLDB-Guidelines.pdf', available at https://ecoquery.ecoinvent.org/File/Reports.
- Oxyfluorfen [soil, agricultural]: 0.000167134 kg; lognormal variance with pedigree 0.0467216, pedigree (2,2,4,5,1)
  Calculated value - 100% emission in soil. See 'WFLDB-Guidelines.pdf', available at https://ecoquery.ecoinvent.org/File/Reports.
- Phosphate [water, ground-]: 1.41318e-5 kg; lognormal variance with pedigree 0.177866, pedigree (2,2,4,5,1)
  Calculated value - Prasuhn (2006). See 'WFLDB-Guidelines.pdf', available at https://ecoquery.ecoinvent.org/File/Reports.
- Water [water, ground-]: 0.00425678 m3; lognormal variance with pedigree 0.126177, pedigree (2,1,4,5,1)
  (same comment as for Water)
- Ammonia [air, non-urban air or from high stacks]: 0.00195491 kg; lognormal variance with pedigree 0.0467216, pedigree (2,2,4,5,1)
  Calculated value - EMEP/EEA (2013). See 'WFLDB-Guidelines.pdf', available at https://ecoquery.ecoinvent.org/File/Reports.
- Water [air, non-urban air or from high stacks]: 0.0517958 m3; lognormal variance with pedigree 0.126177, pedigree (2,1,4,5,1)
  (same comment as for Water)
- Phosphorus [water, surface water]: 2.19889e-5 kg; lognormal variance with pedigree 0.177866, pedigree (2,2,4,5,1)
  Calculated value - Prasuhn (2006) and SQCB-Erosion. See 'WFLDB-Guidelines.pdf', available at https://ecoquery.ecoinvent.org/File/Reports.
- Carbon dioxide, from soil or biomass stock [air, non-urban air or from high stacks]: 0.00614642 kg; normal variance with pedigree 0.5452, pedigree (3,3,5,5,2)
  Global average LUC emissions according 2nd edition of the Quantis-modified tool developed by Blonk Consultants 'WFLDB-adapted-Blonk 2014 direct-land-use-change-assessment-tool_2015-05-18a.xlsx', tab. 'Country & land use unknown'. The emission are based on the relative change in production areas in all countries for a given crop. The weighted average is used which takes into acount relative difference in crop expansion into primary forest, secondary forest, grassland, perennial and annual land.
  Uncertainty: Uncertainty estimated based on IPCC guidlines 2006.
- Diflufenican [soil, agricultural]: 2.67415e-5 kg; lognormal variance with pedigree 0.0467216, pedigree (2,2,4,5,1)
  (same comment as for Oxyfluorfen)
- Nitrogen oxides [air, non-urban air or from high stacks]: 0.000566061 kg; lognormal variance with pedigree 0.126664, pedigree (2,2,4,5,1)
  Calculated value - EEA/EMEP (2013). See 'WFLDB-Guidelines.pdf', available at https://ecoquery.ecoinvent.org/File/Reports.
- Chromium, ion [water, ground-]: 4.01767e-6 kg; lognormal variance with pedigree 0.358938, pedigree (2,2,4,5,1)
  (same comment as for Chromium, ion)
- Nitrate [water, ground-]: 0.0119193 kg; lognormal variance with pedigree 0.177866, pedigree (2,2,4,5,1)
- Carbon dioxide, fossil [air, non-urban air or from high stacks]: 0.0030061 kg; lognormal variance with pedigree 0.0158498, pedigree (2,2,4,5,1)
  Calculated value - CO2 emissions from urea and lime. See 'WFLDB-Guidelines.pdf', available at https://ecoquery.ecoinvent.org/File/Reports.
- Chromium [soil, agricultural]: 1.96235e-6 kg
  Comment on mathematicalRelation:
  1.13197674419e-06 from Calculated value - Freiermuth (2006). See 'WFLDB-Guidelines.pdf', available at https://ecoquery.ecoinvent.org/File/Reports.
  -1.3734e-07 from Crop, default, heavy metals uptake model
  Heavy metal uptake can be excluded by setting the parameter heavyMetalUptakeSwitch to zero.
- Nickel, ion [water, surface water]: 4.98355e-7 kg; lognormal variance with pedigree 0.358938, pedigree (2,2,4,5,1)
  (same comment as for Chromium, ion)
- Nickel, ion [water, ground-]: 2.18577e-11 kg; lognormal variance with pedigree 0.358938, pedigree (2,2,4,5,1)
  (same comment as for Chromium, ion)
- Nickel [soil, agricultural]: 1.01455e-6 kg
  Comment on mathematicalRelation:
  1.50681395349e-06 from Calculated value - Freiermuth (2006). See 'WFLDB-Guidelines.pdf', available at https://ecoquery.ecoinvent.org/File/Reports.
  -2.632392e-07 from Crop, default, heavy metals uptake model
  Heavy metal uptake can be excluded by setting the parameter heavyMetalUptakeSwitch to zero.
- Mercury [water, surface water]: 1.70568e-9 kg; lognormal variance with pedigree 0.358938, pedigree (2,2,4,5,1)
  (same comment as for Chromium, ion)
- Mercury [water, ground-]: 2.58829e-10 kg; lognormal variance with pedigree 0.358938, pedigree (2,2,4,5,1)
  (same comment as for Chromium, ion)
- Mercury [soil, agricultural]: 1.64852e-8 kg
  Comment on mathematicalRelation:
  6.14534883721e-08 from Calculated value - Freiermuth (2006). See 'WFLDB-Guidelines.pdf', available at https://ecoquery.ecoinvent.org/File/Reports.
  -1.0220112e-08 from Crop, default, heavy metals uptake model
  Heavy metal uptake can be excluded by setting the parameter heavyMetalUptakeSwitch to zero.
- Lead [water, ground-]: 4.49198e-8 kg; lognormal variance with pedigree 0.358938, pedigree (2,2,4,5,1)
  (same comment as for Chromium, ion)
- Cadmium, ion [water, surface water]: 3.70131e-9 kg; lognormal variance with pedigree 0.358938, pedigree (2,2,4,5,1)
  (same comment as for Chromium, ion)
- Lead [water, surface water]: 2.7014e-7 kg; lognormal variance with pedigree 0.358938, pedigree (2,2,4,5,1)
  (same comment as for Chromium, ion)
- Cadmium, ion [water, ground-]: 3.02561e-9 kg; lognormal variance with pedigree 0.358938, pedigree (2,2,4,5,1)
  (same comment as for Chromium, ion)
- Lead [soil, agricultural]: 1.92356e-6 kg
  Comment on mathematicalRelation:
  7.82627906977e-07 from Calculated value - Freiermuth (2006). See 'WFLDB-Guidelines.pdf', available at https://ecoquery.ecoinvent.org/File/Reports.
  -1.3627404e-07 from Crop, default, heavy metals uptake model
  Heavy metal uptake can be excluded by setting the parameter heavyMetalUptakeSwitch to zero.
- Dinitrogen monoxide [air, non-urban air or from high stacks]: 0.000352953 kg; lognormal variance with pedigree 0.126664, pedigree (2,2,4,5,1)
  Calculated value - IPCC (2006). See 'WFLDB-Guidelines.pdf', available at https://ecoquery.ecoinvent.org/File/Reports.
- Glyphosate [soil, agricultural]: 0.00109777 kg; lognormal variance with pedigree 0.0467216, pedigree (2,2,4,5,1)
  (same comment as for Oxyfluorfen)
- Dimethoate [soil, agricultural]: 0.000183163 kg; lognormal variance with pedigree 0.0467216, pedigree (2,2,4,5,1)
  (same comment as for Oxyfluorfen)
- Phosphate [water, surface water]: 6.37443e-5 kg; lognormal variance with pedigree 0.177866, pedigree (2,2,4,5,1)
  (same comment as for Phosphate)
- Copper, ion [water, surface water]: 1.10833e-6 kg; lognormal variance with pedigree 0.358938, pedigree (2,2,4,5,1)
  (same comment as for Chromium, ion)
- Zinc, ion [water, surface water]: 1.23525e-6 kg; lognormal variance with pedigree 0.358938, pedigree (2,2,4,5,1)
  (same comment as for Chromium, ion)
- Cadmium [soil, agricultural]: 6.29098e-7 kg
  Comment on mathematicalRelation:
  5.89139534884e-07 from Calculated value - Freiermuth (2006). See 'WFLDB-Guidelines.pdf', available at https://ecoquery.ecoinvent.org/File/Reports.
  -2.558808e-08 from Crop, default, heavy metals uptake model
  Heavy metal uptake can be excluded by setting the parameter heavyMetalUptakeSwitch to zero.
- Copper, ion [water, ground-]: 6.42019e-7 kg; lognormal variance with pedigree 0.358938, pedigree (2,2,4,5,1)
  (same comment as for Chromium, ion)
- Zinc, ion [water, ground-]: 3.53749e-6 kg; lognormal variance with pedigree 0.358938, pedigree (2,2,4,5,1)
  (same comment as for Chromium, ion)

## Sampling procedure
WFLDB Methodological Guidelines for the Life Cycle Inventory of Agricultural Products in the latest version, available at: (Report section: https://v30.ecoquery.ecoinvent.org/File/Reports). Data sources: Data were categorised from level 0 (L0) to level (L4) as follows: L0 = estimate, proxy; L1 = statistical data (e.g. FAOSTAT); L2 = L1 adapted to crop and country; L3 = literature data or L1 resp. L2 data approved by experts; medium detailing (i.e. kg of total N-fertiliser); L4 = L3 data of high detailing (i.e. portion N-fertiliser types).In this dataset data were obtained for yield: yield: L3, fertilisers: L4, pesticides: L4, machinery and work processes: L4, amount of irrigation: L3. For information regarding the calculation of individual exchanges see supporting documentation WFLDB-Documentation.pdf.

## Extrapolations
The amount of the exchanges are weighted average of regional datasets.

## Review by Assumpció ANTON 2016-05-30
Be aware that the use of statistics in input calculations could provide some specific inputs not common for specific crops, this should be corrected if better information is available and better reflexed in DQR . Currently, I would dissent for some of good marks provided, being a revision of criteria applied advisable.

Pesticides will need to be amended periodically checking for update of pesticides' ban.
