# treatment of tallow to esterquat

Dataset: EcoSpold 2, unit process
Geography: RER
Time period: 1992-01-01 to 2021-12-31
Technology level: current
Classification: ISIC rev.4 ecoinvent: 2023:Manufacture of soap and detergents, cleaning and polishing preparations, pe
Classification: EcoSpold01Categories: washing agents/tensides
Tags: ConvertedDataset
Scenario: Business-as-Usual
System model: Allocation, cut-off by classification
Generated by: Rainer Zah
Published in: Zah R. 2007
Database: ecoinvent
isCopyrightProtected: true
accessRestrictedTo: 1

## General comment
This dataset represents the production of 1 kg of esterquat from tallow. Material and energy inputs are based on literature sources. Transport and infrastructure are based on a large chemical plant. Emissions and water consumption are not included.
[This dataset was already contained in the ecoinvent database version 2. It was not individually updated during the transfer to ecoinvent version 3. Life Cycle Impact Assessment results may still have changed, as they are affected by changes in the supply chain, i.e. in other datasets. This dataset was generated following the ecoinvent quality guidelines for version 2. It may have been subject to central changes described in the ecoinvent version 3 change report (http://www.ecoinvent.org/database/ecoinvent-version-3/reports-of-changes/), and the results of the central updates were reviewed extensively. The changes added e.g. consistent water flows and other information throughout the database. The documentation of this dataset can be found in the ecoinvent reports of version 2, which are still available via the ecoinvent website. The change report linked above covers all central changes that were made during the conversion process.]

## Included activities start
From reception of the precoursors tallow, triethanolamine, isopropanol, dimetyhl sulfatem, and nitrogen at the factory gate.

## Included activities end
This activity ends with the production of 1 kg of esterquat. The dataset includes material and energy input, production of waste, transports and infrastructure. The dataset doesn't include water consumption and emissions.

## Geography
Data based on the European esterquat production

## Technology
Quaternary ammonium compounds are obtained by alkylisation of tertiary amines. For esterquat (cationic tensids) at least one ot the alkyl residues must be longer.
For this dataset, representing typical European production mix in the mid 90s, the cationic tensides are produced by esterification of triethanolamines and subsequent quaternation with dimethylsulphate. Isopropanol is used as solvent. Fatty acids used for the esterification step are from tallow.

## Time period
data of published literature

## Parameters
- fraction, process water, to air: 0.4 dimensionless; name fraction_PW_to_air; lognormal variance with pedigree 0.092025, pedigree (4,4,3,2,4)
  Literature value (Statistics Canada, 2007 & Shaffer, K.H., 2008, Consumptive water use in the Great Lakes Basin, USGS) (Vionnet, S., Quantis Water Database - Technical Report, 2012).

## Reference product
- tallow, unrefined: 0 kg; source Dall'Acqua S. 1995; CPC 2151: Animal fats, unrendered; By-product classification Recyclable; CAS 61789-97-7
  EcoSpold01Location=CH
  Literature value.
  production volume 0 kg; = ABS(tallow/ esterquat* esterquat_PV)
    Calculated from the production volume of esterquat in proportion to the respective output amounts.
  property heating value, net 22.1 MJ
    LHV is calculated based on the Carbon content of the product. More details can be found on the respective documentation.
  property price 0.411 EUR2005
    Temporary price data. Calculated as 90% of purchasers price based on: 2005 import and export prices (total trades (USD) divided by total weight (kg) in biggest economies of the world: EU27, USA, Brasil, China, India, Japan and Russia) from UN Commodity Trade Statistics Database (http://data.un.org/Explorer.aspxDatabase [Accessed 2011.06.21]). Commodity: Lard stearin, oleostearin & oils, natural tallow oil
  property carbon content, non-fossil 0.75
    Carbon content in fats of dry mass is considered to be 75% (from "Evolutionary and Biochemical Aspects", A.D. Kay and T. Vrede (in Global Ecology, 2010, Elsevier B.V., S.E. Jørgensen Ed.))
  property carbon content 0.75
    carbon content on a dry matter basis (reserved; not for manual entry)
  properties: carbon content, fossil 0, wet mass 1 kg, water content 0.025641, dry mass 0.975 kg, water in wet mass 0.025 kg, carbon allocation 0.73125 kg
- esterquat: 1 kg; By-product classification allocatable product; CPC 353: Soap, cleaning preparations, perfumes and toilet preparations
  EcoSpold01Location=RER
  Esterquat (tetraakyl ammnioum salts) are one of the most important cationic tensides. The positive electrical charge of the hydrophilic moiety gives the cationic tensides properties that open up applications that are unsuitable or barely suitable for anionic or nonionic tensides. The cationic fabric softeners, for example, attach well to textiles thanks to their affinity for fibres. They give the washed textiles a soft feel and thus improve their wearability. Important applications for these cationic tensides are as microbicides, herbicides, inhibitors of corrosion or of oxidation and so on. In the detergents industry, esterquat is mainly used as intermediate for the production of fabric softeners.
  production volume 8.0785e6 kg; name esterquat_PV
  properties: heating value, net 21.68 MJ, price 2.16 EUR2005, water content 0, dry mass 1 kg, water in wet mass 0 kg, carbon content, non-fossil 0.518779, wet mass 1 kg, carbon content, fossil 0.196746, carbon content 0.715525, carbon allocation 0.715525 kg

## By-products
- esterquat: 0 kg; By-product classification allocatable product; CPC 353: Soap, cleaning preparations, perfumes and toilet preparations
  (same comment as for esterquat)
  production volume 0 kg; name esterquat_PV
    5% of total esterquat production is assumed to come from rendered animal fats, reflecting its share in total animal fats and vegetable oils. Total production volume is from year 2000 for Western Europe (151000000 kg; http://www.cefic.org/files/Publications/cesio_5.pdf) extrapolated to Europe 2005 with factor 1.07
  property heating value, net 21.68 MJ
    (same comment as for tallow, unrefined)
  property price 2.16 EUR2005
    Temporary price data. Calculated as 90% of purchasers price based on: 2005 import and export prices (total trades (USD) divided by total weight (kg) in biggest economies of the world: EU27, USA, Brasil, China, India, Japan and Russia) from UN Commodity Trade Statistics Database (http://data.un.org/Explorer.aspxDatabase [Accessed 2011.06.20]). Commodity: Quarternary ammonium salts and hydroxides, nes
  property carbon content, non-fossil 0.518779
    Esterquats are produced by esterification with triethanolamine and quaternication with DMS (ecoinvent v2.2 report 12-part 4). An average esterquat (Ester Quats: the novel class of cationic fabric softeners, Mishra, S. et al., 2007, Journal of Oleo Science, 56:269-276) can be resumed in the formula C41H82NO5. C6 of this molecule come from TEA, and C1 from DMS, so are fossile. The rest C34, are biogenic, coming from the fatty acid. The esterquat is in an Isopropanol solution (15% isopropanol). Isopropanol is C3H8O, and C3 have a fossile origin.
  property carbon content, fossil 0.196746
    Esterquats are produced by esterification with triethanolamine and quaternication with DMS (ecoinvent v2.2 report 12-part 4). An average esterquat (Ester Quats: the novel class of cationic fabric softeners, Mishra, S. et al., 2007, Journal of Oleo Science, 56:269-276) can be resumed in the formula C41H82NO5. C6 of this molecule come from TEA, and C1 from DMS, so are fossile. The rest C34, are biogenic, coming from the fatty acid. The esterquat is in an 15% Isopropanol solution. Isopropanol is C3H8O, and C3 have a fossile origin.
  property carbon content 0.715525
    carbon content on a dry matter basis (reserved; not for manual entry)
  properties: water content 0, dry mass 1 kg, water in wet mass 0 kg, wet mass 1 kg, carbon allocation 0.715525 kg

## Inputs from technosphere
- heat, district or industrial, natural gas: 1.6036 MJ; source Dall'Acqua S. 1995; lognormal variance with pedigree 0.061225, pedigree (2,3,5,2,1)
  Literature value.
  properties: heating value, net 1 MJ
- heat, district or industrial, other than natural gas: 0.895062 MJ; source Dall'Acqua S. 1995; lognormal variance with pedigree 0.061225, pedigree (2,3,5,2,1)
  Literature value.
  properties: heating value, net 1 MJ
- electricity, medium voltage: 0.0170488 kWh; source Dall'Acqua S. 1995; lognormal variance with pedigree 0.061225, pedigree (2,3,5,2,1)
  Literature value.
- isopropanol: 0.15 kg; source Dall'Acqua S. 1995; lognormal variance with pedigree 0.061225, pedigree (2,3,5,2,1)
  Literature value.
  EcoSpold01Location=RER
  properties: heating value, net 34.3 MJ, wet mass 1 kg, carbon content, fossil 0.6, dry mass 1 kg
- dimethyl sulfate: 0.13 kg; source Dall'Acqua S. 1995; lognormal variance with pedigree 0.061225, pedigree (2,3,5,2,1)
  Literature value.
  EcoSpold01Location=RER
  properties: heating value, net 11.54 MJ, carbon content, fossil 0.190476, wet mass 1 kg, dry mass 1 kg
- triethanolamine: 0.17 kg; source Dall'Acqua S. 1995; lognormal variance with pedigree 0.061225, pedigree (2,3,5,2,1)
  EcoSpold01Location=RER
  Literature value.
  properties: dry mass 1 kg, carbon content, fossil 0.483221, wet mass 1 kg, heating value, net 26.82 MJ
- chemical factory, organics: 4e-10 unit; lognormal variance with pedigree 0.361225, pedigree (2,3,5,2,1)
  EcoSpold01Location=RER
  Estimation: estimated based on a large chemical plant.
- wastewater, unpolluted: -0.00026 m3; name wastewater; source Dall'Acqua S. 1995; lognormal variance with pedigree 0.061225, pedigree (2,3,5,2,1)
  EcoSpold01Location=CH
  Literature value.
  production volume 2100.41 m3; = ABS( wastewater/ esterquat* esterquat_PV)
    (same comment as for tallow, unrefined)
  property price 0 EUR2005; name wastewater_price_EUR2005
  properties: carbon content, fossil 0.00178991, dry mass 0.337476 kg, water content 2962.17, carbon content, non-fossil 0.00178991, wet mass 1000 kg
  note on carbon content, fossil: Assumed to be like in tap water. Bicarbonate content is 2.93 mol/m3. CO2 content is 0.1 mol/m3 (ecoinvent v2.2 report 8, Tab 93.1).
- nitrogen, liquid: 0.0028 kg; source Dall'Acqua S. 1995; lognormal variance with pedigree 0.061225, pedigree (2,3,5,2,1)
  EcoSpold01Location=RER
  Literature value.
  properties: wet mass 1 kg, dry mass 1 kg
- tallow, unrefined: 0.6 kg; source Dall'Acqua S. 1995
  EcoSpold01Location=CH
  Literature value.
  production volume 4.8471e6 kg
  properties: wet mass 1 kg, heating value, net 22.1 MJ, water content 0.025641, dry mass 0.975 kg, price 0.411 EUR2005, carbon content, non-fossil 0.75
  note on carbon content, non-fossil: Carbon content in fats of dry mass is considered to be 75% (from "Evolutionary and Biochemical Aspects", A.D. Kay and T. Vrede (in Global Ecology, 2010, Elsevier B.V., S.E. Jørgensen Ed.))

## Inputs from nature
- Water, unspecified natural origin [natural resource, in water]: 0.18175 m3; name water_UNO_input; source EMPA - Swiss Federal Laboratories for Ma 1999; lognormal variance with pedigree 0.052625, pedigree (3,3,5,2,1)
  Calculated based on literature, (Vionnet, S., Quantis Water Database - Technical Report, 2012). Technology: fatty acid from cattle tallow, esterification of triethanolamine, quaternization with DMS.
  property carbon content, fossil 0.0104329; name C_content_fossil
  property water content 9081.65; name water_content
  property dry mass 0.1101 kg; name DM
  property carbon content, non-fossil 0; name C_content_non_fossil
  property wet mass 1000 kg; name WM
  property water in wet mass 999.89 kg; name WWM

## Emissions to nature
- Water [water, unspecified]: 0.10905 m3; name water_to_water_unspecified; = water_UNO_input*(1-fraction_PW_to_air); lognormal variance with pedigree 0.0807, pedigree (2,2,5,1,1)
  Calculated value based on literature values and expert opinion. See comments in the parametres' comment field.
  property fraction, origin: unspecified 1; name fraction_origin_unspecified_Ww
  property fraction, origin: fresh water 0; name fraction_origin_fresh_water_Ww
  property fraction, origin: salt water 0; name fraction_origin_salt_water_Ww
- Water [air, unspecified]: 0.0727 m3; name water_to_air_unspecified; = (water_UNO_input*fraction_PW_to_air); lognormal variance with pedigree 0.0807, pedigree (2,2,5,1,1)
  (same comment as for Water)
  property fraction, origin: salt water 0; name fraction_origin_salt_water
  property fraction, origin: fresh water 0; name fraction_origin_fresh_water
  property fraction, origin: unspecified 1; name fraction_origin_unspecified

## Sampling procedure
data out of ECOSOL study of European Surfactant Industry. Common translation rules used, reported in Chemical report (Althaus et al. 2003).

## Extrapolations
This dataset has been extrapolated from year 1998 to the year of the calculation (2021). The uncertainty has been adjusted accordingly.

## Review by Heiko Kunst 2003-07-04
Passed.
