# lime production, milled, loose

Dataset: EcoSpold 2, unit process
Geography: CH
Time period: 2000-01-01 to 2021-12-31
Technology level: current
Classification: ISIC rev.4 ecoinvent: 0810:Quarrying of stone, sand and clay
Classification: EcoSpold01Categories: construction materials/additives
Tags: ConvertedDataset
Scenario: Business-as-Usual
System model: Allocation, cut-off by classification
Generated by: [System]
Published in: Kellenberger D. 2007
Database: ecoinvent
isCopyrightProtected: true
accessRestrictedTo: 1

## General comment
This dataset represents the production of 1 kg of milled lime. IInfrastructure data are estimated based on a tour and sketches of the process. The value of the infrastructure is normalized with a annual production capacity of about 6'000 tons of product per year.
This dataset represents the production of 1 kg of milled lime. Infrastructure data is estimated based on a tour and sketches of the process, and then normalized with a annual production capacity of about 6'000 tons of product per year.

## Included activities start
From the reception of crushed limestone for mill, at the factory gate.

## Included activities end
The activity ends with the milled lime. The dataset includes the different production processes (milling, sieving, filtering and storing), the energy consumption for buildings heating and the infrastructure used in the production process.

## Geography
Data is based on a Swiss company.

## Technology
The current Swiss technology is considered. The company works on a technically high level; heavy machines (excl. building machines) are operated electrically; air is recirculated in closed loop to avoid dust emissions

## Parameters
- fraction, process water, to air: 0.291902 dimensionless; name fraction_PW_to_air; lognormal variance with pedigree 0.092025, pedigree (4,4,3,2,4)
  Calculated based on literature value (IPPC, 2010) (Vionnet, S., Quantis Water Database - Technical Report, 2012).

## Reference product
- lime: 1 kg; source Oates T. 1997; By-product classification allocatable product; CPC 161: Chemical and fertilizer minerals; CAS 1305-78-8
  EcoSpold01Location=CH
  Limestone is a naturally occurring mineral that consists principally of calcium carbonate but may also contain magnesium carbonate as a secondary component. It is found in many forms and is classified in terms of its origin, chemical composition, structure, and geological formation. Limestone occurs widely throughout the world and is an essential raw material for many industries.
  Limestone is generally used for construction, cement, quicklime, agriculture, metal refining and flue gas desulphurisation:
  Construction: Limestone is the most widely used crushed rock, although it is generally sold in form of sand and gravel.
  Cement: The production of cement is the main use for chalk, and a major use for dense, high-calcium limestone. Approximately 1.1 t of limestone is required for 1 t of cement.
  Quicklime: Approximately 1.8 t of limestone is required per 1.0 t of quicklime.
  Agriculture: Many crops grow best under neutral to slightly acid conditions (i.e., pH between 6 and 7). Thus soils which are more acidic than pH 6 generally benefit from the application of limestone.
  Metal refining: When limestone is used in metal refining it is initially converted to quicklime, which reacts with acidic oxides (e.g., SiO2, Al2O, and Fe2O3) to produce molten slag.
  Flue gas desulphurisation: A growing use of limestone is in the treatment of flue gas from combustion processes to remove sulphur dioxide.
  production volume 6e6 kg
    Unknown
    Source: ecoinvent 2. Only one producer in Switzerland.
  property carbon content, fossil 0.117257
    Table 3.1, ecoinvent v2.2 report 7, part VII, pg 3. MW CaCO3=100, MW MgCO3=84. C content of limestone is 0.117257 kg/kg DM
  property price 0.117 EUR2005
    Temporary price data. Calculated as 90% of purchasers price based on: 2005 import and export prices (total trades (USD) divided by total weight (kg) in biggest economies of the world: EU27, USA, Brasil, China, India, Japan and Russia) from UN Commodity Trade Statistics Database (http://data.un.org/Explorer.aspxDatabase [Accessed 2011.06.20]). Commodity: Calcium carbonate
  property carbon content 0.117257
    carbon content on a dry matter basis (reserved; not for manual entry)
  properties: water content 0.00200401, carbon content, non-fossil 0, heating value, net 0 MJ, dry mass 0.998 kg, water in wet mass 0.002 kg, wet mass 1 kg, carbon allocation 0.117023 kg

## Inputs from technosphere
- electricity, high voltage: 0.016 kWh; lognormal variance with pedigree 0.0401, pedigree (1,2,5,1,1)
  Estimation, based on company data. It is assumed that the 50% of the electricity consumption is covered by the grid and 50% by a hydropower plant nearby.
- industrial machine, heavy, unspecified: 0.000225 kg; lognormal variance with pedigree 0.3686, pedigree (4,3,5,1,1)
  EcoSpold01Location=RER
  Estimation. The equipment included in the infrastructure are 1 crusher, 1 sieve, and 2 small silos and 1 filter. The total weight is 34t. The lifetime considered is 25 years.
- limestone, crushed, for mill: 1 kg; lognormal variance with pedigree 0.0606, pedigree (3,3,5,1,3)
  Estimation, based on company data. The total amount of crushed limestone for mill used in 2001 was 6.048t. Losses due to dust emissions were neglected.
  EcoSpold01Location=CH
  properties: wet mass 1 kg, water content 0.00200401, dry mass 0.998 kg, carbon content, fossil 0.117492
  note on carbon content, fossil: Table 3.1, ecoinvent v2.2 report 7, part VII, pg 3. MW CaCO3=100, MW MgCO3=84. C content of limestone is 0.117257 kg/kg DM Table 3.1, ecoinvent v2.2 report 7, part VII, pg 3. MW CaCO3=100, MW MgCO3=84
- heat, central or small-scale, other than natural gas: 0.00141 MJ; lognormal variance with pedigree 0.0401, pedigree (1,2,5,1,1)
  Estimation, based on company data. The total amount of fuel used for heating the administrative buildings is considered.
  EcoSpold01Location=CH
  properties: heating value, net 1 MJ
- heat, district or industrial, other than natural gas: 0.0898 MJ; lognormal variance with pedigree 0.0401, pedigree (1,2,5,1,1)
  Estimation, based on company data. The oil consumption for grinding drying for the year 2001 is considered. The total amount is 2.45L/t and the fllowing calculations were done:
  2.45 l/t = 0.00000245 m3/kg = (density = 860 kg/m3) 0.002107 kg/kg = (calorific value = 42.6 MJ/kg) 0.089758 MJ/kg
  EcoSpold01Location=CH
  properties: heating value, net 1 MJ
- electricity, medium voltage: 0.016 kWh; lognormal variance with pedigree 0.0401, pedigree (1,2,5,1,1)
  Estimation, based on company data. It is assumed that the 50% of the electricity consumption is covered by the grid and 50% by a hydropower plant nearby.
  EcoSpold01Location=CH

## Inputs from nature
- Water, unspecified natural origin [natural resource, in water]: 0.0028009 m3; name water_UNO_input; source Byers, W. 2003; lognormal variance with pedigree 0.052625, pedigree (3,3,5,2,1)
  Calculated based on literature, (Vionnet, S., Quantis Water Database - Technical Report, 2012). The crushed and washed limestone is entering the process. The water use in this process is the one used in ball/rod mill and wet screening. The evaporation rate of 29.2% is calculated based on Byers. The process ends when milled loose limestone is leaving the plant. It is based on general data on ball/rod mill for any kind of rock.
  property water content 9081.65; name water_content
  property carbon content, non-fossil 0; name C_content_non_fossil
  property carbon content, fossil 0.0104329; name C_content_fossil
  property water in wet mass 999.89 kg; name WWM
  property dry mass 0.1101 kg; name DM
  property wet mass 1000 kg; name WM

## Emissions to nature
- Water [air, unspecified]: 0.000817589 m3; name water_to_air_unspecified; = (water_UNO_input*fraction_PW_to_air); lognormal variance with pedigree 0.0807, pedigree (2,2,5,1,1)
  Calculated value based on literature values and expert opinion. See comments in the parametres' comment field.
  property fraction, origin: salt water 0; name fraction_origin_salt_water
  property fraction, origin: fresh water 0; name fraction_origin_fresh_water
  property fraction, origin: unspecified 1; name fraction_origin_unspecified
- Water [water, unspecified]: 0.00198331 m3; name water_to_water_unspecified; = water_UNO_input*(1-fraction_PW_to_air); lognormal variance with pedigree 0.0807, pedigree (2,2,5,1,1)
  (same comment as for Water)
  property fraction, origin: unspecified 1; name fraction_origin_unspecified_Ww
  property fraction, origin: salt water 0; name fraction_origin_salt_water_Ww
  property fraction, origin: fresh water 0; name fraction_origin_fresh_water_Ww

## Sampling procedure
Data is based on a Swiss company, for the year 2001.

## Extrapolations
This dataset has been extrapolated from year 2002 to the year of the calculation (2021). The uncertainty has been adjusted accordingly.

## Review by Roland Hischier 2011-09-22
Transfer of documentation done.

## Review by Roberto Dones 2003-07-04
Passed

## Review by Bo Weidema 2012-09-28
replaced "electricity, high voltage, hydro, run-of-river" with "electricity, high voltage" + activity link to "electricity production, hydro, run-of-river"
