# aubergine production, open field

Dataset: EcoSpold 2, unit process
Geography: RoW
Time period: 2015-01-01 to 2021-12-31
Technology level: current
Classification: ISIC rev.4 ecoinvent: 0113:Growing of vegetables and melons, roots and tubers
Scenario: Business-as-Usual
System model: Allocation, cut-off by classification
Generated by: Franziska Stössel
Database: ecoinvent
isCopyrightProtected: true
accessRestrictedTo: 1

## General comment
This dataset represents the production of 1 kg of fresh aubergine in an irrigated open field. The crop cycle lasts circa 3.5 months and yields 26250 kg of aubergines. Mineral NPK fertilizer input is 104-48-24 kg/ha. Organic fertilizer applied amounts to 60,000 kg of manure from cattle dung. Pesticides used has active ingredient of Carbofuran 450g/ha and Chlorantranilipore 10g/ha. In case of Chlorantranilipore, the ingredient Clothianidin is used as proxy for this dataset. Machinery is used only for soil cultivation with fuel consumption of 12.48 kg/ha using plough and rotary cultivator for soil tillage.
[This dataset is meant to replace the following datasets:]

## Included activities start
This activity starts about four and half weeks after the harvest of the previous crop. The soil is prepared for cultivation in mid-January and sowing of seeds started about three weeks after soil preparation.

## Included activities end
The activity ends with the harvesting of the mature aubergine from the aubergine field.

## Technology
Cultivation of Brinjal follows conventional production standards

## Time period
Soil cultivating date for the main crop: 17-January, 2016; Harvesting date main crop: 15-May, 2016. The soil cultivation, sowing and harvesting dates are taken as the middle date of the week or fortnight told to the data collector by the farmer. Total time from date of sowing to date of harvesting comes to 100 days. The data is collected for one crop cycle. The cycle of one year is considered for entry in ecoeditor.

## Reference product
- aubergine: 1 kg; By-product classification allocatable product; CPC 01233: Eggplants (aubergines)
  production volume 3.36441e10 kg; = 51288169*1000*0.9
    According to FAOSTAT, global production volume of eggplants (aubergines) for 2016 is reported to be 51288169 tonnes. It is assumed that 90% of the total production is associated with open field production.
    Reference: Food and Agriculture Organization of the United Nations (FAO), 2016, Production quantity for eggplants in world, available at: http://www.fao.org/faostat/en/#data/QC
  property price 1.02 EUR2005
    Calculated from the trade statistics for the year 2005 published by the UN (COMTRADE database, accessed 20151105) as an average of 5 biggest importers of aubergine in the world; USA, DE, FR, UK and IT. Comtrade cathegory: 70930: Aubergines (eggplants), fresh or chilled.

## Inputs from technosphere
- irrigation: 0 m3; pedigree (1,1,1,1,1)
  The data was collected for a hectare area through interview
  properties: wet mass 1000 kg, water content 9089.91, dry mass 0.11 kg
- acetamide-anillide-compound, unspecified: 2.85714e-6 kg; lognormal variance with pedigree 0.0134, pedigree (2,4,2,5,3)
  The data was collected for a hectare area through interview
  properties: carbon content, fossil 0.659175, dry mass 1 kg, wet mass 1 kg
- inorganic phosphorus fertiliser, as P2O5: 0 kg; pedigree (1,1,1,1,1)
  The data was collected for a hectare area through interview
  properties: wet mass 1 kg, dry mass 1 kg
- tillage, rotary cultivator: 1.11271e-5 ha; lognormal variance with pedigree 0.0134, pedigree (2,4,2,5,3)
  The data was collected for a hectare area through interview
- inorganic nitrogen fertiliser, as N: 0 kg; pedigree (1,1,1,1,1)
  The data was collected for a hectare area through interview
  properties: wet mass 1 kg, dry mass 1 kg
- cyclic N-compound: 3.80952e-7 kg; lognormal variance with pedigree 0.0134, pedigree (2,4,2,5,3)
  The data was collected for a hectare area through interview
  properties: dry mass 1 kg, carbon content, fossil 0.641962, wet mass 1 kg
- urea: 0 kg; pedigree (1,1,1,1,1)
  The exchange has been updated from 'urea, as N' into 'urea' and therefore its amount has been scaled (multiplied) from 0.0033 kg by 2.1438 kg of 'urea' per kg of 'urea, as N'. Original comment of the exchange is: The data was collected for a hectare area through interview
  properties: wet mass 1 kg, carbon content, fossil 0.2, dry mass 1 kg
- packaging, for pesticides: 7.50476e-5 kg; lognormal variance with pedigree 0.0514, pedigree (4,3,2,5,4)
  Total amount of active substance/s of pesticides needed for the production of aubergine is calculated to be circa 3.75E-05 kg. Pesticide/s used in this dataset is/are: '[thio]carbamate-compound', 'acetamide-anillide-compound, unspecified', 'copper oxide', 'cyclic N-compound'. The total amount of active substance/s is doubled in order to account for the packaging of the dilluted product of pesticide/s that is/are applied. Therefore, 7.50E-05 kg of packaging for pesticides is justified with this exchange.
  properties: dry mass 1 kg, wet mass 1 kg, carbon content, fossil 0.85714, heating value, net 25.97 MJ, price 0.0642 EUR2005
- copper oxide: 1.71429e-5 kg; lognormal variance with pedigree 0.0134, pedigree (2,4,2,5,3)
  The data was collected for a hectare area through interview
  properties: wet mass 1 kg, dry mass 1 kg
- inorganic potassium fertiliser, as K2O: 0 kg; pedigree (1,1,1,1,1)
  The data was collected for a hectare area through interview
  properties: wet mass 1 kg, dry mass 1 kg
- [thio]carbamate-compound: 1.71429e-5 kg; lognormal variance with pedigree 0.0134, pedigree (2,4,2,5,3)
  The data was collected for a hectare area through interview
  properties: wet mass 1 kg, dry mass 1 kg, carbon content, fossil 0.626349
- plastic tunnel: 6.85714e-6 m2; lognormal variance with pedigree 0.0134, pedigree (2,4,2,5,3)
  The data was collected for a hectare area through interview
- packaging, for fertilisers: 0.0134286 kg; lognormal variance with pedigree 0.0514, pedigree (4,3,2,5,4)
  Total amount of active substance/s of fertilisers needed for the production of 'aubergine' is calculated to be circa 6.71E-03 kg. Fertiliser/s used in this dataset is/are: 'nitrogen fertiliser, as N', 'phosphate fertiliser, as P2O5', 'potassium fertiliser, as K2O', 'urea, as N'. The total amount of active substance/s is doubled in order to account for the packaging of the dilluted product of fertiliser/s that is/are applied. Therefore, 1.34E-02 kg of packaging for fertilisers is justified with this exchange.
  properties: dry mass 1 kg, heating value, net 25.01 MJ, wet mass 1 kg, carbon content, fossil 0.825301, price 0.0642 EUR2005
  note on carbon content, fossil: Considering a chemical formula (C2H4)n for polyethylene, carbon content-fossil is calculated to be 0.856286 kg of Carbon per kg of dry mass.
- compost: 2.28571 kg; lognormal variance with pedigree 0.0134, pedigree (2,4,2,5,3)
  Home made compost
  property dry mass 0.5 kg; name DM
  property potassium content 0.01; name K_content
  property chromium content 2.23e-5; name Cr_content
  property lead content 4.9e-5; name Pb_content
  property cadmium content 3.6e-7; name Cd_content
  property nitrogen content 0.014; name N_content
  property zinc content 0.000184; name Zn_content
  property nickel content 1.63e-5; name Ni_content
  property phosphorus content 0.0035; name P_content
  property copper content 5.77e-5; name Cu_content
  property mercury content 1.2e-7; name Hg_content
  properties: water content 1, carbon content, non-fossil 0.183645, wet mass 1 kg
- tillage, ploughing: 1.22045e-5 ha; lognormal variance with pedigree 0.0134, pedigree (2,4,2,5,3)
  The data was collected for a hectare area through interview
- irrigation: 0.000830262, 3.52421e-5, 1.40968e-6, 0.00742198, 0.000121627, 6.08183e-6, 0.000345342, 5.62107e-5, 0.000274163, 9.37025e-5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 m3 (16 entries); lognormal variance with pedigree 0.0134, pedigree (2,4,2,5,3)
  The data was collected for a hectare area through interview
- inorganic phosphorus fertiliser, as P2O5: 1.39712e-5, 1.81264e-5, 1.45144e-5, 0.000113647, 2.39468e-5, 9.86696e-7, 2.60089e-6, 0.000268297, 4.83592e-6, 5.27716e-7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 kg (29 entries); lognormal variance with pedigree 0.0134, pedigree (2,4,2,5,3)
  The data was collected for a hectare area through interview
- inorganic nitrogen fertiliser, as N: 3.53469e-6, 5.08064e-6, 4.54091e-6, 1.59515e-5, 9.52643e-6, 1.18078e-7, 7.07012e-7, 8.95824e-5, 1.67423e-6, 2.51463e-7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 kg (29 entries); lognormal variance with pedigree 0.0134, pedigree (2,4,2,5,3)
  The data was collected for a hectare area through interview
- urea: 0.0053064, 0.000974266, 0.000785909 kg (3 entries); lognormal variance with pedigree 0.0134, pedigree (2,4,2,5,3)
  (same comment as for urea)
- inorganic potassium fertiliser, as K2O: 6.1361e-7, 3.04069e-6, 6.16737e-6, 7.62518e-5, 5.45866e-6, 7.89486e-7, 1.31451e-6, 0.00012772, 4.44249e-6, 1.09434e-6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 kg (29 entries); lognormal variance with pedigree 0.0134, pedigree (2,4,2,5,3)
  The data was collected for a hectare area through interview

## Inputs from nature
- Carbon dioxide, in air [natural resource, in air]: 0.138506 kg; lognormal variance with pedigree 0.0134, pedigree (2,4,2,5,3)
  Calculated Value. This value has been calculated by using the ecoinvent LCI calculation tool for crop production.
- Energy, gross calorific value, in biomass [natural resource, biotic]: 1.5953 MJ; lognormal variance with pedigree 0.0134, pedigree (2,4,2,5,3)
  (same comment as for Carbon dioxide, in air)
- Occupation, annual crop, irrigated [natural resource, land]: 0.15873 m2*year; lognormal variance with pedigree 0.0148, pedigree (2,4,2,5,3)
  Calculated Value. This value has been calculated by using the ecoinvent LCI calculation tool for crop production
- Transformation, to annual crop, irrigated [natural resource, land]: 0.380952 m2; lognormal variance with pedigree 0.0208, pedigree (2,4,2,5,3)
  (same comment as for Occupation, annual crop, irrigated)
- Transformation, from annual crop, irrigated [natural resource, land]: 0.380952 m2; lognormal variance with pedigree 0.0208, pedigree (2,4,2,5,3)
  (same comment as for Occupation, annual crop, irrigated)

## Emissions to nature
- Metalaxil [soil, agricultural]: 2.85714e-6 kg; lognormal variance with pedigree 0.0458, pedigree (2,4,2,5,3)
  The data was collected for a hectare area through interview
- Mercury [water, surface water]: 5.16264e-9 kg; lognormal variance with pedigree 0.1028, pedigree (2,4,2,5,3)
  (same comment as for Carbon dioxide, in air)
- Clothianidin [soil, agricultural]: 3.80952e-7 kg; lognormal variance with pedigree 0.0458, pedigree (2,4,2,5,3)
  The data was collected for a hectare area through interview
- Mercury [water, ground-]: 2.05184e-11 kg; lognormal variance with pedigree 0.1348, pedigree (2,4,2,5,4)
  (same comment as for Carbon dioxide, in air)
- Nickel [soil, agricultural]: 1.70209e-5 kg; lognormal variance with pedigree 0.0528, pedigree (2,4,2,5,3)
  (same comment as for Carbon dioxide, in air)
- Zinc, ion [water, ground-]: 5.20281e-7 kg; lognormal variance with pedigree 0.1028, pedigree (2,4,2,5,3)
  (same comment as for Carbon dioxide, in air)
- Carbofuran [soil, agricultural]: 1.71429e-5 kg; lognormal variance with pedigree 0.0458, pedigree (2,4,2,5,3)
  The data was collected for a hectare area through interview
- Water [water, surface water]: 0.00411429 m3; lognormal variance with pedigree 0.0134, pedigree (2,4,2,5,3)
  (same comment as for Carbon dioxide, in air)
- Water [water, ground-]: 0.0160457 m3; lognormal variance with pedigree 0.0134, pedigree (2,4,2,5,3)
  (same comment as for Carbon dioxide, in air)
- Nitrate [water, ground-]: 0.00756505 kg; lognormal variance with pedigree 0.0528, pedigree (2,4,2,5,3)
  (same comment as for Carbon dioxide, in air)
- Zinc, ion [water, surface water]: 4.69486e-6 kg; lognormal variance with pedigree 0.1028, pedigree (2,4,2,5,3)
  (same comment as for Carbon dioxide, in air)
- Phosphate [water, ground-]: 3.40688e-6 kg; lognormal variance with pedigree 0.0528, pedigree (2,4,2,5,3)
  (same comment as for Carbon dioxide, in air)
- Ammonia [air, non-urban air or from high stacks]: 0.00206984 kg; lognormal variance with pedigree 0.0208, pedigree (2,4,2,5,3)
  (same comment as for Carbon dioxide, in air)
- Cadmium, ion [water, surface water]: 2.02555e-8 kg; lognormal variance with pedigree 0.1028, pedigree (2,4,2,5,3)
  (same comment as for Carbon dioxide, in air)
- Nitrogen oxides [air, non-urban air or from high stacks]: 0.00122481 kg; lognormal variance with pedigree 0.0528, pedigree (2,4,2,5,3)
  (same comment as for Carbon dioxide, in air)
- Phosphorus [water, surface water]: 0.000138541 kg; lognormal variance with pedigree 0.0528, pedigree (2,4,2,5,3)
  (same comment as for Carbon dioxide, in air)
- Carbon dioxide, fossil [air, non-urban air or from high stacks]: 0.0051785 kg; lognormal variance with pedigree 0.0134, pedigree (2,4,2,5,3)
  (same comment as for Carbon dioxide, in air)
- Phosphate [water, surface water]: 9.53925e-6 kg; lognormal variance with pedigree 0.0528, pedigree (2,4,2,5,3)
  (same comment as for Carbon dioxide, in air)
- Dinitrogen monoxide [air, non-urban air or from high stacks]: 0.00041512 kg; lognormal variance with pedigree 0.0428, pedigree (2,4,2,5,3)
  (same comment as for Carbon dioxide, in air)
- Chromium, ion [water, ground-]: 3.35778e-7 kg; lognormal variance with pedigree 0.1028, pedigree (2,4,2,5,3)
  (same comment as for Carbon dioxide, in air)
- Cadmium [soil, agricultural]: 4.66864e-7 kg; lognormal variance with pedigree 0.0528, pedigree (2,4,2,5,3)
  (same comment as for Carbon dioxide, in air)
- Chromium, ion [water, surface water]: 1.81661e-6 kg; lognormal variance with pedigree 0.1028, pedigree (2,4,2,5,3)
  (same comment as for Carbon dioxide, in air)
- Water [air, non-urban air or from high stacks]: 0.0209829 m3; lognormal variance with pedigree 0.0134, pedigree (2,4,2,5,3)
  (same comment as for Carbon dioxide, in air)
- Copper, ion [water, surface water]: 2.64196e-6 kg; lognormal variance with pedigree 0.1028, pedigree (2,4,2,5,3)
  (same comment as for Carbon dioxide, in air)
- Copper [soil, agricultural]: 9.64502e-5 kg; lognormal variance with pedigree 0.0528, pedigree (2,4,2,5,3)
  This exchange is an aggregation of amounts:
  7.930735552878688E-5. Comment:
  1.7142857142857142E-5. Comment:
- Cadmium, ion [water, ground-]: 7.76594e-10 kg; lognormal variance with pedigree 0.1028, pedigree (2,4,2,5,3)
  (same comment as for Carbon dioxide, in air)
- Chromium [soil, agricultural]: 2.44158e-5 kg; lognormal variance with pedigree 0.0528, pedigree (2,4,2,5,3)
  (same comment as for Carbon dioxide, in air)
- Copper, ion [water, ground-]: 5.71165e-8 kg; lognormal variance with pedigree 0.1028, pedigree (2,4,2,5,3)
  (same comment as for Carbon dioxide, in air)
- Lead [soil, agricultural]: 5.40964e-5 kg; lognormal variance with pedigree 0.0528, pedigree (2,4,2,5,3)
  (same comment as for Carbon dioxide, in air)
- Lead [water, surface water]: 1.67012e-6 kg; lognormal variance with pedigree 0.1028, pedigree (2,4,2,5,3)
  (same comment as for Carbon dioxide, in air)
- Mercury [soil, agricultural]: 1.30961e-7 kg; lognormal variance with pedigree 0.0528, pedigree (2,4,2,5,3)
  (same comment as for Carbon dioxide, in air)
- Lead [water, ground-]: 9.47369e-9 kg; lognormal variance with pedigree 0.1028, pedigree (2,4,2,5,3)
  (same comment as for Carbon dioxide, in air)
- Zinc [soil, agricultural]: 0.000202668 kg; lognormal variance with pedigree 0.0528, pedigree (2,4,2,5,3)
  (same comment as for Carbon dioxide, in air)
- Nickel, ion [water, surface water]: 1.66454e-6 kg; lognormal variance with pedigree 0.1028, pedigree (2,4,2,5,3)
  (same comment as for Carbon dioxide, in air)

## Sampling procedure
The farmer was identified and contacted by agriculture science faculty familiar with the local farmers in the region. Data was collected directly from the farmer through semi-structured interview using a questionnaire based on the input requirements Ecoinvent LCI calculation tool for crop production.

## Extrapolations
The dataset has been extrapolated from the respective Indian dataset. Uncertainty has been adjusted accordingly.
