# toner production, black, powder

Dataset: EcoSpold 2, unit process
Geography: GLO
Time period: 2002-01-01 to 2021-12-31
Technology level: current
Classification: EcoSpold01Categories: electronics/module
Classification: ISIC rev.4 ecoinvent: 2022:Manufacture of paints, varnishes and similar coatings, printing ink and mas
Synonyms: Pigment; Pigments
Tags: ConvertedDataset
Scenario: Business-as-Usual
System model: Allocation, cut-off by classification
Generated by: Mischa Classen
Published in: Hischier R. 2007
Database: ecoinvent
isCopyrightProtected: true
accessRestrictedTo: 1

## General comment
This dataset represents the production of 1 kg of a black toner powder. It is based on a composition of 5% Carbon Black, 18% Magnetite, 70% Binder Resin, the rest being organic and inorganic additives. It is designed for the use in black toner cartridges. Main data are based from a Swedish environmental product declaration of a remanufactured toner cartridge, a comparative LCA of a Hewlett Packard black toner cartridge and an LCI on pulverised toner.
[This dataset was already contained in the ecoinvent database version 2. It was not individually updated during the transfer to ecoinvent version 3. Life Cycle Impact Assessment results may still have changed, as they are affected by changes in the supply chain, i.e. in other datasets. This dataset was generated following the ecoinvent quality guidelines for version 2. It may have been subject to central changes described in the ecoinvent version 3 change report (http://www.ecoinvent.org/database/ecoinvent-version-3/reports-of-changes/), and the results of the central updates were reviewed extensively. The changes added e.g. consistent water flows and other information throughout the database. The documentation of this dataset can be found in the ecoinvent reports of version 2, which are still available via the ecoinvent website. The change report linked above covers all central changes that were made during the conversion process.]

## Included activities start
From reception of raw materials at the factory gate.

## Included activities end
This dataset includes the raw materials, their transportation and the energy use in the production. Infrastructure is included in the dataset of resin production. No process emissions considered.

## Geography
European Electricity mix and material processing data for supplier outside Europe.

## Technology
Production by conventional pulverisation of styrene butadiene copolymer that is produced by emulsion polymerisation, a large solid mass of toner is fractured and ground to a fine powder with a fairly tight particle size distribution. The conventional production method cannot make the particles small enough for advanced printer technology. In general, conventional toner is made using the same process, which involves compounding the raw materials (resin, magnetite, and pigment) followed by extruding the polymer melt into solid pellets. The pellets are then ground into micron-sized particles and classified (separated) to the desired size distribution. Particles from the classifier that are too big or too small are returned upstream for further processing. The CPT process grows the toner particles ‘bottom-up’ from molecules using chemical synthesis and other physical properties. Currently, there are several technologies used to prepare CPT:
- suspension polymerization
- emulsion polymerization / latex aggregation
- Polyester (Elongation) Polymerisation (PxP)
- Chemical milling (shear forces by mixing)
The particles usually are (micro)encapsulated to tune, colourants are added to the resin, being black or with different pigments.

## Reference product
- toner, black, powder: 1 kg; By-product classification allocatable product; CPC 35130: Printing ink
  EcoSpold01Location=GLO
  Toner is a coloured powder used in laser printers and photocopiers which forms the text and images on the printed paper. In the laser printing technology the toner builds a unit with the cartridge. The cartridge contains a part of the technology used for the marking process and the toner needed. Because of the electrostatic nature of image transfer, toner powder must have the feature of chargeability or magnetism. Generally toner systems can be divided according to number of components and electrostatic features into six classes. The toner itself may be a part of the developer, where it cannot unify all features necessary and it has to be mixed with carrier. Toner consists generally of following ingredients: Binder resin, carrier and colourant. The toner composition of most of the introduced colour lasers since 1994 have been monocomponent, non-magnetic design. A recent development has been the use of monocomponent, magnetic black toner in combination with monocomponent nonmagnetic cyan, yellow and magenta toners, first introduced in the HP4500.
  The pulverised ink used in copiers and laser printers is denoted as toner. It basically consists of the colour together with a resin that forms a particle that is fixed on paper to represent a dot.
  If two component development, the toner particles are transported by a oppositely charged carrier, whereas carrier and toner mixed together are called "developer", thus it is a "two component developer". In the single development the system has no need for a carrier and thus is called a "one component developer".
  production volume 1 kg
    Unknown
    Dummy value to be replaced by value to be calculated from the demand for this treatment activity
  property heating value, net 20.38 MJ
    LHV is calculated based on the Carbon content of the product. More details can be found on the respective documentation.
  property price 7.62 EUR2005
    Calculated value based on data from United Nations Commodity Trade Statistics Database (comtrade.un.org). UN comtrade category: 321511 Printing ink, black. Year 2005. Using exchange rate of 1EURO = 1.209 USD. Average of price of import into 5 main markets (EU, US, JP, IN and CN).
  property carbon content, fossil 0.672563
    black toner powder with the composition 5% Carbon Black, 18% Magnetite, 70% Binder Resin, the rest being organic and inorganic additives (dataset)
  property carbon content, non-fossil 0
    (same comment as for toner, black, powder)
  property carbon content 0.672563
    carbon content on a dry matter basis (reserved; not for manual entry)
  properties: wet mass 1 kg, water content 0, dry mass 1 kg, water in wet mass 0 kg, carbon allocation 0.672563 kg

## Inputs from technosphere
All rows: source Ahmadi A. 2003
- electricity, medium voltage: 6.1111 kWh; lognormal variance with pedigree 0.051225, pedigree (2,3,5,2,1)
  Estimation, based on literature.
  EcoSpold01Location=UCTE
- chemical, inorganic: 0.045 kg; triangular min 0.03, mostLikely 0.045, max 0.06
  Estimation, based on literature and own assumptions. Additives are aggregated inventoried.Triangular distribution [1.0E-2, 3.0E-2, 5.0E-2] extends over 67%.
  Further references:
  Ohta N. (2006) Color desktop printer technology. CRC Taylor & Francis, Boca Raton
  EcoSpold01Location=GLO
  properties: carbon content, fossil 0.003, dry mass 1 kg, wet mass 1 kg
  note on carbon content, fossil: This dataset is an unweighted average of 20 inorganic substances (listed in Tab 88.1, ecoinvent v2.2 report 8, part II), being part of the top100 chemicals included in this database. The C-content has also been calculated as an unweighted average of the C content of the substances composing this dataset.
- magnetite: 0.175 kg; triangular min 0.15, mostLikely 0.175, max 0.2
  Estimation, based on literature and own assumptions. Triangular distribution [1.5E-1, 1.8E-1, 2.0E-1] extends over 29%
  Further references:
  Ohta N. (2006) Color desktop printer technology. CRC Taylor & Francis, Boca Raton
  EcoSpold01Location=GLO
  properties: wet mass 1 kg, dry mass 1 kg
- carbon black: 0.05 kg; triangular min 0, mostLikely 0.05, max 0.1
  EcoSpold01Location=GLO
  Estimation, based on literature and own assumptions. Triangular distribution [0.0E0, 5.0E-2, 1.0E-1] extends over 200%
  properties: carbon content, fossil 0.85, wet mass 1 kg, heating value, net 25.76 MJ, dry mass 1 kg
- chemical, organic: 0.03 kg; triangular min 0.01, mostLikely 0.03, max 0.05
  EcoSpold01Location=GLO
  Estimation, based on literature and own assumptions. Additives are aggregated inventoried.Triangular distribution [1.0E-2, 3.0E-2, 5.0E-2] extends over 133%.
  Further references:
  Ohta N. (2006) Color desktop printer technology. CRC Taylor & Francis, Boca Raton
  properties: heating value, net 19.03 MJ, carbon content, fossil 0.628, dry mass 1 kg, wet mass 1 kg
  note on carbon content, fossil: This dataset is an unweighted average of 20 organic substances (listed in Tab 88.1, ecoinvent v2.2 report 8, part II), being part of the top100 chemicals included in this database. The C-content has also been calculated as an unweighted average of the C content of the substances composing this dataset.
- latex: 0 kg
  Estimation, based on literature and own assumptions. Triangular distribution [5.0E-1, 7.0E-1, 9.5E-1] extends over 64%
  Further references:
  Ohta N. (2006) Color desktop printer technology. CRC Taylor & Francis, Boca
  EcoSpold01Location=RER
  properties: carbon content, fossil 0.872983, dry mass 1 kg, wet mass 1 kg, heating value, net 26.45 MJ
  note on carbon content, fossil: The Styrene-butadiene dispersion is based on styrene and 1,3-butadiene plus co-monomers like i.e. ac-rylonitrile or (meth-)acrylic acid (ecoinvent v2.2 report 11_III). Following specifications in US Patent 3,875,101 (1971), the dispersion was considered as: 52.5% 1.3-butadiene (0.8571 kg C/kg dry mass); 43% styrene (0.9231 kg C/kg dry mass); 2% acrylic acid (0.5 kg C/kg dry mass); 2.5% acrolein (C3H4O, MW=56; 0.6429 kg C/kg dry mass)
- latex: 0.231415 kg; triangular min 0.231415, mostLikely 0.231415, max 0.231415
  (same comment as for latex)
- latex: 0.468585 kg; triangular min 0.468585, mostLikely 0.468585, max 0.468585
  (same comment as for latex)

## Sampling procedure
Literature

## Extrapolations
This dataset has been extrapolated from year 2005 to the year of the calculation (2021). The uncertainty has been adjusted accordingly.

## Review by Roland Hischier 2011-09-28
Transfer of documentation done.

## Review by Rolf Frischknecht 2007-10-04
passed
