# heat and power co-generation unit construction, 6400kW thermal, common components for heat+electricity

Dataset: EcoSpold 2, unit process
Geography: RoW
Time period: 2000-01-01 to 2021-12-31
Technology level: current
Classification: EcoSpold01Categories: wood energy/cogeneration
Classification: ISIC rev.4 ecoinvent: 4220:Construction of utility projects
Tags: ConvertedDataset
Scenario: Business-as-Usual
System model: Allocation, cut-off by classification
Generated by: Christian Bauer
Published in: Bauer, C. 2007
Database: ecoinvent
isCopyrightProtected: true
accessRestrictedTo: 1

## General comment
Assumed lifetime: 20 years. Operation time for heat production 2030 h/a, for electricity production 3500 h/a, calculated from reported annual production.
[This dataset was already contained in the ecoinvent database version 2. It was not individually updated during the transfer to ecoinvent version 3. Life Cycle Impact Assessment results may still have changed, as they are affected by changes in the supply chain, i.e. in other datasets. This dataset was generated following the ecoinvent quality guidelines for version 2. It may have been subject to central changes described in the ecoinvent version 3 change report (http://www.ecoinvent.org/database/ecoinvent-version-3/reports-of-changes/), and the results of the central updates were reviewed extensively. The changes added e.g. consistent water flows and other information throughout the database. The documentation of this dataset can be found in the ecoinvent reports of version 2, which are still available via the ecoinvent website. The change report linked above covers all central changes that were made during the conversion process.]

## Included activities end
This module includes the most important materials used for the fabrication of the cogeneration unit: aluminium, concrete, plastics, rock wool, steel, copper. Also includes the transports of these materials, energy needed for the fabrication, the disposal of the unit.

## Geography
Could be used for central European conditions.

## Technology
Specific cogeneration unit installed in Switzerland.

## Reference product
- heat and power co-generation unit, 6400kW thermal, common components for heat+electricity: 1 unit; By-product classification allocatable product; CPC 53262: Power plants
  EcoSpold01Location=CH
  production volume 3.96633 unit
    This is a placeholder value that does not reflect real-world production volumes. This dataset does not currently require a real-world production volume to work in the database framework, and no actual data were collected yet. This has no negative effect on the results of the ecoinvent database.
  property price 278236 EUR2005
    Calculated by 2.0 - There is no engine/motor/electrical machinery specified in this process whereas generator and control cabinet cogen unit is included in components for electricity only. Therefore, it is assumed appyling the price of "machinery and equipment" (5.71 Euro/kg DS; 2003 data from EU27 I/O database) - 53080 kg. Convert from EU 27 price to the world by currency exchange rate.

## Inputs from technosphere
- waste mineral wool, for final disposal: 0 kg; pedigree (1,1,1,1,1)
  EcoSpold01Location=CH
  production volume 0 kg
    Calculated from the production volume of cogen unit, 6400kWth, wood burning, common components for heat+electricity in proportion to the respective output amounts.
  properties: wet mass 1 kg, dry mass 1 kg
- stone wool: 90 kg; lognormal variance with pedigree 0.188, pedigree (4,5,5,5,1)
  EcoSpold01Location=CH
  Basic uncertainty:2
  properties: dry mass 1 kg, wet mass 1 kg, carbon content, fossil 0.015401
  note on carbon content, fossil: The chemical composition of the glass fibres used in the rock wool production is similar to the composition of naturally cooled volcano basalt and has a composition listed in Tab. 3.1 and 3.2 in ecoinvent v2.2 report 16, part XIV. Rock wool contains: a minimum of 96% mineral fibres,between 0.5 and 3.0 weight percent of phenolic resin depending on the specific product characteristics, and about 0.2 percent mineral oil (ecoinvent v2.2 report 16, part XIV). An average composition of 1.8% phenolic resin, 0.2% mineral oil, and 98% mineral fibres has been assumed and used to calculate C content of the rock wool
- aluminium, wrought alloy: 320 kg; lognormal variance with pedigree 0.188, pedigree (4,5,5,5,1)
  EcoSpold01Location=RER
  Basic uncertainty:2
  properties: wet mass 1 kg, dry mass 1 kg
- steel, chromium steel 18/8, hot rolled: 460 kg; lognormal variance with pedigree 0.188, pedigree (4,5,5,5,1)
  EcoSpold01Location=RER
  Basic uncertainty:2
  properties: carbon content, fossil 0.0008, dry mass 1 kg, wet mass 1 kg
  note on carbon content, fossil: Stainless steel model is the grade 304 steel (18/8 stainless, 18% chromium 8% nickel; max. 0.08% C)
- waste concrete: 0 kg; pedigree (1,1,1,1,1)
  EcoSpold01Location=CH
  production volume 0 kg
    (same comment as for waste mineral wool, for final disposal)
  properties: water content 1, wet mass 1 kg, dry mass 0.5 kg
- polyethylene, high density, granulate: 340 kg; lognormal variance with pedigree 0.188, pedigree (4,5,5,5,1)
  Basic uncertainty:2
  EcoSpold01Location=RER
  properties: heating value, net 42.47 MJ, wet mass 1 kg, carbon content, fossil 0.857143, dry mass 1 kg
  note on carbon content, fossil: Polyethylene is formed out of a huge amount of ethylene monomers (C2H4) (ecoinvent v2.2 report 11_II). MW=28 g/mol
- steel, low-alloyed, hot rolled: 15000 kg; lognormal variance with pedigree 0.188, pedigree (4,5,5,5,1)
  EcoSpold01Location=RER
  Basic uncertainty:2
  properties: carbon content, fossil 0.005, dry mass 1 kg, wet mass 1 kg
  note on carbon content, fossil: Low alloyed steel composition given in Tab. 3.2 ecoinvent v2.2 report 10_partII. Steel assumed to have a C content of 0.5%
- electricity, low voltage: 0 kWh; pedigree (1,1,1,1,1)
  EcoSpold01Location=CH
- waste polyethylene: 0 kg; pedigree (1,1,1,1,1)
  EcoSpold01Location=CH
  production volume 0 kg
    (same comment as for waste mineral wool, for final disposal)
  properties: wet mass 1 kg, heating value, net 42.47 MJ, water content 0.00401606, carbon content, fossil 0.825301, dry mass 0.996 kg
  note on heating value, net: Value taken from the general comment of the treatment dataset.
  note on carbon content, fossil: C content in 1 kg DM was calculated using data in Tab A.1, ecoinvent v2.2 report 13_I
- concrete, normal: 0 m3; pedigree (1,1,1,1,1)
  EcoSpold01Location=CH
  Basic uncertainty:2
  properties: water content 0.086758, wet mass 2380 kg, dry mass 2190 kg
- heat, central or small-scale, other than natural gas: 0 MJ; pedigree (1,1,1,1,1)
  EcoSpold01Location=CH
  properties: heating value, net 1 MJ
- copper, cathode: 320 kg; lognormal variance with pedigree 0.188, pedigree (4,5,5,5,1)
  EcoSpold01Location=RER
  Basic uncertainty:2
  properties: wet mass 1 kg, dry mass 1 kg
- waste mineral wool, for final disposal: -38.767, -51.233 kg (2 entries); lognormal variance with pedigree 0.1246, pedigree (3,3,5,5,4)
  EcoSpold01Location=CH
  production volume 270 kg
- waste concrete: -2330.53, -31769.5 kg (2 entries); lognormal variance with pedigree 0.1246, pedigree (3,3,5,5,4)
  EcoSpold01Location=CH
  production volume 102300 kg
- electricity, low voltage: 6.96328, 1.26788, 28.6209, 99.9949, 20.4145, 313.427, 50.707, 145.604 kWh (8 entries); lognormal variance with pedigree 0.1246, pedigree (3,3,5,5,4)
  EcoSpold01Location=CH
- waste polyethylene: -37.8222, -2.52714, -0.191123, -1.0438, -0.421682, -0.991183, -32.2263, -264.777 kg (8 entries); lognormal variance with pedigree 0.1246, pedigree (3,3,5,5,4)
  EcoSpold01Location=CH
  production volume 1020 kg
- concrete, normal: 0.350565, 0.0365284, 0.295723, 0.166344, 0.704421, 0.0237597, 13.9227 m3 (7 entries); lognormal variance with pedigree 0.188, pedigree (4,5,5,5,1)
  EcoSpold01Location=CH
  Basic uncertainty:2
- heat, central or small-scale, other than natural gas: 4.0645, 295.935 MJ (2 entries); lognormal variance with pedigree 0.1246, pedigree (3,3,5,5,4)
  EcoSpold01Location=CH

## Sampling procedure
literature

## Extrapolations
none This dataset has been copied from an original dataset covering the geography CH. The uncertainty has been adjusted accordingly.

## Review by Christian Bauer 2003-08-19
passed
