# plywood production

Dataset: EcoSpold 2, unit process
Geography: CA-QC
Time period: 2012-01-01 to 2021-12-31
Technology level: current
Classification: ISIC rev.4 ecoinvent: 1621:Manufacture of veneer sheets and wood-based panels
Synonyms: Furniersperrholz
Tags: Swiss brush-up completed
Scenario: Business-as-Usual
System model: Allocation, cut-off by classification
Generated by: Pascal Lesage
Database: ecoinvent
isCopyrightProtected: true
accessRestrictedTo: 1

## General comment
This dataset represents the production of plywood, in Quebec, Canada. It was created as copy of the corresponding local dataset for Europe. It is not specific to a type of plywood by number and height of the wood layers, but represents a generic product. Data are based on a sample of German production
Plywood is made out of glued veneers. Veneers are thin sheets of wood obtained by sawing, cutting, or peeling. They are among the longest-known wood-based construction materials. Veneers are produced from cordwood or from specially divided blocks by using peeling and cutting machines or, less commonly, by sawing. The coated veneers are stacked either manually or by machine. To make transportation easier and reduce stack height, coated veneer stacks are frequently pre-compressed in an unheated one-daylight press. Hot pressing occurs in one- or multi-daylight presses but usually with a smaller size. Pressing conditions (temperature, time, and pressure) depend on the type of wood, the strength of the plywood, and the type of adhesive. Pressures of 0.6 2.5 N/mm2 and temperatures of 80 to 140 °C are usually applied. After gluing and sometimes climatisation, veneer plywood is sanded, cut to standard or ordered measurements, and graded according to quality.
Different types of plywood are available depending on the number and height of the layers; the type is not specified in this dataset. The most important adhesives for gluing wood are urea-formaldehyde resins. The use of UF resins to glue plywood was first described in 1929. Production of these wood adhesives has since developed enormously. Urea-formaldehyde resins are used for adhesion of wood materials used in the interior and have limited resistance to moisture. They can be readily adapted to operational requirements through the nature and dosage of curing aids and additives. Ammonium salts (e.g. NH4Cl) are generally used as curing aids. They lower the pH by reacting with formaldehyde. The rate of curing increases with increasing temperature and decreasing pH. The viscosity of the adhesive liquor is adapted to processing conditions by the addition of water, depending on the content of extenders and fillers. The pressing temperature is 80 to 120 °C.
Reference:
Kollmann F. F. P., Kuenzi E. W. and Stamm A. J. (1975) Principles of Wood Science and Technology. Springer-Verl., Berlin, Heidelberg, New York. AND Nimz H., Schmitt U., Schwab E., Wittmann O. and Wolf F. (1997) Wood. In: Ullmann"s encyclopedia of indus-trial chemistry (ed. Anonymous). 5th edition on CD-ROM Edition. Wiley & Sons, London.
Rüter, S. and S. Diederichs (2012): Ökobilanz-Basisdaten für Bauprodukte aus Holz. Arbeitsbericht aus dem Institut für Holztechnologie und Holzbiologie Nr. 2012/1, Johann Heinrich von Thünen-Institut (vTI), Hamburg.
[This dataset is meant to replace the following datasets:
- plywood production, for indoor use, GLO, 1996 - 1996
- plywood production, for outdoor use, GLO, 1996 - 1996]

## Included activities start
From the reception at the factory gate of all materials and fuels used.

## Included activities end
This activity ends with plywood produced at the factory gate. The dataset includes the inputs to and outputs of the production processes and the available process emissions. Infrastructure is a rough estimate.

## Geography
Data for Germany used for central Europe

## Technology
Technology reflects a sample of German plywood production. Different types of plywood are available depending on the number and height of the layers; the type is not specified in this dataset. For more details on the production process, see General Comment of this dataset.

## Parameters
- wood_fuel: 11573; lognormal variance with pedigree 0.0256, pedigree (1,3,1,1,1)
  input of wood fuel used in production; value calculated from Rüter et al. 2012

## Reference product
- wood chips, dry, measured as dry mass: 1 kg; name m_wood_chips; By-product classification allocatable product; CPC 31230: Wood in chips or particles; pedigree (1,1,1,1,1)
  Literature value; sample from Germany
  production volume 4.86498e7 kg; = m_wood_chips*plywood_pv
    Calculated from production volume of reference product using the relative outputs.
  property heating value, net 9.99 MJ
    LHV is calculated based on the Carbon content of the product. More details can be found on the respective documentation.
  property price 0.107 EUR2005; name m_wood_chips_price_EUR2005
    Expert judgement (Urs Luginbühl, Swiss Sawmilling industry, personal communication in June 2014). Wood chips from softwood should have a price of 0.101 EUR/kg. Woodchips from hardwood should have a price of 0.112 EUR/kg. Average of these two values is used. Cross-reference; FAOSTAT database; http://faostat.fao.org/site/626/DesktopDefault.aspx?PageID=626#ancor; Average import/export prices of EU for 'chips and particles'. Price: 48.76 Euro/m3. The density of the wood chips is 650 kg/m3. The price is recalculated accordingly.
  property carbon content 0.494
    carbon content on a dry matter basis (reserved; not for manual entry)
  property true value 8.4102; name m_wood_chips_true_value
    allocation property applied in "true value" allocation // value calculated from revenue
  properties: carbon content, non-fossil 0.494, carbon content, fossil 0, water content 0.4, water in wet mass 0.4 kg, wet mass 1.4 kg, dry mass 1 kg, carbon allocation 0.494 kg
- plywood: 0 m3; CPC 31450: Plywood, veneer panels and similar laminated wood of bamboo; By-product classification allocatable product
  Reference product. Plywood produced in Germany by processes representative for global average. The reference product is ready for delivery at the wooden board factory.
  A large number of materials can be produced with differing properties and areas of use. Typical uses are as construction plywood for wall, floor, and ceiling panels and also as panels for concrete shuttering, and decorative covering veneers in interior furnishings (e.g. wall panels or doors).
  production volume 618954 m3; name plywood_pv; = 163006579*(0.19*1712562076052.284/85693321610361.34)
    The annual PV of Quebec was estimated by scaling the global PV according to the ratio of the global GDP and GDP of Quebec. The GDP of Quebec within total Canadian GDP is 19%
    Sources:
    Statcan 2018, Gross domestic product (GDP) at basic prices, by industry, provinces and territories (x 1,000,000), accessed at <https://www150.statcan.gc.ca/t1/tbl1/en/tv.action?pid=3610040201>, accessed April 2020
    UNSTATS, 2020: <https://unstats.un.org/unsd/snaama/Basic>, filtered for GDP. At current price- US Dollar, accessed April 2020
  property price 298 EUR2005
    Temporary price data. Calculated as 90% of purchasers price based on: 2004 World Import/Export prices (USD/cubicmeter) from FaoStat http://faostat.fao.org/site/626/default.aspx#ancor, accessed 14th June 2010
  property heating value, net 11688.9 MJ
    LHV is calculated based on the Carbon content of the product. More details can be found on the respective documentation.The property is based on a value of 14.2MJ/kg
  property carbon content 0.507648
    carbon content on a dry matter basis (reserved; not for manual entry)
  property true value 298
    allocation property applied in "true value" allocation // value calculated from revenue
  properties: water in wet mass 54.4 kg, water content 0.070778, dry mass 768.6 kg, carbon content, non-fossil 0.409818, wet mass 823 kg, carbon content, fossil 0.09783, carbon allocation 390.178 kg

## Inputs from technosphere
- electricity, medium voltage: 0.186474 kWh; lognormal variance with pedigree 0.0446, pedigree (1,4,5,5,1)
  Literature value; sample from Germany
- furnace, wood chips, with silo, 5000kW: 4.20975e-9 unit; = 1.38888888888889E-09*wood_fuel/1.33333; lognormal variance with pedigree 0.0106, pedigree (1,1,4,5,1)
  Infrastructure factor from DS "Heat, district or industrial, other than natural gas {CH}| heat production, wood chips from industry, at furnace 5000kW | Cut-off, U", multiplied by the input of wood fuel (direct wood fuel plus production residues); correction for assumed efficiency as original value refers to heat output
- heat, district or industrial, other than natural gas: 0.0191235 MJ; = 73.017/1.33333; lognormal variance with pedigree 0.0112, pedigree (1,3,4,5,1)
  Fuel input, converted to heat output
  properties: heating value, net 1 MJ
- municipal solid waste: -0.000172857 kg; name w_MSW; lognormal variance with pedigree 0.1318, pedigree (2,3,4,5,5)
  Literature value; sample from Germany
  Uncertainty: a
  production volume 306382 kg; = w_MSW*plywood_pv
    Calculated from production volume of reference product using the relative outputs.
  properties: dry mass 0.771 kg, water content 0.297017, carbon content, fossil 0.171549, heating value, net 11.74 MJ, wet mass 1 kg, carbon content, non-fossil 0.261655
  note on carbon content, fossil: MSW composition in tab 4.1, ecoinvent v2.2 report 13_I. C content referred to 1 kg DM
  note on heating value, net: Value taken from the general comment of the treatment dataset.
- synthetic rubber: 7.68251e-6 kg; name m_rubber; lognormal variance with pedigree 0.2106, pedigree (5,5,5,5,5)
  Literature value; sample from Germany
  property carbon content, fossil 0.871949; name C_content_fossil_rubber
  properties: heating value, net 26.42 MJ, dry mass 1 kg, wet mass 1 kg
  note on carbon content, fossil: EPDM (Ethylene-propene-diene terpolymer) rubber is a terpolymer of ethylene, propene, and a diene with the residual unsaturated portion of the diene in the side chain (ecoinvent v2.2 report 7-part XX & Ullmann). Chemical formula (deduced from Evidences of Solvent-Induced Miscibility in Polychloroprene-co-Ethylene-Propene Diene Terpolymer Blends, Dubey et al., Journal of Applied Polymer Science, 2009, 111:1884-1891): C20H35
- diesel, burned in building machine: 0.00125546 MJ; lognormal variance with pedigree 0.0446, pedigree (1,4,5,5,1)
  Literature value; sample from Germany
  properties: heating value, net 1 MJ
- lubricating oil: 8.45076e-5 kg; name m_lubricating_oil; lognormal variance with pedigree 0.0206, pedigree (4,4,4,5,1)
  Literature value; sample from Germany
  property dry mass 1 kg; name DM_oil
  properties: carbon content, fossil 0.75, heating value, net 40.2 MJ, wet mass 1 kg
  note on carbon content, fossil: Lubricating oil is produced from diesel. C-content/dry mass of fats and oils considered 75%, from: ecoinvent v2.2 report, n 15a, pg 40
  note on heating value, net: Literature value, Source: IPCC 2006, 2006 IPCC Guidelines for National Greenhouse Gas Inventories, Prepared by the National Greenhouse Gas Inventories Programme, Eggleston H.S., Buendia L., Miwa K., Ngara T. and Tanabe K. (eds). Published: IGES, Japan
- waste rubber, unspecified: -7.68251e-6 kg; name w_rubber; = (m_rubber)*-1; lognormal variance with pedigree 0.1786, pedigree (4,5,5,5,5)
  calculated from rubber input
  production volume 13617 kg; = w_rubber*plywood_pv
    Calculated from production volume of reference product using the relative outputs.
  property dry mass 1 kg; name w_rubber_DM
  property price 0 EUR2005; name w_rubber_price_EUR2005
  properties: heating value, net 27.19 MJ, carbon content, fossil 0.853, wet mass 1 kg
- sawlog and veneer log, hardwood, measured as solid wood under bark: 0.000791997 m3; lognormal variance with pedigree 0.0446, pedigree (1,4,5,5,1)
  Literature value; sample from Germany
  property basic wood density 549.712; name saw_veneer_logs_basic_wood_d
  properties: dry mass 610.791 kg, water content 0.7, wet mass 1038.35 kg, heating value, net 6071.3 MJ, carbon content, non-fossil 0.494
  note on carbon content, non-fossil: C content of dry mass is 0.494 kgC/kg dry wood (ecoinvent v2.2 report 9)
- scrap steel: -4.05078e-5 kg; name m_scrap_steel; = (m_steel_lowalloyed)*-1; lognormal variance with pedigree 0.0146, pedigree (3,4,4,5,1)
  calculated from steel input
  production volume 71798.6 kg; = m_scrap_steel*plywood_pv
    Calculated from production volume of reference product using the relative outputs.
  property price 0 EUR2005; name m_scrap_steel_price_EUR2005
  property dry mass 1 kg; name w_chromium_steel_DM
  properties: wet mass 1 kg
- tap water: 0.0433343 kg; name m_tapwater; lognormal variance with pedigree 0.0118, pedigree (2,3,4,5,1)
  Literature value; sample from Germany
  properties: water content 2962.17, carbon content, fossil 0.00178991, dry mass 0.000337476 kg, wet mass 1 kg
  note on carbon content, fossil: Bicarbonate content is 2.93 mol/m3. CO2 content is 0.1 mol/m3 (ecoinvent v2.2 report 8, Tab 93.1).
- urea formaldehyde resin: 0.0312643 kg; lognormal variance with pedigree 0.0446, pedigree (1,4,5,5,1)
  Literature value; sample from Germany
  properties: dry mass 1 kg, carbon content, fossil 0.408958, wet mass 1 kg, heating value, net 12.39 MJ
  note on carbon content, fossil: Chemical formula of the urea formaldehide monomer was assumed to be C3H8N2O
- wastewater from plywood production: -3.08502e-5 m3; name wastewater; lognormal variance with pedigree 0.0446, pedigree (1,4,5,5,1)
  Literature value; sample from Germany
  production volume 54680.8 m3; = wastewater*plywood_pv
    Calculated from production volume of reference product using the relative outputs.
  property price 0 EUR2005; name wastewater_price_EUR2005
  properties: water content 2962.17, carbon content, non-fossil 0.897931, wet mass 1000 kg, dry mass 0.337476 kg
- steel, low-alloyed, hot rolled: 4.05078e-5 kg; name m_steel_lowalloyed; lognormal variance with pedigree 0.0286, pedigree (3,5,4,5,3)
  Literature value; sample from Germany
  properties: wet mass 1 kg, dry mass 1 kg, carbon content, fossil 0.005
  note on carbon content, fossil: Low alloyed steel composition given in Tab. 3.2 ecoinvent v2.2 report 10_partII. Steel assumed to have a C content of 0.5%
- waste mineral oil: -8.45076e-5 kg; name w_mineral_oil; = (m_lubricating_oil/DM_oil)*-1; lognormal variance with pedigree 0.0118, pedigree (2,3,4,5,1)
  hydraulic oil and engine oil/grease; adjusted for water content of waste oil
  production volume 149787 kg; = w_mineral_oil*plywood_pv
    Calculated from production volume of reference product using the relative outputs.
  property price 0 EUR2005; name w_mineral_oil_price_EUR2005
  properties: dry mass 0.9 kg, heating value, net 34.7 MJ, wet mass 1 kg, carbon content, fossil 0.864444, water content 0.111111
  note on carbon content, fossil: Tab A.6, ecoinvent v2.2 report 13_I. C content has been calculated after data in the tables, and then referred to 1 kg DM
- dust collector, electrostatic precipitator, for industrial use: 4.20978e-9 unit; = 1.3889E-09*wood_fuel/1.33333; lognormal variance with pedigree 0.31, pedigree (1,1,4,5,1)
  Literature value; sample from Germany
- wooden board factory, organic bonded boards: 1.16285e-11 unit; lognormal variance with pedigree 0.398, pedigree (4,5,5,5,4)
  Default value from ecoinvent 2.2
- wood ash mixture, pure: -0.00202068 kg; name w_wood_ash; = (0.000666666666666667*wood_fuel/1.33333)*-1; lognormal variance with pedigree 0.0112, pedigree (1,3,4,5,1)
  Amount derived from DS "Heat, district or industrial, other than natural gas {CH}| heat production, wood chips from industry, at furnace 5000kW | Cut-off, U" on heat generation from industrial residual wood per MJ, multiplied by the input of wood fuel (direct wood fuel plus production residues ) scaled to reflect wood input per generated heat
  production volume 3.58158e6 kg; = w_wood_ash*plywood_pv
    Calculated from production volume of reference product using the relative outputs.
  property price 0 EUR2005; name w_wood_ash_price_EUR2005
  properties: carbon content, non-fossil 0.012, dry mass 1 kg, wet mass 1 kg

## Inputs from nature
- Carbon dioxide, non-fossil, resource correction [natural resource, in air]: 1.34128 kg; pedigree (1,1,1,1,1)
  This exchange has been added after economic allocation in order to re-balance the non-fossil carbon dioxide resource extraction.
- Water, cooling, unspecified natural origin [natural resource, in water]: 0.00371275 m3; name water_cooling_UNO_input; lognormal variance with pedigree 0.0446, pedigree (1,4,5,5,1)
  Literature value; sample from Germany

## Emissions to nature
- Calcium [air, unspecified]: 2.3642e-5 kg; = 0.0000078*wood_fuel/1.33333; lognormal variance with pedigree 0.6932, pedigree (2,3,5,5,1)
  Emission factor from DS "Heat, district or industrial, other than natural gas {CH}| heat production, wood chips from industry, at furnace 5000kW | Cut-off, U" on heat generation from industrial residual wood per MJ, multiplied by the input of wood fuel (direct wood fuel plus production residues ) scaled to reflect wood input per generated heat.
- Particulates, < 2.5 um [air, unspecified]: 0.000101034 kg; = 0.0000333333333333333*wood_fuel/1.33333; lognormal variance with pedigree 0.3432, pedigree (2,3,5,5,1)
  (same comment as for Calcium)
- Dioxins, measured as 2,3,7,8-tetrachlorodibenzo-p-dioxin [air, unspecified]: 1.25282e-13 kg; = 4.13333333333333E-14*wood_fuel/1.33333; lognormal variance with pedigree 0.3432, pedigree (2,3,5,5,1)
  (same comment as for Calcium)
- Methane, non-fossil [air, unspecified]: 6.06204e-6 kg; = 0.000002*wood_fuel/1.33333; lognormal variance with pedigree 0.0832, pedigree (2,3,5,5,1)
  (same comment as for Calcium)
- Chromium [air, unspecified]: 1.60038e-8 kg; = 5.28000000000001E-09*wood_fuel/1.33333; lognormal variance with pedigree 0.6932, pedigree (2,3,5,5,1)
  (same comment as for Calcium)
- Formaldehyde [air, unspecified]: 4.73189e-5 kg; = 1.73333333333334E-07*wood_fuel/1.33333+0.134; lognormal variance with pedigree 0.1632, pedigree (2,3,5,5,1)
  Emission factor from DS "Heat, district or industrial, other than natural gas {CH}| heat production, wood chips from industry, at furnace 5000kW | Cut-off, U" on heat generation from industrial residual wood per MJ, multiplied by the input of wood fuel (direct wood fuel plus production residues ) scaled to reflect wood input per generated heat plus estimated emissions from wood and glue drying processes (according to Rüter & Diederichs 2012).
- Carbon monoxide, non-fossil [air, unspecified]: 0.000808272 kg; = 0.000266666666666667*wood_fuel/1.33333; lognormal variance with pedigree 0.6932, pedigree (2,3,5,5,1)
  (same comment as for Calcium)
- Magnesium [air, unspecified]: 1.45489e-6 kg; name magnesium; = 0.00000048*wood_fuel/1.33333; lognormal variance with pedigree 0.6932, pedigree (2,3,5,5,1)
  (same comment as for Calcium)
- Lead [air, unspecified]: 1.01034e-7 kg; = 3.33333333333333E-08*wood_fuel/1.33333; lognormal variance with pedigree 0.6932, pedigree (2,3,5,5,1)
  (same comment as for Calcium)
- Phenol, pentachloro- [air, unspecified]: 3.2735e-11 kg; = 0.0000000000108*wood_fuel/1.33333; lognormal variance with pedigree 0.0832, pedigree (2,3,5,5,1)
  (same comment as for Calcium)
- Hydrocarbons, aliphatic, alkanes, unspecified [air, unspecified]: 3.67764e-6 kg; = 1.21333333333333E-06*wood_fuel/1.33333; lognormal variance with pedigree 0.0832, pedigree (2,3,5,5,1)
  (same comment as for Calcium)
- Benzene, hexachloro- [air, unspecified]: 2.90978e-14 kg; = 9.60000000000001E-15*wood_fuel/1.33333; lognormal variance with pedigree 0.0832, pedigree (2,3,5,5,1)
  (same comment as for Calcium)
- Sulfur dioxide [air, unspecified]: 1.01034e-5 kg; = 3.33333333333334E-06*wood_fuel/1.33333; lognormal variance with pedigree 0.0438, pedigree (2,3,5,5,1)
  (same comment as for Calcium)
- m-Xylene [air, unspecified]: 4.84963e-7 kg; name mxylene; = 0.00000016*wood_fuel/1.33333; lognormal variance with pedigree 0.0832, pedigree (2,3,5,5,1)
  (same comment as for Calcium)
- Water [air, unspecified]: 0.0039071 m3; = 0.00006*wood_fuel/1.33333+m_tapwater/1000+water_cooling_UNO_input-(wastewater*-1); lognormal variance with pedigree 0.132, pedigree (4,4,5,5,4)
  Water emissions from the combustion of the wood (emission per MJ, scaled to wood input and extrapolated from wood input to heat generated) plus tap water input plus input of cooling water minus waste water
- Chromium VI [air, unspecified]: 1.61654e-10 kg; = 5.33333333333334E-11*wood_fuel/1.33333; lognormal variance with pedigree 0.6932, pedigree (2,3,5,5,1)
  (same comment as for Calcium)
- Copper [air, unspecified]: 8.89099e-8 kg; = 2.93333333333334E-08*wood_fuel/1.33333; lognormal variance with pedigree 0.6932, pedigree (2,3,5,5,1)
  (same comment as for Calcium)
- Nickel [air, unspecified]: 2.42482e-8 kg; name nickel; = 0.000000008*wood_fuel/1.33333; lognormal variance with pedigree 0.6932, pedigree (2,3,5,5,1)
  (same comment as for Calcium)
- Toluene [air, unspecified]: 1.21241e-6 kg; = 0.0000004*wood_fuel/1.33333; lognormal variance with pedigree 0.0832, pedigree (2,3,5,5,1)
  (same comment as for Calcium)
- NMVOC, non-methane volatile organic compounds, unspecified origin [air, unspecified]: 1.41448e-5 kg; name nmvoc; = 4.66666666666666E-06*wood_fuel/1.33333; lognormal variance with pedigree 0.0832, pedigree (2,3,5,5,1)
  (same comment as for Calcium)
- Carbon dioxide, non-fossil [air, unspecified]: 0.432426 kg; = 0.142666666666666*wood_fuel/1.33333; lognormal variance with pedigree 0.0438, pedigree (2,3,5,5,1)
  (same comment as for Calcium)
- Manganese [air, unspecified]: 6.87031e-7 kg; name manganese; = 2.26666666666667E-07*wood_fuel/1.33333; lognormal variance with pedigree 0.6932, pedigree (2,3,5,5,1)
  (same comment as for Calcium)
- Fluorine [air, unspecified]: 2.02068e-7 kg; = 6.66666666666667E-08*wood_fuel/1.33333; lognormal variance with pedigree 0.0832, pedigree (2,3,5,5,1)
  (same comment as for Calcium)
- PAH, polycyclic aromatic hydrocarbons [air, unspecified]: 4.48591e-8 kg; name pah; = 0.0000000148*wood_fuel/1.33333; lognormal variance with pedigree 0.3432, pedigree (2,3,5,5,1)
  (same comment as for Calcium)
- Nitrogen oxides [air, unspecified]: 0.000909306 kg; = 0.0003*wood_fuel/1.33333; lognormal variance with pedigree 0.0832, pedigree (2,3,5,5,1)
  (same comment as for Calcium)
- Acetaldehyde [air, unspecified]: 2.46523e-7 kg; = 8.13333333333333E-08*wood_fuel/1.33333; lognormal variance with pedigree 0.0832, pedigree (2,3,5,5,1)
  (same comment as for Calcium)
- Zinc [air, unspecified]: 1.21241e-6 kg; = 0.0000004*wood_fuel/1.33333; lognormal variance with pedigree 0.6932, pedigree (2,3,5,5,1)
  (same comment as for Calcium)
- Benzene, ethyl- [air, unspecified]: 1.21241e-7 kg; = 0.00000004*wood_fuel/1.33333; lognormal variance with pedigree 0.0832, pedigree (2,3,5,5,1)
  (same comment as for Calcium)
- Bromine [air, unspecified]: 2.42482e-7 kg; = 0.00000008*wood_fuel/1.33333; lognormal variance with pedigree 0.6932, pedigree (2,3,5,5,1)
  (same comment as for Calcium)
- Ammonia [air, unspecified]: 6.99155e-6 kg; = 2.30666666666667E-06*wood_fuel/1.33333; lognormal variance with pedigree 0.0832, pedigree (2,3,5,5,1)
  (same comment as for Calcium)
- Benzene [air, unspecified]: 3.67764e-6 kg; = 1.21333333333333E-06*wood_fuel/1.33333; lognormal variance with pedigree 0.0832, pedigree (2,3,5,5,1)
  (same comment as for Calcium)
- Phosphorus [air, unspecified]: 1.21241e-6 kg; = 0.0000004*wood_fuel/1.33333; lognormal variance with pedigree 0.0832, pedigree (2,3,5,5,1)
  (same comment as for Calcium)
- Chlorine [air, unspecified]: 7.27445e-7 kg; = 0.00000024*wood_fuel/1.33333; lognormal variance with pedigree 0.6932, pedigree (2,3,5,5,1)
  (same comment as for Calcium)
- Dinitrogen monoxide [air, unspecified]: 9.29513e-6 kg; = 3.06666666666667E-06*wood_fuel/1.33333; lognormal variance with pedigree 0.0832, pedigree (2,3,5,5,1)
  (same comment as for Calcium)
- Arsenic [air, unspecified]: 4.04136e-9 kg; = 1.33333333333333E-09*wood_fuel/1.33333; lognormal variance with pedigree 0.6932, pedigree (2,3,5,5,1)
  (same comment as for Calcium)
- Cadmium [air, unspecified]: 2.82895e-9 kg; = 9.33333333333334E-10*wood_fuel/1.33333; lognormal variance with pedigree 0.6932, pedigree (2,3,5,5,1)
  (same comment as for Calcium)
- Hydrocarbons, aliphatic, unsaturated [air, unspecified]: 1.25282e-5 kg; = 4.13333333333333E-06*wood_fuel/1.33333; lognormal variance with pedigree 0.0832, pedigree (2,3,5,5,1)
  (same comment as for Calcium)
- Potassium [air, unspecified]: 9.45678e-5 kg; = 0.0000312*wood_fuel/1.33333; lognormal variance with pedigree 0.0832, pedigree (2,3,5,5,1)
  (same comment as for Calcium)
- Sodium [air, unspecified]: 5.25377e-6 kg; = 1.73333333333334E-06*wood_fuel/1.33333; lognormal variance with pedigree 0.6932, pedigree (2,3,5,5,1)
  (same comment as for Calcium)
- Benzo(a)pyrene [air, unspecified]: 2.02068e-9 kg; = 6.66666666666667E-10*wood_fuel/1.33333; lognormal variance with pedigree 0.3432, pedigree (2,3,5,5,1)
  (same comment as for Calcium)
- Mercury [air, unspecified]: 1.21241e-9 kg; name mercury; = 0.0000000004*wood_fuel/1.33333; lognormal variance with pedigree 0.6932, pedigree (2,3,5,5,1)
  (same comment as for Calcium)

## Sampling procedure
Literature; emissions profile per MJ wood input from PSI (2014)

## Extrapolations
See Geography and Technology.Exchanges identical to GLO dataset. Created to enable linking to regional markets (e.g. for electricity).
