# treatment of residue from mechanical treatment, laptop computer, municipal waste incineration

Dataset: EcoSpold 2, unit process
Geography: RoW
Time period: 2006-01-01 to 2021-12-31
Technology level: current
Classification: ISIC rev.4 ecoinvent: 3821:Treatment and disposal of non-hazardous waste
Synonyms: Kehrichtverbrennung; Siedlungsabfallverbrennung; municipal waste incineration
Scenario: Business-as-Usual
System model: Allocation, cut-off by classification
Share of production covered: 1.8 %
Generated by: Gabor Doka
Published in: Doka G. 2013
Database: ecoinvent
isCopyrightProtected: true
accessRestrictedTo: 1

## General comment
This dataset represents the activity of waste disposal of residue from mechanical treatment, laptop computer in a municipal solid waste incinerator (MSWI) // Recommended use of this dataset: Only for incineration of shredder residues generated in the recycling (mechanical treatment) of laptop computers // Inventoried waste contains 1.85% rubber; 45.2% Plastics from electronic consumer goods; 45.2% Plastics from electronic industrial goods; 1.99% MSWI iron scrap; 3.61% Alu in MSW; 0.335% Glass; 1.71% wiring copper; 0.0372% Pb in ASR inert; 0.0188% silver; . // Waste composition (wet, in ppm): upper heating value 33.34 MJ/kg; lower heating value 31.96 MJ/kg; H2O 8363.2; O 50617; H 68908; C 752530; S 400.02; N 12031; P 468.2; B n.a.; Cl 6302.9; Br 4975.2; F 226.14; I n.a.; Ag 187.58; As 6.7843; Ba 160.11; Cd 136.45; Co 26.665; Cr 72.375; Cu 20243; Hg 0.76891; Mn 53.974; Mo 2.7137; Ni 474.07; Pb 514.24; Sb 4341.8; Se 1.7726; Sn 196.95; V 5.6506; Zn 698.91; Be 0.42204; Sc n.a.; Sr 74.701; Ti 4049.8; Tl 0.33763; W n.a.; Si 4501.6; Fe 17643; Ca 3059.2; Al 38275; K 105.84; Mg n.a.; Na 342.36; // Share of carbon in waste that is biogenic 0%. // Share of metals in waste not oxidised and bulk-recyclable (exclude very small or thin parts) Iron: 91.91%; Alu: 93.81%; Copper: 84.39%. // One kg of this waste produces 0.1022 kg of slag and 0.02052 kg of residues, which are landfilled. Additional solidification with 0.008207 kg of cement. // Net energy production: 4.09MJ/kg electric energy and 7.96MJ/kg thermal energy. // Recovery of metal scrap to recycling: 9.3819g iron scrap, 11.016g aluminium scrap, 5.2121g copper scrap.

## Included activities start
waste incineration from waste reception gate and delivery into waste bunker at incinerator plant site (without transports to the incinerator)

## Included activities end
Waste-specific short-term emissions to water from leachate. Long-term emissions from landfill to ground water.

## Geography
Specific to the technology mix encountered in Switzerland in 2010. Well applicable to modern incineration practices in Europe, North America or Japan.

## Technology
average Swiss MSWI plants in 2010 (grate incinerators) with electrostatic precipitator for fly ash (ESP), wet flue gas scrubber and 25% SNCR , 42.77% SCR-high dust , 32.68% SCR-low dust -DeNOx facilities and 0% without Denox (weighted according to mass of burnt waste, representing Swiss average). Efficiency of iron scrap separation from slag : 58%. Efficiency of non-ferrous scrap separation from slag : 31%. Gross electric efficiency technology mix 15.84% and Gross thermal efficiency technology mix 28.51%

## Time period
Waste composition as given in literature reference, theoretical data or other source. Transfer coefficients for modern MSWI.

## Reference product
- residue from mechanical treatment, laptop computer: -1 kg; CPC 39990: Other wastes n.e.c.; By-product classification Waste
  Main reference product of this activity (supply of disposal service).
  production volume 3.6004e7 kg
    based on estimate on MSW in WTE globally and estimate of share of WEEE residues in Swiss MSW based on unqualified estimate of laptop PC waste in CH and rate of this residue waste per device (from Hischier et al. 2007-V)
  property price 0 EUR2005
    Waste products are assigned a price of zero as they are assumed to require further treatment.
  property heating value, net 31.96 MJ
    Value taken from the general comment of the treatment dataset.
  property carbon content 0.766065
    carbon content on a dry matter basis (reserved; not for manual entry)
  properties: water in wet mass 0 kg, carbon content, fossil 0.766065, carbon content, non-fossil 0, wet mass 1 kg, dry mass 1 kg, water content 0, carbon allocation 0.766065 kg

## By-products
All rows: pedigree (1,1,1,1,1)
- heat, for reuse in municipal waste incineration only: 0 MJ; name E_th_prod_MSWI; By-product classification allocatable product; CPC 17300: Steam and hot water
  Net electricity generated from this waste and used in internal MSWI plant energy redistribution.
  Uncertainty: uncertainty is calculated from uncertainties in waste composition and uncertainties in energy efficiency and the uncertainty in internal energy demand
  production volume 2.8669e8 MJ
    calculated in proportion to reference product waste input to incinerator
  property true value relation 0.1842; name E_th_prod_MSWI_true_value_relation
    property to calculate "true value" from
  property exergy 0.1842 MJ; name E_th_prod_MSWI_exergy
    This exergy property is based on the exergy content of the product.
  property price 0.0106 EUR2005; name E_th_prod_MSWI_price_EUR2005
    Average European district heat price from Ecoheatcool and Euroheat 2005-2006, Ecoheat Work package 1: The European heat market. Final report. 10.6 EUR/GJ i s the price of district heat. http://www.solarthermalworld.org/files/Ecoheatcool%20WP1%20Web.pdf?download
- copper scrap, sorted, pressed: 0 kg; CPC 39361: Waste and scrap of copper; By-product classification Recyclable
  Copper scrap recovered from this waste.
  Uncertainty: uncertainty calculated from uncertainty in waste composition, uncertainty of share of recyclable metal, uncertainty of transfer coefficient to bottom ash, uncertainty of the efficiency of scrap removal in MSWI plant.
  production volume 0 kg
    calculated in proportion to reference product waste input to incinerator
  property price 2.84 EUR2005
    Temporary price data. Calculated as 90% of purchasers price based on: Source: USGS Mineral Yearbook 2007, Table 1 in <http://minerals.usgs.gov/minerals/pubs/commodity/recycle/myb1-2007-recyc.pdf>
  property carbon content 0
    carbon content on a dry matter basis (reserved; not for manual entry)
  properties: water content 0, carbon content, fossil 0, dry mass 1 kg, carbon content, non-fossil 0, water in wet mass 0 kg, wet mass 1 kg, carbon allocation 0 kg
- aluminium scrap, post-consumer, prepared for melting: 0 kg; By-product classification Recyclable; CPC 39363: Waste and scrap of aluminium
  Aluminium scrap recovered from this waste.
  Uncertainty: uncertainty calculated from uncertainty in waste composition, uncertainty of share of recyclable metal, uncertainty of transfer coefficient to bottom ash, uncertainty of the efficiency of scrap removal in MSWI plant.
  production volume 0 kg
    calculated in proportion to reference product waste input to incinerator
  property price 0.806 EUR2005
    Temporary price data. Calculated as 90% of purchasers price based on: 2005 import and export prices (total trades (USD) divided by total weight (kg) in biggest economies of the world: EU27, USA, Brasil, China, India, Japan and Russia) from UN Commodity Trade Statistics Database (http://data.un.org/Explorer.aspxDatabase [Accessed 2011.06.17]). Commodity: Waste or scrap, aluminium
  property carbon content 0
    carbon content on a dry matter basis (reserved; not for manual entry)
  properties: water content 0, wet mass 1 kg, water in wet mass 0 kg, carbon content, fossil 0, carbon content, non-fossil 0, dry mass 1 kg, carbon allocation 0 kg
- iron scrap, sorted, pressed: 0 kg; CPC 39310: Slag, dross, scalings and other waste from the manufacture of iron or steel; By-product classification Recyclable
  Iron scrap recovered from this waste.
  Uncertainty: uncertainty calculated from uncertainty in waste composition, uncertainty of share of recyclable metal, uncertainty of transfer coefficient to bottom ash, uncertainty of the efficiency of scrap removal in MSWI plant.
  production volume 0 kg
    calculated in proportion to reference product waste input to incinerator
  property price 0.175 EUR2005
    Temporary price data. Calculated as 90% of purchasers price based on: 2005 import and export prices (total trades (USD) divided by total weight (kg) in biggest economies of the world: EU27, USA, Brasil, China, India, Japan and Russia) from UN Commodity Trade Statistics Database (http://data.un.org/Explorer.aspxDatabase [Accessed 2011.06.20]). Commodity: Waste or scrap, of cast iron
  property carbon content 0
    carbon content on a dry matter basis (reserved; not for manual entry)
  properties: water in wet mass 0 kg, carbon content, non-fossil 0, water content 0, wet mass 1 kg, carbon content, fossil 0, dry mass 1 kg, carbon allocation 0 kg
- electricity, for reuse in municipal waste incineration only: 0 kWh; name E_el_prod_MSWI; CPC 17100: Electrical energy; By-product classification allocatable product
  (same comment as for heat, for reuse in municipal waste incineration only)
  production volume 4.0914e7 kWh
    calculated in proportion to reference product waste input to incinerator
  property true value relation 3.6; name E_el_prod_MSWI_true_value_relation
    property to calculate "true value" from
  property exergy 3.6 MJ; name E_el_prod_MSWI_exergy
    This exergy property is based on the exergy content of the product.
  property price 0.1 EUR2005; name E_el_prod_MSWI_price_EUR2005
    Estimated to be the same price as in case of electricity, medium voltage.

## Inputs from technosphere
- chemical, organic: 4.86e-5 kg; lognormal variance with pedigree 0.75634, pedigree (1,1,4,1,1)
  Auxilliary inputs for the wastewater treatment stage of the incinerator plant. Proxy for (pure) Trisodium-trimercapto-s-triazine (CAS 17766-26-6), used as 15% diluted solution, aka TMT15.
  Uncertainty: uncertainty calculated from uncertainty in average TMT15 input, of transfer coefficients in the incinerator, and the uncertainty of the waste composition of this waste
  properties: wet mass 1 kg, dry mass 1 kg, carbon content, fossil 0.628, heating value, net 19.03 MJ
- waste cement, hydrated: 0 kg; pedigree (1,1,1,1,1)
  Hydrated cement output for solidification of landfilled residual material.
  Uncertainty: Uncertainty calculated from uncertainty of the waste composition of this waste and transfer coefficients in the incinerator and of the solidification recipe.
  production volume 0 kg
    calculated in proportion to reference product waste input to incinerator
  properties: dry mass 1 kg, wet mass 1 kg
- quicklime, milled, packed: 0.0038791 kg; lognormal variance with pedigree 0.33141, pedigree (1,1,4,1,1)
  Auxilliary inputs for the flue gas treatment stage of the incinerator plant.
  Uncertainty: uncertainty calculated from uncertainty in average CaO input, of transfer coefficients in the incinerator, and the uncertainty of the waste composition of this waste
  properties: dry mass 0.99 kg, water content 0.010101, wet mass 1 kg
- iron (III) chloride, without water, in 40% solution state: 0.00012552 kg; lognormal variance with pedigree 0.26708, pedigree (1,1,4,1,1)
  Auxilliary inputs for the wastewater treatment stage of the incinerator plant.
  Uncertainty: uncertainty calculated from uncertainty in average FeCl3 input, of transfer coefficients in the incinerator, and the uncertainty of the waste composition of this waste
  properties: dry mass 1 kg, wet mass 1 kg
- transport, freight, lorry, unspecified: 0 metric ton*km; pedigree (1,1,1,1,1)
  Transport services to transport incineration residues to landfills.
  Uncertainty: uncertainty calculated from uncertainty of the waste composition of this waste, uncertainty of transfer coefficients and the uncertainty in generic transportation distances
- titanium dioxide: 0.00013404 kg; lognormal variance with pedigree 1.0374, pedigree (1,1,4,1,1)
  Input to DeNOx stage (TiO2 catalyst carrier)
  Uncertainty: uncertainty calculated from uncertainty in average DeNOx input, uncertainty in the share of thermal NOx, uncertainty of nitrogen content in average municipal waste and the uncertainty in nitrogen content in *this* waste.
  properties: wet mass 1 kg, dry mass 1 kg
- process-specific burdens, residual material landfill: 0 kg; pedigree (1,1,1,1,1)
  Mass-specific expenditures required for landfilling of incineration residues.
  Uncertainty: uncertainty is calculated from uncertainties in waste composition and transfer coefficients in incinerator
- residual material landfill: 4.2745e-11 unit; lognormal variance with pedigree 0.063121, pedigree (1,1,4,1,1)
  Landfill infrastructure required for landfilling of incineration residues.
  Uncertainty: uncertainty is calculated from uncertainties in waste composition and transfer coefficients in incinerator
- cement, unspecified: 0 kg; pedigree (1,1,1,1,1)
  Cement required for solidification of landfilled residual material.
  Uncertainty: Uncertainty calculated from uncertainty of the waste composition of this waste, of transfer coefficients in the incinerator and of the solidification recipe.
  properties: wet mass 1 kg, dry mass 1 kg
- chromium oxide, flakes: 2.7354e-6 kg; lognormal variance with pedigree 1.0374, pedigree (1,1,4,1,1)
  Input to DeNOx stage.
  Uncertainty: uncertainty calculated from uncertainty in average DeNOx input, uncertainty in the share of thermal NOx, uncertainty of nitrogen content in average municipal waste and the uncertainty in nitrogen content in *this* waste.
  properties: dry mass 1 kg, wet mass 1 kg
- chemical, inorganic: 0.00029338 kg; lognormal variance with pedigree 0.22165, pedigree (1,1,4,1,1)
  Auxilliary inputs for the wastewater treatment stage of the incinerator plant. Proxy for Polyelectrolyte.
  Uncertainty: uncertainty calculated from uncertainty in average Polyelectrolyte input, of transfer coefficients in the incinerator, and the uncertainty of the waste composition of this waste
  properties: wet mass 1 kg, carbon content, fossil 0.003, dry mass 1 kg
- ammonia, anhydrous, liquid: 0 kg; pedigree (1,1,1,1,1)
  Input to DeNOx stage (100% NH3).
  Uncertainty: uncertainty calculated from uncertainty in average DeNOx input, uncertainty in the share of thermal NOx, uncertainty of nitrogen content in average municipal waste and the uncertainty in nitrogen content in *this* waste.
  properties: dry mass 1 kg, wet mass 1 kg
- sodium hydroxide, without water, in 50% solution state: 0.00087451 kg; lognormal variance with pedigree 0.26047, pedigree (1,1,4,1,1)
  Auxilliary inputs for the flue gas treatment stage of the incinerator plant.
  Uncertainty: uncertainty calculated from uncertainty in average NaOH input, of transfer coefficients in the incinerator, and the uncertainty of the waste composition of this waste
  properties: dry mass 1 kg, wet mass 1 kg, heating value, net 3.03 MJ
- water, decarbonised: 0 kg; pedigree (1,1,1,1,1)
  Incinerator process water used in flue gas scrubber stage.
  Uncertainty: uncertainty calculated from uncertainty in average water input, and the uncertainty of the waste composition of this waste
  properties: wet mass 1 kg
- slag landfill: 1.7905e-10 unit; lognormal variance with pedigree 0.045578, pedigree (1,1,4,1,1)
  Landfill infrastructure required for landfilling of bottom ash.
  Uncertainty: uncertainty is calculated from uncertainties in waste composition and transfer coefficients in incinerator
- process-specific burdens, slag landfill: 0 kg; pedigree (1,1,1,1,1)
  Mass-specific expenditures required for landfilling of bottom ash.
  Uncertainty: uncertainty is calculated from uncertainties in waste composition and transfer coefficients in incinerator
- hydrochloric acid, without water, in 30% solution state: 7.7114e-5 kg; lognormal variance with pedigree 0.22165, pedigree (1,1,4,1,1)
  Auxilliary inputs for the wastewater treatment stage of the incinerator plant.
  Uncertainty: uncertainty calculated from uncertainty in average HCl input, of transfer coefficients in the incinerator, and the uncertainty of the waste composition of this waste
  properties: wet mass 1 kg, heating value, net 3.32 MJ, dry mass 1 kg
- heat, district or industrial, natural gas: 0 MJ; pedigree (1,1,1,1,1)
  Input to DeNOx stage, to heat up flue gas in low-dust SCR.
  Uncertainty: uncertainty calculated from uncertainty in average DeNOx input, uncertainty in the share of thermal NOx, uncertainty of nitrogen content in average municipal waste and the uncertainty in nitrogen content in *this* waste.
  properties: heating value, net 1 MJ
- municipal waste incineration facility: 2.5e-10 unit
  Demands per kilogram waste.
- copper scrap, sorted, pressed: -0.0052121 kg; lognormal variance with pedigree 0.3031, pedigree (1,1,4,1,1)
  (same comment as for copper scrap, sorted, pressed)
  production volume 187660 kg
  properties: dry mass 1 kg, price 2.84 EUR2005, wet mass 1 kg
- aluminium scrap, post-consumer, prepared for melting: -0.011016 kg; lognormal variance with pedigree 0.23265, pedigree (1,1,4,1,1)
  (same comment as for aluminium scrap, post-consumer, prepared for melting)
  production volume 396640 kg
  properties: wet mass 1 kg, price 0.806 EUR2005, dry mass 1 kg
- iron scrap, sorted, pressed: -0.0093819 kg; lognormal variance with pedigree 0.31834, pedigree (1,1,4,1,1)
  (same comment as for iron scrap, sorted, pressed)
  production volume 337790 kg
  properties: price 0.175 EUR2005, wet mass 1 kg, dry mass 1 kg
- waste cement, hydrated: -0.00580402, -0.014714 kg (2 entries); lognormal variance with pedigree 0.072205, pedigree (1,1,4,1,1)
  (same comment as for waste cement, hydrated)
  production volume 738730 kg
- transport, freight, lorry, unspecified: 0.000554958, 8.68859e-5, 0.00420746 metric ton*km (3 entries); lognormal variance with pedigree 0.035612, pedigree (1,1,4,1,1)
  (same comment as for transport, freight, lorry, unspecified)
- process-specific burdens, residual material landfill: 0.00580402, 0.014714 kg (2 entries); lognormal variance with pedigree 0.063121, pedigree (1,1,4,1,1)
  (same comment as for process-specific burdens, residual material landfill)
- cement, unspecified: 0.00118507, 0.000246578, 1.80601e-5, 5.14773e-5, 0.00116418, 3.42651e-5, 0.000376332, 4.5532e-5, 0.00508561 kg (9 entries); lognormal variance with pedigree 0.072205, pedigree (1,1,4,1,1)
  (same comment as for cement, unspecified)
- ammonia, anhydrous, liquid: 0.000448425, 3.85475e-5, 5.997e-5, 0.000118822, 0.000116414, 1.22014e-5, 5.4545e-5, 0.00129038 kg (8 entries); lognormal variance with pedigree 0.68027, pedigree (1,1,4,1,1)
  (same comment as for ammonia, anhydrous, liquid)
- water, decarbonised: 0.0313624, 0.081605, 0.329132, 0.0803723, 0.0162027, 0.0532774, 0.00294123, 0.0419119, 0.0976301, 0.612407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 kg (12 entries); lognormal variance with pedigree 0.26708, pedigree (1,1,4,1,1)
  (same comment as for water, decarbonised)
- process-specific burdens, slag landfill: 0.0284911, 0.0722289 kg (2 entries); lognormal variance with pedigree 0.045578, pedigree (1,1,4,1,1)
  (same comment as for process-specific burdens, slag landfill)
- heat, district or industrial, natural gas: 0.00445273, 0.106696, 0.288911 MJ (3 entries); lognormal variance with pedigree 0.68027, pedigree (1,1,4,1,1)
  (same comment as for heat, district or industrial, natural gas)

## Inputs from nature
- Oxygen [natural resource, in air]: 2.5982 kg; lognormal variance with pedigree 0.0179611, pedigree (1,1,4,1,1)
  Oxygen from ambient air needed to combust and oxidise this waste. Net demand, i.e. without O2 leaving the plant in flue gas uncombusted.
  Uncertainty: uncertainty is calculated from uncertainties in waste composition and transfer coefficients to flue gas and soild residues in incinerator

## Emissions to nature
- Thallium [air, urban air close to ground]: 3.3763e-10 kg; lognormal variance with pedigree 1.7339, pedigree (1,1,4,1,1)
  Emission to air from waste composition and transfer coefficients.
  Uncertainty: uncertainty is calculated from uncertainties in waste composition and transfer coefficients in incinerator
- NMVOC, non-methane volatile organic compounds, unspecified origin [air, urban air close to ground]: 6.7978e-7 kg; lognormal variance with pedigree 0.077223, pedigree (1,1,4,1,1)
  Incomplete combustion product emitted to air.
  Uncertainty: uncertainty calculated from uncertainty in average operation emissions, and the uncertainty of the flue gas volume from this waste.
- Sodium, ion [water, surface water]: 6.0667e-5 kg; lognormal variance with pedigree 0.49027, pedigree (1,1,4,1,1)
  Emissions to water from waste composition and transfer coefficients in incinerator and landfills.
  Uncertainty: uncertainty is calculated from uncertainties in waste composition and transfer coefficients in incinerator and landfills
- Ammonia [air, urban air close to ground]: 2.5153e-6 kg; lognormal variance with pedigree 0.73547, pedigree (1,1,4,1,1)
  Nitrogen species emitted to air after DeNOx stage.
  Uncertainty: uncertainty calculated from uncertainty in average N-emissions and uncertainty in the share of thermal NOx and the uncertainty in nitrogen content in *this* waste.
- Silicon [water, ground-, long-term]: 0.00028645 kg; lognormal variance with pedigree 5.5116, pedigree (1,1,4,1,1)
  Long-term emissions from landfilling of incineration residues.
  Uncertainty: uncertainty is calculated from uncertainties in waste composition and transfer coefficients in incinerator and landfills.
- Potassium, ion [water, surface water]: 2.3038e-5 kg; lognormal variance with pedigree 0.59187, pedigree (1,1,4,1,1)
  (same comment as for Sodium, ion)
- Strontium [water, surface water]: 4.7034e-8 kg; lognormal variance with pedigree 1.7205, pedigree (1,1,4,1,1)
  (same comment as for Sodium, ion)
- Selenium [water, surface water]: 5.9881e-7 kg; lognormal variance with pedigree 1.1977, pedigree (1,1,4,1,1)
  (same comment as for Sodium, ion)
- Aluminium [water, ground-, long-term]: 0.022063 kg; lognormal variance with pedigree 0.23112, pedigree (1,1,4,1,1)
  (same comment as for Silicon)
- Beryllium [water, surface water]: 2.6433e-10 kg; lognormal variance with pedigree 2.2023, pedigree (1,1,4,1,1)
  (same comment as for Sodium, ion)
- Toluene [air, urban air close to ground]: 2.9874e-8 kg; lognormal variance with pedigree 0.077223, pedigree (1,1,4,1,1)
  (same comment as for NMVOC, non-methane volatile organic compounds, unspecified origin)
- Barium [air, urban air close to ground]: 6.2844e-7 kg; lognormal variance with pedigree 0.921, pedigree (1,1,4,1,1)
  (same comment as for Thallium)
- COD, Chemical Oxygen Demand [water, surface water]: 0.0008803 kg; lognormal variance with pedigree 0.033411, pedigree (1,1,4,1,1)
  (same comment as for Sodium, ion)
- Potassium, ion [water, ground-, long-term]: 8.2274e-5 kg; lognormal variance with pedigree 0.53484, pedigree (1,1,4,1,1)
  (same comment as for Silicon)
- Heat, waste [air, urban air close to ground]: 24.572 MJ; lognormal variance with pedigree 0.024259, pedigree (1,1,4,1,1)
  Waste heat generated from heating value of this waste plus any electricity required to process it.
  Uncertainty: uncertainty is calculated from uncertainties in waste composition and uncertainties in energy efficiency and the uncertainty in internal energy demand
- Benzene, hexachloro- [air, urban air close to ground]: 3.1233e-11 kg; lognormal variance with pedigree 0.077223, pedigree (1,1,4,1,1)
  (same comment as for NMVOC, non-methane volatile organic compounds, unspecified origin)
- Selenium [air, urban air close to ground]: 2.1147e-8 kg; lognormal variance with pedigree 1.5128, pedigree (1,1,4,1,1)
  (same comment as for Thallium)
- Antimony [water, surface water]: 0.001495 kg; lognormal variance with pedigree 0.49102, pedigree (1,1,4,1,1)
  (same comment as for Sodium, ion)
- Bromine [water, ground-, long-term]: 0.00047953 kg; lognormal variance with pedigree 0.46954, pedigree (1,1,4,1,1)
  (same comment as for Silicon)
- Nitrogen oxides [air, urban air close to ground]: 0.00079652 kg; lognormal variance with pedigree 0.73547, pedigree (1,1,4,1,1)
  Sum of fuel-Nox and thermal-NOx emitted to air after DeNOx stage.
  Uncertainty: uncertainty calculated from uncertainty in average N-emissions and uncertainty in the share of thermal NOx and the uncertainty in nitrogen content in *this* waste.
- BOD5, Biological Oxygen Demand [water, ground-, long-term]: 0.0018485 kg; lognormal variance with pedigree 0.021838, pedigree (1,1,4,1,1)
  (same comment as for Silicon)
- Bromine [water, surface water]: 0.0044931 kg; lognormal variance with pedigree 0.19338, pedigree (1,1,4,1,1)
  (same comment as for Sodium, ion)
- Zinc, ion [water, surface water]: 6.2751e-8 kg; lognormal variance with pedigree 0.61205, pedigree (1,1,4,1,1)
  (same comment as for Sodium, ion)
- Particulates, < 2.5 um [air, urban air close to ground]: 1.7834e-6 kg; lognormal variance with pedigree 0.37971, pedigree (1,1,4,1,1)
  (same comment as for NMVOC, non-methane volatile organic compounds, unspecified origin)
- Beryllium [water, ground-, long-term]: 3.8572e-7 kg; lognormal variance with pedigree 1.608, pedigree (1,1,4,1,1)
  (same comment as for Silicon)
- Calcium, ion [water, ground-, long-term]: 0.0023399 kg; lognormal variance with pedigree 0.48851, pedigree (1,1,4,1,1)
  (same comment as for Silicon)
- Arsenic [air, urban air close to ground]: 5.3143e-8 kg; lognormal variance with pedigree 1.3391, pedigree (1,1,4,1,1)
  (same comment as for Thallium)
- Silicon [water, surface water]: 7.2472e-7 kg; lognormal variance with pedigree 0.68399, pedigree (1,1,4,1,1)
  (same comment as for Sodium, ion)
- Vanadium, ion [water, surface water]: 3.289e-9 kg; lognormal variance with pedigree 1.6854, pedigree (1,1,4,1,1)
  (same comment as for Sodium, ion)
- Manganese [air, urban air close to ground]: 1.192e-9 kg; lognormal variance with pedigree 1.0975, pedigree (1,1,4,1,1)
  (same comment as for Thallium)
- TOC, Total Organic Carbon [water, ground-, long-term]: 0.0022362 kg; lognormal variance with pedigree 0.021838, pedigree (1,1,4,1,1)
  (same comment as for Silicon)
- Tin [air, urban air close to ground]: 1.1995e-10 kg; lognormal variance with pedigree 0.95777, pedigree (1,1,4,1,1)
  (same comment as for Thallium)
- Calcium [air, urban air close to ground]: 2.2154e-5 kg; lognormal variance with pedigree 0.5303, pedigree (1,1,4,1,1)
  (same comment as for Thallium)
- Strontium [water, ground-, long-term]: 7.4604e-5 kg; lognormal variance with pedigree 1.0084, pedigree (1,1,4,1,1)
  (same comment as for Silicon)
- Benzene, pentachloro- [air, urban air close to ground]: 7.8917e-11 kg; lognormal variance with pedigree 0.077223, pedigree (1,1,4,1,1)
  (same comment as for NMVOC, non-methane volatile organic compounds, unspecified origin)
- Bromine [air, urban air close to ground]: 2.4851e-6 kg; lognormal variance with pedigree 0.48153, pedigree (1,1,4,1,1)
  (same comment as for Thallium)
- Phosphorus [air, urban air close to ground]: 4.5963e-7 kg; lognormal variance with pedigree 0.78174, pedigree (1,1,4,1,1)
  (same comment as for Thallium)
- Hydrogen fluoride [air, urban air close to ground]: 1.5257e-6 kg; lognormal variance with pedigree 0.87262, pedigree (1,1,4,1,1)
  (same comment as for Thallium)
- Barium [water, surface water]: 2.155e-8 kg; lognormal variance with pedigree 1.2051, pedigree (1,1,4,1,1)
  (same comment as for Sodium, ion)
- Iron, ion [water, surface water]: 9.4705e-8 kg; lognormal variance with pedigree 1.3079, pedigree (1,1,4,1,1)
  (same comment as for Sodium, ion)
- Cobalt [air, urban air close to ground]: 4.8494e-8 kg; lognormal variance with pedigree 1.1636, pedigree (1,1,4,1,1)
  (same comment as for Thallium)
- Carbon monoxide, fossil [air, urban air close to ground]: 2.5391e-5 kg; lognormal variance with pedigree 0.75638, pedigree (1,1,4,1,1)
  (same comment as for NMVOC, non-methane volatile organic compounds, unspecified origin)
- Nickel [air, urban air close to ground]: 5.6931e-7 kg; lognormal variance with pedigree 0.78174, pedigree (1,1,4,1,1)
  (same comment as for Thallium)
- Strontium [air, urban air close to ground]: 7.4701e-9 kg; lognormal variance with pedigree 1.046, pedigree (1,1,4,1,1)
  (same comment as for Thallium)
- Vanadium [air, urban air close to ground]: 1.4389e-8 kg; lognormal variance with pedigree 1.3682, pedigree (1,1,4,1,1)
  (same comment as for Thallium)
- Aluminium [water, surface water]: 5.6426e-7 kg; lognormal variance with pedigree 0.98651, pedigree (1,1,4,1,1)
  (same comment as for Sodium, ion)
- Silver, ion [water, ground-, long-term]: 0.00018757 kg; lognormal variance with pedigree 0.88636, pedigree (1,1,4,1,1)
  (same comment as for Silicon)
- Titanium, ion [water, ground-, long-term]: 0.0012107 kg; lognormal variance with pedigree 0.64165, pedigree (1,1,4,1,1)
  (same comment as for Silicon)
- Phenol, pentachloro- [air, urban air close to ground]: 6.5049e-12 kg; lognormal variance with pedigree 0.077223, pedigree (1,1,4,1,1)
  (same comment as for NMVOC, non-methane volatile organic compounds, unspecified origin)
- Fluoride [water, ground-, long-term]: 0.00020275 kg; lognormal variance with pedigree 0.48206, pedigree (1,1,4,1,1)
  (same comment as for Silicon)
- Phosphate [water, surface water]: 2.5535e-7 kg; lognormal variance with pedigree 0.57078, pedigree (1,1,4,1,1)
  (same comment as for Sodium, ion)
- Dinitrogen monoxide [air, urban air close to ground]: 0.00017944 kg; lognormal variance with pedigree 1.1274, pedigree (1,1,4,1,1)
  (same comment as for Ammonia)
- Manganese [water, ground-, long-term]: 5.1581e-5 kg; lognormal variance with pedigree 1.0553, pedigree (1,1,4,1,1)
  (same comment as for Silicon)
- Lead [air, urban air close to ground]: 1.0987e-8 kg; lognormal variance with pedigree 0.79635, pedigree (1,1,4,1,1)
  (same comment as for Thallium)
- Hydrogen chloride [air, urban air close to ground]: 3.4886e-6 kg; lognormal variance with pedigree 0.45487, pedigree (1,1,4,1,1)
  (same comment as for Thallium)
- Water [water, surface water]: 0.00047067 m3; lognormal variance with pedigree 1.1417, pedigree (1,1,4,1,1)
  Process water released to surface water.
  Uncertainty: uncertainty calculated from uncertainty in process water input and the uncertainty of fraction to surface water.
- Chromium, ion [water, surface water]: 3.6875e-9 kg; lognormal variance with pedigree 1.0518, pedigree (1,1,4,1,1)
  (same comment as for Sodium, ion)
- Sulfate [water, surface water]: 0.0001994 kg; lognormal variance with pedigree 0.38217, pedigree (1,1,4,1,1)
  (same comment as for Sodium, ion)
- Cyanide [air, urban air close to ground]: 3.855e-5 kg; lognormal variance with pedigree 1.1274, pedigree (1,1,4,1,1)
  (same comment as for Ammonia)
- Sulfate [water, ground-, long-term]: 0.00099453 kg; lognormal variance with pedigree 0.4736, pedigree (1,1,4,1,1)
  (same comment as for Silicon)
- Cobalt [water, surface water]: 4.831e-9 kg; lognormal variance with pedigree 1.4595, pedigree (1,1,4,1,1)
  (same comment as for Sodium, ion)
- Fluoride [water, surface water]: 1.7292e-5 kg; lognormal variance with pedigree 0.53095, pedigree (1,1,4,1,1)
  (same comment as for Sodium, ion)
- Sodium, ion [water, ground-, long-term]: 0.00028066 kg; lognormal variance with pedigree 0.65679, pedigree (1,1,4,1,1)
  (same comment as for Silicon)
- Copper, ion [water, ground-, long-term]: 0.014722 kg; lognormal variance with pedigree 0.29171, pedigree (1,1,4,1,1)
  (same comment as for Silicon)
- Potassium [air, urban air close to ground]: 5.2288e-7 kg; lognormal variance with pedigree 0.97248, pedigree (1,1,4,1,1)
  (same comment as for Thallium)
- Heat, waste [water, surface water]: 5.652 MJ; lognormal variance with pedigree 0.024259, pedigree (1,1,4,1,1)
  (same comment as for Heat, waste)
- Tin, ion [water, ground-, long-term]: 8.353e-5 kg; lognormal variance with pedigree 1.5868, pedigree (1,1,4,1,1)
  (same comment as for Silicon)
- Methane, fossil [air, urban air close to ground]: 2.2406e-7 kg; lognormal variance with pedigree 0.077223, pedigree (1,1,4,1,1)
  (same comment as for NMVOC, non-methane volatile organic compounds, unspecified origin)
- Mercury [water, ground-, long-term]: 4.8972e-8 kg; lognormal variance with pedigree 3.167, pedigree (1,1,4,1,1)
  (same comment as for Silicon)
- COD, Chemical Oxygen Demand [water, ground-, long-term]: 0.0056513 kg; lognormal variance with pedigree 0.021838, pedigree (1,1,4,1,1)
  (same comment as for Silicon)
- Chloride [water, surface water]: 0.0048571 kg; lognormal variance with pedigree 0.32864, pedigree (1,1,4,1,1)
  (same comment as for Sodium, ion)
- Titanium [air, urban air close to ground]: 3.3599e-6 kg; lognormal variance with pedigree 0.50931, pedigree (1,1,4,1,1)
  (same comment as for Thallium)
- BOD5, Biological Oxygen Demand [water, surface water]: 0.00086899 kg; lognormal variance with pedigree 0.03401, pedigree (1,1,4,1,1)
  (same comment as for Sodium, ion)
- Iron, ion [water, ground-, long-term]: 0.004275 kg; lognormal variance with pedigree 0.41703, pedigree (1,1,4,1,1)
  (same comment as for Silicon)
- Carbon dioxide, fossil [air, urban air close to ground]: 2.7426 kg; lognormal variance with pedigree 0.0105169, pedigree (1,1,4,1,1)
  (same comment as for Thallium)
- Molybdenum [water, surface water]: 7.4117e-7 kg; lognormal variance with pedigree 1.0104, pedigree (1,1,4,1,1)
  (same comment as for Sodium, ion)
- Sulfur dioxide [air, urban air close to ground]: 4.0933e-6 kg; lognormal variance with pedigree 0.79803, pedigree (1,1,4,1,1)
  (same comment as for Thallium)
- Sodium [air, urban air close to ground]: 1.036e-6 kg; lognormal variance with pedigree 0.81829, pedigree (1,1,4,1,1)
  (same comment as for Thallium)
- Dioxins, measured as 2,3,7,8-tetrachlorodibenzo-p-dioxin [air, urban air close to ground]: 2.9872e-14 kg; lognormal variance with pedigree 0.37971, pedigree (1,1,4,1,1)
  (same comment as for NMVOC, non-methane volatile organic compounds, unspecified origin)
- Mercury [air, urban air close to ground]: 2.1801e-8 kg; lognormal variance with pedigree 1.6203, pedigree (1,1,4,1,1)
  (same comment as for Thallium)
- Benzo(a)pyrene [air, urban air close to ground]: 3.324e-13 kg; lognormal variance with pedigree 0.37971, pedigree (1,1,4,1,1)
  (same comment as for NMVOC, non-methane volatile organic compounds, unspecified origin)
- DOC, Dissolved Organic Carbon [water, surface water]: 0.00038443 kg; lognormal variance with pedigree 0.033479, pedigree (1,1,4,1,1)
  (same comment as for Sodium, ion)
- Benzene [air, urban air close to ground]: 1.4937e-8 kg; lognormal variance with pedigree 0.077223, pedigree (1,1,4,1,1)
  (same comment as for NMVOC, non-methane volatile organic compounds, unspecified origin)
- Nickel, ion [water, ground-, long-term]: 0.00045588 kg; lognormal variance with pedigree 0.74113, pedigree (1,1,4,1,1)
  (same comment as for Silicon)
- Chromium VI [water, surface water]: 1.328e-6 kg; lognormal variance with pedigree 1.0953, pedigree (1,1,4,1,1)
  (same comment as for Sodium, ion)
- Nitrate [water, surface water]: 0.00015336 kg; lognormal variance with pedigree 0.2543, pedigree (1,1,4,1,1)
  (same comment as for Sodium, ion)
- Selenium [water, ground-, long-term]: 1.1513e-6 kg; lognormal variance with pedigree 1.1038, pedigree (1,1,4,1,1)
  (same comment as for Silicon)
- Lead [water, ground-, long-term]: 0.00044535 kg; lognormal variance with pedigree 1.2173, pedigree (1,1,4,1,1)
  (same comment as for Silicon)
- Copper, ion [water, surface water]: 7.9595e-7 kg; lognormal variance with pedigree 0.98901, pedigree (1,1,4,1,1)
  (same comment as for Sodium, ion)
- Thallium [water, ground-, long-term]: 1.9702e-7 kg; lognormal variance with pedigree 1.2906, pedigree (1,1,4,1,1)
  (same comment as for Silicon)
- Silver, ion [water, surface water]: 6.5125e-9 kg; lognormal variance with pedigree 1.982, pedigree (1,1,4,1,1)
  (same comment as for Sodium, ion)
- Iron [air, urban air close to ground]: 2.5582e-9 kg; lognormal variance with pedigree 0.3998, pedigree (1,1,4,1,1)
  (same comment as for Thallium)
- Molybdenum [air, urban air close to ground]: 3.5707e-9 kg; lognormal variance with pedigree 1.4696, pedigree (1,1,4,1,1)
  (same comment as for Thallium)
- Cadmium [air, urban air close to ground]: 6.9466e-8 kg; lognormal variance with pedigree 0.95041, pedigree (1,1,4,1,1)
  (same comment as for Thallium)
- Lead [water, surface water]: 1.9709e-8 kg; lognormal variance with pedigree 1.0874, pedigree (1,1,4,1,1)
  (same comment as for Sodium, ion)
- Silicon [air, urban air close to ground]: 4.1774e-9 kg; lognormal variance with pedigree 0.54436, pedigree (1,1,4,1,1)
  (same comment as for Thallium)
- Chromium VI [water, ground-, long-term]: 4.5192e-6 kg; lognormal variance with pedigree 2.1414, pedigree (1,1,4,1,1)
  (same comment as for Silicon)
- Phosphate [water, ground-, long-term]: 6.1247e-5 kg; lognormal variance with pedigree 4.9035, pedigree (1,1,4,1,1)
  (same comment as for Silicon)
- Tin, ion [water, surface water]: 5.0711e-9 kg; lognormal variance with pedigree 1.5141, pedigree (1,1,4,1,1)
  (same comment as for Sodium, ion)
- Manganese [water, surface water]: 3.4146e-9 kg; lognormal variance with pedigree 1.8143, pedigree (1,1,4,1,1)
  (same comment as for Sodium, ion)
- Cadmium, ion [water, surface water]: 1.3149e-8 kg; lognormal variance with pedigree 0.80663, pedigree (1,1,4,1,1)
  (same comment as for Sodium, ion)
- Chloride [water, ground-, long-term]: 0.0014424 kg; lognormal variance with pedigree 0.41804, pedigree (1,1,4,1,1)
  (same comment as for Silicon)
- Aluminium [air, urban air close to ground]: 1.7675e-9 kg; lognormal variance with pedigree 0.32117, pedigree (1,1,4,1,1)
  (same comment as for Thallium)
- Thallium [water, surface water]: 2.0684e-10 kg; lognormal variance with pedigree 1.8901, pedigree (1,1,4,1,1)
  (same comment as for Sodium, ion)
- Nickel, ion [water, surface water]: 3.1765e-7 kg; lognormal variance with pedigree 1.3323, pedigree (1,1,4,1,1)
  (same comment as for Sodium, ion)
- Water [air, urban air close to ground]: 0.0014617 m3; lognormal variance with pedigree 0.76822, pedigree (1,1,4,1,1)
  Water vapour from waste humidity, hydrogen oxidation and part of the process water.
  Uncertainty: Uncertainty calculated from uncertainty in waste composition, process water input and the uncertainty of fraction to air.
- DOC, Dissolved Organic Carbon [water, ground-, long-term]: 0.0022362 kg; lognormal variance with pedigree 0.021838, pedigree (1,1,4,1,1)
  (same comment as for Silicon)
- Zinc [air, urban air close to ground]: 4.6505e-7 kg; lognormal variance with pedigree 0.73803, pedigree (1,1,4,1,1)
  (same comment as for Thallium)
- Zinc, ion [water, ground-, long-term]: 0.00021607 kg; lognormal variance with pedigree 2.8071, pedigree (1,1,4,1,1)
  (same comment as for Silicon)
- Cobalt [water, ground-, long-term]: 2.1721e-5 kg; lognormal variance with pedigree 1.0707, pedigree (1,1,4,1,1)
  (same comment as for Silicon)
- Antimony [air, urban air close to ground]: 3.4747e-9 kg; lognormal variance with pedigree 0.55141, pedigree (1,1,4,1,1)
  (same comment as for Thallium)
- Antimony [water, ground-, long-term]: 0.002759 kg; lognormal variance with pedigree 0.46072, pedigree (1,1,4,1,1)
  (same comment as for Silicon)
- TOC, Total Organic Carbon [water, surface water]: 0.00038443 kg; lognormal variance with pedigree 0.033479, pedigree (1,1,4,1,1)
  (same comment as for Sodium, ion)
- Arsenic, ion [water, ground-, long-term]: 2.0316e-6 kg; lognormal variance with pedigree 1.3278, pedigree (1,1,4,1,1)
  (same comment as for Silicon)
- Calcium, ion [water, surface water]: 3.2229e-5 kg; lognormal variance with pedigree 0.40916, pedigree (1,1,4,1,1)
  (same comment as for Sodium, ion)
- Particulates, > 2.5 um, and < 10um [air, urban air close to ground]: 8.9616e-9 kg; lognormal variance with pedigree 0.1736, pedigree (1,1,4,1,1)
  (same comment as for NMVOC, non-methane volatile organic compounds, unspecified origin)
- Cadmium, ion [water, ground-, long-term]: 1.0113e-5 kg; lognormal variance with pedigree 6.3735, pedigree (1,1,4,1,1)
  (same comment as for Silicon)
- Titanium, ion [water, surface water]: 1.5099e-6 kg; lognormal variance with pedigree 0.40476, pedigree (1,1,4,1,1)
  (same comment as for Sodium, ion)
- Chromium [air, urban air close to ground]: 4.1469e-8 kg; lognormal variance with pedigree 1.0387, pedigree (1,1,4,1,1)
  (same comment as for Thallium)
- Barium [water, ground-, long-term]: 8.0634e-5 kg; lognormal variance with pedigree 2.264, pedigree (1,1,4,1,1)
  (same comment as for Silicon)
- Arsenic, ion [water, surface water]: 4.6996e-6 kg; lognormal variance with pedigree 1.2199, pedigree (1,1,4,1,1)
  (same comment as for Sodium, ion)
- Nitrate [water, ground-, long-term]: 0.00043271 kg; lognormal variance with pedigree 0.36115, pedigree (1,1,4,1,1)
  (same comment as for Silicon)
- Molybdenum [water, ground-, long-term]: 1.969e-6 kg; lognormal variance with pedigree 1.4456, pedigree (1,1,4,1,1)
  (same comment as for Silicon)
- Mercury [water, surface water]: 8.3505e-10 kg; lognormal variance with pedigree 1.1395, pedigree (1,1,4,1,1)
  (same comment as for Sodium, ion)
- Vanadium, ion [water, ground-, long-term]: 8.0222e-7 kg; lognormal variance with pedigree 2.3013, pedigree (1,1,4,1,1)
  (same comment as for Silicon)
- Copper [air, urban air close to ground]: 2.6463e-7 kg; lognormal variance with pedigree 0.34048, pedigree (1,1,4,1,1)
  (same comment as for Thallium)
