# diesel, import from RoW

Dataset: EcoSpold 2, unit process
Geography: ZA
Time period: 2014-01-01 to 2021-12-31
Technology level: current
Classification: ISIC rev.4 ecoinvent: 1920:Manufacture of refined petroleum products
Scenario: Business-as-Usual
System model: Allocation, cut-off by classification
Generated by: Axel Lieblich
Published in: Fehrenbach, H. 2018
Database: ecoinvent
isCopyrightProtected: true
accessRestrictedTo: 1

## General comment
This dataset represents the import of a refined petroleum products of unspecified geographical origin of supply to the domestic/regional market for this product. The transport requirements (expressed in tkm) with tanker ship was assumed to 10'000 km by sea by default. No product losses or other aspects, besides transport requirements have been included. The dataset is only a rough proxy with large uncertainties, and it should hence be revised accordingly if its contribution is expected to be important.

## Included activities start
Activity starts with transport by sea of a refined petroleum product of unspecified geographical origin.

## Included activities end
Activity ends with the refined petroleum product entering the domestic/regional market.

## Reference product
- diesel: 1 kg; By-product classification allocatable product; CPC 33360: Gas oil; CAS 68334-30-5
  production volume 1.95e9 kg
    Calculated based on the import share in the JODI-oil database for 2015 (jodidata.org); Annual PV of product-specific import activitiy calculated based on share of import for the product category 'gas/diesel oil'
  property carbon content, fossil 0.865
    C-content of diesel is 86.5% (ecoinvent v2.2 report 6_IV, Tab 3.14)
  property price 0.37 EUR2005
    Temporary price data. Calculated as 90% of purchasers price based on: Source: International Energy Agency (http://wds.iea.org/WDS/TableViewer/tableView.aspx downloaded 4 July 2009) for Germany and excl. taxes, applying diesel density of 0.844 kg/litre
  property carbon content 0.865
    carbon content on a dry matter basis (reserved; not for manual entry)
  properties: wet mass 1 kg, water in wet mass 0 kg, dry mass 1 kg, heating value, net 42.8 MJ, carbon content, non-fossil 0, water content 0, carbon allocation 0.865 kg

## Inputs from technosphere
- transport, freight, sea, tanker for petroleum: 10 metric ton*km
  A transport distance of 10'000 km by sea assumed by default.
- diesel: 1 kg
  Unspecified geographical origin of supply assumed due to lack of information on actual origin or missing corresponding supplying activity.
  properties: dry mass 1 kg, carbon content, fossil 0.865, wet mass 1 kg, heating value, net 42.8 MJ
  note on carbon content, fossil: C-content of diesel is 86.5% (ecoinvent v2.2 report 6_IV, Tab 3.14)

## Extrapolations
This dataset has been extrapolated from year 2017 to the year of the calculation (2021). The uncertainty has been adjusted accordingly.
