# concrete production, 40MPa, ready-mix, with cement limestone 6-10%

Dataset: EcoSpold 2, unit process
Geography: RoW
Time period: 2015-10-25 to 2021-10-25
Technology level: current
Classification: ISIC rev.4 ecoinvent: 2395:Manufacture of articles of concrete, cement and plaster
Classification: EcoSpold01Categories: construction materials/concrete
Synonyms: ready-mix concrete; ready mixed concrete
Scenario: Business-as-Usual
System model: Allocation, cut-off by classification
Generated by: [System]
Published in: Silva, F. B. 2017
Database: ecoinvent
isCopyrightProtected: true
accessRestrictedTo: 1

## General comment
This dataset is a copy of the corresponding BR dataset. The dataset is therefore not representative of the GLO geography. The production volume is set equal to the BR datast in order for the RoW not to be created.

## Included activities start
From reception of raw materials at the ready-mix plant gate.

## Included activities end
This activity ends before the delivery of concrete at the construction site.
The dataset includes the whole manufacturing processes to produce ready-mixed concrete, internal processes (material handling and mixing) and infrastructure. Water used for cleaning the truck and waste water were also accounted for.

## Geography
Brazilian data. For some exchanges GLO values have been used as proxy. Data quality indicators adjusted accordingly.

## Technology
Typical technology for average Brazilian production.

## Time period
Literature data are from 2015 and mix designs were provided in 2017

## Parameters
- losses: 0.038 dimensionless; lognormal variance with pedigree 0, pedigree (1,1,1,1,1)
  Literature value. Losses due to returned concrete from construction sites.

## Reference product
- concrete, 40MPa: 1 m3; name ref; By-product classification allocatable product
  40 MPa concrete is intended for building structures in general, not expposed to freeze-thaw, including residential, commercial and industrial uses.
  production volume 656366 m3; name PV
    The global production volume was calculated as follows:
    1) The total production volume of each country was calculated
    2) The production volume was scaled based construction output (*)
    3) The average of the results was assumed to be the GLO PV
    4) The share of each different technology per country was calculated
    5) The weighted average of the shares for each country was used to split the GLO PV into different technologies
    (*)
    Construction output assumed per country
    Country Share
    ZA 0.50%
    BR 2.01%
    CH 0.36%
    CO 0.58%
    IN 9.67%
    PE 0.31%
    CA-QC 0.37%
    RNA without CA-QC 9.03%
    Source:
    OECD. 2018. Input-Output Tables. http://www.oecd.org/trade/input-outputtables.htm.
    United Nations Statistics Division. 2019. UN data. A world of information. http://data.un.org/.
    Timmer, M.P., E. Dietzenbacher, B. Los, R. Stehrer, and G.J. de Vries. 2015. An Illustrated User Guide to the World Input-Output Database: the Case of Global Automotive Production. Review of International Economics 23(3): 575-605. http://doi.wiley.com/10.1111/roie.12178.
    The data was adjusted based on PPP, data from:
    The World Bank. 2019. World Bank Open Data. https://data.worldbank.org/
  property cement content 385 kg; name cement
  property wet mass 2299 kg; name concrete_density
  property price 185 EUR2005; name ref_price_EUR2005
    Calculated value based on data from United Nations Commodity Trade Statistics Database (comtrade.un.org). UN comtrade category: 681019 Tiles & flagstones of cement, concrete, artificial ston. Year 2005. Using exchange rate of 1EURO = 1.209 USD. Average of price of import into 5 main markets (EU, US, JP, IN and CN).
  property gravel content 1340 kg; name gravel
  property sand content 389 kg; name sand
  property carbon content 0
    carbon content on a dry matter basis (reserved; not for manual entry)
  properties: carbon content, non-fossil 0, carbon content, fossil 0, water content 0.0426304, water in wet mass 94 kg, dry mass 2205 kg, carbon allocation 0 kg

## Inputs from technosphere
- waste mineral oil: 0 kg; name oil; pedigree (1,1,1,1,1)
  Calculated value.
  Uncertainty: V
  production volume 0 kg
    Calculated based on the relationship with the reference product.
  property price 0 EUR2005; name oil_price_EUR2005
  properties: carbon content, fossil 0.864444, water content 0.111111, heating value, net 34.7 MJ, wet mass 1 kg, dry mass 0.9 kg
  note on carbon content, fossil: Tab A.6, ecoinvent v2.2 report 13_I. C content has been calculated after data in the tables, and then referred to 1 kg DM
  note on heating value, net: Value taken from the general comment of the treatment dataset.
- steel, low-alloyed, hot rolled: 0.0238 kg; name steel; source Kellenberger D. 2007; lognormal variance with pedigree 0.0226, pedigree (2,5,3,5,1)
  Literature value. From ecoinvent dataset "concrete production, 35 MPa, RNA only, GLO, 2006-2006l". Access date: 10.10.2017.
  Uncertainty: B
  properties: dry mass 1 kg, wet mass 1 kg
- sand: 0 kg; pedigree (1,1,1,1,1)
  Calculated value, Weighted average from 18 concrete mix designs. Losses considered.
  Uncertainty: V
  properties: dry mass 1 kg, wet mass 1 kg
- lubricating oil: 0.0499 kg; name lub_oil; lognormal variance with pedigree 0.3012, pedigree (2,3,3,5,1)
  Calculated value. Weighted average amount from 34 concrete plants.
  Uncertainty: V
  properties: wet mass 1 kg, dry mass 1 kg, heating value, net 40.2 MJ
  note on heating value, net: Literature value, Source: IPCC 2006, 2006 IPCC Guidelines for National Greenhouse Gas Inventories, Prepared by the National Greenhouse Gas Inventories Programme, Eggleston H.S., Buendia L., Miwa K., Ngara T. and Tanabe K. (eds). Published: IGES, Japan
- cement, limestone 6-10%: 399.63 kg; lognormal variance with pedigree 0.0122, pedigree (2,3,3,5,1)
  (same comment as for sand)
  properties: dry mass 1 kg, wet mass 1 kg
- synthetic rubber: 0.0345 kg; name rub; lognormal variance with pedigree 0.7252, pedigree (2,3,3,5,1)
  Calculated value. Weighted average amount from 34 concrete plants.
  Uncertainty: V
  properties: dry mass 1 kg, wet mass 1 kg, heating value, net 26.42 MJ
- tap water: 0 kg; pedigree (1,1,1,1,1)
  Calculated value. Water for concrete mix. Includes water from aggregates. Weighted average from 18 concrete mix designs. Losses considered.
  Uncertainty: V
  properties: wet mass 1 kg
- diesel, burned in building machine: 5.01 MJ; source Alessandra Castro 2015; lognormal variance with pedigree 0.0072, pedigree (2,4,3,5,1)
  Literature value. Diesel used in internal transportation equipment.
  Uncertainty: V
  property density 0.84 kg/l; name density_diesel
  property heating value, net 1 MJ; name NHV_diesel
- gravel, crushed: 0 kg; pedigree (1,1,1,1,1)
  Calculated value = amount of artificial sand (crushed gravel is used as a proxy in this case) + amount of gravel, Weighted average from 18 concrete mix designs. Losses considered.
  Uncertainty: V
  properties: dry mass 1 kg, wet mass 1 kg
- scrap steel: 0 kg; name scrap; pedigree (1,1,1,1,1)
  (same comment as for steel, low-alloyed, hot rolled)
  production volume 0 kg
    Calculated based on the relationship with the reference product.
  property price 0 EUR2005; name scrap_price_EUR2005
  properties: wet mass 1 kg, dry mass 1 kg
- concrete mixing factory: 4.57e-7 unit; source Kellenberger D. 2007; lognormal variance with pedigree 0.3326, pedigree (2,5,3,5,1)
  Literature value. From ecoinvent dataset "concrete production, 35 MPa, RNA only, GLO, 2006-2006" Access date 10.10.2017
  Uncertainty: B
- waste concrete: 0 kg; name was_concrete; source Alessandra Castro 2015; pedigree (1,1,1,1,1)
  Literature value.
  Uncertainty: V
  production volume 0 kg
    Calculated based on the relationship with the reference product.
  property carbon content, fossil 0; name was_concrete_C_content_fossil
  property price 0 EUR2005; name was_concrete_price_EUR2005
  properties: dry mass 0.9591 kg, wet mass 1 kg, water content 0.0426441
- chemical, organic: 3.28008 kg; lognormal variance with pedigree 0.1202, pedigree (2,3,3,5,1)
  Calculated value= amount of superplasticizer + amount of polyfunctional admixture. Weighted average from 18 concrete mix designs. Losses considered.
  Uncertainty: V
  properties: wet mass 1 kg, dry mass 1 kg, bulk density 1140 kg/m3, heating value, net 19.03 MJ
- wastewater from concrete production: -0.161 m3; name wastewater; lognormal variance with pedigree 0.3722, pedigree (2,3,3,5,1)
  Calculated value. Based on weighted average amount from 26 concrete plants, referring to water used for washing the concrete trucks and the internal circulation area in the ready-mix facility.
  Uncertainty: V
  production volume 105675 m3; = wastewater*PV/abs(ref)
    Calculated based on the relationship with the reference product.
  property dry mass 0.44914 kg; name was_water_DM
  property price 0 EUR2005; name wastewater_price_EUR2005
  properties: carbon content, fossil 0.027074, wet mass 1000 kg, water content 2225.48
- waste rubber, unspecified: 0 kg; name rubber; pedigree (1,1,1,1,1)
  Calculated value.
  Uncertainty: V
  production volume 0 kg
    Calculated based on the relationship with the reference product.
  property price 0 EUR2005; name rubber_price_EUR2005
  properties: heating value, net 27.19 MJ, dry mass 1 kg, wet mass 1 kg, carbon content, fossil 0.853
- electricity, medium voltage: 0 kWh; pedigree (1,1,1,1,1)
  Calculated value, Weighted average amount from 29 concrete plants.
  Uncertainty: V
- waste mineral oil: -0.00120548, -0.0486945 kg (2 entries); lognormal variance with pedigree 0.3012, pedigree (2,3,3,5,1)
  Calculated value.
  Uncertainty: V
  production volume 32752.7 kg
- sand: 0.0742718, 0.0322039, 403.676 kg (3 entries); lognormal variance with pedigree 0.0912, pedigree (2,3,3,5,1)
  (same comment as for sand)
- tap water: 0.215491, 0.356134, 8.98029, 0.23362, 0.664528, 76.7379, 102.766 kg (7 entries); lognormal variance with pedigree 0.0082, pedigree (2,3,3,5,1)
  (same comment as for tap water)
- gravel, crushed: 5.72372, 0.377894, 286.216, 1098.6 kg (4 entries); lognormal variance with pedigree 0.0202, pedigree (2,3,3,5,1)
  (same comment as for gravel, crushed)
- scrap steel: -3.01156e-5, -0.0237699 kg (2 entries); lognormal variance with pedigree 0.0226, pedigree (2,5,3,5,1)
  (same comment as for steel, low-alloyed, hot rolled)
  production volume 15621.5 kg
- waste concrete: -0.30779, -87.0542 kg (2 entries); source Alessandra Castro 2015; lognormal variance with pedigree 0.0072, pedigree (2,4,3,5,1)
  Literature value.
  Uncertainty: V
  production volume 5.73415e7 kg
- waste rubber, unspecified: -0.00138995, -0.03311 kg (2 entries); lognormal variance with pedigree 0.7252, pedigree (2,3,3,5,1)
  Calculated value.
  Uncertainty: V
  production volume 22644.6 kg
- electricity, medium voltage: 0.032508, 0.00623363, 0.143134, 0.10465, 1.52204, 0.482463, 0.698976 kWh (7 entries); lognormal variance with pedigree 0.2392, pedigree (2,3,3,5,1)
  Calculated value, Weighted average amount from 29 concrete plants.
  Uncertainty: V

## Inputs from nature
- Water, unspecified natural origin [natural resource, in water]: 0.161 m3; name was_water; lognormal variance with pedigree 0.3722, pedigree (2,3,3,5,1)
  Calculated value. Weighted average amount from 26 concrete plants. Water used for washing the concrete trucks and the internal circulation area in the ready-mix facility.
  Uncertainty: V

## Sampling procedure
Data on concrete mixes are a weighted average of 18 concrete ready mix facilities of 4 different companies.
For other flows, the weighted average was calculated from several different concrete plants (26 for process water, 34 for rubber parts and lubricating oil, 29 for electricity), belonging to one of the 7 concrete making companies that provided data. Basic uncertainty was calculated from the coefficient of variation of the sample.
Diesel consumption and waste generation values were taken from a published paper. For other materials used for maintenance (steel parts) and infrastructure, data were extrapolated from the dataset "concrete production, 35 MPa, RNA only, GLO, 2006-2009" (accessed 10.10.2017).
No conversion to the geometric mean of the lognormal distribution was done, for consistency reasons with other ecoinvent datasets.

Representativeness is of 6,67% based on the number of companies that provided concrete mix data (4) divided by the total number of ready-mix concrete production companies in Brazil (60), which is the number of respondant companies in the national survey carried out by ABCP in 2013.

## Extrapolations
Data from a relatively small sample concentrated mostly in the Southeastern region of Brazil, with some facilities spread out in the South, Northeast and Center-west regions, are used to represent the Brazilian concrete production. Some flows have been kept as in the dataset "concrete production, 35 MPa, RNA only, GLO, 2006-2006", but uncertainties were adjusted accordingly. This dataset is a copy of the corresponding BR dataset.
