# solvent production, organic

Dataset: EcoSpold 2, unit process
Geography: GLO
Time period: 2000-01-01 to 2021-12-31
Technology level: current
Classification: ISIC rev.4 ecoinvent: 2011:Manufacture of basic chemicals
Classification: EcoSpold01Categories: chemicals/organics
Scenario: Business-as-Usual
System model: Allocation, cut-off by classification
Generated by: Sofia Parada Tur
Published in: Hischier R. 2007
Database: ecoinvent
isCopyrightProtected: true
accessRestrictedTo: 1

## General comment
This inventory substitutes the obsolete production mix for solvent, organic. It describes the production of a generic solvent, which can be used in cases where the specific solvent is not known. The functional unit represent 1 kg of an equal mixture of 15 of the most often used solvents (according to The Ullmann Encyclopedia, 2000). Further, each of these solvents have their own dataset in the database. As there are only production volumes for a small part of these substances, an unweighted average of the substances is used for constructing this inventory. No process emissions or inputs other than these chemicals, are considered. Large uncertainty due to the unweighted and randomly choice of included solvents because it is not possible to estimate how good this unweighted average is, compared to a weighted average. This dataset should be revised as soon as production volumes data are available.

## Included activities start
The activity starts with the application of 15 chemicals

## Included activities end
Mix of the 15 of the most often used organic solvents, having their own dataset within the database. Only input of the mentioned solvents is taken into account.

## Geography
The used solvent modules are representing European situation, and therefore this module here is also valuable for European situation.

## Technology
data represent an equal mixture of different solvents.

## Reference product
- solvent, organic: 1 kg; CPC 341: Basic organic chemicals; By-product classification allocatable product
  production volume 8.5536e10 kg; = 1.08E10*2.2*3.6
    Calculated from US production of conventional solvents in 2005, namely 1.08E10 pounds. (http://soynewuses.org/wp-content/uploads/pdf/final_SolventsMarketStudy.pdf)
    2.2 pounds is equivalent to 1 kg. The Global production volume is calculated with the GDP ratio (GDP World/GDPUSA), measured in current US$ (World Bank). The ratio is 3.6.
  property carbon content, non-fossil 0
    Mixture of 15 of the most often used solvents (list in ecoinvent v2.2 report 11-III, pg 293). C content was calculated as an unweighted average of C content of the different solvents
  property heating value, net 19.11 MJ
    LHV is calculated based on the Carbon content of the product. More details can be found on the respective documentation.
  property price 1.36 EUR2005
    Calculated based on literature value (UN Commodity Trade Statistics Database) using data on trade value and net weight (kg). UN classification: 3814 Organic composite solvents, paint, varnish remover et. Using exchange rate of 1EURO = 1.209 USD.
  property carbon content, fossil 0.63072
    (same comment as for solvent, organic)
  property carbon content 0.63072
    carbon content on a dry matter basis (reserved; not for manual entry)
  properties: water content 0, dry mass 1 kg, wet mass 1 kg, water in wet mass 0 kg, carbon allocation 0.63072 kg

## Inputs from technosphere
All rows: source Stoye D. 2000
- 1-butanol: 0.0667 kg; lognormal variance with pedigree 0.2087, pedigree (5,5,5,3,5)
  estimated, based on often used solvents
  properties: heating value, net 35.99 MJ, carbon content, fossil 0.648649, dry mass 1 kg, wet mass 1 kg
- methyl ethyl ketone: 0 kg; pedigree (1,1,1,1,1)
  estimated, based on often used solvents
  properties: dry mass 1 kg, carbon content, fossil 0.666667, wet mass 1 kg, heating value, net 33.63 MJ
- styrene: 0.0667 kg; lognormal variance with pedigree 0.2087, pedigree (5,5,5,3,5)
  estimated, based on often used solvents
  properties: wet mass 1 kg, dry mass 1 kg, heating value, net 37.26 MJ, carbon content, fossil 0.923077
  note on carbon content, fossil: Styrene chemical formula is C(C6H5)H-CH2 (C8H8) (ecoinvent v2.2 report 11_II). MW=104.
- ethylene glycol: 0.0667 kg; lognormal variance with pedigree 0.2087, pedigree (5,5,5,3,5)
  estimated, based on often used solvents
  properties: heating value, net 23.44 MJ, carbon content, fossil 0.387097, wet mass 1 kg, dry mass 1 kg
- toluene, liquid: 0 kg; pedigree (1,1,1,1,1)
  estimated, based on often used solvents
  properties: dry mass 1 kg, carbon content, fossil 0.913043, wet mass 1 kg, heating value, net 38.17 MJ
- isopropanol: 0 kg; pedigree (1,1,1,1,1)
  estimated, based on often used solvents
  properties: dry mass 1 kg, carbon content, fossil 0.6, wet mass 1 kg, heating value, net 34.3 MJ
- cumene: 0.0667 kg; lognormal variance with pedigree 0.2087, pedigree (5,5,5,3,5)
  estimated, based on often used solvents
  properties: heating value, net 39.35 MJ, carbon content, fossil 0.9, dry mass 1 kg, wet mass 1 kg
- nitrobenzene: 0 kg; pedigree (1,1,1,1,1)
  estimated, based on often used solvents
  properties: heating value, net 22.66 MJ, carbon content, fossil 0.606061, wet mass 1 kg, dry mass 1 kg
- ethyl benzene: 0 kg; pedigree (1,1,1,1,1)
  estimated, based on often used solvents
  properties: carbon content, fossil 0.90566, dry mass 1 kg, wet mass 1 kg, heating value, net 38.84 MJ
- tetrachloroethylene: 0 kg; pedigree (1,1,1,1,1)
  estimated, based on often used solvents
  properties: dry mass 1 kg, wet mass 1 kg, heating value, net 4.39 MJ, carbon content, fossil 0.146341
- dichloromethane: 0 kg; pedigree (1,1,1,1,1)
  estimated, based on often used solvents
  properties: dry mass 1 kg, wet mass 1 kg, carbon content, fossil 0.142857, heating value, net 7.14 MJ
- acetone, liquid: 0 kg; pedigree (1,1,1,1,1)
  estimated, based on often used solvents
  properties: carbon content, fossil 0.62069, dry mass 1 kg, wet mass 1 kg, heating value, net 31.32 MJ
- cyclohexanol: 0 kg; pedigree (1,1,1,1,1)
  estimated, based on often used solvents
  properties: wet mass 1 kg, dry mass 1 kg, carbon content, fossil 0.72, heating value, net 36.32 MJ
- methanol: 0.0667 kg; lognormal variance with pedigree 0.2087, pedigree (5,5,5,3,5)
  estimated, based on often used solvents
  properties: carbon content, fossil 0.375, dry mass 1 kg, wet mass 1 kg, heating value, net 26.49 MJ
- xylene: 0 kg; pedigree (1,1,1,1,1)
  estimated, based on often used solvents
  properties: heating value, net 38.84 MJ, carbon content, fossil 0.905061, dry mass 1 kg, wet mass 1 kg
- methyl ethyl ketone: 0.0182738, 0.0484262 kg (2 entries); lognormal variance with pedigree 0.2087, pedigree (5,5,5,3,5)
  estimated, based on often used solvents
- toluene, liquid: 0.00784706, 0.0588529 kg (2 entries); lognormal variance with pedigree 0.2087, pedigree (5,5,5,3,5)
  estimated, based on often used solvents
- isopropanol: 0.0116058, 0.0550942 kg (2 entries); lognormal variance with pedigree 0.2087, pedigree (5,5,5,3,5)
  estimated, based on often used solvents
- nitrobenzene: 0.0220505, 0.0446495 kg (2 entries); lognormal variance with pedigree 0.2087, pedigree (5,5,5,3,5)
  estimated, based on often used solvents
- ethyl benzene: 0.0220505, 0.0446495 kg (2 entries); lognormal variance with pedigree 0.2087, pedigree (5,5,5,3,5)
  estimated, based on often used solvents
- tetrachloroethylene: 0.00970898, 0.056991 kg (2 entries); lognormal variance with pedigree 0.2087, pedigree (5,5,5,3,5)
  estimated, based on often used solvents
- dichloromethane: 0.0220505, 0.0446495 kg (2 entries); lognormal variance with pedigree 0.2087, pedigree (5,5,5,3,5)
  estimated, based on often used solvents
- acetone, liquid: 0.0177204, 0.0489796 kg (2 entries); lognormal variance with pedigree 0.2087, pedigree (5,5,5,3,5)
  estimated, based on often used solvents
- cyclohexanol: 0.0220505, 0.0446495 kg (2 entries); lognormal variance with pedigree 0.2087, pedigree (5,5,5,3,5)
  estimated, based on often used solvents
- xylene: 0.0102003, 0.0564997 kg (2 entries); lognormal variance with pedigree 0.2087, pedigree (5,5,5,3,5)
  estimated, based on often used solvents

## Sampling procedure
Equal distribution of the different used solvents as no further information is available

## Extrapolations
This dataset has been extrapolated from year 2000 to the year of the calculation (2021). The uncertainty has been adjusted accordingly.

## Review by Bo Weidema 2012-04-20
Passed. The reason for creating this dataset is weel described, and the conditions are provided for when and how to revise it.
