# paint production, for electrostatic painting for aluminium

Dataset: EcoSpold 2, unit process
Geography: GLO
Time period: 2013-01-01 to 2021-12-31
Technology level: current
Classification: EcoSpold01Categories: paintings/production
Classification: ISIC rev.4 ecoinvent: 2022:Manufacture of paints, varnishes and similar coatings, printing ink and mas
Synonyms: metal coating; paint
Scenario: Business-as-Usual
System model: Allocation, cut-off by classification
Generated by: Marylène Dussault
Database: ecoinvent
isCopyrightProtected: true
accessRestrictedTo: 1

## General comment
The dataset represents the production of electrostatic paint used for electrostatic painting of aluminium. The process uses electrostatic charge to accelerate atomized liquid paint which has charged particules, using conventional spraying methods, toward the conductive metal piece. Advantage of this technic reside in the high efficiency of the process that can reach 95% due to reduce over-spay and better wrap around. The amounts of intermediate exchanges (chemical inputs) have been calculated based on an electrostatic paint material safety data sheet (MSDS). The energy and infrastructure inputs are directly copied from the ecoinvent v3.0 dataset "alkyd paint production, white, water-based, product in 60% solution state, GLO 2001".

## Included activities end
.

## Technology
No specific technology.

## Time period
Arbitrary time period chosen for the dataset.

## Reference product
- electrostatic paint: 1 kg; By-product classification allocatable product; CPC 35110: Paints and varnishes and related products
  production volume 4 kg
    Dummy value to be replaced by measured, estimated or calculated value.
  property price 29.3782 EUR2005
    Calculated based on inputs: The price of the product has been calculated as a sum of the values of the material and energy inputs for this product. This value is therefore a rough estimation. It may underestimate the real price since there are additional expenses when producing any product. These expences can include for example labour costs, treatment of waste materials and profit for the producer. Please consider carefully whether this level of data quality is acceptable for your application.
  property paint volatile content 0.45
    Estimated value. Based on expert estimation of average volatile content in paint. This is based on the difference between apply mass of wet paint and mass of dry paint. This property is for reference, but is use to calculate VOC emission to air in the "painting, extruded aluminium bar" dataset.
  property heating value, net 16.4 MJ
    LHV is calculated based on the Carbon content of the product. More details can be found on the respective documentation.
  property carbon content 0.5412
    carbon content on a dry matter basis (reserved; not for manual entry)
  properties: water content 0, carbon content, fossil 0.5412, dry mass 1 kg, wet mass 1 kg, water in wet mass 0 kg, carbon content, non-fossil 0, density 1.2402 kg/l, carbon allocation 0.5412 kg

## Inputs from technosphere
- epoxy resin, liquid: 0 kg; pedigree (1,1,1,1,1)
  Literature value: based on MSDS sheet (product name: DURACRON D100 WHITE).
  properties: heating value, net 12.82 MJ, wet mass 1 kg, dry mass 1 kg, carbon content, fossil 0.42325
- electricity, medium voltage: 0.16697 kWh; lognormal variance with pedigree 0.22, pedigree (5,5,5,5,5)
  EcoSpold01Location=UCTE
  Taken directly from ecoinvent v3.0 dataset "alkyd paint production, white, water-based, product in 60% solution state, GLO 2001".
  Uncertainty: No data available, the uncertainty has been maximized.
- aluminium hydroxide: 0.01 kg; lognormal variance with pedigree 0.0646, pedigree (4,5,4,1,4)
  Literature value: based on MSDS sheet (product name: DURACRON D100 WHITE).
  properties: wet mass 1 kg, dry mass 1 kg
- chemical factory, organics: 4e-10 unit; lognormal variance with pedigree 0.69, pedigree (5,5,5,5,5)
  EcoSpold01Location=RER
  Taken directly from ecoinvent v3.0 dataset "alkyd paint production, white, water-based, product in 60% solution state, GLO 2001".
  Uncertainty: No data available, the uncertainty has been maximized.
- naphtha: 0 kg; pedigree (1,1,1,1,1)
  Literature value: based on MSDS sheet. Naphtha is assumed to be equivalent to naphthalene.
  properties: carbon content, fossil 0.919743, dry mass 1 kg, wet mass 1 kg, heating value, net 45 MJ
- ethyl benzene: 0 kg; pedigree (1,1,1,1,1)
  Literature value: based on MSDS sheet (product name: DURACRON D100 WHITE).
  properties: wet mass 1 kg, heating value, net 38.84 MJ, dry mass 1 kg, carbon content, fossil 0.90566
- 4-methyl-2-pentanone: 0.04 kg; lognormal variance with pedigree 0.0646, pedigree (4,5,4,1,4)
  Literature value: based on MSDS sheet. 4-methyl-2-pentanone is assumed to be equilent to diacetone alcohol (IUPAC name: 4-Hydroxy-4-methyl-2-pentanone).
  properties: dry mass 1 kg, wet mass 1 kg, carbon content, fossil 0.72, heating value, net 36.32 MJ
- xylene: 0 kg; pedigree (1,1,1,1,1)
  Literature value: based on MSDS sheet. Xylene is used for itself and as a proxy for trimethylbenzene.
  properties: heating value, net 38.84 MJ, wet mass 1 kg, dry mass 1 kg, carbon content, fossil 0.905061
- silica sand: 0.01 kg; lognormal variance with pedigree 0.0646, pedigree (4,5,4,1,4)
  Literature value: based on MSDS sheet. Silica sand can also be called silicon dioxyde (SiO2). Silica sand is assumed equivalent to silicon dioxyde.
  properties: dry mass 0.99 kg, water content 0.010101, wet mass 1 kg
- dipropylene glycol monomethyl ether: 0 kg; pedigree (1,1,1,1,1)
  Literature value: based on MSDS sheet. Dipropylene glycol is assumed to be equivalent to diethylene glycol monobutyl ether.
  properties: wet mass 1 kg, dry mass 1 kg, heating value, net 30.27 MJ, carbon content, fossil 0.567568
- white spirit: 0.31 kg; lognormal variance with pedigree 0.0646, pedigree (4,5,4,1,4)
  EcoSpold01Location=RER
  Literature value: based on MSDS sheet. White spirit can also be called heavy naphtha. White spirit is assumed to be equivalent to heavy naphtha aromatic solvent and light naptha aromatic solvent. The amount reprensents the sum of heavy naphtha aromatic solvent and light naphtha aromatic solvent.
  properties: dry mass 1 kg, carbon content, fossil 0.863404, wet mass 1 kg, heating value, net 45 MJ
  note on carbon content, fossil: The most common variety of white spirit is a mixture of saturated aliphatic and alicyclic C7-C12 hydrocarbons with a content of 15-20% (by weight) of aromatic C7-C12 hydrocarbons (ecoinvent v2.2 report 8-part 94). The average composition was assumed as being 82.5% C9.5 saturated aliphatic and alicyclic hydrocarbons (average formula C9.5H20), and 17.5% C9.5 aromatic hydrocarbons (average formula C9.5H9.5).
- heat, district or industrial, natural gas: 5.624 MJ; lognormal variance with pedigree 0.22, pedigree (5,5,5,5,5)
  Taken directly from ecoinvent v3.0 dataset "alkyd paint production, white, water-based, product in 60% solution state, GLO 2001".
  Uncertainty: No data available, the uncertainty has been maximized.
  properties: heating value, net 1 MJ
- heat, district or industrial, other than natural gas: 3.139 MJ; lognormal variance with pedigree 0.22, pedigree (5,5,5,5,5)
  (same comment as for heat, district or industrial, natural gas)
  properties: heating value, net 1 MJ
- 1-butanol: 0.03 kg; lognormal variance with pedigree 0.0646, pedigree (4,5,4,1,4)
  Literature value: based on MSDS sheet.
  properties: dry mass 1 kg, carbon content, fossil 0.648649, wet mass 1 kg, heating value, net 35.99 MJ
- titanium dioxide: 0 kg; pedigree (1,1,1,1,1)
  EcoSpold01Location=RER
  Literature value: based on MSDS sheet.
  properties: wet mass 1 kg, dry mass 1 kg
- ethanol, without water, in 99.7% solution state, from ethylene: 0 kg; pedigree (1,1,1,1,1)
  Literature value: based on msds sheet. Includes value for ethanol and butoxy-ethanol. Assume to be equivalent to butoxy-2 ethanol.
  properties: heating value, net 31.58 MJ, dry mass 1 kg, carbon content, fossil 0.521739, wet mass 1 kg
- epoxy resin, liquid: 0.00522, 0.02478 kg (2 entries); lognormal variance with pedigree 0.0646, pedigree (4,5,4,1,4)
  Literature value: based on MSDS sheet (product name: DURACRON D100 WHITE).
- naphtha: 0.000917884, 2.8738e-5, 0.000666838, 6.96351e-6, 8.72153e-5, 0.00018087, 0.00411149 kg (7 entries); lognormal variance with pedigree 0.0646, pedigree (4,5,4,1,4)
  Literature value: based on MSDS sheet. Naphtha is assumed to be equivalent to naphthalene.
- ethyl benzene: 0.00330592, 0.00669408 kg (2 entries); lognormal variance with pedigree 0.0646, pedigree (4,5,4,1,4)
  Literature value: based on MSDS sheet (product name: DURACRON D100 WHITE).
- xylene: 0.0183514, 0.101649 kg (2 entries); lognormal variance with pedigree 0.0646, pedigree (4,5,4,1,4)
  (same comment as for xylene)
- dipropylene glycol monomethyl ether: 0.014616, 0.069384 kg (2 entries); lognormal variance with pedigree 0.0646, pedigree (4,5,4,1,4)
  (same comment as for dipropylene glycol monomethyl ether)
- titanium dioxide: 0.09, 0.18 kg (2 entries); lognormal variance with pedigree 0.0646, pedigree (4,5,4,1,4)
  EcoSpold01Location=RER
  Literature value: based on MSDS sheet.
- ethanol, without water, in 99.7% solution state, from ethylene: 0.0247932, 0.0552068 kg (2 entries); lognormal variance with pedigree 0.0646, pedigree (4,5,4,1,4)
  (same comment as for ethanol, without water, in 99.7% solution state, from ethylene)

## Sampling procedure
The amounts of intermediate exchanges (chemical inputs) have been calculated based on an electrostatic paint MSDS sheet.

## Extrapolations
This dataset has been extrapolated from year 2013 to the year of the calculation (2021). The uncertainty has been adjusted accordingly.
