# grass seed production, Swiss integrated production, at farm

Dataset: EcoSpold 2, unit process
Geography: CH
Time period: 2000-01-01 to 2021-12-31
Technology level: current
Classification: ISIC rev.4 ecoinvent: 0119:Growing of other non-perennial crops
Scenario: Business-as-Usual
System model: Allocation, cut-off by classification
Generated by: Thomas Nemecek
Published in: Nemecek, T. 2007
Database: ecoinvent
isCopyrightProtected: true
accessRestrictedTo: 1

## General comment
This dataset represents the production of 1 kg of grass seed (fresh matter). The yield is 1000 kg/ha at a moisture content at storage of 10%.
[This dataset was already contained in the ecoinvent database version 2. It was not individually updated during the transfer to ecoinvent version 3. Life Cycle Impact Assessment results may still have changed, as they are affected by changes in the supply chain, i.e. in other datasets. This dataset was generated following the ecoinvent quality guidelines for version 2. It may have been subject to central changes described in the ecoinvent version 3 change report (http://www.ecoinvent.org/database/ecoinvent-version-3/reports-of-changes/), and the results of the central updates were reviewed extensively. The changes added e.g. consistent water flows and other information throughout the database. The documentation of this dataset can be found in the ecoinvent reports of version 2, which are still available via the ecoinvent website. The change report linked above covers all central changes that were made during the conversion process.]

## Included activities start
This activity assumes co-production of grass seeds and forage on an intensive temporary meadow during one year. Included in the dataset are (a) those operations which can be explicitly attributed to seed production and (b) other inputs and the emissions with a share of 50% of the burden of the whole production system, attributing the other 50% to forage production. The activity starts with the soil cultivation and sowing after the harvest of the previous crop. The inputs of seeds, mineral fertilisers and pesticides are considered. Farm manure as an organic fertiliser is only accounted for in terms of direct field emissions; all pre-processes are included in the animal production systems.

## Included activities end
The dataset includes all machine operations and corresponding machine infrastructure and sheds. Machine operations are: soil cultivation, sowing, fertilisation, pest control, harvest, transport from field to regional processing center (10 km) and drying of seeds. This activity ends after drying of the seeds at the regional processing center.

## Geography
Values refer to the situation in Switzerland.

## Technology
Integrated production

## Parameters
- fraction, irrigation water, to air: 0.3353 dimensionless; name fraction_IW_to_air; lognormal variance with pedigree 0.0409, pedigree (2,2,2,1,1)
  Literature value (Siebert, 2010) (Vionnet, S., Quantis Water Database - Technical Report, 2012).
- fraction, irrigation water to surface water: 0.2 dimensionless; name fraction_IW_to_surface_water; lognormal variance with pedigree 0.0886, pedigree (4,3,1,1,4)
  Literature value (Döll, 2011) cross referenced with expert opinion.
- fraction, irrigation water, to ground water: 0.8 dimensionless; name fraction_IW_to_ground_water; lognormal variance with pedigree 0.0886, pedigree (4,3,1,1,4)
  Literature value (Döll, 2011) cross referenced with expert opinion.

## Reference product
- grass seed, Swiss integrated production, at farm: 1 kg; name REF_PRODUCT; CPC 01940: Beet seeds (excluding sugar beet seeds) and seeds of forage plants; By-product classification allocatable product
  production volume 1.23636e6 kg
    Grass and clover seed production CH 120t, consumption CH 5099t in 1999-2000
    Source: ecoinvent 2; 0.00098765 kg seed per kg grass output
  property price 0.356978 EUR2005; name REF_PRODUCT_price_EUR2005
    Calculated based on inputs: The price of the product has been calculated as a sum of the values of the material and energy inputs for this product. This value is therefore a rough estimation. It may underestimate the real price since there are additional expenses when producing any product. These expences can include for example labour costs, treatment of waste materials and profit for the producer. Please consider carefully whether this level of data quality is acceptable for your application.
  property energy content 16.299 MJ; name REF_PRODUCT_energy_content
    See chapter 'Product Properties' in '01_crop production - yields & inputs CH & Europe_v1.0.pdf', section 'AGRICULTURAL PRODUCTION IN SWITZERLAND' - pdf-document on the dedicated talk page of ecoinvent (www.ecoinvent.org/documentation).
  property dry mass 0.9 kg; name REF_PRODUCT_DM
  property carbon content, non-fossil 0.464601; name REF_PRODUCT_C_content_non_fossil
    biogene carbon content on a dry matter basis
    wheat grains values are used
  property carbon content 0.464601
    carbon content on a dry matter basis (reserved; not for manual entry)
  properties: water in wet mass 0.1 kg, water content 0.111111, wet mass 1 kg, carbon content, fossil 0, carbon allocation 0.418141 kg

## Inputs from technosphere
- sowing: 0.001 ha; lognormal variance with pedigree 0.0406, pedigree (2,1,5,1,1)
  Fully attributed to grass seed production.
  This exchange has an activity link directly to the producing activity because the product is primarily consumed in the same geographical area where it is produced.
- combine harvesting: 0.001 ha; lognormal variance with pedigree 0.0406, pedigree (2,1,5,1,1)
  (same comment as for sowing)
- irrigation: 0.000114458 m3; name water_irrigation_input; source Siebert, S. 2010; lognormal variance with pedigree 0.0427, pedigree (2,2,5,1,1)
  Calculated based on literature values (Döll, 2010) and partially modelled at ETH (Pfister, S.).
  property water content 9089.91; name water_content
  property dry mass 0.11 kg; name DM
  property wet mass 1000 kg; name WM
  property carbon content, fossil 0; name C_content_fossil
  property carbon content, non-fossil 0; name C_content_non_fossil
  property water in wet mass 999.89 kg; name WWM
- fertilising, by broadcaster: 0.0015 ha; lognormal variance with pedigree 0.0406, pedigree (2,1,5,1,1)
  Burden of grass seed production is approximated by 50% of the burden of grass production on an intensive temporary meadow. For details see '01_crop production - seed production & processing_v1.0.pdf' - pdf-document on the dedicated talk page of ecoinvent (www.ecoinvent.org/documentation).
  This exchange has an activity link directly to the producing activity because the product is primarily consumed in the same geographical area where it is produced.
- tillage, harrowing, by spring tine harrow: 0.0005 ha; lognormal variance with pedigree 0.0406, pedigree (2,1,5,1,1)
  Burden of grass seed production is approximated by 50% of the burden of co-production of grass seed and grass for forage on an intensive temporary meadow. For details see '01_crop production - seed production & processing_v1.0.pdf' - pdf-document on the dedicated talk page of ecoinvent (www.ecoinvent.org/documentation).
  This exchange has an activity link directly to the producing activity because the product is primarily consumed in the same geographical area where it is produced.
- potassium chloride: 0.178076 kg; lognormal variance with pedigree 0.0406, pedigree (2,1,5,1,1)
  The exchange has been updated from 'potassium chloride, as K2O' into 'potassium chloride' and therefore its amount has been scaled (multiplied) from 0.1125 kg by 1.5829 kg of 'potassium chloride' per kg of 'potassium chloride, as K2O'. Original comment of the exchange is: Burden of grass seed production is approximated by 50% of the burden of co-production of grass seed and grass for forage on an intensive temporary meadow. For details see '01_crop production - seed production & processing_v1.0.pdf' - pdf-document on the dedicated talk page of ecoinvent (www.ecoinvent.org/documentation).
  Burden of grass seed production is approximated by 50% of the burden of co-production of grass seed and grass for forage on an intensive temporary meadow. For details see '01_crop production - seed production & processing_v1.0.pdf' - pdf-document on the dedicated talk page of ecoinvent (www.ecoinvent.org/documentation).
  properties: dry mass 1 kg, wet mass 1 kg
- drying of bread grain, seed and legumes: 0.28571 l; source Nemecek, T. 2004; lognormal variance with pedigree 0.0406, pedigree (2,1,5,1,1)
  Fully attributed to grass seed production. Calculated according to Nemecek et al. (2004).
  This exchange has an activity link directly to the producing activity because the product is primarily consumed in the same geographical area where it is produced.
- benzimidazole-compound: 0.002 kg; lognormal variance with pedigree 0.0406, pedigree (2,1,5,1,1)
  Burden of grass seed production is approximated by 50% of the burden of co-production of grass seed and grass for forage on an intensive temporary meadow. For details see '01_crop production - seed production & processing_v1.0.pdf' - pdf-document on the dedicated talk page of ecoinvent (www.ecoinvent.org/documentation).
  Burden of grass seed production is approximated by 50% of the burden of co-production of grass seed and grass for forage on an intensive temporary meadow. For details see '01_crop production - seed production & processing_v1.0.pdf' - pdf-document on the dedicated talk page of ecoinvent (www.ecoinvent.org/documentation).
  properties: carbon content, fossil 0.529668, wet mass 1 kg, dry mass 1 kg
  note on carbon content, fossil: C content estimated as an average of that of the pesticides Carbendazim, prochloraz and ethofumesate (Sutter 2010)
- ammonium nitrate: 0.285732 kg; lognormal variance with pedigree 0.0406, pedigree (2,1,5,1,1)
  The exchange has been updated from 'ammonium nitrate, as N' into 'ammonium nitrate' and therefore its amount has been scaled (multiplied) from 0.1 kg by 2.8573 kg of 'ammonium nitrate' per kg of 'ammonium nitrate, as N'. Original comment of the exchange is: Burden of grass seed production is approximated by 50% of the burden of co-production of grass seed and grass for forage on an intensive temporary meadow. For details see '01_crop production - seed production & processing_v1.0.pdf' - pdf-document on the dedicated talk page of ecoinvent (www.ecoinvent.org/documentation).
  Burden of grass seed production is approximated by 50% of the burden of co-production of grass seed and grass for forage on an intensive temporary meadow. For details see '01_crop production - seed production & processing_v1.0.pdf' - pdf-document on the dedicated talk page of ecoinvent (www.ecoinvent.org/documentation).
  properties: wet mass 1 kg, dry mass 1 kg
- inorganic phosphorus fertiliser, as P2O5: 0.0425 kg; lognormal variance with pedigree 0.0406, pedigree (2,1,5,1,1)
  (same comment as for benzimidazole-compound)
  properties: wet mass 1 kg, dry mass 1 kg
- packaging, for fertilisers: 0.51 kg; lognormal variance with pedigree 0.0912, pedigree (4,3,5,5,4)
  Total amount of active substance/s of fertilisers needed for the production of 'grass seed, Swiss integrated production, at farm' is calculated to be circa 2.55E-01 kg. Fertiliser/s used in this dataset is/are: 'ammonium nitrate, as N', 'phosphate fertiliser, as P2O5', 'potassium chloride, as K2O'. The total amount of active substance/s is doubled in order to account for the packaging of the dilluted product of fertiliser/s that is/are applied. Therefore, 5.10E-01 kg of packaging for fertilisers is justified with this exchange.
  properties: dry mass 1 kg, heating value, net 25.01 MJ, carbon content, fossil 0.825301, wet mass 1 kg, price 0.0642 EUR2005
  note on carbon content, fossil: Considering a chemical formula (C2H4)n for polyethylene, carbon content-fossil is calculated to be 0.856286 kg of Carbon per kg of dry mass.
- tillage, ploughing: 0.0005 ha; lognormal variance with pedigree 0.0406, pedigree (2,1,5,1,1)
  (same comment as for tillage, harrowing, by spring tine harrow)
- packaging, for pesticides: 0.004 kg; lognormal variance with pedigree 0.0912, pedigree (4,3,5,5,4)
  Total amount of active substance/s of pesticides needed for the production of grass seed, Swiss integrated production, at farm is calculated to be circa 2.00E-03 kg. Pesticide/s used in this dataset is/are: 'benzimidazole-compound'. The total amount of active substance/s is doubled in order to account for the packaging of the dilluted product of pesticide/s that is/are applied. Therefore, 4.00E-03 kg of packaging for pesticides is justified with this exchange.
  properties: price 0.0642 EUR2005, dry mass 1 kg, carbon content, fossil 0.85714, heating value, net 25.97 MJ, wet mass 1 kg
- application of plant protection product, by field sprayer: 0.001 ha; lognormal variance with pedigree 0.0406, pedigree (2,1,5,1,1)
  (same comment as for tillage, harrowing, by spring tine harrow)
- grass seed, Swiss integrated production, for sowing: 0.016 kg; name SEED; lognormal variance with pedigree 0.0406, pedigree (2,1,5,1,1)
  Fully attributed to grass seed production.
  Fully attributed to grass seed production.
  property dry mass 0.9 kg; name SEED_DM
  property carbon content, non-fossil 0.464601; name SEED_C_content_non_fossil
  property energy content 16.299 MJ; name SEED_energy_content
  properties: wet mass 1 kg, water content 0.111111
  note on carbon content, non-fossil: biogene carbon content on a dry matter basis wheat grains values are used
  note on energy content: See chapter 'Product Properties' in '01_crop production - yields & inputs CH & Europe_v1.0.pdf', section 'AGRICULTURAL PRODUCTION IN SWITZERLAND' - pdf-document on the dedicated talk page of ecoinvent (www.ecoinvent.org/documentation).
- transport, tractor and trailer, agricultural: 0.01 metric ton*km; lognormal variance with pedigree 0.0406, pedigree (2,1,5,1,1)
  Transport of seed to the regional processing centre (10 km).

## Inputs from nature
- Energy, gross calorific value, in biomass [natural resource, biotic]: 16.038 MJ; lognormal variance with pedigree 0.12706, pedigree (2,2,5,1,1)
- Occupation, annual crop, non-irrigated, intensive [natural resource, land]: 5 m2*year; lognormal variance with pedigree 0.0406, pedigree (2,1,5,1,1)
  Modelled, see '01_crop production_direct field emissions and natural resources_v1.0.pdf' - pdf-document on the dedicated talk page of ecoinvent (www.ecoinvent.org/documentation). Burden of grass seed production is approximated by 50% of the burden of co-production of grass seed and grass for forage on an intensive temporary meadow. For details see '01_crop production - seed production & processing_v1.0.pdf' - pdf-document on the dedicated talk page of ecoinvent (www.ecoinvent.org/documentation).
- Transformation, to annual crop, non-irrigated, intensive [natural resource, land]: 5 m2; lognormal variance with pedigree 0.0506, pedigree (2,1,5,1,1)
  (same comment as for Occupation, annual crop, non-irrigated, intensive)
- Carbon dioxide, in air [natural resource, in air]: 1.50865 kg; = 44/12 * (REF_PRODUCT_C_content_non_fossil * REF_PRODUCT * REF_PRODUCT_DM - SEED_C_content_non_fossil * SEED * SEED_DM); lognormal variance with pedigree 0.1307, pedigree (2,2,5,1,1)
  Only output of seed considered. Input of seed fully attributed to seed production. Modelled,see chapter 'CO2 binding' in '01_crop production_direct field emissions and natural resources_v1.0.pdf' - pdf-document on the dedicated talk page of ecoinvent (www.ecoinvent.org/documentation)
- Transformation, from pasture, man made, intensive [natural resource, land]: 1.45 m2; lognormal variance with pedigree 0.0506, pedigree (2,1,5,1,1)
  (same comment as for Occupation, annual crop, non-irrigated, intensive)
- Transformation, from annual crop, non-irrigated, intensive [natural resource, land]: 3.55 m2; lognormal variance with pedigree 0.0506, pedigree (2,1,5,1,1)
  (same comment as for Occupation, annual crop, non-irrigated, intensive)

## Emissions to nature
- Nickel, ion [water, surface water]: 1.4491e-6 kg; lognormal variance with pedigree 0.1307, pedigree (2,2,5,1,1)
  (same comment as for Occupation, annual crop, non-irrigated, intensive)
- Lead [soil, agricultural]: 4.3724e-7 kg; lognormal variance with pedigree 0.0807, pedigree (2,2,5,1,1)
  (same comment as for Occupation, annual crop, non-irrigated, intensive)
- Cadmium, ion [water, ground-]: 2.1838e-8 kg; lognormal variance with pedigree 0.1307, pedigree (2,2,5,1,1)
  (same comment as for Occupation, annual crop, non-irrigated, intensive)
- Water [water, surface water]: 1.52161e-5 m3; name water_to_water_surface; = water_irrigation_input*(1-fraction_IW_to_air)*fraction_IW_to_surface_water; lognormal variance with pedigree 0.1286, pedigree (4,3,5,1,4)
  Calculated value. See the parameters and their comments to understand the calculation.
  property fraction, origin: fresh water 1; name fraction_origin_fresh_water_Wsw
  property fraction, origin: salt water 0; name fraction_origin_salt_water_Wsw
- Copper, ion [water, surface water]: 1.4443e-6 kg; lognormal variance with pedigree 0.1307, pedigree (2,2,5,1,1)
  (same comment as for Occupation, annual crop, non-irrigated, intensive)
- Chromium, ion [water, surface water]: 2.1821e-6 kg; lognormal variance with pedigree 0.1307, pedigree (2,2,5,1,1)
  (same comment as for Occupation, annual crop, non-irrigated, intensive)
- Chromium [soil, agricultural]: -9.681e-7 kg
  (same comment as for Occupation, annual crop, non-irrigated, intensive)
- Nitrate [water, ground-]: 0.0787418 kg; lognormal variance with pedigree 0.0807, pedigree (2,2,5,1,1)
  (same comment as for Occupation, annual crop, non-irrigated, intensive)
- Nickel [soil, agricultural]: 4.5789e-7 kg; lognormal variance with pedigree 0.0807, pedigree (2,2,5,1,1)
  (same comment as for Occupation, annual crop, non-irrigated, intensive)
- Water [water, ground-]: 6.08644e-5 m3; name water_to_water_ground; = water_irrigation_input*(1-fraction_IW_to_air)*fraction_IW_to_ground_water; lognormal variance with pedigree 0.1286, pedigree (4,3,5,1,4)
  Calculated value. See the parameters and their comments to understand the calculation.
  property fraction, origin: unspecified 0; name fraction_origin_unspecified_Wgw
  property fraction, origin: fresh water 1; name fraction_origin_fresh_water_Wgw
  property fraction, origin: salt water 0; name fraction_origin_salt_water_Wgw
- Phosphate [water, ground-]: 0.00011664 kg; lognormal variance with pedigree 0.0807, pedigree (2,2,5,1,1)
  (same comment as for Occupation, annual crop, non-irrigated, intensive)
- Ethofumesate [soil, agricultural]: 0.002 kg; lognormal variance with pedigree 0.0507, pedigree (2,2,5,1,1)
  (same comment as for Occupation, annual crop, non-irrigated, intensive)
- Zinc [soil, agricultural]: -2.2536e-5 kg
  (same comment as for Occupation, annual crop, non-irrigated, intensive)
- Zinc, ion [water, ground-]: 6.2012e-6 kg; lognormal variance with pedigree 0.1307, pedigree (2,2,5,1,1)
  (same comment as for Occupation, annual crop, non-irrigated, intensive)
- Cadmium, ion [water, surface water]: 2.7994e-8 kg; lognormal variance with pedigree 0.1307, pedigree (2,2,5,1,1)
  (same comment as for Occupation, annual crop, non-irrigated, intensive)
- Phosphorus [water, surface water]: 9.8528e-5 kg; lognormal variance with pedigree 0.0807, pedigree (2,2,5,1,1)
  (same comment as for Occupation, annual crop, non-irrigated, intensive)
- Water [air, unspecified]: 3.83779e-5 m3; name water_to_air_unspecified; = (water_irrigation_input*fraction_IW_to_air); lognormal variance with pedigree 0.0807, pedigree (2,2,5,1,1)
  Calculated value based on literature values and expert opinion. See comments in the parametres' comment field.
  property fraction, origin: unspecified 0; name fraction_origin_unspecified
  property fraction, origin: salt water 0; name fraction_origin_salt_water
  property fraction, origin: fresh water 1; name fraction_origin_fresh_water
- Ammonia [air, non-urban air or from high stacks]: 0.00243177 kg; lognormal variance with pedigree 0.0507, pedigree (2,2,5,1,1)
  (same comment as for Occupation, annual crop, non-irrigated, intensive)
- Phosphate [water, surface water]: 0.00011664 kg; lognormal variance with pedigree 0.0807, pedigree (2,2,5,1,1)
  (same comment as for Occupation, annual crop, non-irrigated, intensive)
- Chromium, ion [water, ground-]: 9.2926e-6 kg; lognormal variance with pedigree 0.1307, pedigree (2,2,5,1,1)
  (same comment as for Occupation, annual crop, non-irrigated, intensive)
- Dinitrogen monoxide [air, non-urban air or from high stacks]: 0.00181245 kg; name N2O; lognormal variance with pedigree 0.0707, pedigree (2,2,5,1,1)
  (same comment as for Occupation, annual crop, non-irrigated, intensive)
- Lead [water, surface water]: 2.5157e-7 kg; lognormal variance with pedigree 0.1307, pedigree (2,2,5,1,1)
  (same comment as for Occupation, annual crop, non-irrigated, intensive)
- Zinc, ion [water, surface water]: 2.518e-6 kg; lognormal variance with pedigree 0.1307, pedigree (2,2,5,1,1)
  (same comment as for Occupation, annual crop, non-irrigated, intensive)
- Lead [water, ground-]: 2.958e-8 kg; lognormal variance with pedigree 0.1307, pedigree (2,2,5,1,1)
  (same comment as for Occupation, annual crop, non-irrigated, intensive)
- Nitrogen oxides [air, non-urban air or from high stacks]: 0.000380615 kg; = 0.21 * N2O; lognormal variance with pedigree 0.0707, pedigree (2,2,5,1,1)
  (same comment as for Occupation, annual crop, non-irrigated, intensive)
- Cadmium [soil, agricultural]: 2.0452e-6 kg; lognormal variance with pedigree 0.0807, pedigree (2,2,5,1,1)
  (same comment as for Occupation, annual crop, non-irrigated, intensive)
- Copper [soil, agricultural]: -1.6447e-5 kg
  (same comment as for Occupation, annual crop, non-irrigated, intensive)
- Copper, ion [water, ground-]: 1.3697e-6 kg; lognormal variance with pedigree 0.1307, pedigree (2,2,5,1,1)
  (same comment as for Occupation, annual crop, non-irrigated, intensive)

## Sampling procedure
Data derived from literature, recommendations and expert information

## Extrapolations
This dataset has been extrapolated from year 2000 to the year of the calculation (2021). The uncertainty has been adjusted accordingly.

## Review by Hans-Jörg Althaus 2007-11-07
passed
none
