# sawnwood production, hardwood, raw, dried (u=20%)

Dataset: EcoSpold 2, unit process
Geography: Europe without Switzerland
Time period: 2014-01-01 to 2021-12-31
Technology level: current
Classification: ISIC rev.4 ecoinvent: 1610:Sawmilling and planing of wood
Scenario: Business-as-Usual
System model: Allocation, cut-off by classification
Generated by: Frank Werner
Database: ecoinvent
isCopyrightProtected: true
accessRestrictedTo: 1

## General comment
This activity is providing a more generic sawnwood product, combining inputs from the specific products issued from drying in the sawmil. The relative contribution is based in their Production Volumes.

## Included activities start
Entry of the specific products issued of the drying activity

## Included activities end
Delivery of the generic planed product

## Reference product
- sawnwood, hardwood, raw, dried (u=20%): 1 m3; By-product classification allocatable product; CPC 31102: Wood, sawn or chipped lengthwise, sliced or peeled, of a thickness exceeding 6 mm, of non-coniferous wood
  production volume 4.018e6 m3; = 0.287*1.4E+07
    10% of the Production Volume issued from the drying has been made accesible as this generic product.
    The Production Volumes have been downscaled from GLO to RER using the relative GDP values 2011 (source: United Nations, <http://data.un.org/Glossary.aspx?q=GDP+%28current+US%24%29>, accessed 20130726).
  property price 265 EUR2005
    Expert judgement (Urs Luginbühl, Swiss Sawmilling industry, personal communication in June 2014). Cross-reference; FAOSTAT (accessed 20140428). The price is calculated by using data on total world import quantity (m3) and import value (1000 USD), year 2005. 25656806 m3 of Sawnwood (NC) - coniferous was imported in the world in 2005. The import value was 9652714000 USD. The calculated price is thus (9652714000/25656806=376*0.8=) 303 Euro.
  property heating value, net 9410.32 MJ
    LHV is calculated based on the Carbon content of the product. More details can be found on the respective documentation.The property is based on a value of 12.06MJ/kg
  property carbon content 0.494
    carbon content on a dry matter basis (reserved; not for manual entry)
  properties: dry mass 588.8 kg, water in wet mass 191.2 kg, wet mass 780 kg, water content 0.324728, carbon content, non-fossil 0.494, carbon content, fossil 0, carbon allocation 290.867 kg

## Inputs from technosphere
All rows: lognormal variance with pedigree 0.1041, pedigree (3,1,3,3,1)
- sawnwood, beam, hardwood, raw, dried (u=20%): 0.264 m3
  based on estimated production volumes; see activity datasets
  properties: dry mass 588.8 kg, water content 0.2, wet mass 706.56 kg, carbon content, non-fossil 0.494, heating value, net 8524.3 MJ
  note on heating value, net: Assumed equal to "sawnwood, beam, hardwood, dried (u=20%), planed".The property is based on a value of 12.06MJ/kg
- sawnwood, board, hardwood, raw, dried (u=20%): 0.1 m3
  based on estimated production volumes; see activity datasets
  properties: carbon content, non-fossil 0.494, dry mass 588.8 kg, water content 0.2, heating value, net 8524.3 MJ, wet mass 706.56 kg
- sawnwood, lath, hardwood, raw, dried (u=20%): 0.034 m3
  based on estimated production volumes; see activity datasets
  properties: wet mass 706.56 kg, heating value, net 8524.3 MJ, dry mass 588.8 kg, water content 0.2, carbon content, non-fossil 0.494
- sawnwood, board, hardwood, raw, dried (u=20%): 0.4 m3
  based on estimated production volumes; see activity datasets
  properties: water content 0.2, wet mass 706.56 kg, heating value, net 8524.3 MJ, carbon content, non-fossil 0.494, dry mass 588.8 kg
- sawnwood, beam, hardwood, raw, dried (u=20%): 0.066 m3
  based on estimated production volumes; see activity datasets
  properties: carbon content, non-fossil 0.494, water content 0.2, dry mass 563.2 kg, heating value, net 8524.3 MJ, wet mass 675.84 kg
- sawnwood, lath, hardwood, raw, dried (u=20%): 0.136 m3
  based on estimated production volumes; see activity datasets
  properties: carbon content, non-fossil 0.494, heating value, net 8524.3 MJ, dry mass 588.8 kg, wet mass 706.56 kg, water content 0.2

## Extrapolations
This dataset has been extrapolated from year 2014 to the year of the calculation (2021). The uncertainty has been adjusted accordingly.
