# portachrom production

Dataset: EcoSpold 2, unit process
Geography: RER
Time period: 2000-01-01 to 2021-12-31
Technology level: current
Classification: ISIC rev.4 ecoinvent: 0729:Mining of other non-ferrous metal ores
Classification: EcoSpold01Categories: chemicals/inorganics
Tags: ConvertedDataset
Scenario: Business-as-Usual
System model: Allocation, cut-off by classification
Generated by: Roland Hischier
Published in: Hischier R. 2007
Database: ecoinvent
isCopyrightProtected: true
accessRestrictedTo: 1

## General comment
The dataset represents the production of 1 kg of portachrom from chromium containing concentrate following benefication process.
Land-use is an approximation based on iron ore extraction. Material and energy inputs, industrial machine, and particulate emissions are an approximation based on iron mining and limestone crushing and milling.
[This dataset was already contained in the ecoinvent database version 2. It was not individually updated during the transfer to ecoinvent version 3. Life Cycle Impact Assessment results may still have changed, as they are affected by changes in the supply chain, i.e. in other datasets. This dataset was generated following the ecoinvent quality guidelines for version 2. It may have been subject to central changes described in the ecoinvent version 3 change report (http://www.ecoinvent.org/database/ecoinvent-version-3/reports-of-changes/), and the results of the central updates were reviewed extensively. The changes added e.g. consistent water flows and other information throughout the database. The documentation of this dataset can be found in the ecoinvent reports of version 2, which are still available via the ecoinvent website. The change report linked above covers all central changes that were made during the conversion process.]

## Included activities start
From the reception of chromium containing concentrate following benefication process.

## Included activities end
This activity ends with the production of 1 kg of portachrom. The dataset includes raw materials, machineries and energy consumption for production, estimated emissions to air from production and infrastructure of the site. The dataset doesn't include water emissions, overburden and tailing material from process, and losses of product.

## Geography
Data are used here as European average.

## Technology
The mining and following benefication process of chromite results in a 44.9% chromium containing concentrate. The technology is based on iron production. No further chemical treatment is considered, just a production of a fine powder of this concentrate based on limestone crushing and milling technology. It is assumed an overall yield for chromite of 95%.

## Parameters
- fraction, process water, to air: 0.205 dimensionless; name fraction_PW_to_air; lognormal variance with pedigree 0.092025, pedigree (4,4,3,2,4)
  Literature value (Statistics Canada, 2007 & Shaffer, K.H., 2008, Consumptive water use in the Great Lakes Basin, USGS) (Vionnet, S., Quantis Water Database - Technical Report, 2012).

## Reference product
- portachrom: 1 kg; By-product classification allocatable product; CPC 4160: Other non-ferrous metals and articles thereof (including waste and scrap of some metals); cermets and articles […]; CAS 1308-31-2
  Portachrom is a brand name for chromite and is used for producing brilliant green glass. Chromite is a mixture that can be described as (Fe2+,Mg)O.(Cr,Al, Fe3+)2O3 and contains only in exceptional cases more than 50% of Cr2O3.
  EcoSpold01Location=RER
  production volume 1.32237 kg
    This is a placeholder value that does not reflect real-world production volumes. This dataset does not currently require a real-world production volume to work in the database framework, and no actual data were collected yet. This has no negative effect on the results of the ecoinvent database. The placeholder value of this activity was scaled according to the nominal GDP of 2005 (source: United Nations, http://data.un.org/Glossary.aspx?q=GDP+%28current+US%24%29, accessed 20130726) to reflect an appropriate share of the global production volume, which is also a placeholder value.
  property price 0.42 EUR2005
    Calculated value based on data from United Nations Commodity Trade Statistics Database (comtrade.un.org). UN comtrade category: 681591 Articles containing magnesite, dolomite or chromite. Year 2007. Using exchange rate of 1EURO = 1.209 USD. Average of price of import into 5 main markets (EU, US, JP, IN and CN).
  property carbon content 0
    carbon content on a dry matter basis (reserved; not for manual entry)
  properties: carbon content, fossil 0, wet mass 1 kg, water in wet mass 0 kg, dry mass 1 kg, water content 0, carbon content, non-fossil 0, carbon allocation 0 kg

## Inputs from technosphere
- chromite ore concentrate: 1.05 kg; lognormal variance with pedigree 0.2687, pedigree (4,3,5,3,5)
  EcoSpold01Location=GLO
  Proxy: approximation with data from limestone treatment. It is a 44.9% chromium containing concentrate. An overall yield of 95% is assumed for the crushing an milling phases.
  Uncertainty: approximation with data from lime treatment
  properties: dry mass 1 kg, wet mass 1 kg
- electricity, medium voltage: 0.0339 kWh; lognormal variance with pedigree 0.2687, pedigree (4,3,5,3,5)
  EcoSpold01Location=UCTE
  Proxy: approximation with data from iron mining & lime treatment
  Uncertainty: approximation with data from lime treatment
- heat, central or small-scale, other than natural gas: 0.00282 MJ; lognormal variance with pedigree 0.2687, pedigree (4,3,5,3,5)
  EcoSpold01Location=CH
  Proxy: approximation with data from limestone treatment
  Uncertainty: approximation with data from lime treatment
  properties: heating value, net 1 MJ
- heat, district or industrial, other than natural gas: 0.0898 MJ; lognormal variance with pedigree 0.2687, pedigree (4,3,5,3,5)
  Proxy: approximation with data from limestone treatment
  EcoSpold01Location=RER
  Uncertainty: approximation with data from lime treatment
  properties: heating value, net 1 MJ
- industrial machine, heavy, unspecified: 0.000231 kg; lognormal variance with pedigree 0.5787, pedigree (4,3,5,3,5)
  EcoSpold01Location=RER
  Proxy: approximation with data from limestone treatment.
  Uncertainty: approximation with data from lime treatment
- conveyor belt: 2.78e-8 m; lognormal variance with pedigree 0.5787, pedigree (4,3,5,3,5)
  EcoSpold01Location=RER
  Proxy: approximation with data from limestone treatment
  Uncertainty: approximation with data from lime treatment

## Inputs from nature
- Transformation, to mineral extraction site [natural resource, land]: 2.13e-6 m2; lognormal variance with pedigree 0.2067, pedigree (4,3,5,3,3)
  Proxy: approximation with data from iron mining.
  Uncertainty: approximation with data from iron mining & lime treatment
- Water, well, in ground [natural resource, in water]: 2.93e-5 m3; name water_well_in_ground_input; lognormal variance with pedigree 0.2687, pedigree (4,3,5,3,5)
  Proxy: approximation with data from lime treatment
  Uncertainty: approximation with data from lime treatment
- Occupation, mineral extraction site [natural resource, land]: 0.00012 m2*year; lognormal variance with pedigree 0.1267, pedigree (4,3,5,3,3)
  Proxy: approximation with data from iron mining
  Uncertainty: approximation with data from iron mining & lime treatment
- Transformation, from forest, unspecified [natural resource, land]: 2.13e-6 m2; lognormal variance with pedigree 0.2067, pedigree (4,3,5,3,3)
  (same comment as for Transformation, to mineral extraction site)

## Emissions to nature
- Particulates, < 2.5 um [air, non-urban air or from high stacks]: 0.000145 kg; lognormal variance with pedigree 0.5787, pedigree (4,3,5,3,5)
  Proxy: approximation with data from iron mining & lime treatment
  Uncertainty: approximation with data from lime treatment
- Water [water, unspecified]: 2.32935e-5 m3; name water_to_water_unspecified; = water_well_in_ground_input*(1-fraction_PW_to_air); lognormal variance with pedigree 0.0807, pedigree (2,2,5,1,1)
  Calculated value based on literature values and expert opinion. See comments in the parametres' comment field.
  property fraction, origin: salt water 0; name fraction_origin_salt_water_Ww
  property fraction, origin: fresh water 1; name fraction_origin_fresh_water_Ww
  property fraction, origin: unspecified 0; name fraction_origin_unspecified_Ww
  property wet mass 1000 kg; name WM
  property carbon content, non-fossil 0; name C_content_non_fossil
  property water in wet mass 1000 kg; name WWM
  property dry mass 0 kg; name DM
  property carbon content, fossil 0; name C_content_fossil
- Particulates, > 2.5 um, and < 10um [air, non-urban air or from high stacks]: 0.00131 kg; lognormal variance with pedigree 0.3987, pedigree (4,3,5,3,5)
  (same comment as for Particulates, < 2.5 um)
- Particulates, > 10 um [air, non-urban air or from high stacks]: 0.00145 kg; lognormal variance with pedigree 0.3087, pedigree (4,3,5,3,5)
  (same comment as for Particulates, < 2.5 um)
- Water [air, unspecified]: 6.0065e-6 m3; name water_to_air_unspecified; = (water_well_in_ground_input*fraction_PW_to_air); lognormal variance with pedigree 0.0807, pedigree (2,2,5,1,1)
  (same comment as for Water)
  property fraction, origin: fresh water 1; name fraction_origin_fresh_water
  property fraction, origin: salt water 0; name fraction_origin_salt_water
  property fraction, origin: unspecified 0; name fraction_origin_unspecified

## Sampling procedure
approximation with data from literature

## Extrapolations
This dataset has been extrapolated from year 2000 to the year of the calculation (2021). The uncertainty has been adjusted accordingly.

## Review by Daniel Kellenberger (obsolete) 2007-11-09
passed

## Review by Roland Hischier 2011-11-29
Transfer of documentation done.
