# heat and power co-generation, wood chips, 6667 kW

Dataset: EcoSpold 2, unit process
Geography: CH
Time period: 2010-01-01 to 2021-12-31
Technology level: current
Classification: ISIC rev.4 ecoinvent: 3530:Steam and air conditioning supply
Tags: wood power; with true value
Scenario: Business-as-Usual
System model: Allocation, cut-off by classification
Generated by: Karin Treyer
Published in: Bauer, C. 2007
Database: ecoinvent
isCopyrightProtected: true
accessRestrictedTo: 1

## General comment
This dataset represents the production of heat and electricity with wood chips in a co-generation plant with a capacity of 6667 kW (referring to fuel input) in Switzerland. The technology corresponds to the average installed in 2014 in Switzerland, which is equipped with an electrostatic precipitator for particulate matter (PM) emission reduction. It is assumed that the plant is operated mainly producing heat, i.e. following the heat demand. Heat is therefore considered as the main product and the reference product, whereas electricity is a by-product. Electricity is produced with an organic rankine cycle (ORC) steam generator.
Wood chips are burned in a boiler at a temperature of 800-1300 °C under excess air conditions and turned into carbon dioxide and water. Energy is set free in form of heat. Burning takes place with the following steps:
1. Drying
2. degradation of the wood into carbon and gases
3. degradation of the carbon into gases
4. oxidation of the gases
These phases overlap. The produced heat can be used directly or for steam production in order to generate electricity with a turbine.
Emissions vary with quality of the combustion (temperature, mixing of the combustion gases and the added fresh air, retention time of gases in the combustor), filter technologies and with the efficiency of the plant. The only inevitable emissions are CO2, NOx and ash particles, whereas the latter can be minimized with filters. Emission data in this dataset are taken from measurements and literature as well as from communication with experts.
CO2 emissions were calculated out of the carbon content of the wood used as combustible. Carbon emitted in carbon monoxide was subtracted from the result.
Key emissions factors for CO, NOx, CH4, NMVOC and particles were updated according to latest data.
All other emission factors (per MJ fuel input) correspond to the 1000 kW boiler fuelled with wood chips from forest. Other exchanges correspond to the LCI data for the 6400 kW co-generation unit in ecoinvent v2.2.
Good J., Nussbaumer T., Bühler R., Jenni A. (1996) Erfolgskontrolle des SNCRVerfahren
zur Entstickung von Holzfeuerungen. Schlussbericht des BEWProjektes
53894. Zürich, Schweiz.

## Included activities start
From wood chips ready to be burned in cogeneration unit (for heat and power production).

## Included activities end
This activity ends with heat and electricity produced.

This dataset includes the infrastructure, the wood input, the emissions to air and the disposal of the ashes. Also included are substances needed for operation: lubricating oil, organic chemicals, sodium chloride, chlorine and decarbonized water.

## Technology
Electric efficiency: 0.15; Thermal efficiency: 0.45;
Total efficiency: 0.6

## Parameters
- thermal efficiency: 0.45 dimensionless; name efficiency_thermal
  Thermal efficiency of the cogeration system, corresponding to annual operation including warm-up and cool-down
  nan
- electrical efficiency: 0.15 dimensionless; name efficiency_electrical
  Electric efficiency of the cogeration system, corresponding to annual operation including warm-up and cool-down
  nan

## Reference product
- heat, district or industrial, other than natural gas: 1 MJ; name heat_out; = 1*efficiency_thermal; source Thomas Nussbaumer 2014; By-product classification allocatable product; CPC 17300: Steam and hot water
  Thermal efficiency referring to the LHV of the fuel input
  production volume 1 MJ; name apv_heat
    This production volume will be ignored by the manual market generation.
  property price 0.0106 EUR2005; name heat_price_EUR2005
    Average European district heat price from Ecoheatcool and Euroheat 2005-2006, Ecoheat Work package 1: The European heat market. Final report. 10.6 EUR/GJ i s the price of district heat. http://www.solarthermalworld.org/files/Ecoheatcool%20WP1%20Web.pdf?download
  property corresponding fuel use, propane, furnace >100kW 0 MJ; name fuel_use
    Lower heating value of the fuel input related to the heat/electricity output, taken directly from ecoinvent v3.0 dataset 'heat production, natural gas, at industrial furnace >100kW, GLO 2000'.
  property true value relation 0.169678; name heat_true_value_relation
    property to calculate 'true value' from
  property exergy 0.169678 MJ; name heat_exergy
    allocation factor for electricity (=1) vs. heat, where heat is calculated as the termodynamic mean temperature Tm = (Tfeed-Treturn)/ln(Tfeed/Treturn), relative to the application temperature (Tu, typically = 293 K), i.e. (Tm-Tu)/Tm
  property true value 0.00298222; name heat_out_true_value
    allocation property applied in "true value" allocation // value calculated from true value relation
  properties: heating value, net 1 MJ

## By-products
- electricity, high voltage: 0 kWh; name electricity_out; source Bauer, C. 2007; By-product classification allocatable product; CPC 17100: Electrical energy
  Electricl efficiency referring to the LHV of the fuel input
  production volume 1 kWh; name apv_electricity
    This production volume will be ignored by the manual market generation.
  property exergy 3.6 MJ; name electricity_exergy
    (same comment as for heat, district or industrial, other than natural gas)
  property true value relation 3.6; name electricity_true_value_relation
    property to calculate 'true value' from
  property price 0.0977 EUR2005; name electricity_price_EUR2005
    Temporary price data. Calculated as 90% of purchasers price based on: 94% of the average price (to account for a 6% loss in transformation and transmission) for electricity for industrial consumersin 2005 (excluded taxes). From IEA.
  property true value 0.00585861; name electricity_out_true_value
    (same comment as for heat, district or industrial, other than natural gas)

## Inputs from technosphere
- lubricating oil: 2.45872e-6 kg; name lubricating_oil; source Bauer, C. 2007
  literature
  properties: heating value, net 40.2 MJ, carbon content, fossil 0.75, wet mass 1 kg, dry mass 1 kg
  note on heating value, net: Literature value, Source: IPCC 2006, 2006 IPCC Guidelines for National Greenhouse Gas Inventories, Prepared by the National Greenhouse Gas Inventories Programme, Eggleston H.S., Buendia L., Miwa K., Ngara T. and Tanabe K. (eds). Published: IGES, Japan
  note on carbon content, fossil: Lubricating oil is produced from diesel. C-content/dry mass of fats and oils considered 75%, from: ecoinvent v2.2 report, n 15a, pg 40
- chlorine, liquid: 2.45872e-7 kg
  literature
  properties: wet mass 1 kg, dry mass 1 kg
- waste mineral oil: -2.45872e-6 kg; name waste_oil; = (lubricating_oil)*-1; source Bauer, C. 2007
  literature
  production volume 1 kg
    This production volume will be ignored by the manual market generation.
  property price 0 EUR2005; name waste_oil_price_EUR2005
  properties: water content 0.111111, wet mass 1 kg, carbon content, fossil 0.864444, dry mass 0.9 kg, heating value, net 34.7 MJ
  note on carbon content, fossil: Tab A.6, ecoinvent v2.2 report 13_I. C content has been calculated after data in the tables, and then referred to 1 kg DM
  note on heating value, net: Value taken from the general comment of the treatment dataset.
- wastewater, average: -5.89942e-7 m3; name sewage; = (water_decarbonised/1000)*-1; source Bauer, C. 2007
  literature
  production volume 1 m3
    This production volume will be ignored by the manual market generation.
  property price 0 EUR2005; name sewage_price_EUR2005
  properties: carbon content, non-fossil 0.194039, dry mass 0.346837 kg, wet mass 1000 kg, water content 2882.2
  note on carbon content, non-fossil: 0.0673 kg TOC/m3 (Tab A.17, ecoinvent v2.2 report 13_I). TOC was considered as Total Carbon.
- municipal solid waste: -2.45872e-6 kg; name municipal_waste; source Bauer, C. 2007
  literature
  production volume 1 kg
    This production volume will be ignored by the manual market generation.
  property price 0 EUR2005; name municipal_waste_price_EUR2005
  properties: wet mass 1 kg, carbon content, fossil 0.171549, carbon content, non-fossil 0.261655, dry mass 0.771 kg, water content 0.297017, heating value, net 11.74 MJ
  note on carbon content, fossil: MSW composition in tab 4.1, ecoinvent v2.2 report 13_I. C content referred to 1 kg DM
- wood ash mixture, pure: -0.000396543 kg; name wood_ash; source Bauer, C. 2007
  literature
  production volume 1 kg
    This production volume will be ignored by the manual market generation.
  property price 0 EUR2005; name wood_ash_price_EUR2005
  properties: wet mass 1 kg, dry mass 1 kg, carbon content, non-fossil 0.012
- wood chips, wet, measured as dry mass: 0.0396618 kg; source Bauer, C. 2007
  Calculated value.
  LHV of wood chips: 18.9 MJ/kg (dry mass)
  properties: water content 1.1, dry mass 1 kg, heating value, net 10.84 MJ, wet mass 2.1 kg, carbon content, non-fossil 0.494
  note on heating value, net: Value based on the dataset 'softwood forestry, mixed species, sustainable forest management'
- furnace, wood chips, with silo, 5000kW: 3.90401e-10 unit; source Bauer, C. 2007
  calculated value, assuming 4000h/a operation time, 20a lifetime, 6667kW (fuel input) capacity
- heat and power co-generation unit, organic Rankine cycle, 1000kW electrical: 3.90401e-10 unit; source Bauer, C. 2007
  (same comment as for furnace, wood chips, with silo, 5000kW)
- dust collector, electrostatic precipitator, for industrial use: 3.90401e-10 unit; source Bauer, C. 2007
  (same comment as for furnace, wood chips, with silo, 5000kW)
- sodium chloride, powder: 3.07339e-6 kg; source Bauer, C. 2007
  literature
  properties: dry mass 1 kg, wet mass 1 kg
- water, decarbonised: 0.000589942 kg; name water_decarbonised; source Thomas Nussbaumer 2014
  literature
  properties: wet mass 1 kg
- chemical, organic: 4.38521e-6 kg; source Bauer, C. 2007
  literature
  properties: dry mass 1 kg, carbon content, fossil 0.628, wet mass 1 kg, heating value, net 19.03 MJ
  note on carbon content, fossil: This dataset is an unweighted average of 20 organic substances (listed in Tab 88.1, ecoinvent v2.2 report 8, part II), being part of the top100 chemicals included in this database. The C-content has also been calculated as an unweighted average of the C content of the substances composing this dataset.
- ammonia, anhydrous, liquid: 6.14679e-9 kg; source Bauer, C. 2007, p. Tab. 9.8 p.61
  literature
  properties: wet mass 1 kg, dry mass 1 kg

## Emissions to nature
- Hydrocarbons, aliphatic, alkanes, unspecified [air, urban air close to ground]: 6.82144e-7 kg; source Bauer, C. 2007, p. Tab. 9.8 p.61
  literature
- Benzene, hexachloro- [air, urban air close to ground]: 5.39718e-15 kg
  literature
- Chromium VI [air, urban air close to ground]: 2.99843e-11 kg; source Bauer, C. 2007, p. Tab. 9.8 p.61
  literature
- Benzene [air, urban air close to ground]: 6.82144e-7 kg
  literature
- PAH, polycyclic aromatic hydrocarbons [air, urban air close to ground]: 8.32065e-9 kg; source Bauer, C. 2007, p. Tab. 9.8 p.61
  literature
- Calcium [air, urban air close to ground]: 4.38521e-6 kg; source Thomas Nussbaumer 2014, p. Tab. 9.8 p.61
  literature
- Benzo(a)pyrene [air, urban air close to ground]: 3.74804e-10 kg; source Bauer, C. 2007, p. Tab. 9.8 p.61
  literature
- Magnesium [air, urban air close to ground]: 2.69859e-7 kg; source Bauer, C. 2007, p. Tab. 9.8 p.61
  literature
- Manganese [air, urban air close to ground]: 1.27433e-7 kg; source Thomas Nussbaumer 2014, p. Tab. 9.8 p.61
  literature
- Sulfur dioxide [air, urban air close to ground]: 1.87402e-6 kg; source Bauer, C. 2007
  literature
- Phosphorus [air, urban air close to ground]: 2.24883e-7 kg; source Bauer, C. 2007, p. Tab. 9.8 p.61
  literature
- Acetaldehyde [air, urban air close to ground]: 4.57261e-8 kg; source Bauer, C. 2007, p. Tab. 9.8 p.61
  literature
- Chlorine [air, urban air close to ground]: 1.3493e-7 kg; source Bauer, C. 2007, p. Tab. 9.8 p.61
  literature
- Formaldehyde [air, urban air close to ground]: 9.74491e-8 kg; source Bauer, C. 2007, p. Tab. 9.8 p.61
  literature
- Hydrocarbons, aliphatic, unsaturated [air, urban air close to ground]: 2.32379e-6 kg; source Bauer, C. 2007, p. Tab. 9.8 p.61
  literature
- Cadmium [air, urban air close to ground]: 5.24726e-10 kg; source Bauer, C. 2007, p. Tab. 9.8 p.61
  literature
- Bromine [air, urban air close to ground]: 4.49765e-8 kg; source Bauer, C. 2007, p. Tab. 9.8 p.61
  literature
- Water [air, non-urban air or from high stacks]: 4.36272e-5 m3; source Bauer, C. 2007
  calculation based on water balance
- Benzene, ethyl- [air, urban air close to ground]: 2.24883e-8 kg; source Bauer, C. 2007, p. Tab. 9.8 p.61
  literature
- Nickel [air, urban air close to ground]: 4.49765e-9 kg; source Bauer, C. 2007, p. Tab. 9.8 p.61
  literature
- Phenol, pentachloro- [air, urban air close to ground]: 6.07183e-12 kg; source Thomas Nussbaumer 2014, p. Tab. 9.8 p.61
  literature
- Particulates, < 2.5 um [air, urban air close to ground]: 1.87402e-5 kg; source Bauer, C. 2007, p. p.60
  expert estimation (see source)
- Nitrogen oxides [air, urban air close to ground]: 0.000112441 kg; source Bauer, C. 2007
  expert estimation (see source)
- Methane, non-fossil [air, urban air close to ground]: 1.12441e-6 kg; source Bauer, C. 2007
  expert estimation (see source)
- Carbon monoxide, non-fossil [air, urban air close to ground]: 0.000149922 kg; source Bauer, C. 2007
  expert estimation (see source)
- NMVOC, non-methane volatile organic compounds, unspecified origin [air, urban air close to ground]: 2.62363e-6 kg; source Bauer, C. 2007, p. Tab. 9.8 p.61
  expert estimation (see source)
- Potassium [air, urban air close to ground]: 1.75408e-5 kg; source Bauer, C. 2007, p. Tab. 9.8 p.61
  literature
- Dinitrogen monoxide [air, urban air close to ground]: 1.7241e-6 kg
  literature
- Carbon dioxide, non-fossil [air, urban air close to ground]: 0.0719624 kg; source Thomas Nussbaumer 2014
  literature
- Sodium [air, urban air close to ground]: 9.74491e-7 kg
  literature
- Lead [air, urban air close to ground]: 1.87402e-8 kg; source Bauer, C. 2007, p. Tab. 9.8 p.61
  literature
- Mercury [air, urban air close to ground]: 2.24883e-10 kg; source Bauer, C. 2007, p. Tab. 9.8 p.61
  literature
- Fluorine [air, urban air close to ground]: 3.74804e-8 kg; source Bauer, C. 2007, p. Tab. 9.8 p.61
  literature
- Chromium [air, urban air close to ground]: 2.96845e-9 kg; source Bauer, C. 2007, p. Tab. 9.8 p.61
  literature
- Ammonia [air, urban air close to ground]: 1.29682e-6 kg; source Bauer, C. 2007, p. Tab. 9.8 p.61
  literature
- Toluene [air, urban air close to ground]: 2.24883e-7 kg; source Bauer, C. 2007, p. Tab. 9.8 p.61
  literature
- Dioxins, measured as 2,3,7,8-tetrachlorodibenzo-p-dioxin [air, urban air close to ground]: 2.32379e-14 kg; source Bauer, C. 2007, p. Tab. 9.8 p.61
  literature
- Arsenic [air, urban air close to ground]: 7.49608e-10 kg; source Bauer, C. 2007, p. Tab. 9.8 p.61
  literature
- Zinc [air, urban air close to ground]: 2.24883e-7 kg; source Bauer, C. 2007, p. Tab. 9.8 p.61
  literature
- Copper [air, urban air close to ground]: 1.64914e-8 kg; source Thomas Nussbaumer 2014, p. Tab. 9.8 p.61
  literature
- m-Xylene [air, urban air close to ground]: 8.9953e-8 kg; source Bauer, C. 2007, p. Tab. 9.8 p.61
  literature

## Sampling procedure
literature, expert judgement, extrapolation
