# sowing

Dataset: EcoSpold 2, unit process
Geography: CA-QC
Time period: 1991-01-01 to 2021-12-31
Technology level: current
Classification: EcoSpold01Categories: agricultural means of production/work processes
Classification: ISIC rev.4 ecoinvent: 0161:Support activities for crop production
Scenario: Business-as-Usual
System model: Allocation, cut-off by classification
Generated by: Dominique Maxime
Published in: Nemecek, T. 2007
Database: ecoinvent
isCopyrightProtected: true
accessRestrictedTo: 1

## General comment
This dataset represents the service of sowing 1 ha of agricultural land. Seeder has a working width of 3 m.
Child dataset exchanges scaled from GLO parent dataset based on diesel consumption in Quebec. Created to proxy farm machinery/fieldwork representative of the Quebec context. Data quality indicators adjusted accordingly. Other difference with the parent dataset is the production volume, which now represents the production volume in Quebec.
Diesel consumption is calculated from primary data and models from the American Society of Agricultural and Biological Engineers (ASABE) published in 2006 and might be representative of more recent technology than the GLO parent dataset.
Warning: If the parent value for diesel consumption (in the GLO parent dataset) is changed in future edition, the user must change the parameter "ecoinvent diesel consumption" accordingly in order to get the right ratio of qc/ecoinvent diesel consumption.

## Included activities start
Sowing process starting from preliminary work at farm, like attaching the adequate machinery to the tractor.

## Included activities end
This activity ends with transfer back to farm and concluding work, like uncoupling the machine. The dataset includes transfer to field; field work for an area of land of 1 ha, including turning, idling and overlapping. Also taken into consideration is the amount of emissions to the air from combustion and the emission to the soil from tyre abrasion during the work process. The dataset doesn"t include dust other than from combustion and noise. Seeds not included.

## Geography
Child dataset air emissions related to diesel combustion are scaled from parent dataset (GLO) based on the ratio of diesel consumption in Quebec over diesel consumption of GLO. Created to proxy farm machinery/fieldwork representative of the Quebec context. Data quality indicators adjusted accordingly.

## Technology
Fuel consumption has been extrapolated to Quebec, but emissions per kg diesel were taken from the original values.

## Time period
The emissions per kg of combusted Diesel were taken from the original values but the Diesel consumption has been updated.

## Parameters
- quebec cropped area: 1.87476e6 ha; name qc_crop_area; lognormal variance with pedigree 0.0006, pedigree (1,1,1,1,1)
  Land in crops, Quebec, in 2011. Source: Statistics Canada, 2013. Table 004-0002 - Census of Agriculture, total area of farms and use of farm land, CANSIM (database). (accessed: 2013-11-15) ("Land in crops" includes field crops, vegetables, fruits and nursery crops, and sod.) Statistics Canada
- farm machinery diesel consumption ratio: 1.64921 dimensionless; name machine_diesel_ratio; = qc_diesel/ EI_diesel
  Ratio of diesel consumption for tractor and its machinery: kg diesel per ha of the Quebec machinery/kg diesel per ha of the ecoinvent"s parent machinery
- world arable land area: 1.39628e9 ha; name world_arable_area; lognormal variance with pedigree 0.0006, pedigree (1,1,1,1,1)
  Arable land area, World, in 2011. Source: FAOSTAT, 2013
- parent dataset diesel consumption: 3.82 kg/unit; name EI_diesel; lognormal variance with pedigree 0.004, pedigree (1,4,1,5,1)
  Diesel consumption in the parent agricultural fieldwork dataset in kg/ha diesel
- qc child dataset diesel consumption: 6.3 kg/unit; name qc_diesel; lognormal variance with pedigree 0.0003496, pedigree (1,2,1,2,1)
  Diesel consumption in the Québec agricultural fieldwork dataset in kg/ha diesel

## Reference product
- sowing: 1 ha; CPC 86119: Other support services to crop production; By-product classification allocatable product
  production volume 1.87476e6 ha
    Total area seeded in Québec down-scaled from total world area (production volume of the GLO parent dataset) through the ratio of cropped area in the two regions (see mathematical relation and parameters).
  property price 7.16583 EUR2005
    Calculated based on inputs: The price of the product has been calculated as a sum of the values of the material and energy inputs for this product. This value is therefore a rough estimation. It may underestimate the real price since there are additional expenses when producing any product. These expences can include for example labour costs, treatment of waste materials and profit for the producer. Please consider carefully whether this level of data quality is acceptable for your application.

## Inputs from technosphere
- agricultural machinery, unspecified: 0.966 kg; lognormal variance with pedigree 0.044, pedigree (1,4,5,5,1)
  The same amount of machinery use as in the parent dataset is used as a proxy.
- shed: 0.00546 m2; lognormal variance with pedigree 0.344, pedigree (1,4,5,5,1)
  The same amount of shed use for machinery as in the parent dataset is used as a proxy.
- tractor, 4-wheel, agricultural: 0.596 kg; lognormal variance with pedigree 0.044, pedigree (1,4,5,5,1)
  The same amount of tractor use as in the parent dataset is used as a proxy.
- diesel: 6.3 kg; lognormal variance with pedigree 0.044, pedigree (1,4,5,5,1)
  Scaling to Quebec diesel consumption
  properties: heating value, net 42.8 MJ, dry mass 1 kg, carbon content, fossil 0.865, wet mass 1 kg
  note on carbon content, fossil: C-content of diesel is 86.5% (ecoinvent v2.2 report 6_IV, Tab 3.14)

## Emissions to nature
- Copper [air, non-urban air or from high stacks]: 1.07199e-5 kg; lognormal variance with pedigree 0.7001, pedigree (1,2,5,5,3)
  Emission from diesel combustion scaled from the parent emission factor based on the relative diesel consumption.
- Carbon dioxide, fossil [air, non-urban air or from high stacks]: 19.6257 kg; lognormal variance with pedigree 0.0601, pedigree (1,2,5,5,3)
  (same comment as for Copper)
- Cadmium [air, non-urban air or from high stacks]: 6.3e-8 kg; lognormal variance with pedigree 0.7001, pedigree (1,2,5,5,3)
  (same comment as for Copper)
- Cadmium [soil, agricultural]: 3.25e-7 kg; lognormal variance with pedigree 0.084, pedigree (1,4,5,5,1)
  Emission to soil from tyre abrasion, not related to diesel combustion. The same emission factor as the parent dataset is used as a proxy.
- NMVOC, non-methane volatile organic compounds, unspecified origin [air, non-urban air or from high stacks]: 0.0206152 kg; lognormal variance with pedigree 0.084, pedigree (1,4,5,5,1)
  (same comment as for Copper)
- Benzene [air, non-urban air or from high stacks]: 4.60131e-5 kg; lognormal variance with pedigree 0.1001, pedigree (1,2,5,5,3)
  (same comment as for Copper)
- Chromium [air, non-urban air or from high stacks]: 3.15e-7 kg; lognormal variance with pedigree 0.7001, pedigree (1,2,5,5,3)
  (same comment as for Copper)
- Dinitrogen monoxide [air, non-urban air or from high stacks]: 0.00075699 kg; lognormal variance with pedigree 0.1001, pedigree (1,2,5,5,3)
  (same comment as for Copper)
- Particulates, < 2.5 um [air, non-urban air or from high stacks]: 0.0211099 kg; lognormal variance with pedigree 0.3601, pedigree (1,2,5,5,3)
  (same comment as for Copper)
- Benzo(a)pyrene [air, non-urban air or from high stacks]: 1.8966e-7 kg; lognormal variance with pedigree 0.7001, pedigree (1,2,5,5,3)
  (same comment as for Copper)
- Selenium [air, non-urban air or from high stacks]: 6.3e-8 kg; lognormal variance with pedigree 0.1001, pedigree (1,2,5,5,3)
  (same comment as for Copper)
- Sulfur dioxide [air, non-urban air or from high stacks]: 0.00634948 kg; lognormal variance with pedigree 0.0601, pedigree (1,2,5,5,3)
  (same comment as for Copper)
- Zinc [air, non-urban air or from high stacks]: 6.3e-6 kg; lognormal variance with pedigree 0.7001, pedigree (1,2,5,5,3)
  (same comment as for Copper)
- Carbon monoxide, fossil [air, non-urban air or from high stacks]: 0.0235838 kg; lognormal variance with pedigree 0.694, pedigree (1,4,5,5,1)
  (same comment as for Copper)
- Ammonia [air, non-urban air or from high stacks]: 0.000126 kg; lognormal variance with pedigree 0.1001, pedigree (1,2,5,5,3)
  (same comment as for Copper)
- Methane, fossil [air, non-urban air or from high stacks]: 0.000813063 kg; lognormal variance with pedigree 0.1001, pedigree (1,2,5,5,3)
  (same comment as for Copper)
- Nitrogen oxides [air, non-urban air or from high stacks]: 0.280366 kg; lognormal variance with pedigree 0.084, pedigree (1,4,5,5,1)
  (same comment as for Copper)
- Nickel [air, non-urban air or from high stacks]: 4.4199e-7 kg; lognormal variance with pedigree 0.7001, pedigree (1,2,5,5,3)
  (same comment as for Copper)
- Lead [soil, agricultural]: 1.44e-6 kg; lognormal variance with pedigree 0.084, pedigree (1,4,5,5,1)
  (same comment as for Cadmium)
- PAH, polycyclic aromatic hydrocarbons [air, non-urban air or from high stacks]: 2.07801e-5 kg; lognormal variance with pedigree 0.3601, pedigree (1,2,5,5,3)
  (same comment as for Copper)
- Zinc [soil, agricultural]: 0.000852 kg; lognormal variance with pedigree 0.084, pedigree (1,4,5,5,1)
  (same comment as for Cadmium)

## Sampling procedure
The inventoried HC, NOx, CO and fuel consumption values are measurements made following two test cycles (ISO 8178 C1 test and a specific 6-level-test created by the FAT) and on measurements made during the field work. The other emissions were calculated basing on literature data and the measured fuel consumption.

## Extrapolations
This dataset has been extrapolated from year 2002 to the year of the calculation (2021). The uncertainty has been adjusted accordingly.

## Review by Thomas Nemecek 2013-12-27
The production volume needs to be updated, since the GLO production volume has changed meanwhile.
