# barge tanker production

Dataset: EcoSpold 2, unit process
Geography: RER
Time period: 1993-01-01 to 2021-12-31
Technology level: current
Classification: ISIC rev.4 ecoinvent: 3011:Building of ships and floating structures
Classification: EcoSpold01Categories: transport systems/ship
Tags: ConvertedDataset
Scenario: Business-as-Usual
System model: Allocation, cut-off by classification
Generated by: Michael Spielmann (obsolete)
Published in: Spielmann M. 2007
Database: ecoinvent
isCopyrightProtected: true
accessRestrictedTo: 1

## General comment
The dataset represents the manufacturing and disposal of one barge tanker with an average total capacity of 1200 t/vessel.
[This dataset was already contained in the ecoinvent database version 2. It was not individually updated during the transfer to ecoinvent version 3. Life Cycle Impact Assessment results may still have changed, as they are affected by changes in the supply chain, i.e. in other datasets. This dataset was generated following the ecoinvent quality guidelines for version 2. It may have been subject to central changes described in the ecoinvent version 3 change report (http://www.ecoinvent.org/database/ecoinvent-version-3/reports-of-changes/), and the results of the central updates were reviewed extensively. The changes added e.g. consistent water flows and other information throughout the database. The documentation of this dataset can be found in the ecoinvent reports of version 2, which are still available via the ecoinvent website. The change report linked above covers all central changes that were made during the conversion process.]

## Included activities start
Barge tanker production starting with material consumption.

## Included activities end
The activity ends with the production of one barge tanker. The dataset includes material consumption, energy consumption, disposal for non metal components and use of paint and emissions of the solvent of paint as NMVOC. The dataset doesn't include the consumption of lubricates.

## Geography
Manufacturing data represents conditions in Europe.

## Technology
The data is derived from an assessment of one barge, with a load capacity of 2800t Bialonski (1990; Engelkamp (1993) as quoted in Maibach et al. (1999). This data was adjusted to model a barge tanker, representing the current average total capacity for a barge tanker (1200 t/vessel). For manufacturing, electricity and heavy oil burned in industrial furnace are included. Energy consumption in manufacturing was estimated as 50% of the cumulative energy of the used materials. The split of energies is 10% electricity and 90% heavy fuel oil Frischknecht et al. (1996). In this project waste treatment processes for non metal components of vessels are accounted for. For inland waterways vessels we assume that they are painted 10 times in their entire life span.
References:
Bialonski W. (1990) Spezifischer Energieeinsatz im Verkehr – Ermittlung und Vergleich der spezifischen Energieverbräuche. Forschungsbericht FE Nr. 90 247/88, im Auftrag des Bundesministers für Verkehr (ausgeführt am Verkehrswissenschaftlichen Institut der Rheinisch-Westfälischen Technischen Hochschule Aachen), Bonn
Engelkamp P. (1993) Stellungnahme des Europäischen Entwicklungszent-rums für die Binnenschifffahrt e.V. Duisburg zum Fragenkatalog für die öffentliche Anhörung der Enquete Komission " Schutz des Menschen und der Umwelt". Enquete Komission zum Thema "Mobilität - Darstellung, Bewertung und Optimierung von Stoffströmen., Bonn
Maibach M., Peter D. and Seiler B. (1999) Ökoinventar Transporte: Grundlagen für den ökologischen Vergleich von Transportsystemen und den Einbezug von Transportsystemen in Ökobilanzen. Technischer Schlussbericht. In: Schweizerischer Nationalfonds zur Förderung der wissenschaftlichen Forschung (ed. SPP Umwelt M.). 2nd Edition. INFRAS, Zürich
Frischknecht R., Bollens U., Bosshart S., Ciot M., Ciseri L., Doka G., Dones R., Gantner U. and Hischier R. (1996) Ökoinventare von Energie-systemen: Grundlagen für den ökologischen Vergleich von Energiesyste-men und den Einbezug von Energiesystemen in Ökobilanzen für die Schweiz. Auflage No. 3. Gruppe Energie - Stoffe - Umwelt (ESU), Eid-genössische Technische Hochschule Zuerich und Sektion Ganzheitliche Systemanalysen, Paul Scherrer Institut, Villigen, Bundesamt für Energie (Hrsg.), Bern

## Reference product
- barge tanker: 1 unit; By-product classification allocatable product; CPC 49314: Other vessels for the transport of goods and other vessels for the transport of both persons and goods
  EcoSpold01Location=RER
  production volume 1.32237 unit
    This is a placeholder value that does not reflect real-world production volumes. This dataset does not currently require a real-world production volume to work in the database framework, and no actual data were collected yet. This has no negative effect on the results of the ecoinvent database. The placeholder value of this activity was scaled according to the nominal GDP of 2005 (source: United Nations, http://data.un.org/Glossary.aspx?q=GDP+%28current+US%24%29, accessed 20130726) to reflect an appropriate share of the global production volume, which is also a placeholder value.
  property price 449940 EUR2005
    UNdata (Average import and export data for EU-27). Commodity: 'Ships, boats and other floating structures'. (http://data.un.org/Data.aspx?q=tankers&d=ComTrade&f=_l1Code%3a89%3bcmdCode%3a890120) The total weight is 3520 t (Source: Existing ecoinvent documentation from ecoinvent v.2.2. From information in the dataset barge.)

## Inputs from technosphere
- waste emulsion paint: 0 kg; pedigree (1,1,1,1,1)
  EcoSpold01Location=CH
  Estimation based on material composition.
  Uncertainty: own estimate, based on material composition
  production volume 0 kg
    Calculated from the production volume of barge tanker in proportion to the respective output amounts.
  properties: wet mass 1 kg, dry mass 1 kg, heating value, net 8.18 MJ, carbon content, fossil 0.27
  note on carbon content, fossil: Tab A.4, ecoinvent v2.2 report 13_I. C content has been calculated after data in the tables, and then referred to 1 kg DM
- polyethylene, low density, granulate: 1880 kg; source Bialonski W. 1990; lognormal variance with pedigree 0.0721, pedigree (3,4,5,3,3)
  Literature value.The exchanges of the barge tanker manufacturing are derived from an assessment of one barge, with a load capacity of 2800t Bialonski (1990; Engelkamp (1993) as quoted in Maibach et al. (1999). This data was adjusted to model a barge tanker, representing the current average total capacity for a barge tanker (1200 t/vessel).
  References:
  Engelkamp P. (1993) Stellungnahme des Europäischen Entwicklungszentrums für die Binnenschifffahrt e.V. Duisburg zum Fragenkatalog für die öffentliche Anhörung der Enquete Komission " Schutz des Menschen und der Umwelt". Enquete Komission zum Thema "Mobilität - Darstellung, Bewertung und Optimierung von Stoffströmen., Bonn
  Maibach M., Peter D. and Seiler B. (1999) Ökoinventar Transporte: Grundlagen für den ökologischen Vergleich von Transportsystemen und den Einbezug von Transportsystemen in Ökobilanzen. Technischer Schlussbericht. In: Schweizerischer Nationalfonds zur Förderung der wissenschaftlichen Forschung (ed. SPP Umwelt M.). 2nd Edition. INFRAS, Zürich
  EcoSpold01Location=RER
  Uncertainty: literatures studies
  properties: carbon content, fossil 0.857143, wet mass 1 kg, dry mass 1 kg, heating value, net 42.47 MJ
  note on carbon content, fossil: Polyethylene is formed out of a huge amount of ethylene monomers (C2H4) (ecoinvent v2.2 report 11_II). MW=28 g/mol
- stone wool, packed: 3390 kg; source Bialonski W. 1990; lognormal variance with pedigree 0.0721, pedigree (3,4,5,3,3)
  EcoSpold01Location=CH
  Literature value.The exchanges of the barge tanker manufacturing are derived from an assessment of one barge, with a load capacity of 2800t Bialonski (1990; Engelkamp (1993) as quoted in Maibach et al. (1999). This data was adjusted to model a barge tanker, representing the current average total capacity for a barge tanker (1200 t/vessel).
  References:
  Engelkamp P. (1993) Stellungnahme des Europäischen Entwicklungszentrums für die Binnenschifffahrt e.V. Duisburg zum Fragenkatalog für die öffentliche Anhörung der Enquete Komission " Schutz des Menschen und der Umwelt". Enquete Komission zum Thema "Mobilität - Darstellung, Bewertung und Optimierung von Stoffströmen., Bonn
  Maibach M., Peter D. and Seiler B. (1999) Ökoinventar Transporte: Grundlagen für den ökologischen Vergleich von Transportsystemen und den Einbezug von Transportsystemen in Ökobilanzen. Technischer Schlussbericht. In: Schweizerischer Nationalfonds zur Förderung der wissenschaftlichen Forschung (ed. SPP Umwelt M.). 2nd Edition. INFRAS, Zürich
  Uncertainty: literatures studies
  properties: carbon content, fossil 0.015401, dry mass 1 kg, wet mass 1 kg
  note on carbon content, fossil: The chemical composition of the glass fibres used in the rock wool production is similar to the composition of naturally cooled volcano basalt and has a composition listed in Tab. 3.1 and 3.2 in ecoinvent v2.2 report 16, part XIV. Rock wool contains: a minimum of 96% mineral fibres,between 0.5 and 3.0 weight percent of phenolic resin depending on the specific product characteristics, and about 0.2 percent mineral oil (ecoinvent v2.2 report 16, part XIV). An average composition of 1.8% phenolic resin, 0.2% mineral oil, and 98% mineral fibres has been assumed and used to calculate C content of the rock wool
- aluminium, cast alloy: 188 kg; source Bialonski W. 1990; lognormal variance with pedigree 0.0721, pedigree (3,4,5,3,3)
  EcoSpold01Location=RER
  Literature value.The exchanges of the barge tanker manufacturing are derived from an assessment of one barge, with a load capacity of 2800t Bialonski (1990; Engelkamp (1993) as quoted in Maibach et al. (1999). This data was adjusted to model a barge tanker, representing the current average total capacity for a barge tanker (1200 t/vessel).
  References:
  Engelkamp P. (1993) Stellungnahme des Europäischen Entwicklungszentrums für die Binnenschifffahrt e.V. Duisburg zum Fragenkatalog für die öffentliche Anhörung der Enquete Komission " Schutz des Menschen und der Umwelt". Enquete Komission zum Thema "Mobilität - Darstellung, Bewertung und Optimierung von Stoffströmen., Bonn
  Maibach M., Peter D. and Seiler B. (1999) Ökoinventar Transporte: Grundlagen für den ökologischen Vergleich von Transportsystemen und den Einbezug von Transportsystemen in Ökobilanzen. Technischer Schlussbericht. In: Schweizerischer Nationalfonds zur Förderung der wissenschaftlichen Forschung (ed. SPP Umwelt M.). 2nd Edition. INFRAS, Zürich
  Uncertainty: literatures studies
  properties: wet mass 1 kg, dry mass 1 kg
- cast iron: 20700 kg; source Bialonski W. 1990; lognormal variance with pedigree 0.0721, pedigree (3,4,5,3,3)
  (same comment as for polyethylene, low density, granulate)
  properties: carbon content, fossil 0.04, wet mass 1 kg, dry mass 1 kg
  note on carbon content, fossil: Cast iron is made by remelting pig iron in small furnaces (e.g. cupola furnaces or electric arc furnaces) and poured into moulds to make castings. It usually contains 2% to 6% carbon (ecoinvent v2.2 report 10_partII). An average content of 4% was considered
- copper, cathode: 2640 kg; source Bialonski W. 1990; lognormal variance with pedigree 0.0721, pedigree (3,4,5,3,3)
  (same comment as for aluminium, cast alloy)
  properties: wet mass 1 kg, dry mass 1 kg
- steel, chromium steel 18/8, hot rolled: 4140 kg; source Bialonski W. 1990; lognormal variance with pedigree 0.0721, pedigree (3,4,5,3,3)
  (same comment as for polyethylene, low density, granulate)
  properties: dry mass 1 kg, wet mass 1 kg, carbon content, fossil 0.0008
  note on carbon content, fossil: Stainless steel model is the grade 304 steel (18/8 stainless, 18% chromium 8% nickel; max. 0.08% C)
- waste plastic, mixture: -2820 kg; lognormal variance with pedigree 0.2341, pedigree (3,4,5,3,5)
  Estimation based on material composition.
  EcoSpold01Location=CH
  Uncertainty: own estimate, based on material composition
  production volume 2820 kg
    (same comment as for waste emulsion paint)
  properties: heating value, net 30.79 MJ, water content 0.180638, dry mass 0.847 kg, wet mass 1 kg, carbon content, fossil 0.747344
  note on heating value, net: Value taken from the general comment of the treatment dataset.
  note on carbon content, fossil: C content in 1 kg DM was calculated using data in Tab A.2, ecoinvent v2.2 report 13_I
- electricity, medium voltage: 126000 kWh; source Frischknecht R. 1996; lognormal variance with pedigree 0.2461, pedigree (4,5,5,3,5)
  Estimation. Energy consumption in manufacturing was estimated as 50% of the cumulative energy of the used materials. The split of energies is 10% electricity and 90% heavy fuel oil Frischknecht et al. (1996).
  EcoSpold01Location=UCTE
  Uncertainty: literatures studies
- reinforcing steel: 318000 kg; source Bialonski W. 1990; lognormal variance with pedigree 0.0721, pedigree (3,4,5,3,3)
  (same comment as for aluminium, cast alloy)
  properties: dry mass 1 kg, wet mass 1 kg, carbon content, fossil 0.004
- cement, unspecified: 0 kg; source Bialonski W. 1990; pedigree (1,1,1,1,1)
  Literature value.The exchanges of the barge tanker manufacturing are derived from an assessment of one barge, with a load capacity of 2800t Bialonski (1990; Engelkamp (1993) as quoted in Maibach et al. (1999). This data was adjusted to model a barge tanker, representing the current average total capacity for a barge tanker (1200 t/vessel).
  References:
  Engelkamp P. (1993) Stellungnahme des Europäischen Entwicklungszentrums für die Binnenschifffahrt e.V. Duisburg zum Fragenkatalog für die öffentliche Anhörung der Enquete Komission " Schutz des Menschen und der Umwelt". Enquete Komission zum Thema "Mobilität - Darstellung, Bewertung und Optimierung von Stoffströmen., Bonn
  Maibach M., Peter D. and Seiler B. (1999) Ökoinventar Transporte: Grundlagen für den ökologischen Vergleich von Transportsystemen und den Einbezug von Transportsystemen in Ökobilanzen. Technischer Schlussbericht. In: Schweizerischer Nationalfonds zur Förderung der wissenschaftlichen Forschung (ed. SPP Umwelt M.). 2nd Edition. INFRAS, Zürich
  EcoSpold01Location=CH
  Uncertainty: literatures studies
  properties: dry mass 1 kg, wet mass 1 kg
- heat, district or industrial, other than natural gas: 3.876e6 MJ; lognormal variance with pedigree 0.2461, pedigree (4,5,5,3,5)
  Literatures studies
  EcoSpold01Location=RER
  Uncertainty: literatures studies
  properties: heating value, net 1 MJ
- alkyd paint, white, without solvent, in 60% solution state: 1880 kg; source Bialonski W. 1990; lognormal variance with pedigree 0.0721, pedigree (3,4,5,3,3)
  (same comment as for polyethylene, low density, granulate)
  properties: dry mass 1 kg, heating value, net 10.3 MJ, carbon content, fossil 0.140367, wet mass 1 kg, carbon content, non-fossil 0.199629
  note on carbon content, fossil: C content was calculated as an addition of C content in the raw materials.
- polyethylene, high density, granulate: 941 kg; source Bialonski W. 1990; lognormal variance with pedigree 0.0721, pedigree (3,4,5,3,3)
  (same comment as for polyethylene, low density, granulate)
  properties: heating value, net 42.47 MJ, wet mass 1 kg, dry mass 1 kg, carbon content, fossil 0.857143
- ceramic tile: 1320 kg; source Bialonski W. 1990; lognormal variance with pedigree 0.0721, pedigree (3,4,5,3,3)
  (same comment as for cement, unspecified)
  properties: dry mass 1 kg, wet mass 1 kg
- waste wood, untreated: -755 kg; lognormal variance with pedigree 0.3381, pedigree (5,5,5,3,5)
  (same comment as for waste plastic, mixture)
  production volume 755 kg
    (same comment as for waste emulsion paint)
  properties: water content 0.25, carbon content, non-fossil 0.48632, dry mass 0.8 kg, wet mass 1 kg, heating value, net 13.99 MJ
  note on carbon content, non-fossil: Tab A.4, ecoinvent v2.2 report 13_I. C content has been referred to 1 kg DM,
- glued laminated timber, average glue mix: 1.4 m3; source Bialonski W. 1990; lognormal variance with pedigree 0.0721, pedigree (3,4,5,3,3)
  (same comment as for polyethylene, low density, granulate)
  properties: wet mass 444 kg, heating value, net 5537.41 MJ, dry mass 404.4 kg, carbon content, non-fossil 0.441932, water content 0.0979228, carbon content, fossil 0.01791, price 298 EUR2005
- synthetic rubber: 565 kg; source Bialonski W. 1990; lognormal variance with pedigree 0.0721, pedigree (3,4,5,3,3)
  (same comment as for aluminium, cast alloy)
  properties: carbon content, fossil 0.871949, wet mass 1 kg, dry mass 1 kg, heating value, net 26.42 MJ
  note on carbon content, fossil: EPDM (Ethylene-propene-diene terpolymer) rubber is a terpolymer of ethylene, propene, and a diene with the residual unsaturated portion of the diene in the side chain (ecoinvent v2.2 report 7-part XX & Ullmann). Chemical formula (deduced from Evidences of Solvent-Induced Miscibility in Polychloroprene-co-Ethylene-Propene Diene Terpolymer Blends, Dubey et al., Journal of Applied Polymer Science, 2009, 111:1884–1891): C20H35
- waste emulsion paint: -752.764, -0.236271 kg (2 entries); lognormal variance with pedigree 0.2341, pedigree (3,4,5,3,5)
  (same comment as for waste emulsion paint)
  production volume 753 kg
- cement, unspecified: 4266.41, 73.5868 kg (2 entries); source Bialonski W. 1990; lognormal variance with pedigree 0.0721, pedigree (3,4,5,3,3)
  (same comment as for cement, unspecified)

## Emissions to nature
- NMVOC, non-methane volatile organic compounds, unspecified origin [air, unspecified]: 1130 kg; lognormal variance with pedigree 0.1121, pedigree (3,4,5,3,3)
  Estimation. For inland waterways vessels it's assumed that they are painted 10 times in their entire life span. NMVOC emissions are estimated based on a 60% solvent content in the used paint and assuming that the entire amount of solvents is released as NMVOC.
  Uncertainty: estimated from the used paint (60%B solvent as NMVOC)

## Sampling procedure
literature studies and own calculations.

## Extrapolations
This dataset has been extrapolated from year 2000 to the year of the calculation (2021). The uncertainty has been adjusted accordingly.

## Review by Niels Jungbluth 2004-04-02
Passed.

## Review by Roland Hischier 2011-09-23
Transfer of Documentation done.
