# polyvinylfluoride, film production

Dataset: EcoSpold 2, unit process
Geography: RoW
Time period: 2005-01-01 to 2021-12-31
Technology level: current
Classification: EcoSpold01Categories: chemicals/organics
Classification: ISIC rev.4 ecoinvent: 2220:Manufacture of plastics products
Synonyms: Tefzel; Tedlar
Tags: ConvertedDataset
Scenario: Business-as-Usual
System model: Allocation, cut-off by classification
Share of production covered: 50 %
Generated by: Niels Jungbluth
Published in: Jungbluth, N. 2007
Database: ecoinvent
isCopyrightProtected: true
accessRestrictedTo: 1

## General comment
Basic inventory based on cumulative data.
[This dataset was already contained in the ecoinvent database version 2. It was not individually updated during the transfer to ecoinvent version 3. Life Cycle Impact Assessment results may still have changed, as they are affected by changes in the supply chain, i.e. in other datasets. This dataset was generated following the ecoinvent quality guidelines for version 2. It may have been subject to central changes described in the ecoinvent version 3 change report (http://www.ecoinvent.org/database/ecoinvent-version-3/reports-of-changes/), and the results of the central updates were reviewed extensively. The changes added e.g. consistent water flows and other information throughout the database. The documentation of this dataset can be found in the ecoinvent reports of version 2, which are still available via the ecoinvent website. The change report linked above covers all central changes that were made during the conversion process.]

## Included activities end
Pre-products, energy use, infrastructure, some air emissions and transports. No full information on all air and water emissions available.

## Geography
Production plant of DuPont in the United States.

## Technology
Fluoropolymer chemistry.

## Time period
Time of publications.

## Reference product
- polyvinylfluoride, film: 1 kg; By-product classification allocatable product; CPC 36330: Plates, sheets, film, foil and strip, of plastics, not self-adhesive, non-cellular and not reinforced, laminat[…]; CAS 24981-14-4
  EcoSpold01Location=US
  production volume 2.39213e6 kg
    Extrapolated as 4 times the US production. According to Long-Chain Perfluorinated Chemicals (PFCs), Action Plan, U.S. Environmental Protection Agency, 2009, Accessed in http://www.epa.gov/oppt/existingchemicals/pubs/pfcs_action_plan1230_09.pdf the 2011.05.06, the United States accounted for between 25 and 50 percent of the world consumption of fluoropolymers in 2007.
  property price 30.5659 EUR2005
    Calculated based on inputs: The price of the product has been calculated as a sum of the values of the material and energy inputs for this product. This value is therefore a rough estimation. It may underestimate the real price since there are additional expenses when producing any product. These expences can include for example labour costs, treatment of waste materials and profit for the producer. Please consider carefully whether this level of data quality is acceptable for your application.
  property heating value, net 23.7 MJ
    LHV is calculated based on the elemental composition of the substance. Based on the name of the substance, the chemical formula of the substance is assumed to be: C2H3F
  property carbon content 0.521739
    carbon content on a dry matter basis (reserved; not for manual entry)
  properties: carbon content, fossil 0.521739, water in wet mass 0 kg, dry mass 1 kg, water content 0, carbon content, non-fossil 0, wet mass 1 kg, carbon allocation 0.521739 kg

## Inputs from technosphere
- titanium dioxide: 0.24843 kg; lognormal variance with pedigree 0.1226, pedigree (5,3,5,5,1)
  Rough estimation based on cumulative data, Krieger et al. 2006
  EcoSpold01Location=RER
  Uncertainty: Rough estimation based on cumulative data, Krieger et al. 2006
  properties: dry mass 1 kg, wet mass 1 kg
- polyvinylfluoride, dispersion: 0.8042 kg; lognormal variance with pedigree 0.1226, pedigree (5,3,5,5,1)
  Rough estimation based on cumulative data (Krieger et al., 2006). Based on the production process description (page 140 in Jungbluth et al., 2009), the polyvinylfluoride, dispersion is assumed to be produced on the same site.
  References:
  Krieger T. and Roekens-Guibert H. (2006) Environmental impacts of Tedlar(R) PVF film for use in photovoltaic modules. In proceedings from: 21th European Photovoltaic Solar Energy Conference, Dresden, DE, 4-8.9.2006, retrieved from:
  http://www2.dupont.com/Photovoltaics/en_US/news_events/event20060904.html.
  Jungbluth N., Stucki M, and Frischknecht R. (2009) Photovoltaics. In Dones, R. (Ed.) et al., Sachbilanzen von Energiesystemen: Grundlagen für den ökologischen Vergleich von Energiesystemen und den Einbezug von Energiesystemen in Ökobilanzen für die Schweiz. ecoinvent report No. 6-XII, Swiss Centre for Life Cycle Inventories, Dübendorf, CH, 2009.
  EcoSpold01Location=US
  Uncertainty: Rough estimation based on cumulative data, Krieger et al. 2006
  properties: carbon content, fossil 0.521739, dry mass 1 kg, heating value, net 23.7 MJ, wet mass 1 kg
- electricity, medium voltage: 0 kWh; pedigree (1,1,1,1,1)
  Rough estimation based on cumulative data, Krieger et al. 2006
  EcoSpold01Location=US
  Uncertainty: Rough estimation based on cumulative data, Krieger et al. 2006
- heat, district or industrial, natural gas: 0 MJ; pedigree (1,1,1,1,1)
  EcoSpold01Location=RER
  Rough estimation based on cumulative data, Krieger et al. 2006
  Uncertainty: Rough estimation based on cumulative data, Krieger et al. 2006
  properties: heating value, net 1 MJ
- chemical factory, organics: 4e-10 unit; lognormal variance with pedigree 0.4226, pedigree (5,3,5,5,1)
  (same comment as for heat, district or industrial, natural gas)
- electricity, medium voltage: 0.0363957, 0.00697912, 0.160252, 0.117165, 1.70406, 0.540161, 0.240188 kWh (7 entries); lognormal variance with pedigree 0.1226, pedigree (5,3,5,5,1)
  (same comment as for electricity, medium voltage)
- heat, district or industrial, natural gas: 1.15212, 27.63 MJ (2 entries); lognormal variance with pedigree 0.1226, pedigree (5,3,5,5,1)
  (same comment as for heat, district or industrial, natural gas)

## Sampling procedure
Publication of cumulative data.

## Extrapolations
Desaggregation of published cumulative results for global warming potential and cumulative energy demand. This dataset has been copied from an original dataset covering the geography US. The uncertainty has been adjusted accordingly.

## Review by Roberto Dones 2007-09-13
Passed.
none
