# cottonseed production, for sowing

Dataset: EcoSpold 2, unit process
Geography: US
Time period: 1997-01-01 to 2021-12-31
Technology level: current
Classification: ISIC rev.4 ecoinvent: 0164:Seed processing for propagation
Classification: EcoSpold01Categories: agricultural means of production/seed
Tags: ConvertedDataset
Scenario: Business-as-Usual
System model: Allocation, cut-off by classification
Share of production covered: 100 %
Generated by: Thomas Kägi
Published in: Nemecek, T. 2007
Database: ecoinvent
isCopyrightProtected: true
accessRestrictedTo: 1

## General comment
Inventory refers to 1kg cotton seed, at regional storehouse.
[This dataset was already contained in the ecoinvent database version 2. It was not individually updated during the transfer to ecoinvent version 3. Life Cycle Impact Assessment results may still have changed, as they are affected by changes in the supply chain, i.e. in other datasets. This dataset was generated following the ecoinvent quality guidelines for version 2. It may have been subject to central changes described in the ecoinvent version 3 change report (http://www.ecoinvent.org/database/ecoinvent-version-3/reports-of-changes/), and the results of the central updates were reviewed extensively. The changes added e.g. consistent water flows and other information throughout the database. The documentation of this dataset can be found in the ecoinvent reports of version 2, which are still available via the ecoinvent website. The change report linked above covers all central changes that were made during the conversion process.]

## Included activities start
The activity starts after the harvest of cotton seed.

## Included activities end
The seed is processed at the processing centre, treated (pre-cleaning, cleaning, eventually drying, chemical dressing and bag filling), stored and afterwards transported to the regional storage centre.

## Geography
Refers to an average production in the USA

## Technology
conventional production typical for the country

## Reference product
- cottonseed, for sowing: 1 kg; CPC 01431: Cottonseed, seed for planting; By-product classification allocatable product
  EcoSpold01Location=US
  production volume 1.61e8 kg
    Data for Seeds in FAOSTAT 2005, accessed 2011.05.24
  property price 0.151257 EUR2005
    Calculated based on inputs: The price of the product has been calculated as a sum of the values of the material and energy inputs for this product. This value is therefore a rough estimation. It may underestimate the real price since there are additional expenses when producing any product. These expences can include for example labour costs, treatment of waste materials and profit for the producer. Please consider carefully whether this level of data quality is acceptable for your application.
  property energy content 21.761 MJ; name energy_content
    as gross calorific value (when relevant)
  property dry mass 0.94 kg; name DM
  property water in wet mass 0.06 kg; name WWM; = 1-DM
  property carbon content, non-fossil 0.49828; name C_content_non_fossil
    biogene carbon content on a dry matter basis
  property carbon content, fossil 0; name C_content_fossil
    fossil carbon content on a dry matter basis
  property water content 0.0638298; name water_content; = (1-DM)/DM
  property wet mass 1 kg; name WM
  property carbon content 0.49828
    carbon content on a dry matter basis (reserved; not for manual entry)
  properties: carbon allocation 0.468383 kg

## Inputs from technosphere
- building, multi-storey: 2e-5 m3; lognormal variance with pedigree 0.0406, pedigree (2,1,5,1,1)
  EcoSpold01Location=RER
  See chapter 'Seed Production' in "01_crop production - yields & inputs US_v1.0.pdf" - pdf-document on the dedicated talk page of ecoinvent (www.ecoinvent.org/documentation)
- electricity, low voltage: 0.058 kWh; lognormal variance with pedigree 0.0406, pedigree (2,1,5,1,1)
  See chapter 'Seed Production' in "01_crop production - yields & inputs US_v1.0.pdf" - pdf-document on the dedicated talk page of ecoinvent (www.ecoinvent.org/documentation)
  EcoSpold01Location=US
- diphenylether-compound: 0.0001 kg; lognormal variance with pedigree 0.0506, pedigree (2,1,5,1,1)
  (same comment as for building, multi-storey)
  properties: carbon content, fossil 0.560061, wet mass 1 kg, dry mass 1 kg
  note on carbon content, fossil: C content of diphenylether-compounds was calculated after the C content of thepesticides aclonifen and diflufenican classified as diphenylether-compound in Tab 2.25 of Sutter 2010
- packaging, for pesticides: 0.0002 kg; lognormal variance with pedigree 0.0912, pedigree (4,3,5,5,4)
  Total amount of active substance/s of pesticides needed for the production of cotton seed, for sowing is calculated to be circa 1.00E-04 kg. Pesticide/s used in this dataset is/are: 'diphenylether-compound'. The total amount of active substance/s is doubled in order to account for the packaging of the dilluted product of pesticide/s that is/are applied. Therefore, 2.00E-04 kg of packaging for pesticides is justified with this exchange.
  properties: heating value, net 25.97 MJ, carbon content, fossil 0.85714, wet mass 1 kg, price 0.0642 EUR2005, dry mass 1 kg
- cottonseed: 1 kg; lognormal variance with pedigree 0.0406, pedigree (2,1,5,1,1)
  (same comment as for electricity, low voltage)
  properties: wet mass 1 kg, carbon content, non-fossil 0.475, water content 0.0834236, dry mass 0.923 kg
  note on carbon content, non-fossil: Biogenic carbon content of vegetation on a dry mass basis (47.5% DM) derived from FAOSTAT. Reference: http://www.fao.org/forestry/17111/en

## Inputs from nature
- Transformation, to industrial area [natural resource, land]: 4e-6 m2; lognormal variance with pedigree 0.1606, pedigree (2,1,5,1,1)
  See chapter 'Seed Production' in "01_crop production - yields & inputs US_v1.0.pdf" - pdf-document on the dedicated talk page of ecoinvent (www.ecoinvent.org/documentation)
- Occupation, industrial area [natural resource, land]: 0.0002 m2*year; lognormal variance with pedigree 0.0806, pedigree (2,1,5,1,1)
  (same comment as for Transformation, to industrial area)
- Occupation, construction site [natural resource, land]: 8e-6 m2*year; lognormal variance with pedigree 0.0806, pedigree (2,1,5,1,1)
  (same comment as for Transformation, to industrial area)
- Transformation, from unspecified [natural resource, land]: 4e-6 m2; lognormal variance with pedigree 0.1606, pedigree (2,1,5,1,1)
  (same comment as for Transformation, to industrial area)

## Sampling procedure
Data come from rape seed inventory and own estimation for transports.

## Extrapolations
This dataset has been extrapolated from year 2006 to the year of the calculation (2021). The uncertainty has been adjusted accordingly.

## Review by Roberto Dones 2010-02-07
Passed.
none

## Review by Christian Bauer 2012-01-19
passed
