# green asparagus production

Dataset: EcoSpold 2, unit process
Geography: GLO
Time period: 2010-01-01 to 2021-12-31
Technology level: current
Classification: ISIC rev.4 ecoinvent: 0113:Growing of vegetables and melons, roots and tubers
Scenario: Business-as-Usual
System model: Allocation, cut-off by classification
Generated by: Franziska Stössel
Published in: Stoessel, Franziska; 2012
Database: ecoinvent
isCopyrightProtected: false
accessRestrictedTo: 1

## General comment
This dataset represents green asparagus production according to the Integrated Production standard in CH.
Yield: 3 t / ha.
Duration of one cropping cycle: 12 months, assuming permanent occupation during 10 years.
Field production.
The LCA study, from which this LCI has been derived, contains detailed descriptions of the system boundaries and the data sources used (Stoessel et al. 2012). The publication is published and freely available with comprehensive supporting information:
http://pubs.acs.org/doi/pdf/10.1021/es2030577
Franziska Stoessel, Ronnie Juraske, Stephan Pfister, Stefanie Hellweg. (2012) Life Cycle Inventory and Carbon and Water FoodPrint of Fruits and Vegetables: Application to a Swiss Retailer. Environmental Science & Technology 6(46) 3253-3262.
This activity was adapted to include the global average land use change (LUC) emissions according 2nd edition of the Quantis-modified tool developed by Blonk Consultants 'WFLDB-adapted-Blonk 2014 direct-land-use-change-assessment-tool_2015-05-18a.xlsx', tab. 'Country & land use unknown'. The size of the emission depends on (i) the relative crop expansion in all countries of the crop during the last 20 years and (ii) the corresponding, country specific land transformations. The current results are based on the average FAOSTAT data (harvested area) of 2009-2011 and 1989-1991. The weighted average is used which takes into account relative difference in crop expansion into primary forest, secondary forest, grassland, perennial and annual land.

## Included activities start
From seedling production.

## Included activities end
This activity ends with harvest and storage.
The dataset includes a storage period of 0.05 month and it's use of electricity. And the greenhouse heating energy for the seedling production. The pesticide inputs are classified according to their chemical classes and the emmssions are assigned to the soil (100%). Mercury emissions are neglected due to a lack of data while other heavy metal emissions are included.
The dataset doesn't include infrastructure for production and storage facilities. No transports for agricultural means of production from the regional storage to the farm are included.

## Technology
Integrated Production

## Parameters
- fraction, irrigation water, to ground water: 0.8 dimensionless; name fraction_IW_to_ground_water; lognormal variance with pedigree 0.0886, pedigree (4,3,1,1,4)
  Literature value (Doll, 2011) cross referenced with expert opinion.
- fraction, irrigation water to surface water: 0.2 dimensionless; name fraction_IW_to_surface_water; lognormal variance with pedigree 0.0886, pedigree (4,3,1,1,4)
  Literature value (Doll, 2011) cross referenced with expert opinion.
- fraction, tap water, to air: 0.15 dimensionless; name fraction_TW_to_air; = fraction_PW_to_air; lognormal variance with pedigree 0.092025, pedigree (4,4,3,2,4)
  Calculated value. See comment in the other parametres present in this dataset. Tap water is considered to be always used as process water, thus process water fractions to air are applied to all tap water input flows to calculate the amount of water consumed in the processes.
- fraction, irrigation water, to air: 0.586986 dimensionless; name fraction_IW_to_air; lognormal variance with pedigree 0.0409, pedigree (2,2,2,1,1)
  Literature value (Siebert, 2010) (Vionnet, S., Quantis Water Database - Technical Report, 2012).
- fraction, process water, to air: 0.15 dimensionless; name fraction_PW_to_air; lognormal variance with pedigree 0.092025, pedigree (4,4,3,2,4)
  Literature value. In case when no industry/process specific data are available, default evaporation fraction value is used. This value is 15% and is based on literature (Statistics Canada, 2007 & Shaffer, K.H., 2008, Consumptive water use in the Great Lakes Basin, USGS & Shiklomanov, 2003, World Water Resources at the Beginning of the 21st Century) and has been approved by an expert.

## Reference product
- green asparagus: 1 kg; By-product classification allocatable product; CPC 01211: Asparagus
  production volume 2.66451e9 kg; = 7836788500*0.34
    Estimated value. Global asparagus production 7836788500kg (Source: FAOSTAT. Average, 2009-2012). 66% is assumed to be white asparagus and 34% is assumed to be green asparagus (expert judgement, Agroscope http://www.agroscope.admin.ch/org/index.html?lang=en).
  property price 2.57 EUR2005
    Calculated from the trade statistics for the year 2005 published by the UN (COMTRADE database, accessed 20151105) as an average of 5 biggest importers of asparagus in the world; USA, DE, JP, CA and FR. Comtrade cathegory: 70920: Asparagus, fresh or chilled.
  property carbon content 0.03149
    carbon content on a dry matter basis (reserved; not for manual entry)
  properties: carbon content, non-fossil 0.03149, water content 13.0845, wet mass 1 kg, water in wet mass 0.929 kg, dry mass 0.071 kg, carbon content, fossil 0, carbon allocation 0.00223579 kg

## Inputs from technosphere
- ammonium nitrate: 0 kg; source Stoessel, Franziska; 2012; pedigree (1,1,1,1,1)
  The exchange has been updated from 'ammonium nitrate, as N' into 'ammonium nitrate' and therefore its amount has been scaled (multiplied) from 0.0415 kg by 2.8573 kg of 'ammonium nitrate' per kg of 'ammonium nitrate, as N'.
  properties: dry mass 1 kg, wet mass 1 kg
- packaging, for fertilisers: 0.183 kg; lognormal variance with pedigree 0.0592, pedigree (4,3,4,5,4)
  Total amount of active substance/s of fertilisers needed for the production of 'green asparagus' is calculated to be circa 9.15E-02 kg. Fertiliser/s used in this dataset is/are: 'ammonium nitrate, as N', 'phosphate fertiliser, as P2O5', 'potassium sulfate, as K2O'. The total amount of active substance/s is doubled in order to account for the packaging of the dilluted product of fertiliser/s that is/are applied. Therefore, 1.83E-01 kg of packaging for fertilisers is justified with this exchange.
  properties: heating value, net 25.01 MJ, carbon content, fossil 0.825301, dry mass 1 kg, wet mass 1 kg, price 0.0642 EUR2005
  note on carbon content, fossil: Considering a chemical formula (C2H4)n for polyethylene, carbon content-fossil is calculated to be 0.856286 kg of Carbon per kg of dry mass.
- fertilising, by broadcaster: 0.00596 ha; source Stoessel, Franziska; 2012; lognormal variance with pedigree 0.0105, pedigree (2,3,4,3,2)
  Fertilizing by broadcaster is used as a proxy for all the machinery work done in horticultural processes.
- packaging, for pesticides: 0.0047582 kg; lognormal variance with pedigree 0.0592, pedigree (4,3,4,5,4)
  Total amount of active substance/s of pesticides needed for the production of green asparagus is calculated to be circa 2.38E-03 kg. Pesticide/s used in this dataset is/are: '[sulfonyl]urea-compound', 'benzimidazole-compound', 'diphenylether-compound', 'nitrile-compound', 'pesticide, unspecified'. The total amount of active substance/s is doubled in order to account for the packaging of the dilluted product of pesticide/s that is/are applied. Therefore, 4.76E-03 kg of packaging for pesticides is justified with this exchange.
  properties: price 0.0642 EUR2005, dry mass 1 kg, heating value, net 25.97 MJ, carbon content, fossil 0.85714, wet mass 1 kg
- nitrile-compound: 0.0004 kg; = nit1; source Stoessel, Franziska; 2012; lognormal variance with pedigree 0.0453, pedigree (3,4,5,3,2)
  sum of compounds in this family
  properties: wet mass 1 kg, dry mass 1 kg, carbon content, fossil 0.344995
- irrigation: 0.013 m3; name water_irrigation_input; source Stoessel, Franziska; 2012; lognormal variance with pedigree 0.0198, pedigree (2,4,4,4,3)
  properties: wet mass 1000 kg, dry mass 0.11 kg, water content 9089.91
- heat, central or small-scale, other than natural gas: 0.042 MJ; source Stoessel, Franziska; 2012; lognormal variance with pedigree 0.0105, pedigree (2,3,4,3,2)
  properties: heating value, net 1 MJ
- tap water: 0.4 kg; name tap_water_input; source Stoessel, Franziska; 2012; lognormal variance with pedigree 0.0105, pedigree (2,3,4,3,2)
  properties: dry mass 0.000337476 kg, carbon content, fossil 0.00178991, water content 2962.17, wet mass 1 kg
  note on carbon content, fossil: Bicarbonate content is 2.93 mol/m3. CO2 content is 0.1 mol/m3 (ecoinvent v2.2 report 8, Tab 93.1).
- inorganic phosphorus fertiliser, as P2O5: 0 kg; source Stoessel, Franziska; 2012; pedigree (1,1,1,1,1)
  properties: dry mass 1 kg, wet mass 1 kg
- benzimidazole-compound: 0.0004 kg; source Stoessel, Franziska; 2012; lognormal variance with pedigree 0.0105, pedigree (2,3,4,3,2)
  properties: carbon content, fossil 0.529668, wet mass 1 kg, dry mass 1 kg
  note on carbon content, fossil: C content estimated as an average of that of the pesticides Carbendazim, prochloraz and ethofumesate (Sutter 2010)
- [sulfonyl]urea-compound: 0.000665 kg; = sulfo1; source Stoessel, Franziska; 2012
  property carbon content, fossil 0.540853; name C_content_fossil
  property water in wet mass 0 kg; name WWM
  property water content 0; name water_content
  property dry mass 1 kg; name DM
  property wet mass 1 kg; name WM
  property carbon content, non-fossil 0; name C_content_non_fossil
- diphenylether-compound: 8.95e-5 kg; = diphe1; source Stoessel, Franziska; 2012; lognormal variance with pedigree 0.0453, pedigree (3,4,5,3,2)
  sum of compounds in this family
  properties: carbon content, fossil 0.560061, dry mass 1 kg, wet mass 1 kg
- potassium sulfate: 0 kg; source Stoessel, Franziska; 2012; pedigree (1,1,1,1,1)
  The exchange has been updated from 'potassium sulfate, as K2O' into 'potassium sulfate' and therefore its amount has been scaled (multiplied) from 0.04 kg by 1.85 kg of 'potassium sulfate' per kg of 'potassium sulfate, as K2O'.
  properties: dry mass 1 kg, wet mass 1 kg
- pesticide, unspecified: 0.0008246 kg; = unsp1+unsp2+unsp3+unsp4; source Stoessel, Franziska; 2012; lognormal variance with pedigree 0.0105, pedigree (2,3,4,3,2)
  sum of compounds in this family
  properties: dry mass 1 kg, carbon content, fossil 0.486978, wet mass 1 kg
  note on carbon content, fossil: Mean of C content in all pesticides whose formula has been documented in Sutter 2010
- electricity, low voltage: 0.00222 kWh; source Stoessel, Franziska; 2012; lognormal variance with pedigree 0.0105, pedigree (2,3,4,3,2)
- ammonium nitrate: 0.029379, 0.0203754, 0.0156607, 0.0531636 kg (4 entries); source Stoessel, Franziska; 2012; lognormal variance with pedigree 0.0105, pedigree (2,3,4,3,2)
  (same comment as for ammonium nitrate)
- inorganic phosphorus fertiliser, as P2O5: 0.000373286, 3.79298e-5, 0.00135466, 1.89201e-5, 2.66449e-6, 7.32846e-5, 2.70927e-6, 4.37177e-5, 2.4417e-5, 8.96634e-5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 kg (30 entries); source Stoessel, Franziska; 2012; lognormal variance with pedigree 0.0105, pedigree (2,3,4,3,2)
- potassium sulfate: 0.0128757, 0.0611228 kg (2 entries); source Stoessel, Franziska; 2012; lognormal variance with pedigree 0.0105, pedigree (2,3,4,3,2)
  (same comment as for potassium sulfate)

## Inputs from nature
- Transformation, from annual crop, non-irrigated, intensive [natural resource, land]: 3.33 m2; source Stoessel, Franziska; 2012; lognormal variance with pedigree 0.0119, pedigree (2,3,4,3,2)
- Transformation, to annual crop, non-irrigated, intensive [natural resource, land]: 3.33 m2; source Stoessel, Franziska; 2012; lognormal variance with pedigree 0.0119, pedigree (2,3,4,3,2)
- Peat, in ground [natural resource, biotic]: 0.147 kg; source Stoessel, Franziska; 2012; lognormal variance with pedigree 0.0105, pedigree (2,3,4,3,2)
- Occupation, annual crop, non-irrigated, intensive [natural resource, land]: 3.33 m2*year; source Stoessel, Franziska; 2012; lognormal variance with pedigree 0.0119, pedigree (2,3,4,3,2)
- Energy, gross calorific value, in biomass [natural resource, biotic]: 1.67214 MJ; lognormal variance with pedigree 0.0099, pedigree (2,3,4,3,1)
  Calculated value based on literature. The gross energy is calculated using following formula; gross energy (MJ) = crude protein (kg)*23.04 (MJ/kg)+crude fat (kg)*38.96 (MJ/kg)+crude fibre (kg)*17.95 (MJ/kg)+carbohydrates (kg)*17.17 (MJ/kg) (formula based on expert opinion, cross referenced; Diepenbrock, 2012, Energy Balance in Crop Production). The product composition of fruits and vegetables is extracted from the USDA National Nutrient Database for Standard Reference (http://ndb.nal.usda.gov/, accessed 20131114). Crude protein (g)= 22, crude fat (g)= 1.2, crude fibre (g)= 21, ash (g)= 5.8, water (g)= 932.2, carbohydrates (g)= 38.8. The gross energy per kg of DM is 22.49MJ. The calculated gross energy per kg of reference product is thus 1.67MJ.

## Emissions to nature
- Nitrogen oxides [air, non-urban air or from high stacks]: 0.000170503 kg; source Thomas Nemecek 2011; lognormal variance with pedigree 0.0747, pedigree (3,4,5,3,2)
- Fluazifop-P-butyl [soil, agricultural]: 8.95e-5 kg; name diphe1; source Stoessel, Franziska; 2012; lognormal variance with pedigree 0.0777, pedigree (3,4,5,3,2)
- Diuron [soil, agricultural]: 0.000665 kg; name sulfo1; source Stoessel, Franziska; 2012; lognormal variance with pedigree 0.0777, pedigree (3,4,5,3,2)
- Water [water, ground-]: 0.00429535 m3; name water_to_water_ground; = water_irrigation_input*(1-fraction_IW_to_air)*fraction_IW_to_ground_water; lognormal variance with pedigree 0.0966, pedigree (4,3,4,1,4)
  Calculated value. See the parameters and their comments to understand the calculation.
  property fraction, origin: fresh water 1; name fraction_origin_fresh_water_Wgw
  property fraction, origin: salt water 0; name fraction_origin_salt_water_Wgw
  property fraction, origin: unspecified 0; name fraction_origin_unspecified_Wgw
- Water [water, surface water]: 0.00107384 m3; name water_to_water_surface; = water_irrigation_input*(1-fraction_IW_to_air)*fraction_IW_to_surface_water; lognormal variance with pedigree 0.0966, pedigree (4,3,4,1,4)
  Calculated value. See the parameters and their comments to understand the calculation.
  property fraction, origin: fresh water 1; name fraction_origin_fresh_water_Wsw
  property fraction, origin: salt water 0; name fraction_origin_salt_water_Wsw
- Dinitrogen monoxide [air, non-urban air or from high stacks]: 0.000811918 kg; source Thomas Nemecek 2011; lognormal variance with pedigree 0.0747, pedigree (3,4,5,3,2)
- Nitrate [water, ground-]: 0.0551357 kg; source Thomas Nemecek 2011; lognormal variance with pedigree 0.0847, pedigree (3,4,5,3,2)
- Iprodion [soil, agricultural]: 0.0001335 kg; source Stoessel, Franziska; 2012; lognormal variance with pedigree 0.0777, pedigree (3,4,5,3,2)
- Nickel [soil, agricultural]: 1.051e-6 kg; source Thomas Nemecek 2011; lognormal variance with pedigree 0.0847, pedigree (3,4,5,3,2)
- Carbon dioxide, from soil or biomass stock [air, non-urban air or from high stacks]: 0.0339079 kg; normal variance with pedigree 0.5452, pedigree (3,3,5,5,2)
  Global average LUC emissions according 2nd edition of the Quantis-modified tool developed by Blonk Consultants 'WFLDB-adapted-Blonk 2014 direct-land-use-change-assessment-tool_2015-05-18a.xlsx', tab. 'Country & land use unknown'. The emission are based on the relative change in production areas in all countries for a given crop. The weighted average is used which takes into acount relative difference in crop expansion into primary forest, secondary forest, grassland, perennial and annual land.
  Uncertainty: Uncertainty estimated based on IPCC 2006
- Piperonyl butoxide [soil, agricultural]: 9e-6 kg; name unsp1; source Stoessel, Franziska; 2012; lognormal variance with pedigree 0.0777, pedigree (3,4,5,3,2)
- Copper [soil, agricultural]: -3.128e-6 kg; source Thomas Nemecek 2011
- Mancozeb [soil, agricultural]: 0.00125 kg; source Stoessel, Franziska; 2012; lognormal variance with pedigree 0.0777, pedigree (3,4,5,3,2)
- Water [air, unspecified]: 0.00769082 m3; name water_to_air_unspecified; = (tap_water_input/1000)*fraction_TW_to_air+water_irrigation_input*fraction_IW_to_air; lognormal variance with pedigree 0.0487, pedigree (2,2,4,1,1)
  Calculated value based on literature values and expert opinion. See comments in the parametres' comment field.
  property fraction, origin: salt water 0; name fraction_origin_salt_water
  property fraction, origin: unspecified 0; name fraction_origin_unspecified
  property fraction, origin: fresh water 1; name fraction_origin_fresh_water
- Pyrethrin [soil, agricultural]: 1e-5 kg; name unsp2; source Stoessel, Franziska; 2012; lognormal variance with pedigree 0.0777, pedigree (3,4,5,3,2)
- Lead [soil, agricultural]: 4.98789e-6 kg; source Thomas Nemecek 2011; lognormal variance with pedigree 0.0847, pedigree (3,4,5,3,2)
- Chromium [soil, agricultural]: -3.36255e-6 kg; source Thomas Nemecek 2011
- Chlorothalonil [soil, agricultural]: 0.0004 kg; name nit1; source Stoessel, Franziska; 2012; lognormal variance with pedigree 0.0777, pedigree (3,4,5,3,2)
- Ammonia [air, non-urban air or from high stacks]: 0.00100786 kg; source Thomas Nemecek 2011; lognormal variance with pedigree 0.0527, pedigree (3,4,5,3,2)
- Terbacil [soil, agricultural]: 0.0008 kg; name unsp4; source Stoessel, Franziska; 2012; lognormal variance with pedigree 0.0777, pedigree (3,4,5,3,2)
- Cadmium [soil, agricultural]: 4.94005e-7 kg; source Thomas Nemecek 2011; lognormal variance with pedigree 0.0847, pedigree (3,4,5,3,2)
- Rotenone [soil, agricultural]: 5.6e-6 kg; name unsp3; source Stoessel, Franziska; 2012; lognormal variance with pedigree 0.0777, pedigree (3,4,5,3,2)
- Phosphate [water, ground-]: 7e-5 kg; source Stoessel, Franziska; 2012; lognormal variance with pedigree 0.0847, pedigree (3,4,5,3,2)
- Phosphorus [water, surface water]: 8.17e-5 kg; source Stoessel, Franziska; 2012; lognormal variance with pedigree 0.0847, pedigree (3,4,5,3,2)
- Zinc [soil, agricultural]: 1.39781e-5 kg; source Thomas Nemecek 2011; lognormal variance with pedigree 0.0847, pedigree (3,4,5,3,2)

## Sampling procedure
The LCI is based on green asparagus production cost tables from Switzerland which is well representative for an Integrated Production in Switzerland. Most probably it is representative for productions in industrialized countries or farms which produces similarly.
Please refer to Stoessel et al. (2012) for more information: http://pubs.acs.org/doi/pdf/10.1021/es2030577
Franziska Stoessel, Ronnie Juraske, Stephan Pfister, Stefanie Hellweg. (2012) Life Cycle Inventory and Carbon and Water FoodPrint of Fruits and Vegetables: Application to a Swiss Retailer. Environmental Science & Technology 6(46) 3253-3262.

## Extrapolations
This dataset has been extrapolated from year 2010 to the year of the calculation (2021). The uncertainty has been adjusted accordingly.

## Review by Bo Weidema 2011-12-31
Production volume too large. Infrastructure missing.

## Review by Emilia Moreno Ruiz 2015-10-27
PV adjusted
