# waste preparation facility construction

Dataset: EcoSpold 2, unit process
Geography: RoW
Time period: 2000-01-01 to 2021-12-31
Technology level: current
Classification: ISIC rev.4 ecoinvent: 4290:Construction of other civil engineering projects
Scenario: Business-as-Usual
System model: Allocation, cut-off by classification
Generated by: Thomas Kägi
Published in: Kägi T. 2017
Database: ecoinvent
isCopyrightProtected: true
accessRestrictedTo: 1

## General comment
This dataset is a copy of the regional dataset CH.

## Included activities start
Service is starting with the components used for the building

## Included activities end
This module includes all processes of the production of the facility. Machinery infrastructure is excluded

## Allocation
no allocation involved

## Reference product
- waste preparation facility: 1 unit; By-product classification allocatable product; CPC 53290: Other civil engineering works
  production volume 114.861 unit
    Calculated global production volume (PV) based on estimate of the regional production volume for Switzerland (1 unit per year). The PV of the global activity has been extrapolated using the nominal GDP of 2000-2014 (source: United Nations, http://data.un.org/Glossary.aspx?q=GDP+%28current+US%24%29, accessed 20130726 and 20130312).
  properties: price 2.2322e7 EUR2005, lifetime capacity [kg] 5e8 kg, lifetime 50 year

## Inputs from technosphere
- building, multi-storey: 2500 m3; lognormal variance with pedigree 0.2106, pedigree (5,5,5,5,5)
- reinforcing steel: 13200 kg; lognormal variance with pedigree 0.2106, pedigree (5,5,5,5,5)
  properties: wet mass 1 kg, carbon content, fossil 0.004, dry mass 1 kg
- conveyor belt: 200 m; lognormal variance with pedigree 0.2106, pedigree (5,5,5,5,5)
- waste concrete, not reinforced: 0 kg; pedigree (1,1,1,1,1)
  production volume 0 kg
    (same comment as for waste preparation facility)
  properties: wet mass 1 kg, dry mass 1 kg
- concrete, normal: 0 m3; pedigree (1,1,1,1,1)
  properties: dry mass 2190 kg, water content 0.086758, wet mass 2380 kg
- industrial machine, heavy, unspecified: 154000 kg; lognormal variance with pedigree 0.2106, pedigree (5,5,5,5,5)
- waste reinforced concrete: 0 kg; pedigree (1,1,1,1,1)
  production volume 0 kg
    (same comment as for waste preparation facility)
  properties: dry mass 0.99418 kg, wet mass 1 kg, water content 0.00585407
- building, hall: 1670 m2; lognormal variance with pedigree 0.2106, pedigree (5,5,5,5,5)
- waste concrete, not reinforced: -3621.07, -51678.9 kg (2 entries); lognormal variance with pedigree 0.2106, pedigree (5,5,5,5,5)
  production volume 6.35184e6 kg
- concrete, normal: 1.94733, 0.202909, 1.64269, 0.924015, 3.91295, 0.131981, 77.3381 m3 (7 entries); lognormal variance with pedigree 0.2106, pedigree (5,5,5,5,5)
- waste reinforced concrete: -10084, -143916 kg (2 entries); lognormal variance with pedigree 0.2106, pedigree (5,5,5,5,5)
  production volume 1.76887e7 kg

## Inputs from nature
- Occupation, industrial area [natural resource, land]: 1.875e6 m2*year; lognormal variance with pedigree 0.2106, pedigree (5,5,5,5,5)
- Transformation, from unspecified [natural resource, land]: 37500 m2; lognormal variance with pedigree 0.2106, pedigree (5,5,5,5,5)
- Transformation, to industrial area [natural resource, land]: 37510 m2; lognormal variance with pedigree 0.2106, pedigree (5,5,5,5,5)

## Sampling procedure
High uncertainty. Uncertainty estimation according to the pedigree matrix

## Review by Ivan Muñoz Ortiz 2017-08-10
An offline review in excel has been carried out for all the PE recycling activities, checking mass balances, data sources, etc. Several comments were made to the data provider and improvements have been made to the datasets.
