# treatment of wastewater, average, capacity 4.7E10l/year

Dataset: EcoSpold 2, unit process
Geography: CA-QC
Time period: 1994-01-01 to 2021-12-31
Technology level: current
Classification: ISIC rev.4 ecoinvent: 3700:Sewerage
Classification: EcoSpold01Categories: waste management/wastewater treatment
Tags: Treatment
Scenario: Business-as-Usual
System model: Allocation, cut-off by classification
Generated by: Marylène Dussault
Published in: Doka G. 2008
Database: ecoinvent
isCopyrightProtected: true
accessRestrictedTo: 1

## General comment
This dataset represents activated sludge wastewater treatment. This dataset is a copy of the Global version and is used to approximate activated sludage and biofiltration technolgie in Quebec. This dataset should be replace as soon as data for these technologies in the Quebec region become available. Only the production volume have been modified and the sewer process have been removed as it is included in the market process. Wastewater purified in a large municipal wastewater treatment plant (capacity class 1), with an average capacity size of 233000 per-captia-equivalents PCE.
Wastewater contains (in kg/m3): COD: 0.1556 (GSD=122.5%); BOD: 0.1036 (GSD=122.5%); DOC: 0.04575 (GSD=122.5%); TOC: 0.0673 (GSD=122.5%); SO4-S: 0.044 (GSD=122.5%); S part.: 0.002 (GSD=122.5%); NH4-N: 0.01495 (GSD=122.5%); NO3-N: 0.00105 (GSD=122.5%); NO2-N: 0.0004 (GSD=122.5%); N part.: 0.003279 (GSD=122.5%); N org. solv.: 0.008392 (GSD=122.5%); PO4-P: 0.002459 (GSD=122.5%); P part.: 0.0006147 (GSD=122.5%); Cl: 0.03003 (GSD=224.1%); F: 0.00003277 (GSD=224.1%); As: 0.0000009 (GSD=224.1%); Cd: 0.0000002806 (GSD=223.8%); Co: 0.000001618 (GSD=223.8%); Cr: 0.00001223 (GSD=223.8%); Cu: 0.00003744 (GSD=223.8%); Hg: 0.0000002 (GSD=223.8%); Mn: 0.000053 (GSD=224.1%); Mo: 0.0000009574 (GSD=223.8%); Ni: 0.000006589 (GSD=223.8%); Pb: 0.000008631 (GSD=223.8%); Sn: 0.0000034 (GSD=224.1%); Zn: 0.0001094 (GSD=223.8%); Si: 0.003126 (GSD=224.1%); Fe: 0.007093 (GSD=224.1%); Ca: 0.05083 (GSD=224.1%); Al: 0.001038 (GSD=224.1%); K: 0.0003989 (GSD=224.1%); Mg: 0.005707 (GSD=224.1%); Na: 0.002186 (GSD=224.1%);

## Included activities end
Infrastructure materials for municipal wastewater treatment plant, transports, dismantling. Land use burdens.

## Geography
Specific to the technology mix encountered in Switzerland in 2000. Well applicable to modern treatment practices in Europe, North America or Japan.

## Technology
Three stage wastewater treatment (mechanical, biological, chemical) including sludge digestion (fermentation) according to the average technology in Switzerland

## Parameters
- fraction, process water, to air: 0.1 dimensionless; lognormal variance with pedigree 0.092025, pedigree (4,4,3,2,4)

## Reference product
- wastewater, average: -1 m3; name WWT; CPC 39920: Sewage sludge; By-product classification Waste
  EcoSpold01Location=CH
  production volume 1.96906e8 m3; name PV_WWT
    Literature value. Represents volume of treated wastewater from lagoon facility during a year in Québec. Calculated from Quebec government published data in annual report on wastewater treatments in the region (MAMOT, 2011). Includes all types of lagoon technology (aerated, facultative, non-aerated, etc.).
  property price 0 EUR2005; name WWT_price_EUR2005
    Waste products are assigned a price of zero as they are assumed to require further treatment.
  property carbon content, non-fossil 0.194039
    0.0673 kg TOC/m3 (Tab A.17, ecoinvent v2.2 report 13_I). TOC was considered as Total Carbon.
  property carbon content 0.194039
    carbon content on a dry matter basis (reserved; not for manual entry)
  properties: carbon content, fossil 0, water in wet mass 999.653 kg, wet mass 1000 kg, dry mass 0.346837 kg, water content 2882.2, carbon allocation 0.0673 kg

## Inputs from technosphere
- liquid manure spreading, by vacuum tanker: 0.00023908 m3; lognormal variance with pedigree 0.042, pedigree (1,1,5,5,1)
  burden from sludge spreading. Uncertainty calculated from wastewater composition and treatment model;activityLink introduced to establish a direct link to the corresponding regional supply of this product
  EcoSpold01Location=CH
- residual material landfill: 9.0224e-12 unit; lognormal variance with pedigree 0.072, pedigree (1,1,5,5,1)
  EcoSpold01Location=CH
  burden from sludge incineration. Uncertainty calculated from wastewater composition and treatment model
- process-specific burdens, residual material landfill: 0.0043308 kg; lognormal variance with pedigree 0.072, pedigree (1,1,5,5,1)
  (same comment as for residual material landfill)
- process-specific burdens, municipal waste incineration: 0.15169 kg; lognormal variance with pedigree 0.042, pedigree (1,1,5,5,1)
  burden from sludge incineration. Uncertainty calculated from wastewater composition and treatment model
  EcoSpold01Location=CH
- aluminium sulfate, powder: 0.0031512 kg; lognormal variance with pedigree 0.102, pedigree (1,1,5,5,1)
  direct wastewater treatment plant burden. Uncertainty calculated from wastewater composition and treatment model
  EcoSpold01Location=RER
  properties: wet mass 1 kg, dry mass 1 kg
- titanium dioxide: 2.4129e-6 kg; lognormal variance with pedigree 0.542, pedigree (1,1,5,5,1)
  burden from sludge incineration. Uncertainty calculated from wastewater composition and treatment model
  EcoSpold01Location=RER
  properties: dry mass 1 kg, wet mass 1 kg
- waste cement, hydrated: -0.0043308 kg; name w_cement; lognormal variance with pedigree 0.082, pedigree (1,1,5,5,1)
  (same comment as for process-specific burdens, municipal waste incineration)
  production volume 852762 kg; = (-1)*w_cement/WWT*PV_WWT
    Calculated from the production volume of sewage, average in proportion to the respective output amounts.
  property price 0 EUR2005; name w_cement_price_EUR2005
  properties: wet mass 1 kg, dry mass 1 kg
- chemical, organic: 6.1468e-7 kg; lognormal variance with pedigree 0.432, pedigree (1,1,5,5,1)
  burden from sludge incineration. Uncertainty calculated from wastewater composition and treatment model
  EcoSpold01Location=GLO
  properties: heating value, net 19.03 MJ, wet mass 1 kg, carbon content, fossil 0.628, dry mass 1 kg
  note on carbon content, fossil: This dataset is an unweighted average of 20 organic substances (listed in Tab 88.1, ecoinvent v2.2 report 8, part II), being part of the top100 chemicals included in this database. The C-content has also been calculated as an unweighted average of the C content of the substances composing this dataset.
- municipal waste incineration facility: 3.7921e-11 unit; lognormal variance with pedigree 0.042, pedigree (1,1,5,5,1)
  (same comment as for residual material landfill)
- cement, unspecified: 0.0017323 kg; lognormal variance with pedigree 0.082, pedigree (1,1,5,5,1)
  (same comment as for residual material landfill)
  properties: dry mass 1 kg, wet mass 1 kg
- quicklime, milled, packed: 1.4666e-6 kg; lognormal variance with pedigree 0.082, pedigree (1,1,5,5,1)
  (same comment as for process-specific burdens, municipal waste incineration)
  properties: wet mass 1 kg, water content 0.010101, dry mass 0.99 kg
- waste graphical paper: -0.0155 kg; name w_paper; lognormal variance with pedigree 0.042, pedigree (1,1,5,5,1)
  EcoSpold01Location=CH
  direct wastewater treatment plant burden. Uncertainty calculated from wastewater composition and treatment model
  production volume 3.05205e6 kg; = (-1)*w_paper/WWT*PV_WWT
    (same comment as for waste cement, hydrated)
  property price 0 EUR2005; name w_paper_price_EUR2005
  properties: carbon content, non-fossil 0.454955, dry mass 0.888 kg, wet mass 1 kg, water content 0.126126, heating value, net 14.12 MJ
  note on heating value, net: Value taken from the general comment of the treatment dataset.
- chemical, inorganic: 7.7017e-7 kg; lognormal variance with pedigree 0.082, pedigree (1,1,5,5,1)
  (same comment as for chemical, organic)
  properties: carbon content, fossil 0.003, wet mass 1 kg, dry mass 1 kg
  note on carbon content, fossil: This dataset is an unweighted average of 20 inorganic substances (listed in Tab 88.1, ecoinvent v2.2 report 8, part II), being part of the top100 chemicals included in this database. The C-content has also been calculated as an unweighted average of the C content of the substances composing this dataset.
- slag landfill: 4.9107e-11 unit; lognormal variance with pedigree 0.072, pedigree (1,1,5,5,1)
  (same comment as for process-specific burdens, municipal waste incineration)
- heat, district or industrial, natural gas: 0.00739836 MJ; lognormal variance with pedigree 0.222, pedigree (1,1,5,5,1)
  (same comment as for titanium dioxide)
  properties: heating value, net 1 MJ
- iron (III) chloride, without water, in 40% solution state: 0.015948 kg; lognormal variance with pedigree 0.102, pedigree (1,1,5,5,1)
  EcoSpold01Location=CH
  direct wastewater treatment plant burden plus burden from sludge incineration. Uncertainty calculated from wastewater composition and treatment model
  properties: dry mass 1 kg, wet mass 1 kg
- electricity, low voltage: 0.20571 kWh; lognormal variance with pedigree 0.062, pedigree (1,1,5,5,1)
  (same comment as for waste graphical paper)
- waste plastic, mixture: -0.0155 kg; name w_plastic; lognormal variance with pedigree 0.042, pedigree (1,1,5,5,1)
  direct wastewater treatment plant burden. Uncertainty calculated from wastewater composition and treatment model
  EcoSpold01Location=CH
  production volume 3.05205e6 kg; = (-1)*w_plastic/WWT*PV_WWT
    (same comment as for waste cement, hydrated)
  property price 0 EUR2005; name w_plastic_price_EUR2005
  properties: carbon content, fossil 0.747344, heating value, net 30.79 MJ, wet mass 1 kg, dry mass 0.847 kg, water content 0.180638
  note on carbon content, fossil: C content in 1 kg DM was calculated using data in Tab A.2, ecoinvent v2.2 report 13_I
- wastewater treatment facility, capacity 4.7E10l/year: 6.0643e-10 unit; lognormal variance with pedigree 0.042, pedigree (1,1,5,5,1)
  EcoSpold01Location=CH
  uncertainty heeded in exchanges of the module
- iron sulfate: 0.01166 kg; lognormal variance with pedigree 0.102, pedigree (1,1,5,5,1)
  (same comment as for aluminium sulfate, powder)
  properties: dry mass 1 kg, wet mass 1 kg
- electricity, high voltage: 0.021808 kWh; lognormal variance with pedigree 0.492, pedigree (1,1,5,5,1)
  (same comment as for residual material landfill)
- chromium oxide, flakes: 4.9242e-8 kg; lognormal variance with pedigree 0.542, pedigree (1,1,5,5,1)
  EcoSpold01Location=RER
  burden from sludge incineration. Uncertainty calculated from wastewater composition and treatment model
  properties: dry mass 1 kg, wet mass 1 kg
- sodium hydroxide, without water, in 50% solution state: 0.00041192 kg; lognormal variance with pedigree 0.092, pedigree (1,1,5,5,1)
  (same comment as for chromium oxide, flakes)
  properties: dry mass 1 kg, wet mass 1 kg, heating value, net 3.03 MJ
- process-specific burdens, slag landfill: 0.027623 kg; lognormal variance with pedigree 0.072, pedigree (1,1,5,5,1)
  (same comment as for process-specific burdens, municipal waste incineration)
- hydrochloric acid, without water, in 30% solution state: 4.621e-7 kg; lognormal variance with pedigree 0.082, pedigree (1,1,5,5,1)
  (same comment as for chromium oxide, flakes)
  properties: wet mass 1 kg, dry mass 1 kg, heating value, net 3.32 MJ
- heat, district or industrial, other than natural gas: 0.12722 MJ; lognormal variance with pedigree 0.042, pedigree (1,1,5,5,1)
  (same comment as for process-specific burdens, municipal waste incineration)
  properties: heating value, net 1 MJ
- ammonia, anhydrous, liquid: 8.4292e-5 kg; lognormal variance with pedigree 0.222, pedigree (1,1,5,5,1)
  (same comment as for residual material landfill)
  properties: wet mass 1 kg, dry mass 1 kg

## Emissions to nature
- Lead [water, surface water]: 9.4875e-7 kg; lognormal variance with pedigree 0.602, pedigree (1,1,5,5,1)
  sewer overload discharge plus direct wastewater treatment plant emission plus emission from sludge incineration. Uncertainty calculated from wastewater composition and treatment model
- Calcium [air, urban air close to ground]: 5.9636e-6 kg; lognormal variance with pedigree 0.722, pedigree (1,1,5,5,1)
  direct digester gas emission plus emission from sludge incineration. Uncertainty calculated from wastewater composition and treatment model
- Nickel [air, urban air close to ground]: 8.0297e-14 kg; lognormal variance with pedigree 0.812, pedigree (1,1,5,5,1)
  (same comment as for Calcium)
- Manganese [water, surface water]: 2.6899e-5 kg; lognormal variance with pedigree 0.662, pedigree (1,1,5,5,1)
  (same comment as for Lead)
- Fluoride [water, surface water]: 3.2769e-5 kg; lognormal variance with pedigree 0.672, pedigree (1,1,5,5,1)
  (same comment as for Lead)
- Chromium [air, urban air close to ground]: 3.1955e-13 kg; lognormal variance with pedigree 0.802, pedigree (1,1,5,5,1)
  (same comment as for Calcium)
- Dinitrogen monoxide [air, urban air close to ground]: 0.00010014 kg; lognormal variance with pedigree 0.072, pedigree (1,1,5,5,1)
  direct wastewater treatment plant emission plus direct digester gas emission plus emission from sludge incineration plus emission from sludge spreading. Uncertainty calculated from wastewater composition and treatment model
- Zinc [air, urban air close to ground]: 8.8543e-10 kg; lognormal variance with pedigree 0.762, pedigree (1,1,5,5,1)
  (same comment as for Calcium)
- Phosphate [water, ground-]: 1.0707e-5 kg; lognormal variance with pedigree 0.132, pedigree (1,1,5,5,1)
  emission from sludge spreading. Uncertainty calculated from wastewater composition and treatment model
- NMVOC, non-methane volatile organic compounds, unspecified origin [air, urban air close to ground]: 2.2813e-6 kg; lognormal variance with pedigree 0.262, pedigree (1,1,5,5,1)
  direct digester gas emission. Uncertainty calculated from wastewater composition and treatment model
- Copper, ion [water, surface water]: 9.7127e-6 kg; lognormal variance with pedigree 0.652, pedigree (1,1,5,5,1)
  (same comment as for Lead)
- Nickel [soil, agricultural]: 7.3297e-7 kg; lognormal variance with pedigree 0.712, pedigree (1,1,5,5,1)
  (same comment as for Phosphate)
- Cobalt [water, ground-, long-term]: 5.0042e-7 kg; lognormal variance with pedigree 0.712, pedigree (1,1,5,5,1)
  emission from sludge incineration. Uncertainty calculated from wastewater composition and treatment model
- Silicon [water, ground-, long-term]: 0.00018307 kg; lognormal variance with pedigree 5.462, pedigree (1,1,5,5,1)
  (same comment as for Cobalt)
- Tin, ion [water, ground-, long-term]: 7.1319e-7 kg; lognormal variance with pedigree 1.262, pedigree (1,1,5,5,1)
  (same comment as for Cobalt)
- Cobalt [soil, agricultural]: 2.2517e-7 kg; lognormal variance with pedigree 0.712, pedigree (1,1,5,5,1)
  (same comment as for Phosphate)
- Water [water, unspecified]: 0.9 m3; lognormal variance with pedigree 0.0827, pedigree (2,2,5,5,1)
  Calculated value based on water balance.
  property dry mass 0 kg; name DM
  property carbon content, non-fossil 0; name C_content_non_fossil
  property water in wet mass 1000 kg; name WWM
  property carbon content, fossil 0; name C_content_fossil
  property wet mass 1000 kg; name WM
- Lead [soil, agricultural]: 2.1713e-6 kg; lognormal variance with pedigree 0.712, pedigree (1,1,5,5,1)
  (same comment as for Phosphate)
- Chloride [water, surface water]: 0.040484 kg; lognormal variance with pedigree 0.482, pedigree (1,1,5,5,1)
  (same comment as for Lead)
- Water [air, unspecified]: 0.1 m3; lognormal variance with pedigree 0.0827, pedigree (2,2,5,5,1)
  Calculated value based on water balance.
- Silicon [soil, agricultural]: 0.00083056 kg; lognormal variance with pedigree 0.722, pedigree (1,1,5,5,1)
  (same comment as for Phosphate)
- Tin [soil, agricultural]: 5.5894e-7 kg; lognormal variance with pedigree 0.712, pedigree (1,1,5,5,1)
  (same comment as for Phosphate)
- COD, Chemical Oxygen Demand [water, ground-, long-term]: 0.00030611 kg; lognormal variance with pedigree 0.112, pedigree (1,1,5,5,1)
  (same comment as for Cobalt)
- Zinc [soil, agricultural]: 2.1352e-5 kg; lognormal variance with pedigree 0.712, pedigree (1,1,5,5,1)
  (same comment as for Phosphate)
- Aluminium [water, ground-, long-term]: 0.00078208 kg; lognormal variance with pedigree 0.462, pedigree (1,1,5,5,1)
  (same comment as for Cobalt)
- Phosphorus [air, urban air close to ground]: 1.5559e-6 kg; lognormal variance with pedigree 0.102, pedigree (1,1,5,5,1)
  (same comment as for Calcium)
- Iron [soil, agricultural]: 0.0037505 kg; lognormal variance with pedigree 0.172, pedigree (1,1,5,5,1)
  (same comment as for Phosphate)
- Arsenic [air, urban air close to ground]: 2.5337e-10 kg; lognormal variance with pedigree 0.732, pedigree (1,1,5,5,1)
  (same comment as for Calcium)
- Methane, non-fossil [air, urban air close to ground]: 0.00050249 kg; lognormal variance with pedigree 0.142, pedigree (1,1,5,5,1)
  (same comment as for Calcium)
- Arsenic, ion [water, ground-, long-term]: 7.6517e-8 kg; lognormal variance with pedigree 0.712, pedigree (1,1,5,5,1)
  (same comment as for Cobalt)
- Cadmium, ion [water, ground-, long-term]: 9.9486e-10 kg; lognormal variance with pedigree 6.902, pedigree (1,1,5,5,1)
  (same comment as for Cobalt)
- Cyanide [air, urban air close to ground]: 1.5037e-6 kg; lognormal variance with pedigree 0.242, pedigree (1,1,5,5,1)
  (same comment as for Cobalt)
- Sulfate [water, ground-, long-term]: 0.0027689 kg; lognormal variance with pedigree 0.102, pedigree (1,1,5,5,1)
  (same comment as for Cobalt)
- Molybdenum [water, ground-, long-term]: 2.7982e-7 kg; lognormal variance with pedigree 0.712, pedigree (1,1,5,5,1)
  (same comment as for Cobalt)
- Molybdenum [soil, agricultural]: 1.3327e-7 kg; lognormal variance with pedigree 0.712, pedigree (1,1,5,5,1)
  (same comment as for Phosphate)
- Lead [air, urban air close to ground]: 2.0486e-10 kg; lognormal variance with pedigree 0.752, pedigree (1,1,5,5,1)
  (same comment as for Calcium)
- Cadmium, ion [water, surface water]: 1.4246e-7 kg; lognormal variance with pedigree 0.662, pedigree (1,1,5,5,1)
  (same comment as for Lead)
- Phosphate [water, surface water]: 0.0026903 kg; lognormal variance with pedigree 0.082, pedigree (1,1,5,5,1)
  sewer overload discharge plus direct wastewater treatment plant emission plus emission from sludge incineration plus emission from sludge spreading. Uncertainty calculated from wastewater composition and treatment model
- DOC, Dissolved Organic Carbon [water, surface water]: 0.0075379 kg; lognormal variance with pedigree 0.082, pedigree (1,1,5,5,1)
  (same comment as for Lead)
- Chromium VI [water, ground-, long-term]: 4.575e-7 kg; lognormal variance with pedigree 1.092, pedigree (1,1,5,5,1)
  (same comment as for Cobalt)
- Zinc, ion [water, ground-, long-term]: 8.403e-7 kg; lognormal variance with pedigree 5.512, pedigree (1,1,5,5,1)
  (same comment as for Cobalt)
- Iron, ion [water, ground-, long-term]: 0.0044593 kg; lognormal variance with pedigree 0.992, pedigree (1,1,5,5,1)
  (same comment as for Cobalt)
- BOD5, Biological Oxygen Demand [water, surface water]: 0.009823 kg; lognormal variance with pedigree 0.072, pedigree (1,1,5,5,1)
  (same comment as for Lead)
- Carbon dioxide, non-fossil [air, urban air close to ground]: 0.19905 kg; lognormal variance with pedigree 0.062, pedigree (1,1,5,5,1)
  direct wastewater treatment plant emission plus direct digester gas emission plus emission from sludge incineration. Uncertainty calculated from wastewater composition and treatment model
- Aluminium [air, urban air close to ground]: 1.6509e-6 kg; lognormal variance with pedigree 0.472, pedigree (1,1,5,5,1)
  (same comment as for Calcium)
- Magnesium [soil, agricultural]: 0.00015823 kg; lognormal variance with pedigree 0.712, pedigree (1,1,5,5,1)
  (same comment as for Phosphate)
- Aluminium [soil, agricultural]: 0.00041634 kg; lognormal variance with pedigree 0.462, pedigree (1,1,5,5,1)
  (same comment as for Phosphate)
- Aluminium [water, surface water]: 6.2333e-5 kg; lognormal variance with pedigree 0.552, pedigree (1,1,5,5,1)
  (same comment as for Lead)
- DOC, Dissolved Organic Carbon [water, ground-, long-term]: 0.00012113 kg; lognormal variance with pedigree 0.112, pedigree (1,1,5,5,1)
  (same comment as for Cobalt)
- Potassium, ion [water, surface water]: 0.0003989 kg; lognormal variance with pedigree 0.672, pedigree (1,1,5,5,1)
  (same comment as for Lead)
- Chromium, ion [water, surface water]: 1.3774e-8 kg; lognormal variance with pedigree 0.722, pedigree (1,1,5,5,1)
  (same comment as for Cobalt)
- BOD5, Biological Oxygen Demand [water, ground-, long-term]: 0.00010013 kg; lognormal variance with pedigree 0.112, pedigree (1,1,5,5,1)
  (same comment as for Cobalt)
- Sulfur dioxide [air, urban air close to ground]: 0.00088683 kg; lognormal variance with pedigree 0.102, pedigree (1,1,5,5,1)
  (same comment as for Calcium)
- Manganese [water, ground-, long-term]: 1.6125e-5 kg; lognormal variance with pedigree 0.872, pedigree (1,1,5,5,1)
  (same comment as for Cobalt)
- Sulfur [soil, agricultural]: 0.00043493 kg; lognormal variance with pedigree 0.112, pedigree (1,1,5,5,1)
  (same comment as for Phosphate)
- Magnesium [water, ground-, long-term]: 0.00037076 kg; lognormal variance with pedigree 0.712, pedigree (1,1,5,5,1)
  (same comment as for Cobalt)
- Arsenic, ion [water, surface water]: 7.6834e-7 kg; lognormal variance with pedigree 0.602, pedigree (1,1,5,5,1)
  (same comment as for Lead)
- Ammonia [air, urban air close to ground]: 0.00028033 kg; lognormal variance with pedigree 0.252, pedigree (1,1,5,5,1)
  direct digester gas emission plus emission from sludge incineration plus emission from sludge spreading. Uncertainty calculated from wastewater composition and treatment model
- Nitrate [water, ground-, long-term]: 6.0021e-5 kg; lognormal variance with pedigree 0.082, pedigree (1,1,5,5,1)
  (same comment as for Cobalt)
- Sodium, ion [water, surface water]: 0.002186 kg; lognormal variance with pedigree 0.672, pedigree (1,1,5,5,1)
  (same comment as for Lead)
- Magnesium [water, surface water]: 0.0051486 kg; lognormal variance with pedigree 0.672, pedigree (1,1,5,5,1)
  (same comment as for Lead)
- Mercury [water, surface water]: 6.2894e-8 kg; lognormal variance with pedigree 0.642, pedigree (1,1,5,5,1)
  (same comment as for Lead)
- Copper, ion [water, ground-, long-term]: 1.6081e-5 kg; lognormal variance with pedigree 0.732, pedigree (1,1,5,5,1)
  (same comment as for Cobalt)
- Cadmium [air, urban air close to ground]: 5.5219e-12 kg; lognormal variance with pedigree 0.742, pedigree (1,1,5,5,1)
  (same comment as for Calcium)
- Iron, ion [water, surface water]: 0.0036028 kg; lognormal variance with pedigree 0.662, pedigree (1,1,5,5,1)
  (same comment as for Lead)
- Calcium, ion [water, surface water]: 0.04586 kg; lognormal variance with pedigree 0.672, pedigree (1,1,5,5,1)
  (same comment as for Lead)
- Mercury [soil, agricultural]: 3.9061e-8 kg; lognormal variance with pedigree 0.712, pedigree (1,1,5,5,1)
  (same comment as for Phosphate)
- Carbon [soil, agricultural]: 0.0048869 kg; lognormal variance with pedigree 0.112, pedigree (1,1,5,5,1)
  (same comment as for Phosphate)
- COD, Chemical Oxygen Demand [water, surface water]: 0.030152 kg; lognormal variance with pedigree 0.082, pedigree (1,1,5,5,1)
  (same comment as for Lead)
- Arsenic [soil, agricultural]: 5.4891e-8 kg; lognormal variance with pedigree 0.712, pedigree (1,1,5,5,1)
  (same comment as for Phosphate)
- Nickel, ion [water, ground-, long-term]: 1.7419e-6 kg; lognormal variance with pedigree 0.712, pedigree (1,1,5,5,1)
  (same comment as for Cobalt)
- Iron [air, urban air close to ground]: 3.1782e-7 kg; lognormal variance with pedigree 0.202, pedigree (1,1,5,5,1)
  (same comment as for Calcium)
- Manganese [soil, agricultural]: 7.3771e-6 kg; lognormal variance with pedigree 0.712, pedigree (1,1,5,5,1)
  (same comment as for Phosphate)
- Mercury [air, urban air close to ground]: 3.3733e-13 kg; lognormal variance with pedigree 0.742, pedigree (1,1,5,5,1)
  (same comment as for Calcium)
- Chromium [soil, agricultural]: 1.7026e-6 kg; lognormal variance with pedigree 0.712, pedigree (1,1,5,5,1)
  (same comment as for Phosphate)
- Tin [air, urban air close to ground]: 1.8824e-9 kg; lognormal variance with pedigree 0.732, pedigree (1,1,5,5,1)
  (same comment as for Calcium)
- Manganese [air, urban air close to ground]: 1.0196e-13 kg; lognormal variance with pedigree 0.832, pedigree (1,1,5,5,1)
  (same comment as for Calcium)
- Copper [air, urban air close to ground]: 1.4685e-10 kg; lognormal variance with pedigree 0.762, pedigree (1,1,5,5,1)
  (same comment as for Calcium)
- Phosphate [water, ground-, long-term]: 0.00018223 kg; lognormal variance with pedigree 4.252, pedigree (1,1,5,5,1)
  (same comment as for Cobalt)
- Mercury [water, ground-, long-term]: 5.1586e-9 kg; lognormal variance with pedigree 2.972, pedigree (1,1,5,5,1)
  (same comment as for Cobalt)
- Molybdenum [water, surface water]: 5.4368e-7 kg; lognormal variance with pedigree 0.572, pedigree (1,1,5,5,1)
  (same comment as for Lead)
- Ammonium, ion [water, surface water]: 0.011027 kg; lognormal variance with pedigree 0.062, pedigree (1,1,5,5,1)
  direct wastewater treatment plant emission. Uncertainty calculated from wastewater composition and treatment model
- Tin, ion [water, surface water]: 1.4223e-6 kg; lognormal variance with pedigree 0.662, pedigree (1,1,5,5,1)
  (same comment as for Lead)
- Magnesium [air, urban air close to ground]: 5.5305e-7 kg; lognormal variance with pedigree 0.722, pedigree (1,1,5,5,1)
  (same comment as for Calcium)
- Nitrite [water, surface water]: 0.000644 kg; lognormal variance with pedigree 0.082, pedigree (1,1,5,5,1)
  (same comment as for Ammonium, ion)
- Calcium [soil, agricultural]: 0.0014094 kg; lognormal variance with pedigree 0.712, pedigree (1,1,5,5,1)
  (same comment as for Phosphate)
- Nickel, ion [water, surface water]: 3.9968e-6 kg; lognormal variance with pedigree 0.662, pedigree (1,1,5,5,1)
  (same comment as for Lead)
- Nitrogen [water, surface water]: 0.00049 kg; lognormal variance with pedigree 0.082, pedigree (1,1,5,5,1)
  (same comment as for Ammonium, ion)
- Cobalt [air, urban air close to ground]: 1.8147e-14 kg; lognormal variance with pedigree 0.812, pedigree (1,1,5,5,1)
  (same comment as for Calcium)
- Silicon [water, surface water]: 0.00018795 kg; lognormal variance with pedigree 0.572, pedigree (1,1,5,5,1)
  (same comment as for Lead)
- Molybdenum [air, urban air close to ground]: 6.7655e-10 kg; lognormal variance with pedigree 0.732, pedigree (1,1,5,5,1)
  (same comment as for Calcium)
- Carbon monoxide, non-fossil [air, urban air close to ground]: 0.00017404 kg; lognormal variance with pedigree 0.152, pedigree (1,1,5,5,1)
  (same comment as for Calcium)
- Lead [water, ground-, long-term]: 3.9268e-7 kg; lognormal variance with pedigree 6.922, pedigree (1,1,5,5,1)
  (same comment as for Cobalt)
- Copper [soil, agricultural]: 7.8374e-6 kg; lognormal variance with pedigree 0.712, pedigree (1,1,5,5,1)
  (same comment as for Phosphate)
- Zinc, ion [water, surface water]: 3.3811e-5 kg; lognormal variance with pedigree 0.652, pedigree (1,1,5,5,1)
  (same comment as for Lead)
- Nitrate [water, surface water]: 0.048308 kg; lognormal variance with pedigree 0.062, pedigree (1,1,5,5,1)
  (same comment as for Lead)
- Cobalt [water, surface water]: 8.211e-7 kg; lognormal variance with pedigree 0.662, pedigree (1,1,5,5,1)
  (same comment as for Lead)
- Calcium, ion [water, ground-, long-term]: 0.0031132 kg; lognormal variance with pedigree 0.712, pedigree (1,1,5,5,1)
  (same comment as for Cobalt)
- Chromium VI [water, surface water]: 6.3486e-6 kg; lognormal variance with pedigree 0.642, pedigree (1,1,5,5,1)
  (same comment as for Lead)
- Sulfate [water, surface water]: 0.14497 kg; lognormal variance with pedigree 0.082, pedigree (1,1,5,5,1)
  (same comment as for Lead)
- Nitrogen oxides [air, urban air close to ground]: 0.00070765 kg; lognormal variance with pedigree 0.082, pedigree (1,1,5,5,1)
  (same comment as for Calcium)
- TOC, Total Organic Carbon [water, surface water]: 0.0072994 kg; lognormal variance with pedigree 0.082, pedigree (1,1,5,5,1)
  (same comment as for Lead)
- Cadmium [soil, agricultural]: 3.9061e-8 kg; lognormal variance with pedigree 0.712, pedigree (1,1,5,5,1)
  (same comment as for Phosphate)
- TOC, Total Organic Carbon [water, ground-, long-term]: 0.00012113 kg; lognormal variance with pedigree 0.112, pedigree (1,1,5,5,1)
  (same comment as for Cobalt)
- Silicon [air, urban air close to ground]: 4.9081e-6 kg; lognormal variance with pedigree 0.732, pedigree (1,1,5,5,1)
  (same comment as for Calcium)

## Extrapolations
This dataset has been extrapolated from year 2000 to the year of the calculation (2021). The uncertainty has been adjusted accordingly.
