# treatment of residue from mechanical treatment, IT accessory, municipal incineration with fly ash extraction

Dataset: EcoSpold 2, unit process
Geography: CH
Time period: 2006-01-01 to 2021-12-31
Technology level: current
Classification: ISIC rev.4 ecoinvent: 3821:Treatment and disposal of non-hazardous waste
Synonyms: municipal waste incineration; Kehrichtverbrennung; Siedlungsabfallverbrennung
Scenario: Business-as-Usual
System model: Allocation, cut-off by classification
Share of production covered: 100 %
Generated by: Gabor Doka
Published in: Doka G. 2015
Database: ecoinvent
isCopyrightProtected: true
accessRestrictedTo: 1

## General comment
This dataset represents the activity of waste disposal of residue from mechanical treatment, IT accessory in a municipal solid waste incinerator (MSWI) // Recommended use of this dataset: Only for incineration of shredder residues generated in the recycling (mechanical treatment) of computer peripherals (keyboards, mouse) // Inventoried waste contains 1.9% rubber; 46.5% Plastics from electronic consumer goods; 46.5% Plastics from electronic industrial goods; 1.57% MSWI iron scrap; 0.353% Alu in MSW; 1.03% Glass; 1.99% wiring copper; 0.0536% Pb in ASR inert; 0.0111% silver; . // Waste composition (wet, in ppm): upper heating value 34.31 MJ/kg; lower heating value 32.89 MJ/kg; H2O 8744.4; O 54844; H 70912; C 774420; S 408.04; N 12381; P 478.01; B n.a.; Cl 6321.9; Br 5119.9; F 232.72; I n.a.; Ag 110.86; As 6.9816; Ba 164.77; Cd 140.31; Co 27.44; Cr 70.858; Cu 23077; Hg 0.79127; Mn 44.112; Mo 2.7927; Ni 482.86; Pb 679.2; Sb 4467.1; Se 1.8241; Sn 199.49; V 4.6241; Zn 717.33; Be 0.43432; Sc n.a.; Sr 76.874; Ti 4167.6; Tl 0.34745; W n.a.; Si 6962.3; Fe 14273; Ca 3650.5; Al 5901.6; K 108.91; Mg n.a.; Na 797.06; // Share of carbon in waste that is biogenic 0%. // Share of metals in waste not oxidised and bulk-recyclable (exclude very small or thin parts) Iron: 89.71%; Alu: 59.48%; Copper: 86.19%. // Recovery of metal scrap from bottom ash to recycling: 7.4029g iron scrap, 1.0141g aluminium scrap, 6.0778g copper scrap. From this waste, the FLUWA process in the technology mix recovers 0.000871kg (DM) of a hydroxide sludge to be recycled in zinc furnaces. // Ultimately one kg of this waste produces 0.09829 kg of bottom ash (can include some washed ash) and 0.01136 kg of residues, which are landfilled (technology mix). Additional solidification of residues with 0.004543 kg of cement.Net energy production: 4.23MJ/kg electric energy and 8.19MJ/kg thermal energy. //

## Included activities start
waste incineration from waste reception gate and delivery into waste bunker at incinerator plant site (without transports to the incinerator)

## Included activities end
Waste-specific short-term emissions to water from leachate. Long-term emissions from landfill to ground water.

## Geography
Specific to the technology mix encountered in Switzerland in 2012.

## Technology
average Swiss MSWI plants in 2010 (grate incinerators) with electrostatic precipitator for fly ash (ESP), wet flue gas scrubber and 25% SNCR , 42.77% SCR-high dust , 32.68% SCR-low dust -DeNOx facilities and 0% without Denox (weighted according to mass of burnt waste, representing Swiss average). Efficiency of iron scrap separation from slag : 58%. Efficiency of non-ferrous scrap separation from slag : 31%. The technology mix for this dataset includes a filter ash treatment (FLUWA) of a share of 46.22%. Gross electric efficiency technology mix 15.84% and Gross thermal efficiency technology mix 28.51%

## Time period
Waste composition as given in literature reference, theoretical data or other source. Transfer coefficients for modern MSWI.

## Reference product
- residue from mechanical treatment, IT accessory: -1 kg; name RP_amount_1; CPC 39: Wastes or scraps; By-product classification Waste
  Main reference product of this activity (supply of disposal service).
  production volume 800500 kg; name RP_PV_1
    based on corresponding global production volume of MSW fraction in conventional MSWI (wo fly ash extraction) and scaled down to annual Swiss incinerated MSW mass of 3.02 mio. tonnes.
  property price 0 EUR2005; name RP_amount_1_price_EUR2005
    Waste products are assigned a price of zero as they are assumed to require further treatment.
  property heating value, net 32.89 MJ
    Value taken from the general comment of the treatment dataset.
  property carbon content 0.78125
    carbon content on a dry matter basis (reserved; not for manual entry)
  properties: sulfur content 0.00041164, bromine content 0.005165, phosphorus content 0.00048222, fluorine content 0.00023477, oxygen content 0.055328, nitrogen content 0.01249, silver content 0.00011184, hydrogen content 0.071538, barium content 0.00016622, arsenic content 7.0432e-6, cadmium content 0.00014155, manganese content 4.4502e-5, chlorine content 0.0063777, copper content 0.02328, mercury content 7.9825e-7, chromium content 7.1483e-5, strontium content 7.7552e-5, zinc content 0.00072366, cobalt content 2.7682e-5, selenium content 1.8402e-6, molybdenum content 2.8173e-6, beryllium content 4.3815e-7, vanadium content 4.6649e-6, lead content 0.00068519, silicon content 0.0070237, iron content 0.014399, tin content 0.00020125, antimony content 0.0045065, nickel content 0.00048712, potassium content 0.00010987, thallium content 3.5052e-7, calcium content 0.0036827, wet mass 1 kg, water content 0.0088215, water in wet mass 0.0087444 kg, dry mass 0.99126 kg, aluminium content 0.0059537, titanium content 0.0042043, carbon content, fossil 0.78125, sodium content 0.0008041, carbon allocation 0.774422 kg

## By-products
All rows: pedigree (1,1,1,1,1)
- metalliferous hydroxide sludge: 0 kg; By-product classification Recyclable; CPC 1429: Other non-ferrous metal ores and concentrates (other than uranium or thorium ores and concentrates)
  Metalliferous hydroxide sludge from filter ash leaching (FLUWA).
  Uncertainty: uncertainty is calculated from uncertainties in waste composition and transfer coefficients to filter ash in incinerator and the uncertainty of the transfer coefficients of the FLUWA process.
  production volume 0 kg
    calculated in proportion to reference product waste input to incinerator
  property heating value, net 0 MJ
    Non combustible products are assumed to have an LHV equal to zero (0).
  property price 0.0042 EUR2005
    World market value of manure, deflated with barley world market price and consumer price index, based on [http://www.gov.pe.ca/photos/original/af_NM_manconv.pdf].
  property carbon content 0.046248
    carbon content on a dry matter basis (reserved; not for manual entry)
  properties: chlorine content 0.17415, phosphorus content 0.01049, oxygen content 0.32321, sulfur content 0.027969, cobalt content 0.00077723, bromine content 0.1161, chromium content 0.00026895, arsenic content 7.4267e-5, manganese content 7.5369e-6, copper content 0.0014184, mercury content 1.6554e-6, cadmium content 0.054867, barium content 5.3244e-5, selenium content 2.2243e-5, fluorine content 0.003898, lead content 0.0028447, molybdenum content 0.00019651, antimony content 0.055615, vanadium content 4.5659e-6, nickel content 0.00049844, titanium content 0.00039242, silicon content 0.00016789, thallium content 4.0315e-6, tin content 0.00019145, beryllium content 7.4519e-6, strontium content 1.0066e-6, calcium content 0.033552, aluminium content 0.00017675, potassium content 0.00079545, sodium content 0.0012247, water content 3, water in wet mass 0.75 kg, zinc content 0.14459, iron content 0.0001861, carbon content, fossil 0.046248, dry mass 0.25 kg, wet mass 1 kg, carbon allocation 0.011562 kg
- iron scrap, sorted, pressed: 0 kg; CPC 39310: Slag, dross, scalings and other waste from the manufacture of iron or steel; By-product classification Recyclable
  Iron scrap recovered from this waste.
  Uncertainty: uncertainty calculated from uncertainty in waste composition, uncertainty of share of recyclable metal, uncertainty of transfer coefficient to bottom ash, uncertainty of the efficiency of scrap removal in MSWI plant.
  production volume 0 kg
    calculated in proportion to reference product waste input to incinerator
  property price 0.175 EUR2005
    Temporary price data. Calculated as 90% of purchasers price based on: 2005 import and export prices (total trades (USD) divided by total weight (kg) in biggest economies of the world: EU27, USA, Brasil, China, India, Japan and Russia) from UN Commodity Trade Statistics Database (http://data.un.org/Explorer.aspxDatabase [Accessed 2011.06.20]). Commodity: Waste or scrap, of cast iron
  property carbon content 0
    carbon content on a dry matter basis (reserved; not for manual entry)
  properties: water content 0, water in wet mass 0 kg, wet mass 1 kg, dry mass 1 kg, carbon content, fossil 0, carbon content, non-fossil 0, carbon allocation 0 kg
- electricity, for reuse in municipal waste incineration only: 0 kWh; name E_el_prod_MSWI; CPC 17100: Electrical energy; By-product classification allocatable product
  Net electricity generated from this waste and used in internal MSWI plant energy redistribution.
  Uncertainty: uncertainty is calculated from uncertainties in waste composition and uncertainties in energy efficiency and the uncertainty in internal energy demand
  production volume 939590 kWh
    calculated in proportion to reference product waste input to incinerator
  property true value relation 3.6; name E_el_prod_MSWI_true_value_relation
    property to calculate "true value" from
  property exergy 3.6 MJ; name E_el_prod_MSWI_exergy
    This exergy property is based on the exergy content of the product.
  property price 0.1 EUR2005; name E_el_prod_MSWI_price_EUR2005
    Estimated to be the same price as in case of electricity, medium voltage.
- heat, for reuse in municipal waste incineration only: 0 MJ; name E_th_prod_MSWI; By-product classification allocatable product; CPC 17300: Steam and hot water
  Net useful heat generated from this waste and used in internal MSWI plant energy redistribution.
  Uncertainty: uncertainty is calculated from uncertainties in waste composition and uncertainties in energy efficiency and the uncertainty in internal energy demand
  production volume 6.5574e6 MJ
    calculated in proportion to reference product waste input to incinerator
  property true value relation 0.1842; name E_th_prod_MSWI_true_value_relation
    property to calculate "true value" from
  property exergy 0.1842 MJ; name E_th_prod_MSWI_exergy
    This exergy property is based on the exergy content of the product.
  property price 0.0106 EUR2005; name E_th_prod_MSWI_price_EUR2005
    Average European district heat price from Ecoheatcool and Euroheat 2005-2006, Ecoheat Work package 1: The European heat market. Final report. 10.6 EUR/GJ i s the price of district heat. http://www.solarthermalworld.org/files/Ecoheatcool%20WP1%20Web.pdf?download
- aluminium scrap, post-consumer, prepared for melting: 0 kg; By-product classification Recyclable; CPC 39363: Waste and scrap of aluminium
  Aluminium scrap recovered from this waste.
  Uncertainty: uncertainty calculated from uncertainty in waste composition, uncertainty of share of recyclable metal, uncertainty of transfer coefficient to bottom ash, uncertainty of the efficiency of scrap removal in MSWI plant.
  production volume 0 kg
    calculated in proportion to reference product waste input to incinerator
  property price 0.806 EUR2005
    Temporary price data. Calculated as 90% of purchasers price based on: 2005 import and export prices (total trades (USD) divided by total weight (kg) in biggest economies of the world: EU27, USA, Brasil, China, India, Japan and Russia) from UN Commodity Trade Statistics Database (http://data.un.org/Explorer.aspxDatabase [Accessed 2011.06.17]). Commodity: Waste or scrap, aluminium
  property carbon content 0
    carbon content on a dry matter basis (reserved; not for manual entry)
  properties: water content 0, carbon content, fossil 0, carbon content, non-fossil 0, water in wet mass 0 kg, wet mass 1 kg, dry mass 1 kg, carbon allocation 0 kg
- copper scrap, sorted, pressed: 0 kg; CPC 39361: Waste and scrap of copper; By-product classification Recyclable
  Copper scrap recovered from this waste.
  Uncertainty: uncertainty calculated from uncertainty in waste composition, uncertainty of share of recyclable metal, uncertainty of transfer coefficient to bottom ash, uncertainty of the efficiency of scrap removal in MSWI plant.
  production volume 0 kg
    calculated in proportion to reference product waste input to incinerator
  property price 2.84 EUR2005
    Temporary price data. Calculated as 90% of purchasers price based on: Source: USGS Mineral Yearbook 2007, Table 1 in <http://minerals.usgs.gov/minerals/pubs/commodity/recycle/myb1-2007-recyc.pdf>
  property carbon content 0
    carbon content on a dry matter basis (reserved; not for manual entry)
  properties: dry mass 1 kg, water in wet mass 0 kg, water content 0, carbon content, fossil 0, carbon content, non-fossil 0, wet mass 1 kg, carbon allocation 0 kg

## Inputs from technosphere
- ammonia, anhydrous, liquid: 0.0022034 kg; lognormal variance with pedigree 0.67695, pedigree (1,1,4,1,1)
  Input to DeNOx stage (100% NH3).
  Uncertainty: uncertainty calculated from uncertainty in average DeNOx input, uncertainty in the share of thermal NOx, uncertainty of nitrogen content in average municipal waste and the uncertainty in nitrogen content in *this* waste.
  properties: dry mass 1 kg, wet mass 1 kg
- chromium oxide, flakes: 2.8174e-6 kg; lognormal variance with pedigree 1.0339, pedigree (1,1,4,1,1)
  Input to DeNOx stage. Active component in SCR catalyst (vanadium pentoxide, V2O5), here approximated with the available chromium trioxide.
  Uncertainty: uncertainty calculated from uncertainty in average DeNOx input, uncertainty in the share of thermal NOx, uncertainty of nitrogen content in average municipal waste and the uncertainty in nitrogen content in *this* waste.
  properties: wet mass 1 kg, dry mass 1 kg
- waste cement, hydrated: -0.011356 kg; lognormal variance with pedigree 0.071298, pedigree (1,1,4,1,1)
  Hydrated cement output for solidification of landfilled residual material.
  Uncertainty: Uncertainty calculated from uncertainty of the waste composition of this waste and transfer coefficients in the incinerator and of the solidification recipe.
  production volume 9090.9 kg
    calculated in proportion to reference product waste input to incinerator
  properties: dry mass 1 kg, wet mass 1 kg
- heat, district or industrial, natural gas: 0.41204 MJ; lognormal variance with pedigree 0.67695, pedigree (1,1,4,1,1)
  Input to DeNOx stage, to heat up flue gas in low-dust SCR.
  Uncertainty: uncertainty calculated from uncertainty in average DeNOx input, uncertainty in the share of thermal NOx, uncertainty of nitrogen content in average municipal waste and the uncertainty in nitrogen content in *this* waste.
  properties: heating value, net 1 MJ
- hydrochloric acid, without water, in 30% solution state: 0.00034533 kg; lognormal variance with pedigree 0.074669, pedigree (1,1,4,1,1)
  Auxilliary inputs for the wastewater treatment stage of the incinerator plant.
  Uncertainty: uncertainty calculated from uncertainty in average HCl input, of transfer coefficients in the incinerator, and the uncertainty of the waste composition of this waste
  properties: heating value, net 3.32 MJ, wet mass 1 kg, dry mass 1 kg
- chemical, inorganic: 0.00016239 kg; lognormal variance with pedigree 0.22131, pedigree (1,1,4,1,1)
  Auxilliary inputs for the wastewater treatment stage of the incinerator plant. Proxy for Polyelectrolyte.
  Uncertainty: uncertainty calculated from uncertainty in average Polyelectrolyte input, of transfer coefficients in the incinerator, and the uncertainty of the waste composition of this waste
  properties: wet mass 1 kg, dry mass 1 kg, carbon content, fossil 0.003
- iron (III) chloride, without water, in 40% solution state: 6.9473e-5 kg; lognormal variance with pedigree 0.26522, pedigree (1,1,4,1,1)
  Auxilliary inputs for the wastewater treatment stage of the incinerator plant.
  Uncertainty: uncertainty calculated from uncertainty in average FeCl3 input, of transfer coefficients in the incinerator, and the uncertainty of the waste composition of this waste
  properties: dry mass 1 kg, wet mass 1 kg
- chemical, organic: 2.69e-5 kg; lognormal variance with pedigree 0.75343, pedigree (1,1,4,1,1)
  Auxilliary inputs for the wastewater treatment stage of the incinerator plant. Proxy for (pure) Trisodium-trimercapto-s-triazine (CAS 17766-26-6), used as 15% diluted solution, aka TMT15.
  Uncertainty: uncertainty calculated from uncertainty in average TMT15 input, of transfer coefficients in the incinerator, and the uncertainty of the waste composition of this waste
  properties: dry mass 1 kg, wet mass 1 kg, carbon content, fossil 0.628, heating value, net 19.03 MJ
- cement, unspecified: 0.0045426 kg; lognormal variance with pedigree 0.071298, pedigree (1,1,4,1,1)
  Cement required for solidification of landfilled residual material.
  Uncertainty: Uncertainty calculated from uncertainty of the waste composition of this waste, of transfer coefficients in the incinerator and of the solidification recipe.
  properties: wet mass 1 kg, dry mass 1 kg
- cationic resin: 4.0103e-6 kg; lognormal variance with pedigree 1.6064, pedigree (1,1,4,1,1)
  Auxilliary input for mercury removal in filter ash treatment (FLUWA).
  Uncertainty: uncertainty calculated from uncertainty in of transfer coefficients in the incinerator, and the uncertainty of the waste composition of this waste
  properties: water content 1, carbon content, fossil 0.521606, dry mass 0.5 kg, wet mass 1 kg, heating value, net 6.68 MJ
- water, decarbonised: 1.9251 kg; lognormal variance with pedigree 0.26522, pedigree (1,1,4,1,1)
  Incinerator process water used in flue gas scrubber stage.
  Uncertainty: uncertainty calculated from uncertainty in average water input, and the uncertainty of the waste composition of this waste
  properties: wet mass 1 kg
- municipal waste incineration facility: 2.5e-10 unit
  Demands per kilogram waste.
- slag landfill: 1.7474e-10 unit; lognormal variance with pedigree 0.042709, pedigree (1,1,4,1,1)
  Landfill infrastructure required for landfilling of bottom ash.
  Uncertainty: uncertainty is calculated from uncertainties in waste composition and transfer coefficients in incinerator
- titanium dioxide: 0.00013805 kg; lognormal variance with pedigree 1.0339, pedigree (1,1,4,1,1)
  Input to DeNOx stage (TiO2 catalyst carrier)
  Uncertainty: uncertainty calculated from uncertainty in average DeNOx input, uncertainty in the share of thermal NOx, uncertainty of nitrogen content in average municipal waste and the uncertainty in nitrogen content in *this* waste.
  properties: wet mass 1 kg, dry mass 1 kg
- process-specific burdens, slag landfill: 0.09829 kg; lognormal variance with pedigree 0.042709, pedigree (1,1,4,1,1)
  Mass-specific expenditures required for landfilling of bottom ash.;activityLink introduced to establish a direct link to the corresponding regional supply of this product
  Uncertainty: uncertainty is calculated from uncertainties in waste composition and transfer coefficients in incinerator
- residual material landfill: 4.7171e-11 unit; lognormal variance with pedigree 0.062214, pedigree (1,1,4,1,1)
  Landfill infrastructure required for landfilling of incineration residues.
  Uncertainty: uncertainty is calculated from uncertainties in waste composition and transfer coefficients in incinerator
- sodium hydroxide, without water, in 50% solution state: 0.0011196 kg; lognormal variance with pedigree 0.19047, pedigree (1,1,4,1,1)
  Auxilliary inputs for the flue gas treatment stage of the incinerator plant, and partially in the filter ash treatment (FLUWA).
  Uncertainty: uncertainty calculated from uncertainty in average NaOH input, of transfer coefficients in the incinerator, and the uncertainty of the waste composition of this waste
  properties: heating value, net 3.03 MJ, dry mass 1 kg, wet mass 1 kg
- quicklime, milled, packed: 0.0035617 kg; lognormal variance with pedigree 0.38791, pedigree (1,1,4,1,1)
  Auxilliary inputs for the flue gas treatment stage of the incinerator plant.
  Uncertainty: uncertainty calculated from uncertainty in average CaO input, of transfer coefficients in the incinerator, and the uncertainty of the waste composition of this waste
  properties: wet mass 1 kg, dry mass 0.99 kg, water content 0.010101
- process-specific burdens, residual material landfill: 0.022642 kg; lognormal variance with pedigree 0.062214, pedigree (1,1,4,1,1)
  Mass-specific expenditures required for landfilling of incineration residues.;activityLink introduced to establish a direct link to the corresponding regional supply of this product
  Uncertainty: uncertainty is calculated from uncertainties in waste composition and transfer coefficients in incinerator
- spent activated carbon with mercury: -4.2214e-6 kg; name BP_amount_1; lognormal variance with pedigree 1.6064, pedigree (1,1,4,1,1)
  Spent ion exchanger charged with mercury, from FLUWA filter ash treatment, approximated here with Spent activated carbon with mercury, deposited undergound in a polyethylene Big Bag.
  Uncertainty: uncertainty calculated from uncertainty in of transfer coefficients in the incinerator, and the uncertainty of the waste composition of this waste.
  production volume 3.37923 kg; = ABS(RP_PV_1 * (BP_amount_1 / RP_amount_1))
    Calculated from production volume of reference product using the relative outputs.
  property price 0 EUR2005; name BP_amount_1_price_EUR2005
  properties: wet mass 1 kg, heating value, net 18.18 MJ, carbon content, fossil 0.6, dry mass 1 kg
- hydrogen peroxide, without water, in 50% solution state: 0.00077029 kg; lognormal variance with pedigree 0.090387, pedigree (1,1,4,1,1)
  Auxilliary oxidising agent for filter ash treatment (FLUWA).
  Uncertainty: uncertainty calculated from uncertainty in of transfer coefficients in the incinerator, and the uncertainty of the waste composition of this waste
  properties: heating value, net 7.13 MJ, dry mass 1 kg, wet mass 1 kg
- transport, freight, lorry, unspecified: 0.0046292 metric ton*km; lognormal variance with pedigree 0.033818, pedigree (1,1,4,1,1)
  Transport services to transport incineration residues to landfills and filter ash to external treatments (FLUWA).
  Uncertainty: uncertainty calculated from uncertainty of the waste composition of this waste, uncertainty of transfer coefficients and the uncertainty in generic transportation distances
- metalliferous hydroxide sludge: -0.0034837 kg; lognormal variance with pedigree 0.069621, pedigree (1,1,4,1,1)
  (same comment as for metalliferous hydroxide sludge)
  production volume 2788.7 kg
  properties: chlorine content 0.17415, oxygen content 0.32321, sulfur content 0.027969, bromine content 0.1161, cadmium content 0.054867, antimony content 0.055615, calcium content 0.033552, water content 3, zinc content 0.14459, carbon content, fossil 0.046248, dry mass 0.25 kg, wet mass 1 kg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
- iron scrap, sorted, pressed: -0.0074029 kg; lognormal variance with pedigree 0.34316, pedigree (1,1,4,1,1)
  (same comment as for iron scrap, sorted, pressed)
  production volume 5926 kg
  properties: wet mass 1 kg, dry mass 1 kg, price 0.175 EUR2005
- aluminium scrap, post-consumer, prepared for melting: -0.0010141 kg; lognormal variance with pedigree 0.44945, pedigree (1,1,4,1,1)
  (same comment as for aluminium scrap, post-consumer, prepared for melting)
  production volume 811.76 kg
  properties: wet mass 1 kg, price 0.806 EUR2005, dry mass 1 kg
- copper scrap, sorted, pressed: -0.0060778 kg; lognormal variance with pedigree 0.28835, pedigree (1,1,4,1,1)
  (same comment as for copper scrap, sorted, pressed)
  production volume 4865.2 kg
  properties: dry mass 1 kg, wet mass 1 kg, price 2.84 EUR2005

## Inputs from nature
- Oxygen [natural resource, in air]: 2.6274 kg; lognormal variance with pedigree 0.0175006, pedigree (1,1,4,1,1)
  Oxygen from ambient air needed to combust and oxidise this waste. Net demand, i.e. without O2 leaving the plant in flue gas uncombusted.
  Uncertainty: uncertainty is calculated from uncertainties in waste composition and transfer coefficients to flue gas and soild residues in incinerator

## Emissions to nature
- Chromium [air, urban air close to ground]: 4.2675e-8 kg; lognormal variance with pedigree 1.0387, pedigree (1,1,4,1,1)
  Emission to air from waste composition and transfer coefficients.
  Uncertainty: uncertainty is calculated from uncertainties in waste composition and transfer coefficients in incinerator
- Nickel, ion [water, ground-, long-term]: 0.00047199 kg; lognormal variance with pedigree 0.74902, pedigree (1,1,4,1,1)
  Long-term emissions from landfilling of incineration residues.
  Uncertainty: uncertainty is calculated from uncertainties in waste composition and transfer coefficients in incinerator and landfills.
- Molybdenum [water, surface water]: 4.6468e-7 kg; lognormal variance with pedigree 0.92274, pedigree (1,1,4,1,1)
  Emissions to water from waste composition and transfer coefficients in incinerator and landfills.
  Uncertainty: uncertainty is calculated from uncertainties in waste composition and transfer coefficients in incinerator and landfills
- Copper [air, urban air close to ground]: 2.7233e-7 kg; lognormal variance with pedigree 0.32758, pedigree (1,1,4,1,1)
  (same comment as for Chromium)
- Lead [water, ground-, long-term]: 0.00063858 kg; lognormal variance with pedigree 0.79815, pedigree (1,1,4,1,1)
  (same comment as for Nickel, ion)
- Nickel, ion [water, surface water]: 3.1831e-7 kg; lognormal variance with pedigree 1.3864, pedigree (1,1,4,1,1)
  (same comment as for Molybdenum)
- Mercury [air, urban air close to ground]: 2.2435e-8 kg; lognormal variance with pedigree 1.6132, pedigree (1,1,4,1,1)
  (same comment as for Chromium)
- Antimony [water, ground-, long-term]: 0.0018117 kg; lognormal variance with pedigree 0.4193, pedigree (1,1,4,1,1)
  (same comment as for Nickel, ion)
- Lead [water, surface water]: 1.9239e-8 kg; lognormal variance with pedigree 1.4189, pedigree (1,1,4,1,1)
  (same comment as for Molybdenum)
- Manganese [air, urban air close to ground]: 1.2267e-9 kg; lognormal variance with pedigree 1.1196, pedigree (1,1,4,1,1)
  (same comment as for Chromium)
- Selenium [water, ground-, long-term]: 1.3998e-6 kg; lognormal variance with pedigree 0.96995, pedigree (1,1,4,1,1)
  (same comment as for Nickel, ion)
- Antimony [water, surface water]: 0.00087726 kg; lognormal variance with pedigree 0.44579, pedigree (1,1,4,1,1)
  (same comment as for Molybdenum)
- Molybdenum [air, urban air close to ground]: 3.6745e-9 kg; lognormal variance with pedigree 1.4624, pedigree (1,1,4,1,1)
  (same comment as for Chromium)
- Tin, ion [water, ground-, long-term]: 0.00013588 kg; lognormal variance with pedigree 0.97435, pedigree (1,1,4,1,1)
  (same comment as for Nickel, ion)
- Selenium [water, surface water]: 3.6344e-7 kg; lognormal variance with pedigree 1.0609, pedigree (1,1,4,1,1)
  (same comment as for Molybdenum)
- Nickel [air, urban air close to ground]: 5.8587e-7 kg; lognormal variance with pedigree 0.78174, pedigree (1,1,4,1,1)
  (same comment as for Chromium)
- Vanadium, ion [water, ground-, long-term]: 8.0571e-7 kg; lognormal variance with pedigree 2.1487, pedigree (1,1,4,1,1)
  (same comment as for Nickel, ion)
- Tin, ion [water, surface water]: 1.7098e-7 kg; lognormal variance with pedigree 0.79782, pedigree (1,1,4,1,1)
  (same comment as for Molybdenum)
- Lead [air, urban air close to ground]: 1.1306e-8 kg; lognormal variance with pedigree 0.75986, pedigree (1,1,4,1,1)
  (same comment as for Chromium)
- Zinc, ion [water, ground-, long-term]: 0.00032393 kg; lognormal variance with pedigree 1.5211, pedigree (1,1,4,1,1)
  (same comment as for Nickel, ion)
- Vanadium, ion [water, surface water]: 3.2439e-9 kg; lognormal variance with pedigree 1.5527, pedigree (1,1,4,1,1)
  (same comment as for Molybdenum)
- Antimony [air, urban air close to ground]: 3.5758e-9 kg; lognormal variance with pedigree 0.54436, pedigree (1,1,4,1,1)
  (same comment as for Chromium)
- Beryllium [water, ground-, long-term]: 4.076e-7 kg; lognormal variance with pedigree 1.6426, pedigree (1,1,4,1,1)
  (same comment as for Nickel, ion)
- Zinc, ion [water, surface water]: 4.3718e-8 kg; lognormal variance with pedigree 0.64901, pedigree (1,1,4,1,1)
  (same comment as for Molybdenum)
- Selenium [air, urban air close to ground]: 2.1762e-8 kg; lognormal variance with pedigree 1.5056, pedigree (1,1,4,1,1)
  (same comment as for Chromium)
- Strontium [water, ground-, long-term]: 7.6792e-5 kg; lognormal variance with pedigree 1.00478, pedigree (1,1,4,1,1)
  (same comment as for Nickel, ion)
- Beryllium [water, surface water]: 2.7029e-10 kg; lognormal variance with pedigree 2.2839, pedigree (1,1,4,1,1)
  (same comment as for Molybdenum)
- Tin [air, urban air close to ground]: 1.2344e-10 kg; lognormal variance with pedigree 0.95041, pedigree (1,1,4,1,1)
  (same comment as for Chromium)
- Titanium, ion [water, ground-, long-term]: 0.0012472 kg; lognormal variance with pedigree 0.72971, pedigree (1,1,4,1,1)
  (same comment as for Nickel, ion)
- Strontium [water, surface water]: 5.0258e-8 kg; lognormal variance with pedigree 1.6738, pedigree (1,1,4,1,1)
  (same comment as for Molybdenum)
- Vanadium [air, urban air close to ground]: 1.4807e-8 kg; lognormal variance with pedigree 1.39, pedigree (1,1,4,1,1)
  (same comment as for Chromium)
- Thallium [water, ground-, long-term]: 2.6667e-7 kg; lognormal variance with pedigree 1.4415, pedigree (1,1,4,1,1)
  (same comment as for Nickel, ion)
- Titanium, ion [water, surface water]: 8.4844e-7 kg; lognormal variance with pedigree 0.39175, pedigree (1,1,4,1,1)
  (same comment as for Molybdenum)
- Zinc [air, urban air close to ground]: 4.7858e-7 kg; lognormal variance with pedigree 0.73076, pedigree (1,1,4,1,1)
  (same comment as for Chromium)
- Silicon [water, ground-, long-term]: 0.00066363 kg; lognormal variance with pedigree 5.1951, pedigree (1,1,4,1,1)
  (same comment as for Nickel, ion)
- Thallium [water, surface water]: 2.4732e-10 kg; lognormal variance with pedigree 1.7302, pedigree (1,1,4,1,1)
  (same comment as for Molybdenum)
- Strontium [air, urban air close to ground]: 7.6874e-9 kg; lognormal variance with pedigree 1.0387, pedigree (1,1,4,1,1)
  (same comment as for Chromium)
- Iron, ion [water, ground-, long-term]: 0.0035617 kg; lognormal variance with pedigree 0.46685, pedigree (1,1,4,1,1)
  (same comment as for Nickel, ion)
- Silicon [water, surface water]: 1.7645e-6 kg; lognormal variance with pedigree 0.60464, pedigree (1,1,4,1,1)
  (same comment as for Molybdenum)
- Titanium [air, urban air close to ground]: 3.4576e-6 kg; lognormal variance with pedigree 0.50235, pedigree (1,1,4,1,1)
  (same comment as for Chromium)
- Calcium, ion [water, ground-, long-term]: 0.0033689 kg; lognormal variance with pedigree 0.45294, pedigree (1,1,4,1,1)
  (same comment as for Nickel, ion)
- Iron, ion [water, surface water]: 7.4134e-8 kg; lognormal variance with pedigree 1.3834, pedigree (1,1,4,1,1)
  (same comment as for Molybdenum)
- Thallium [air, urban air close to ground]: 3.4745e-10 kg; lognormal variance with pedigree 1.7339, pedigree (1,1,4,1,1)
  (same comment as for Chromium)
- Potassium, ion [water, ground-, long-term]: 7.8149e-5 kg; lognormal variance with pedigree 0.64811, pedigree (1,1,4,1,1)
  (same comment as for Nickel, ion)
- Calcium, ion [water, surface water]: 5.5622e-5 kg; lognormal variance with pedigree 0.24624, pedigree (1,1,4,1,1)
  (same comment as for Molybdenum)
- Silicon [air, urban air close to ground]: 4.2989e-9 kg; lognormal variance with pedigree 0.49539, pedigree (1,1,4,1,1)
  (same comment as for Chromium)
- Aluminium [water, ground-, long-term]: 0.0039217 kg; lognormal variance with pedigree 0.4289, pedigree (1,1,4,1,1)
  (same comment as for Nickel, ion)
- Aluminium [water, surface water]: 2.4963e-7 kg; lognormal variance with pedigree 0.79603, pedigree (1,1,4,1,1)
  (same comment as for Molybdenum)
- Iron [air, urban air close to ground]: 2.6326e-9 kg; lognormal variance with pedigree 0.41998, pedigree (1,1,4,1,1)
  (same comment as for Chromium)
- Sodium, ion [water, ground-, long-term]: 0.00067077 kg; lognormal variance with pedigree 0.6635, pedigree (1,1,4,1,1)
  (same comment as for Nickel, ion)
- Potassium, ion [water, surface water]: 2.9534e-5 kg; lognormal variance with pedigree 0.38213, pedigree (1,1,4,1,1)
  (same comment as for Molybdenum)
- Calcium [air, urban air close to ground]: 2.2798e-5 kg; lognormal variance with pedigree 0.50931, pedigree (1,1,4,1,1)
  (same comment as for Chromium)
- NMVOC, non-methane volatile organic compounds, unspecified origin [air, urban air close to ground]: 6.3027e-7 kg; lognormal variance with pedigree 0.07553, pedigree (1,1,4,1,1)
  Incomplete combustion product emitted to air.
  Uncertainty: uncertainty calculated from uncertainty in average operation emissions, and the uncertainty of the flue gas volume from this waste.
- Sodium, ion [water, surface water]: 0.00012416 kg; lognormal variance with pedigree 0.54071, pedigree (1,1,4,1,1)
  (same comment as for Molybdenum)
- Aluminium [air, urban air close to ground]: 1.8189e-9 kg; lognormal variance with pedigree 0.52329, pedigree (1,1,4,1,1)
  (same comment as for Chromium)
- Particulates, < 2.5 um [air, urban air close to ground]: 1.6535e-6 kg; lognormal variance with pedigree 0.37577, pedigree (1,1,4,1,1)
  (same comment as for NMVOC, non-methane volatile organic compounds, unspecified origin)
- Chromium, ion [water, surface water]: 6.3447e-9 kg; lognormal variance with pedigree 0.65532, pedigree (1,1,4,1,1)
  (same comment as for Molybdenum)
- Potassium [air, urban air close to ground]: 5.3809e-7 kg; lognormal variance with pedigree 0.97248, pedigree (1,1,4,1,1)
  (same comment as for Chromium)
- Particulates, > 2.5 um, and < 10um [air, urban air close to ground]: 8.3089e-9 kg; lognormal variance with pedigree 0.17098, pedigree (1,1,4,1,1)
  (same comment as for NMVOC, non-methane volatile organic compounds, unspecified origin)
- BOD5, Biological Oxygen Demand [water, ground-, long-term]: 0.0018771 kg; lognormal variance with pedigree 0.020218, pedigree (1,1,4,1,1)
  (same comment as for Nickel, ion)
- BOD5, Biological Oxygen Demand [water, surface water]: 0.00057613 kg; lognormal variance with pedigree 0.026259, pedigree (1,1,4,1,1)
  (same comment as for Molybdenum)
- Dioxins, measured as 2,3,7,8-tetrachlorodibenzo-p-dioxin [air, urban air close to ground]: 2.7696e-14 kg; lognormal variance with pedigree 0.37577, pedigree (1,1,4,1,1)
  (same comment as for NMVOC, non-methane volatile organic compounds, unspecified origin)
- TOC, Total Organic Carbon [water, ground-, long-term]: 0.0022708 kg; lognormal variance with pedigree 0.020218, pedigree (1,1,4,1,1)
  (same comment as for Nickel, ion)
- Sodium [air, urban air close to ground]: 1.0662e-6 kg; lognormal variance with pedigree 0.71624, pedigree (1,1,4,1,1)
  (same comment as for Chromium)
- Benzene [air, urban air close to ground]: 1.3849e-8 kg; lognormal variance with pedigree 0.07553, pedigree (1,1,4,1,1)
  (same comment as for NMVOC, non-methane volatile organic compounds, unspecified origin)
- COD, Chemical Oxygen Demand [water, ground-, long-term]: 0.0057388 kg; lognormal variance with pedigree 0.020218, pedigree (1,1,4,1,1)
  (same comment as for Nickel, ion)
- TOC, Total Organic Carbon [water, surface water]: 0.00025679 kg; lognormal variance with pedigree 0.026047, pedigree (1,1,4,1,1)
  (same comment as for Molybdenum)
- Toluene [air, urban air close to ground]: 2.7698e-8 kg; lognormal variance with pedigree 0.07553, pedigree (1,1,4,1,1)
  (same comment as for NMVOC, non-methane volatile organic compounds, unspecified origin)
- Sulfate [water, ground-, long-term]: 0.00097959 kg; lognormal variance with pedigree 0.58673, pedigree (1,1,4,1,1)
  (same comment as for Nickel, ion)
- COD, Chemical Oxygen Demand [water, surface water]: 0.00058873 kg; lognormal variance with pedigree 0.026068, pedigree (1,1,4,1,1)
  (same comment as for Molybdenum)
- Benzene, pentachloro- [air, urban air close to ground]: 7.317e-11 kg; lognormal variance with pedigree 0.07553, pedigree (1,1,4,1,1)
  (same comment as for NMVOC, non-methane volatile organic compounds, unspecified origin)
- Carbon monoxide, fossil [air, urban air close to ground]: 2.3542e-5 kg; lognormal variance with pedigree 0.75079, pedigree (1,1,4,1,1)
  (same comment as for NMVOC, non-methane volatile organic compounds, unspecified origin)
- DOC, Dissolved Organic Carbon [water, ground-, long-term]: 0.0022708 kg; lognormal variance with pedigree 0.020218, pedigree (1,1,4,1,1)
  (same comment as for Nickel, ion)
- Sulfate [water, surface water]: 0.00016513 kg; lognormal variance with pedigree 0.40985, pedigree (1,1,4,1,1)
  (same comment as for Molybdenum)
- Benzene, hexachloro- [air, urban air close to ground]: 2.8958e-11 kg; lognormal variance with pedigree 0.07553, pedigree (1,1,4,1,1)
  (same comment as for NMVOC, non-methane volatile organic compounds, unspecified origin)
- Carbon dioxide, fossil [air, urban air close to ground]: 2.8224 kg; lognormal variance with pedigree 0.010045, pedigree (1,1,4,1,1)
  (same comment as for Chromium)
- Nitrate [water, ground-, long-term]: 0.00044406 kg; lognormal variance with pedigree 0.35946, pedigree (1,1,4,1,1)
  (same comment as for Nickel, ion)
- DOC, Dissolved Organic Carbon [water, surface water]: 0.00025679 kg; lognormal variance with pedigree 0.026047, pedigree (1,1,4,1,1)
  (same comment as for Molybdenum)
- Phenol, pentachloro- [air, urban air close to ground]: 6.0311e-12 kg; lognormal variance with pedigree 0.07553, pedigree (1,1,4,1,1)
  (same comment as for NMVOC, non-methane volatile organic compounds, unspecified origin)
- Methane, fossil [air, urban air close to ground]: 2.0774e-7 kg; lognormal variance with pedigree 0.07553, pedigree (1,1,4,1,1)
  (same comment as for NMVOC, non-methane volatile organic compounds, unspecified origin)
- Phosphate [water, ground-, long-term]: 4.2368e-5 kg; lognormal variance with pedigree 5.1452, pedigree (1,1,4,1,1)
  (same comment as for Nickel, ion)
- Nitrate [water, surface water]: 0.00015906 kg; lognormal variance with pedigree 0.23815, pedigree (1,1,4,1,1)
  (same comment as for Molybdenum)
- Benzo(a)pyrene [air, urban air close to ground]: 3.0819e-13 kg; lognormal variance with pedigree 0.37577, pedigree (1,1,4,1,1)
  (same comment as for NMVOC, non-methane volatile organic compounds, unspecified origin)
- Sulfur dioxide [air, urban air close to ground]: 4.2123e-6 kg; lognormal variance with pedigree 0.79537, pedigree (1,1,4,1,1)
  (same comment as for Chromium)
- Chloride [water, ground-, long-term]: 0.00079665 kg; lognormal variance with pedigree 0.41908, pedigree (1,1,4,1,1)
  (same comment as for Nickel, ion)
- Phosphate [water, surface water]: 6.9387e-7 kg; lognormal variance with pedigree 0.36976, pedigree (1,1,4,1,1)
  (same comment as for Molybdenum)
- Heat, waste [air, urban air close to ground]: 25.261 MJ; lognormal variance with pedigree 0.023721, pedigree (1,1,4,1,1)
  Waste heat generated from heating value of this waste plus any electricity required to process it.
  Uncertainty: uncertainty is calculated from uncertainties in waste composition and uncertainties in energy efficiency and the uncertainty in internal energy demand
- Nitrogen oxides [air, urban air close to ground]: 0.00082038 kg; lognormal variance with pedigree 0.73212, pedigree (1,1,4,1,1)
  Sum of fuel-Nox and thermal-NOx emitted to air after DeNOx stage.
  Uncertainty: uncertainty calculated from uncertainty in average N-emissions and uncertainty in the share of thermal NOx and the uncertainty in nitrogen content in *this* waste.
- Bromine [water, ground-, long-term]: 0.00026541 kg; lognormal variance with pedigree 0.46604, pedigree (1,1,4,1,1)
  (same comment as for Nickel, ion)
- Chloride [water, surface water]: 0.0053701 kg; lognormal variance with pedigree 0.16414, pedigree (1,1,4,1,1)
  (same comment as for Molybdenum)
- Water [air, urban air close to ground]: 0.00183143 m3; lognormal variance with pedigree 0.75424, pedigree (1,1,4,1,1)
  Water vapour from waste humidity, hydrogen oxidation and part of the process water.
  Uncertainty: Uncertainty calculated from uncertainty in waste composition, process water input and the uncertainty of fraction to air.
- Ammonia [air, urban air close to ground]: 2.5907e-6 kg; lognormal variance with pedigree 0.73212, pedigree (1,1,4,1,1)
  Nitrogen species emitted to air after DeNOx stage.
  Uncertainty: uncertainty calculated from uncertainty in average N-emissions and uncertainty in the share of thermal NOx and the uncertainty in nitrogen content in *this* waste.
- Fluoride [water, ground-, long-term]: 0.00015526 kg; lognormal variance with pedigree 0.51602, pedigree (1,1,4,1,1)
  (same comment as for Nickel, ion)
- Bromine [water, surface water]: 0.0047508 kg; lognormal variance with pedigree 0.118, pedigree (1,1,4,1,1)
  (same comment as for Molybdenum)
- Heat, waste [water, surface water]: 5.812 MJ; lognormal variance with pedigree 0.023721, pedigree (1,1,4,1,1)
  (same comment as for Heat, waste)
- Dinitrogen monoxide [air, urban air close to ground]: 0.00018466 kg; lognormal variance with pedigree 1.1241, pedigree (1,1,4,1,1)
  (same comment as for Ammonia)
- Silver, ion [water, ground-, long-term]: 0.00011086 kg; lognormal variance with pedigree 0.9563, pedigree (1,1,4,1,1)
  (same comment as for Nickel, ion)
- Fluoride [water, surface water]: 6.7732e-5 kg; lognormal variance with pedigree 0.54302, pedigree (1,1,4,1,1)
  (same comment as for Molybdenum)
- Cyanide [air, urban air close to ground]: 3.9671e-5 kg; lognormal variance with pedigree 1.1241, pedigree (1,1,4,1,1)
  (same comment as for Ammonia)
- Arsenic, ion [water, ground-, long-term]: 4.2564e-6 kg; lognormal variance with pedigree 1.324, pedigree (1,1,4,1,1)
  (same comment as for Nickel, ion)
- Silver, ion [water, surface water]: 3.849e-9 kg; lognormal variance with pedigree 2.0519, pedigree (1,1,4,1,1)
  (same comment as for Molybdenum)
- Water [water, surface water]: 0.000655092 m3; lognormal variance with pedigree 1.1343, pedigree (1,1,4,1,1)
  Process water released to surface water.
  Uncertainty: uncertainty calculated from uncertainty in process water input and the uncertainty of fraction to surface water.
- Phosphorus [air, urban air close to ground]: 4.73e-7 kg; lognormal variance with pedigree 0.78174, pedigree (1,1,4,1,1)
  (same comment as for Chromium)
- Barium [water, ground-, long-term]: 0.00012037 kg; lognormal variance with pedigree 1.2568, pedigree (1,1,4,1,1)
  (same comment as for Nickel, ion)
- Arsenic, ion [water, surface water]: 2.6485e-6 kg; lognormal variance with pedigree 1.2127, pedigree (1,1,4,1,1)
  (same comment as for Molybdenum)
- Hydrogen chloride [air, urban air close to ground]: 3.59e-6 kg; lognormal variance with pedigree 0.45436, pedigree (1,1,4,1,1)
  (same comment as for Chromium)
- Cadmium, ion [water, ground-, long-term]: 2.2544e-5 kg; lognormal variance with pedigree 4.925, pedigree (1,1,4,1,1)
  (same comment as for Nickel, ion)
- Barium [water, surface water]: 6.991e-8 kg; lognormal variance with pedigree 0.72456, pedigree (1,1,4,1,1)
  (same comment as for Molybdenum)
- Bromine [air, urban air close to ground]: 2.5574e-6 kg; lognormal variance with pedigree 0.48153, pedigree (1,1,4,1,1)
  (same comment as for Chromium)
- Cobalt [water, ground-, long-term]: 2.4006e-5 kg; lognormal variance with pedigree 1.103, pedigree (1,1,4,1,1)
  (same comment as for Nickel, ion)
- Cadmium, ion [water, surface water]: 2.4958e-8 kg; lognormal variance with pedigree 0.93006, pedigree (1,1,4,1,1)
  (same comment as for Molybdenum)
- Hydrogen fluoride [air, urban air close to ground]: 1.5701e-6 kg; lognormal variance with pedigree 0.86882, pedigree (1,1,4,1,1)
  (same comment as for Chromium)
- Chromium VI [water, ground-, long-term]: 2.7292e-6 kg; lognormal variance with pedigree 2.8951, pedigree (1,1,4,1,1)
  (same comment as for Nickel, ion)
- Cobalt [water, surface water]: 4.5215e-9 kg; lognormal variance with pedigree 1.6612, pedigree (1,1,4,1,1)
  (same comment as for Molybdenum)
- Arsenic [air, urban air close to ground]: 5.4689e-8 kg; lognormal variance with pedigree 1.3318, pedigree (1,1,4,1,1)
  (same comment as for Chromium)
- Copper, ion [water, ground-, long-term]: 0.016826 kg; lognormal variance with pedigree 0.2777, pedigree (1,1,4,1,1)
  (same comment as for Nickel, ion)
- Chromium VI [water, surface water]: 7.4476e-7 kg; lognormal variance with pedigree 1.0953, pedigree (1,1,4,1,1)
  (same comment as for Molybdenum)
- Barium [air, urban air close to ground]: 6.4672e-7 kg; lognormal variance with pedigree 0.91365, pedigree (1,1,4,1,1)
  (same comment as for Chromium)
- Mercury [water, ground-, long-term]: 1.6617e-7 kg; lognormal variance with pedigree 1.6396, pedigree (1,1,4,1,1)
  (same comment as for Nickel, ion)
- Copper, ion [water, surface water]: 7.4419e-7 kg; lognormal variance with pedigree 1.153, pedigree (1,1,4,1,1)
  (same comment as for Molybdenum)
- Cadmium [air, urban air close to ground]: 7.1487e-8 kg; lognormal variance with pedigree 0.95041, pedigree (1,1,4,1,1)
  (same comment as for Chromium)
- Manganese [water, ground-, long-term]: 4.2786e-5 kg; lognormal variance with pedigree 1.0825, pedigree (1,1,4,1,1)
  (same comment as for Nickel, ion)
- Mercury [water, surface water]: 4.2104e-9 kg; lognormal variance with pedigree 1.7762, pedigree (1,1,4,1,1)
  (same comment as for Molybdenum)
- Cobalt [air, urban air close to ground]: 4.9905e-8 kg; lognormal variance with pedigree 1.1563, pedigree (1,1,4,1,1)
  (same comment as for Chromium)
- Molybdenum [water, ground-, long-term]: 2.1531e-6 kg; lognormal variance with pedigree 1.4429, pedigree (1,1,4,1,1)
  (same comment as for Nickel, ion)
- Manganese [water, surface water]: 2.7237e-9 kg; lognormal variance with pedigree 1.9011, pedigree (1,1,4,1,1)
  (same comment as for Molybdenum)

## Extrapolations
This dataset has been extrapolated from year 2012 to the year of the calculation (2021). The uncertainty has been adjusted accordingly.
