# treatment of used cathode ray tube display, manual dismantling

Dataset: EcoSpold 2, unit process
Geography: CH
Time period: 2005-01-01 to 2021-12-31
Technology level: current
Classification: EcoSpold01Categories: waste management/recycling
Classification: ISIC rev.4 ecoinvent: 3830:Materials recovery
Tags: ConvertedDataset; Treatment
Scenario: Business-as-Usual
System model: Allocation, cut-off by classification
Share of production covered: 100 %
Generated by: Roland Hischier
Published in: Hischier R. 2007
Database: ecoinvent
isCopyrightProtected: true
accessRestrictedTo: 1

## General comment
manual dismantling in various fractions based on common transfer coefficients for this type of treatment. Data from own experiences in Switzerland.
[This dataset was already contained in the ecoinvent database version 2. It was not individually updated during the transfer to ecoinvent version 3. Life Cycle Impact Assessment results may still have changed, as they are affected by changes in the supply chain, i.e. in other datasets. This dataset was generated following the ecoinvent quality guidelines for version 2. It may have been subject to central changes described in the ecoinvent version 3 change report (http://www.ecoinvent.org/database/ecoinvent-version-3/reports-of-changes/), and the results of the central updates were reviewed extensively. The changes added e.g. consistent water flows and other information throughout the database. The documentation of this dataset can be found in the ecoinvent reports of version 2, which are still available via the ecoinvent website. The change report linked above covers all central changes that were made during the conversion process.]

## Included activities end
This dataset represents the manual dismantling of a WEEE devices in Switzerland.

## Geography
data of situation in Switzerland

## Technology
current manual dismantling activities in Switzerland.

## Reference product
- used cathode ray tube display: -1 kg; name used_CRT_RP; CPC 39990: Other wastes n.e.c.; By-product classification Waste
  EcoSpold01Location=CH
  production volume 0.23 kg; name RP_PV_1
    Unknown
    proportion; source: Hischier 2005; value to be replaced by value to be calculated from the demand for this treatment activity
  property carbon content, non-fossil 0.00235652
    Composition data from CRT screen, divided by its weight, 19.86 kg (Tab 4.12, ecoinvent v2.2 report 18_V)
  property price 0 EUR2005; name used_CRT_RP_price_EUR2005
    Waste products are assigned a price of zero as they are assumed to require further treatment.
  property carbon content, fossil 0.163203
    (same comment as for used cathode ray tube display)
  property carbon content 0.16556
    carbon content on a dry matter basis (reserved; not for manual entry)
  properties: water content 0, wet mass 1 kg, water in wet mass 0 kg, dry mass 1 kg, carbon allocation 0.16556 kg

## Inputs from technosphere
- used cable: -0.0231 kg; name used_cable_BP; lognormal variance with pedigree 0.054, pedigree (3,4,5,1,1)
  Calculated - based on composition data
  Uncertainty: calculated - based on composition data
  production volume 0.005313 kg; = ABS(RP_PV_1 * (used_cable_BP / used_CRT_RP))
    Calculated from production volume of reference product using the relative outputs.
  property price 0 EUR2005; name used_cable_BP_price_EUR2005
  properties: wet mass 1 kg, dry mass 1 kg, carbon content, fossil 0.27472
  note on carbon content, fossil: According to the European company, 1 kg cable is split up into 0.66 kg of copper and 0.34 kg of plastics (ecoinvent v2.2 report 18_V, pg 97). Plastic C content (0.808) was calculated using data in Tab A.2, ecoinvent v2.2 report 13_I.
- glass from used cathode ray tube: -0.5336 kg; name glass_BP; lognormal variance with pedigree 0.054, pedigree (3,4,5,1,1)
  EcoSpold01Location=GLO
  Calculated - based on composition data
  Uncertainty: calculated - based on composition data
  production volume 0.122728 kg
    Calculated from the production volume of used cathode ray tube display in proportion to the respective output amounts.
  property price 0 EUR2005; name glass_BP_price_EUR2005
  properties: dry mass 1 kg, wet mass 1 kg, carbon content, fossil 0.00299576
- shredder fraction after manual dismantling of used electronic product: -0.0362 kg; name shredder_fraction_BP; lognormal variance with pedigree 0.054, pedigree (3,4,5,1,1)
  (same comment as for glass from used cathode ray tube)
  production volume 0.008326 kg
    (same comment as for glass from used cathode ray tube)
  property price 0 EUR2005; name shredder_fraction_BP_price_EUR2005
  properties: carbon content, fossil 0.287536, wet mass 1 kg, dry mass 1 kg, heating value, net 8.71 MJ
  note on carbon content, fossil: C content calculated out of (input) shredder fraction composition in Tab 4.47 (ecoinvent v2.2 report 18_V). Carbon content in plastic was calculated using data in Tab A.2, ecoinvent v2.2 report 13_I. Others was also considered plastic, and calculated the same way (from pg 70, ecoinvent v2.2 report 18_V). Ferro was assumed to have a C content of 0.012 kg C/ kg (C content of steel, calculated out of emission factors published in Commission Decision of 18 July 2007 establishing guidelines for the monitoring and reporting of greenhouse gas emissions pursuant to Directive 2003/87/EC of the European Parliament and of the Council (notified under document number C(2007) 3416)). The other component of the fraction were considered to content no C.
- manual treatment facility, waste electric and electronic equipment: 1.6e-8 unit; lognormal variance with pedigree 0.5761, pedigree (4,5,5,3,5)
  EcoSpold01Location=GLO
  Rough estimation of infrastructure
  Uncertainty: rough estimation of infrastructure
- waste plastic, consumer electronics: -0.1639 kg; name waste_plastic_BP; lognormal variance with pedigree 0.054, pedigree (3,4,5,1,1)
  EcoSpold01Location=CH
  Calculated - based on composition data
  Uncertainty: calculated - based on composition data
  production volume 0.037697 kg
    (same comment as for glass from used cathode ray tube)
  property price 0 EUR2005; name waste_plastic_BP_price_EUR2005
  properties: heating value, net 34.78 MJ, dry mass 0.847 kg, wet mass 1 kg, water content 0.180638, carbon content, fossil 0.830215
  note on heating value, net: Assumed equal to "waste plastic, consumer electronics, sorted".
  note on carbon content, fossil: C content in 1 kg DM was calculated using data in Tab A.2, ecoinvent v2.2 report 13_I
- used printed wiring boards: -0.0235 kg; name used_PWB_BP; lognormal variance with pedigree 0.054, pedigree (3,4,5,1,1)
  Calculated - based on composition data
  EcoSpold01Location=GLO
  Uncertainty: calculated - based on composition data
  production volume 0.005405 kg
    (same comment as for glass from used cathode ray tube)
  property price 0 EUR2005; name used_PWB_BP_price_EUR2005
  properties: carbon content, fossil 0.193742, wet mass 1 kg, carbon content, non-fossil 0.000960142, dry mass 1 kg
  note on carbon content, fossil: Composition of printed wiring boards used to calculate C content
- scrap steel: -0.2197 kg; name BP_amount_1; = (ABS(used_CRT_RP)- (used_cable_BP*-1)- (used_PWB_BP*-1)- (shredder_fraction_BP*-1)- (glass_BP*-1)- (waste_plastic_BP*-1))*-1; lognormal variance with pedigree 0.054, pedigree (3,4,5,1,1)
  Calculated value; the scrap steel as an exchange was not present in ecoinvent v2 due to cut-off rules.
  Uncertainty: calculated - based on composition data
  production volume 0.050531 kg; = ABS(RP_PV_1 * (BP_amount_1 / used_CRT_RP))
    Calculated from production volume of reference product using the relative outputs.
  property price 0 EUR2005; name BP_amount_1_price_EUR2005
  properties: dry mass 1 kg, wet mass 1 kg

## Sampling procedure
own experiences

## Extrapolations
This dataset has been extrapolated from year 2005 to the year of the calculation (2021). The uncertainty has been adjusted accordingly.

## Review by Jürgen Sutter 2007-08-31
passed.
