# oat production

Dataset: EcoSpold 2, unit process
Geography: RoW
Time period: 2010-01-01 to 2021-12-31
Technology level: current
Classification: ISIC rev.4 ecoinvent: 0111:Growing of cereals (except rice), leguminous crops and oil seeds
Synonyms: Avena sativa L.
Scenario: Business-as-Usual
System model: Allocation, cut-off by classification
Generated by: Dominique Maxime
Database: ecoinvent
isCopyrightProtected: true
accessRestrictedTo: 1

## General comment
This dataset represents the production of 1 kg of oat grain (wet mass).
This dataset has been extrapolated from an original dataset covering the geography Québec (Canada).
This activity was adapted to include the global average land use change (LUC) emissions according 2nd edition of the Quantis-modified tool developed by Blonk Consultants 'WFLDB-adapted-Blonk 2014 direct-land-use-change-assessment-tool_2015-05-18a.xlsx', tab. 'Country & land use unknown'. The size of the emission depends on (i) the relative crop expansion in all countries of the crop during the last 20 years and (ii) the corresponding, country specific land transformations. The current results are based on the average FAOSTAT data (harvested area) of 2009-2011 and 1989-1991. The weighted average is used which takes into account relative difference in crop expansion into primary forest, secondary forest, grassland, perennial and annual land.

## Included activities start
This activity starts with soil cultivation after the harvest of the previous crop.

## Included activities end
This activity ends after harvest and drying of grains at the farm gate.
The dataset includes the inputs of seeds, mineral and organic fertilisers, pesticides and all machine operations and corresponding machine infrastructure and sheds. Machine operations are: soil cultivation, transport of seeds, fertilisers and pesticides to the field (15 km), sowing, fertilisation, weed control, pest and pathogen control, combine-harvesting, transport from field to farm or local drying centre and drying of grains. Direct field emissions are also included. The use of car, van or pick-up for servicing people, e.g. from farm to field, is not included in the activities. Note that there is likely irrigation involved at the GLO scale, but no data were specifically collected for the dataset since it is extrapolated from the QC-CA geography where no irrigation is applied.

## Geography
This dataset has been copied from an original dataset covering the geography Québec. The uncertainty has been adjusted accordingly.

## Time period
Time of publications

## Parameters
- MCPA-MCPB combined emissions to groundwater: 1.677e-6 kg; name MCPAB_surface; lognormal variance with pedigree 0.0435, pedigree (2,2,2,5,2)
  Modelled with PestLCI 2.0 (Dijkman et al. 2012). See supporting documentation '01 crop production - Québec.pdf' available on ecoinvent reports web page (https://ecoquery.ecoinvent.org/File/Reports).
- water content at harvest: 0.18 kg/kg; name harvest_wc; lognormal variance with pedigree 0.012, pedigree (1,1,1,5,1)
  Grain water content at harvest (wet mass basis). See supporting documentation '01 crop production - Québec.pdf' available on ecoinvent reports web page (https://ecoquery.ecoinvent.org/File/Reports).
- MCPA-MCPB combined emissions to agricultural soil: 6.087e-5 kg; name MCPAB_soil; lognormal variance with pedigree 0.0365, pedigree (2,2,2,5,2)
  (same comment as for MCPA-MCPB combined emissions to groundwater)
- MCPA-MCPB combined emissions to surface water: 7.753e-9 kg; name MCPAB_ground; lognormal variance with pedigree 0.0435, pedigree (2,2,2,5,2)
  (same comment as for MCPA-MCPB combined emissions to groundwater)
- fraction, process water to water, to surface water: 0.2 dimensionless; name fraction_PWtoW_to_surface_water; lognormal variance with pedigree 0.0886, pedigree (4,3,1,1,4)
  For agricultural crop dataset, distinction is made between irrigation water and process water. Process water is the water that comes with manure or pesticide application. A fraction of the process water input evaporates to the air and the remaining is considered emitted to surface water and ground water.
  By default, the same value as for irrigation is assumed: this is a global value similar to the one used in ecoinvent 3 GLO crop datasets.
- yield, agriculture: 2.433 metric ton/ha; name yield_agriculture; lognormal variance with pedigree 0.0101, pedigree (1,2,1,5,1)
  Amount (wet mass) of harvested and dried grains (14.5% water content) per hectare of cultivated land. See supporting documentation '01 crop production - Québec.pdf' available on ecoinvent reports web page (https://ecoquery.ecoinvent.org/File/Reports).
- MCPA-MCPB combined emissions to air: 7.278e-7 kg; name MCPAB_air; lognormal variance with pedigree 0.0435, pedigree (2,2,2,5,2)
  (same comment as for MCPA-MCPB combined emissions to groundwater)
- MCPA-to-MCPB emission ratio: 1 dimensionless; name MCPA_to_MCPB; lognormal variance with pedigree 0.25, pedigree (5,5,5,5,5)
  MCPA and MCPB are aggregated together in the PestLCI 2.0 model (Dijkman et al. 2012). A 50/50 split as been considered as default situation. See supporting documentation '01 crop production - Québec.pdf' available on ecoinvent reports web page (https://ecoquery.ecoinvent.org/File/Reports).
- fraction, process water, to air: 0.58699 dimensionless; name fraction_PW_to_air; lognormal variance with pedigree 0.0409, pedigree (2,2,2,1,1)
  (same comment as for fraction, process water to water, to surface water)

## Reference product
- oat grain: 1 kg; name REF_PRODUCT; CPC 01172: Oats, other; By-product classification allocatable product
  production volume 1.70559e10 kg
    FAOSTAT World 2013
  property dry mass 0.865 kg; name REF_PRODUCT_DM; = REF_PRODUCT_WM- REF_PRODUCT_WWM
  property water content 0.156069; name REF_PRODUCT_water_content; = REF_PRODUCT_WWM/ REF_PRODUCT_DM
  property water in wet mass 0.135 kg; name REF_PRODUCT_WWM
  property price 0.1169 EUR2005; name REF_PRODUCT_price_EUR2005
    Calculated value based on data from United Nations Commodity Trade Statistics Database (comtrade.un.org). UN comtrade category: 1004 Oats. Using exchange rate of 1EURO = 1.209 USD. Average of price of import into 5 main markets (EU, US, JP, IN and CN).
  property carbon content, non-fossil 0.4916; name REF_PRODUCT_C_content_non_fossil
    biogene carbon content on a dry matter basis. Composition data obtained from http://ndb.nal.usda.gov/ndb/search/list (DB number: 20038, Oats). First, composition data were refered to 1 kg dry mass. Then, C-contents were calculated considering a C-content/dry mass of 46% in carbohydrates (including fibres), 53% in proteins and 75% in fats. All data from 'Evolutionary and Biochemical Aspects', A.D. Kay and T. Vrede (in Global Ecology, 2010, Elsevier B.V., S.E. Jørgensen Ed.).
  property wet mass 1 kg; name REF_PRODUCT_WM
  property carbon content 0.4916
    carbon content on a dry matter basis (reserved; not for manual entry)
  properties: carbon content, fossil 0, carbon allocation 0.425234 kg

## Inputs from technosphere
- ammonium sulfate: 0.000261405 kg; lognormal variance with pedigree 0.0119, pedigree (2,2,4,5,2)
  Amount is determined from the mineral nutrient actually used for the crop (CECPA, 2011) and from the overall mineral fertilizers sales, by type of fertilizer, in Québec for agriculture (APNC, 2010). See details for disaggregation in supporting documentation '01 crop production - Québec.pdf' available on ecoinvent reports web page (https://ecoquery.ecoinvent.org/File/Reports).
  properties: wet mass 1 kg, dry mass 1 kg
- pesticide, unspecified: 7.397e-6 kg; lognormal variance with pedigree 0.0433, pedigree (1,2,5,5,2)
  Herbicide, unspecified. See supporting documentation '01 crop production - Québec.pdf' available on ecoinvent reports web page (https://ecoquery.ecoinvent.org/File/Reports).
  properties: wet mass 1 kg, carbon content, fossil 0.486978, dry mass 1 kg
  note on carbon content, fossil: Mean of C content in all pesticides whose formula has been documented in Sutter 2010
- poultry manure, fresh: 0 kg; pedigree (2,2,4,5,2)
  This exchange is temporarily set to 0 so that the dataset is compliant with the ecoinvent v3 Data Quality Guidelines. The modelling of manure production and use will be updated in the near future.
  0.0064522 kg of poultry manure, fresh is needed when producing 1kg of oat.
  Amount is determined from the organic nutrient actually used for the crop (CECPA, 2011) and from data about organic fertilizer production, by type, in Québec (MAPAQ, 2013). See details for disaggregation in supporting documentation '01 crop production - Québec.pdf' available on ecoinvent reports web page (https://ecoquery.ecoinvent.org/File/Reports).
  properties: wet mass 1 kg, nitrogen content 0.04044, carbon content, non-fossil 0.33389, water content 1.63158, dry mass 0.38 kg
- fertilising, by broadcaster: 0.000410959 ha; lognormal variance with pedigree 0.0119, pedigree (2,2,4,5,2)
- manure, liquid, swine: 0 kg; name MANURE_LIQUID_SWINE
  This exchange is temporarily set to 0 so that the dataset is compliant with the ecoinvent v3 Data Quality Guidelines. The modelling of manure production and use will be updated in the near future.
  0.16924 kg of manure, liquid, swine is needed when producing 1kg of oat.
  Amount is determined from the organic nutrient actually used for the crop (CECPA, 2011) and from data about organic fertilizer production, by type, in Québec (MAPAQ, 2013). See details for disaggregation in supporting documentation '01 crop production - Québec.pdf' available on ecoinvent reports web page (https://ecoquery.ecoinvent.org/File/Reports).
  property water in wet mass 0.95 kg; name MANURE_LIQUID_SWINE_WWM
  properties: wet mass 1 kg, carbon content, non-fossil 0.64, water content 19, dry mass 0.05 kg, nitrogen content 0.1
- manure, solid, cattle: 0 kg; name MANURE_SOLID_CATTLE
  This exchange is temporarily set to 0 so that the dataset is compliant with the ecoinvent v3 Data Quality Guidelines. The modelling of manure production and use will be updated in the near future.
  0.45578 kg of manure, solid, cattle is needed when producing 1kg of oat.
  Amount is determined from the organic nutrient actually used for the crop (CECPA, 2011) and from data about organic fertilizer production, by type, in Québec (MAPAQ, 2013). See details for disaggregation in supporting documentation '01 crop production - Québec.pdf' available on ecoinvent reports web page (https://ecoquery.ecoinvent.org/File/Reports).
  property water in wet mass 0.78 kg; name MANURE_SOLID_CATTLE_WWM
  properties: wet mass 1 kg, water content 3.5454, dry mass 0.22 kg, carbon content, non-fossil 0.441, nitrogen content 0.02734
  note on nitrogen content: Total N content on a dry matter basis. Weighted average of beef cattle solid manure (0.02639 kg N/kg dm) and dairy cattle solid manure (0.02789 kg N/kg dm) considering that N supply in central and peripherical agricultural regions is about 63% from dairy and 37% from beef cattle (MAPAQ, 2013). N content from Parent and Gagné (2013).
- manure, liquid, cattle: 0 kg; name MANURE_LIQUID_CATTLE
  This exchange is temporarily set to 0 so that the dataset is compliant with the ecoinvent v3 Data Quality Guidelines. The modelling of manure production and use will be updated in the near future.
  1.0036 kg of manure, liquid, cattle is needed when producing 1kg of oat.
  Amount is determined from the organic nutrient actually used for the crop (CECPA, 2011) and from data about organic fertilizer production, by type, in Québec (MAPAQ, 2013). See details for disaggregation in supporting documentation '01 crop production - Québec.pdf' available on ecoinvent reports web page (https://ecoquery.ecoinvent.org/File/Reports).
  property water in wet mass 0.925 kg; name MANURE_LIQUID_CATTLE_WWM
  properties: dry mass 0.075 kg, water content 12.333, carbon content, non-fossil 0.68, wet mass 1 kg, nitrogen content 0.03681
  note on nitrogen content: Total N content on a dry matter basis. Weighted average of beef cattle liquid manure (0.0425 kg N/kg dm) and dairy cattle liquid manure (0.03611 kg N/kg dm) considering that N supply in central and peripherical agricultural regions is for 89% from dairy and 11% from beef cattle (MAPAQ, 2013). N content from Parent and Gagné (2013).
- ammonia, anhydrous, liquid: 0 kg; pedigree (1,1,1,1,1)
  (same comment as for ammonium sulfate)
  properties: wet mass 1 kg, dry mass 1 kg
- glyphosate: 0.0001245 kg; lognormal variance with pedigree 0.0433, pedigree (1,2,5,5,2)
  See supporting documentation '01 crop production - Québec.pdf' available on ecoinvent reports web page (https://ecoquery.ecoinvent.org/File/Reports).
  properties: wet mass 1 kg, dry mass 1 kg, carbon content, fossil 0.214286
- inorganic nitrogen fertiliser, as N: 0 kg; pedigree (1,1,1,1,1)
  (same comment as for ammonium sulfate)
  properties: wet mass 1 kg, dry mass 1 kg
- packaging, for fertilisers: 0.0856474 kg; lognormal variance with pedigree 0.0592, pedigree (4,3,4,5,4)
  Total amount of active substance/s of fertilisers needed for the production of 'oat grain' is calculated to be circa 4.28E-02 kg. Fertiliser/s used in this dataset is/are: 'ammonia, liquid', 'ammonium nitrate, as N', 'ammonium sulfate, as N', 'lime', 'nitrogen fertiliser, as N', 'phosphate fertiliser, as P2O5', 'potassium chloride, as K2O', 'potassium sulfate, as K2O', 'urea, as N'. The total amount of active substance/s is doubled in order to account for the packaging of the dilluted product of fertiliser/s that is/are applied. Therefore, 8.56E-02 kg of packaging for fertilisers is justified with this exchange.
  properties: heating value, net 25.01 MJ, dry mass 1 kg, price 0.0642 EUR2005, carbon content, fossil 0.825301, wet mass 1 kg
  note on carbon content, fossil: Considering a chemical formula (C2H4)n for polyethylene, carbon content-fossil is calculated to be 0.856286 kg of Carbon per kg of dry mass.
- wheat seed, for sowing: 0.0591781 kg; name SEED; lognormal variance with pedigree 0.0119, pedigree (2,2,4,5,2)
  CECPA 2011. See supporting documentation '01 crop production - Quebec.pdf' available on ecoinvent reports web page (https://ecoquery.ecoinvent.org/File/Reports).
  property water in wet mass 0.135 kg; name SEED_WWM; = REF_PRODUCT_WWM
  property dry mass 0.865 kg; name SEED_DM; = SEED_WM-SEED_WWM
  property water content 0.156069; name SEED_water_content; = SEED_WWM/SEED_DM
  property carbon content, non-fossil 0.4916; name SEED_C_content_non_fossil; = REF_PRODUCT_C_content_non_fossil
  property wet mass 1 kg; name SEED_WM
- packaging, for pesticides: 0.000599874 kg; lognormal variance with pedigree 0.0592, pedigree (4,3,4,5,4)
  Total amount of active substance/s of pesticides needed for the production of oat grain is calculated to be circa 3.00E-04 kg. Pesticide/s used in this dataset is/are: 'glyphosate', 'nitrile-compound', 'pesticide, unspecified', 'phenoxy-compound'. The total amount of active substance/s is doubled in order to account for the packaging of the dilluted product of pesticide/s that is/are applied. Therefore, 6.00E-04 kg of packaging for pesticides is justified with this exchange.
  properties: heating value, net 25.97 MJ, price 0.0642 EUR2005, dry mass 1 kg, carbon content, fossil 0.85714, wet mass 1 kg
- lime: 0.0164548 kg; name LIME_CaCO3; lognormal variance with pedigree 0.0119, pedigree (2,2,4,5,2)
  as CaCO3. CECPA (2011). Étude sur les coûts de production des céréales, du maïs-grain et des oléagineux en 2009 au Québec. [Centre d’Études sur les Coûts de Production en Agriculture], Juillet 2011, 112 p. [in French]. Available at: http://www.cecpa.qc.ca/contenuFichiers/files/etudesAnalyses/etude-complete-cereales-mais-grain-oleagineux-en-2009-quebec_20130501133424.pdf
  properties: carbon content, fossil 0.120005, wet mass 1 kg, dry mass 1 kg
- nitrile-compound: 4.274e-5 kg; lognormal variance with pedigree 0.0433, pedigree (1,2,5,5,2)
  Bromoxynil. See supporting documentation '01 crop production - Québec.pdf' available on ecoinvent reports web page (https://ecoquery.ecoinvent.org/File/Reports).
  properties: wet mass 1 kg, dry mass 1 kg, carbon content, fossil 0.344995
- phenoxy-compound: 0.0001253 kg; lognormal variance with pedigree 0.0433, pedigree (1,2,5,5,2)
  6,329E-05 kg MCPA/MCPB; 3,822E-05 kg 2,4-DB amines, 1,233E-05 kg 2.4-D ester and 1,151E-05 kg dichlorprop. See supporting documentation '01 crop production - Quebec.pdf' available on ecoinvent reports web page (https://ecoquery.ecoinvent.org/File/Reports).
  properties: carbon content, fossil 0.532559, dry mass 1 kg, wet mass 1 kg
- urea: 0 kg; name UREA_N; pedigree (1,1,1,1,1)
  The exchange has been updated from 'urea, as N' into 'urea' and therefore its amount has been scaled (multiplied) from 0.0041 kg by 2.1438 kg of 'urea' per kg of 'urea, as N'. Original comment of the exchange is: Amount is determined from the mineral nutrient actually used for the crop (CECPA, 2011) and from the overall mineral fertilizers sales, by type of fertilizer, in Québec for agriculture (APNC, 2010). See details for disaggregation in supporting documentation '01 crop production - Québec.pdf' available on ecoinvent reports web page (https://ecoquery.ecoinvent.org/File/Reports).
  properties: carbon content, fossil 0.2, wet mass 1 kg, dry mass 1 kg
- tillage, rotary cultivator: 0.0004899 ha; lognormal variance with pedigree 0.0119, pedigree (2,2,4,5,2)
  2 passes. See supporting documentation '01 crop production - Quebec.pdf' available on ecoinvent reports web page (https://ecoquery.ecoinvent.org/File/Reports).
- transport, tractor and trailer, agricultural: 0.0415677 metric ton*km; lognormal variance with pedigree 0.1313, pedigree (2,2,4,5,2)
  Transport of harvested material from field to road and from road to farm or local drying centre, and transport of inputs from farm to field (assuming 15 km). See supporting documentation '01 crop production - Québec.pdf' available on ecoinvent reports web page (https://ecoquery.ecoinvent.org/File/Reports).
- application of plant protection product, by field sprayer: 0.00037 ha; lognormal variance with pedigree 0.0119, pedigree (2,2,4,5,2)
  89% of cropand area receives plant protection products in average. See supporting documentation '01 crop production - Québec.pdf' available on ecoinvent reports web page (https://ecoquery.ecoinvent.org/File/Reports).
- drying of bread grain, seed and legumes: 0.054878 l; name EVAP_WATER; = REF_PRODUCT * (REF_PRODUCT_WWM - harvest_wc) / (harvest_wc - 1); lognormal variance with pedigree 0.008, pedigree (1,1,4,1,1)
  Calculated from average moisture content of grains at harvest (see Exchange Porperties and Parameters)
- solid manure loading and spreading, by hydraulic loader and spreader: 0.462229 kg; lognormal variance with pedigree 0.0119, pedigree (2,2,4,5,2)
  Calculated from solid manure input rate and crop yield.
- tillage, ploughing: 0.0003407 ha; lognormal variance with pedigree 0.0119, pedigree (2,2,4,5,2)
  (same comment as for glyphosate)
- ammonium nitrate: 0 kg; pedigree (1,1,1,1,1)
  The exchange has been updated from 'ammonium nitrate, as N' into 'ammonium nitrate' and therefore its amount has been scaled (multiplied) from 0.0019 kg by 2.8573 kg of 'ammonium nitrate' per kg of 'ammonium nitrate, as N'. Original comment of the exchange is: Amount is determined from the mineral nutrient actually used for the crop (CECPA, 2011) and from the overall mineral fertilizers sales, by type of fertilizer, in Québec for agriculture (APNC, 2010). See details for disaggregation in supporting documentation '01 crop production - Québec.pdf' available on ecoinvent reports web page (https://ecoquery.ecoinvent.org/File/Reports).
  properties: dry mass 1 kg, wet mass 1 kg
- inorganic phosphorus fertiliser, as P2O5: 0 kg; pedigree (1,1,1,1,1)
  Amount is determined from the mineral nutrient actually used for the crop (CECPA, 2011) and from the overall mineral fertilizers sales, by type of fertilizer, in Québec for agriculture (APNC, 2010). See details for disaggregation in supporting documentation '01 crop production - Québec.pdf' available on ecoinvent reports web page (https://ecoquery.ecoinvent.org/File/Reports).
  Mono- and di-ammonium phosphate (MAP and DAP), as P2O5. The concommitant supply of nitrogen by DAP is accounted for in total N requirements. See supporting documentation '01 crop production - Québec.pdf' available on ecoinvent reports web page (https://ecoquery.ecoinvent.org/File/Reports).
  properties: dry mass 1 kg, wet mass 1 kg
- potassium sulfate: 0.00112215 kg; lognormal variance with pedigree 0.0119, pedigree (2,2,4,5,2)
  The exchange has been updated from 'potassium sulfate, as K2O' into 'potassium sulfate' and therefore its amount has been scaled (multiplied) from 0.0006 kg by 1.85 kg of 'potassium sulfate' per kg of 'potassium sulfate, as K2O'. Original comment of the exchange is: Amount is determined from the mineral nutrient actually used for the crop (CECPA, 2011) and from the overall mineral fertilizers sales, by type of fertilizer, in Québec for agriculture (APNC, 2010). See details for disaggregation in supporting documentation '01 crop production - Québec.pdf' available on ecoinvent reports web page (https://ecoquery.ecoinvent.org/File/Reports).
  properties: dry mass 1 kg, wet mass 1 kg
- sowing: 0.000477 ha; lognormal variance with pedigree 0.0119, pedigree (2,2,4,5,2)
  (same comment as for glyphosate)
- potassium chloride: 0.0100984 kg; lognormal variance with pedigree 0.0119, pedigree (2,2,4,5,2)
  The exchange has been updated from 'potassium chloride, as K2O' into 'potassium chloride' and therefore its amount has been scaled (multiplied) from 0.0064 kg by 1.5829 kg of 'potassium chloride' per kg of 'potassium chloride, as K2O'. Original comment of the exchange is: Amount is determined from the mineral nutrient used for the crop and from the overall mineral fertilizers sales, by type of fertilizer, in Québec for agriculture (APNC, 2010). See details for disaggregation in supporting documentation '01 crop production - Québec.pdf' available on ecoinvent reports web page (https://ecoquery.ecoinvent.org/File/Reports).
  properties: dry mass 1 kg, wet mass 1 kg
- liquid manure spreading, by vacuum tanker: 0.0011728 m3; lognormal variance with pedigree 0.0119, pedigree (2,2,4,5,2)
  Calculated from liquid manure input rate and crop yield.
- combine harvesting: 3.3262e-7 ha; lognormal variance with pedigree 0.088725, pedigree (5,2,4,2,2)
  (same comment as for glyphosate)
- ammonia, anhydrous, liquid: 8.32906e-5, 7.15982e-6, 1.11388e-5, 2.16228e-5, 2.2663e-6, 1.01312e-5, 0.000239675 kg (7 entries); lognormal variance with pedigree 0.0119, pedigree (2,2,4,5,2)
  (same comment as for ammonium sulfate)
- inorganic nitrogen fertiliser, as N: 4.14496e-7, 2.2089e-5, 2.76938e-6, 3.17499e-5, 8.03939e-7, 2.8377e-5, 3.72454e-6, 9.01642e-6, 9.96839e-5, 7.44725e-7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 kg (62 entries); lognormal variance with pedigree 0.0119, pedigree (2,2,4,5,2)
  (same comment as for ammonium sulfate)
- urea: 0.00406045, 0.00475502 kg (2 entries); lognormal variance with pedigree 0.0119, pedigree (2,2,4,5,2)
  (same comment as for urea)
- ammonium nitrate: 0.00121717, 0.00413196 kg (2 entries); lognormal variance with pedigree 0.0119, pedigree (2,2,4,5,2)
  (same comment as for ammonium nitrate)
- inorganic phosphorus fertiliser, as P2O5: 7.08526e-7, 5.87038e-5, 3.7639e-6, 7.6163e-5, 8.38492e-7, 6.09863e-5, 1.64717e-6, 8.67373e-6, 0.000477521, 8.19859e-7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 kg (62 entries); lognormal variance with pedigree 0.0119, pedigree (2,2,4,5,2)
  (same comment as for inorganic phosphorus fertiliser, as P2O5)

## Inputs from nature
- Carbon dioxide, in air [natural resource, in air]: 1.46692 kg; = 44/12 * (REF_PRODUCT_C_content_non_fossil * REF_PRODUCT * REF_PRODUCT_DM - SEED_C_content_non_fossil * SEED * REF_PRODUCT_DM); lognormal variance with pedigree 0.008, pedigree (1,1,4,1,1)
  Calculated value, see chapter 'CO2 binding' in '01 crop production-direct field emissions natural resources v1.2.pdf' available on ecoinvent reports web page (https://ecoquery.ecoinvent.org/File/Reports). The 44/12 ratio is the stoichiometric mass ratio of carbon dioxide to carbon.
- Transformation, to annual crop, non-irrigated, intensive [natural resource, land]: 4.11015 m2; = (1 / (yield_agriculture * UnitConversion(1, 'metric ton', 'kg')))*UnitConversion(1, 'ha', 'm2'); lognormal variance with pedigree 0.008, pedigree (1,1,4,1,1)
  Calculated value. See Parameters.
- Occupation, annual crop, non-irrigated, intensive [natural resource, land]: 3.10563 m2*year; = OCCUP_period * (1 / (yield_agriculture * UnitConversion(1, 'metric ton', 'kg'))) * UnitConversion(1, 'ha', 'm2'); lognormal variance with pedigree 0.008, pedigree (1,1,4,1,1)
  Calculated value. See Exchange Properties and Parameters.
  property occupation period 0.7556 year; name OCCUP_period
- Energy, gross calorific value, in biomass [natural resource, biotic]: 15.094 MJ; lognormal variance with pedigree 0.0099, pedigree (2,3,4,3,1)
  Calculated value based on literature. The gross energy is calculated using following formula; gross energy (MJ) = crude protein (kg)*23.04 (MJ/kg)+crude fat (kg)*38.96 (MJ/kg)+crude fibre (kg)*17.95 (MJ/kg)+carbohydrates (kg)*17.17 (MJ/kg) (formula based on expert opinion, cross referenced; Diepenbrock, 2012, Energy Balance in Crop Production). The product composition is extracted from Agroscope Food database (http://www.agroscope.admin.ch/index.html?lang=en, accessed 20151028)
- Transformation, from annual crop, non-irrigated, intensive [natural resource, land]: 4.11015 m2; = (1 / (yield_agriculture * UnitConversion(1, 'metric ton', 'kg'))) * UnitConversion(1, 'ha', 'm2'); lognormal variance with pedigree 0.008, pedigree (1,1,4,1,1)
  Calculated value. See Parameters.

## Emissions to nature
- Bromoxynil [water, surface water]: 5.257e-9 kg; source Dijkman, T.J. 2012; lognormal variance with pedigree 0.0833, pedigree (2,2,5,5,2)
  (same comment as for MCPA-MCPB combined emissions to groundwater)
- Bromoxynil [water, ground-]: 1.282e-6 kg; source Dijkman, T.J. 2012; lognormal variance with pedigree 0.0833, pedigree (2,2,5,5,2)
  (same comment as for MCPA-MCPB combined emissions to groundwater)
- Nitrate [water, ground-]: 0.222416 kg; lognormal variance with pedigree 0.0513, pedigree (2,2,4,5,2)
  Modelled with the 'SQCB-NO3 model' described in '01 crop production-direct field emissions natural resources v1.2.pdf' available on ecoinvent reports web page (https://ecoquery.ecoinvent.org/File/Reports). Québec average conditions are considered for the SQCB-NO3 model input parameters (see supporting documentation '01 crop production - Québec.pdf' available on ecoinvent reports web page (https://ecoquery.ecoinvent.org/File/Reports)).
- 2,4-D amines [air, non-urban air or from high stacks]: 1.85e-7 kg; source Dijkman, T.J. 2012; lognormal variance with pedigree 0.0833, pedigree (2,2,5,5,2)
  (same comment as for MCPA-MCPB combined emissions to groundwater)
- Bromoxynil [air, non-urban air or from high stacks]: 2.009e-7 kg; source Dijkman, T.J. 2012; lognormal variance with pedigree 0.0833, pedigree (2,2,5,5,2)
  (same comment as for MCPA-MCPB combined emissions to groundwater)
- Phosphorus [water, surface water]: 0.0004241 kg; source Michaud, A.R. 2008; lognormal variance with pedigree 0.0513, pedigree (2,2,4,5,2)
  Modelled with Québec conditions with the 'ODEP model' (Michaud et al., 2008). See supporting documentation '01 crop production - Quebec.pdf' available on ecoinvent reports web page (https://ecoquery.ecoinvent.org/File/Reports).
- 2,4-D ester [water, surface water]: 9.68e-10 kg; source Dijkman, T.J. 2012; lognormal variance with pedigree 0.0833, pedigree (2,2,5,5,2)
  (same comment as for MCPA-MCPB combined emissions to groundwater)
- Lead [water, surface water]: 7.4823e-6 kg; lognormal variance with pedigree 0.0907, pedigree (5,2,4,5,2)
  Calculated value. See supporting documentation '01 crop production - Québec.pdf' available on ecoinvent reports web page (https://ecoquery.ecoinvent.org/File/Reports).
- Cadmium, ion [water, surface water]: 5.7999e-7 kg; lognormal variance with pedigree 0.0907, pedigree (5,2,4,5,2)
  (same comment as for Lead)
- Phosphate [water, surface water]: 0.0003976 kg; source Michaud, A.R. 2008; lognormal variance with pedigree 0.0513, pedigree (2,2,4,5,2)
  (same comment as for Phosphorus)
  property water in wet mass 0 kg; name WWM
  property carbon content, fossil 0; name C_content_fossil
  property wet mass 1 kg; name WM
  property water content 0; name water_content
  property dry mass 1 kg; name DM
  property carbon content, non-fossil 0; name C_content_non_fossil
- Chromium, ion [water, surface water]: 2.7494e-5 kg; lognormal variance with pedigree 0.0907, pedigree (5,2,4,5,2)
  (same comment as for Lead)
- Dichlorprop [air, non-urban air or from high stacks]: 2.65e-7 kg; source Dijkman, T.J. 2012; lognormal variance with pedigree 0.0833, pedigree (2,2,5,5,2)
  (same comment as for MCPA-MCPB combined emissions to groundwater)
- Chromium [soil, agricultural]: -2.1e-5 kg
  (same comment as for Lead)
- Copper [soil, agricultural]: -1.1396e-5 kg
  (same comment as for Lead)
- Dichlorprop [soil, agricultural]: 1.1e-5 kg; lognormal variance with pedigree 0.0833, pedigree (2,2,5,5,2)
  (same comment as for MCPA-MCPB combined emissions to groundwater)
- Cadmium [soil, agricultural]: -4.4242e-7 kg
  (same comment as for Lead)
- 2,4-D amines [water, surface water]: 4.7e-9 kg; source Dijkman, T.J. 2012; lognormal variance with pedigree 0.0813, pedigree (2,2,5,1,2)
  (same comment as for MCPA-MCPB combined emissions to groundwater)
- Zinc [soil, agricultural]: -0.00010052 kg
  (same comment as for Lead)
- Lead [soil, agricultural]: -7.4269e-6 kg
  (same comment as for Lead)
- MCPA [water, surface water]: 8.385e-7 kg; = MCPAB_surface-MCPB_surface; lognormal variance with pedigree 0.008, pedigree (1,1,4,1,1)
  Calculated value. See Parameters.
- Water [water, ground-]: 0 m3; = ((MANURE_LIQUID_CATTLE* MANURE_LIQUID_CATTLE_WWM) + (MANURE_LIQUID_SWINE* MANURE_LIQUID_SWINE_WWM) + (MANURE_SOLID_CATTLE* MANURE_SOLID_CATTLE_WWM))* (1-fraction_PW_to_air)*(1- fraction_PWtoW_to_surface_water)* UnitConversion(1, 'l', 'm3')
  Calculated value; See Parameters. Water emitted from: irrigated water (if any), process water.
- Nickel, ion [water, surface water]: 3.3514e-5 kg; lognormal variance with pedigree 0.0907, pedigree (5,2,4,5,2)
  (same comment as for Lead)
- Water [water, surface water]: 0 m3; = ((MANURE_LIQUID_CATTLE* MANURE_LIQUID_CATTLE_WWM) + (MANURE_LIQUID_SWINE* MANURE_LIQUID_SWINE_WWM) + (MANURE_SOLID_CATTLE* MANURE_SOLID_CATTLE_WWM))* (1-fraction_PW_to_air)*fraction_PWtoW_to_surface_water* UnitConversion(1, 'l', 'm3')
  (same comment as for Water)
- MCPB [water, surface water]: 8.385e-7 kg; name MCPB_surface; = MCPAB_surface/(MCPA_to_MCPB+1); lognormal variance with pedigree 0.008, pedigree (1,1,4,1,1)
  Calculated value. See Parameters.
- MCPA [soil, agricultural]: 3.0435e-5 kg; = MCPAB_soil-MCPB_soil; lognormal variance with pedigree 0.008, pedigree (1,1,4,1,1)
  Calculated value. See Parameters.
- Carbon dioxide, from soil or biomass stock [air, non-urban air or from high stacks]: 0.0133596 kg; normal variance with pedigree 0.5452, pedigree (3,3,5,5,2)
  Global average LUC emissions according 2nd edition of the Quantis-modified tool developed by Blonk Consultants 'WFLDB-adapted-Blonk 2014 direct-land-use-change-assessment-tool_2015-05-18a.xlsx', tab. 'Country & land use unknown'. The emission are based on the relative change in production areas in all countries for a given crop. The weighted average is used which takes into acount relative difference in crop expansion into primary forest, secondary forest, grassland, perennial and annual land.
  Uncertainty: Uncertainty estimated based on IPCC 2006
- Glyphosate [water, ground-]: 3.611e-6 kg; source Dijkman, T.J. 2012; lognormal variance with pedigree 0.0833, pedigree (2,2,5,5,2)
  (same comment as for MCPA-MCPB combined emissions to groundwater)
- 2,4-D ester [soil, agricultural]: 9.92e-6 kg; lognormal variance with pedigree 0.0833, pedigree (2,2,5,5,2)
  (same comment as for MCPA-MCPB combined emissions to groundwater)
- Copper, ion [water, surface water]: 1.9131e-5 kg; lognormal variance with pedigree 0.0907, pedigree (5,2,4,5,2)
  (same comment as for Lead)
- Glyphosate [water, surface water]: 1.613e-8 kg; source Dijkman, T.J. 2012; lognormal variance with pedigree 0.0833, pedigree (2,2,5,5,2)
  (same comment as for MCPA-MCPB combined emissions to groundwater)
- Dinitrogen monoxide [air, non-urban air or from high stacks]: 0.00125202 kg; name N2O; source Rochette, P. 2008; lognormal variance with pedigree 0.0413, pedigree (2,2,4,5,2)
  Direct and indirect N2O emissions from all sources of N input (fertilizers, above- and below-ground crop residues). Modelled with Québec conditions using the Tier 2 approach (IPCC 2006; Rochette et al. 2008; Little et al. 2008, 2013). See supporting documentation '01 crop production - Quebec.pdf' available on ecoinvent reports web page (https://ecoquery.ecoinvent.org/File/Reports).
- Dichlorprop [water, surface water]: 1.16e-9 kg; source Dijkman, T.J. 2012; lognormal variance with pedigree 0.0833, pedigree (2,2,5,5,2)
  (same comment as for MCPA-MCPB combined emissions to groundwater)
- Dichlorprop [water, ground-]: 2.76e-7 kg; source Dijkman, T.J. 2012; lognormal variance with pedigree 0.0833, pedigree (2,2,5,5,2)
  (same comment as for MCPA-MCPB combined emissions to groundwater)
- Glyphosate [air, non-urban air or from high stacks]: 4.483e-7 kg; source Dijkman, T.J. 2012; lognormal variance with pedigree 0.0833, pedigree (2,2,5,5,2)
  (same comment as for MCPA-MCPB combined emissions to groundwater)
- Ammonia [air, non-urban air or from high stacks]: 0.00302418 kg; lognormal variance with pedigree 0.0193, pedigree (2,2,4,5,2)
  NH3 from mineral fertilisers are calculated with the emission factors published in the EMEP guidelines from the European Environment Agency (EEA, 2013). NH3 from manure are calculated according to the caracteristics of every manure, and to Quebec figures for period and method of maqnure application, and delay before incorporation of manure into the soil (Parent et Gagné, 2010; 2013). See supporting documentation '01 crop production - Québec.pdf' available on ecoinvent reports web page (https://ecoquery.ecoinvent.org/File/Reports).
- Herbicides, unspecified [soil, agricultural]: 7.397e-6 kg; lognormal variance with pedigree 0.1157, pedigree (5,2,5,5,2)
  No possible elementary flow. Because of lack of information on the active ingredient, assumed entirely emitted to soil.
- Carbon dioxide, fossil [air, non-urban air or from high stacks]: 0.0137002 kg; = UREA_N*0.466461632733939*1.571 +LIME_CaCO3*0.44; lognormal variance with pedigree 0.008, pedigree (1,1,4,1,1)
  Carbon dioxide emissions from limestone and urea application calculated from C content (IPCC, 2006). Emission factors are EF=1.57 kg CO2/kg N for urea, and EF=0.44 kg CO2/kg CaCO3 for limestone. See supporting documentation '01 crop production - Quebec.pdf' available on ecoinvent reports web page (https://ecoquery.ecoinvent.org/File/Reports).
- Nickel [soil, agricultural]: -3.3543e-5 kg
  (same comment as for Lead)
- Nitrogen oxides [air, non-urban air or from high stacks]: 0.000582351 kg; lognormal variance with pedigree 0.0193, pedigree (2,2,4,5,2)
  Calculated with an emission factor (EF=0.012 kg NO-N/kg N ) from total N application less NH3-N lost through volatilization. Conversion from NO-N to NO2 with factor=46/14. See supporting documentation '01 crop production - Quebec.pdf' available on ecoinvent reports web page (https://ecoquery.ecoinvent.org/File/Reports).
  property emission ratio 0.21 kg/kg; name NOx_to_N2O
- Bromoxynil [soil, agricultural]: 4.125e-5 kg; lognormal variance with pedigree 0.0763, pedigree (2,2,5,5,2)
  (same comment as for MCPA-MCPB combined emissions to groundwater)
- Water [air, unspecified]: 5.4878e-5 m3; = EVAP_WATER * UnitConversion(1, 'l', 'm3'); lognormal variance with pedigree 0.008, pedigree (1,1,4,1,1)
  Calculated value. Evaporated water from the drying of the grains.
- MCPA [air, non-urban air or from high stacks]: 3.639e-7 kg; = MCPAB_air-MCPB_air; lognormal variance with pedigree 0.008, pedigree (1,1,4,1,1)
  Calculated value. See Parameters.
- 2,4-D ester [water, ground-]: 2.53e-7 kg; source Dijkman, T.J. 2012; lognormal variance with pedigree 0.0833, pedigree (2,2,5,5,2)
  (same comment as for MCPA-MCPB combined emissions to groundwater)
- Water [air, non-urban air or from high stacks]: 0 m3; = ((MANURE_LIQUID_CATTLE* MANURE_LIQUID_CATTLE_WWM) + (MANURE_LIQUID_SWINE* MANURE_LIQUID_SWINE_WWM) + (MANURE_SOLID_CATTLE* MANURE_SOLID_CATTLE_WWM))* fraction_PW_to_air* UnitConversion(1, 'l', 'm3')
  (same comment as for Water)
- MCPA [water, ground-]: 3.8765e-9 kg; = MCPAB_ground-MCPB_ground; lognormal variance with pedigree 0.008, pedigree (1,1,4,1,1)
  Calculated value. See Parameters.
- Glyphosate [soil, agricultural]: 0.0001204 kg; lognormal variance with pedigree 0.0763, pedigree (2,2,5,5,2)
  (same comment as for MCPA-MCPB combined emissions to groundwater)
- 2,4-D amines [soil, agricultural]: 3.69e-5 kg; lognormal variance with pedigree 0.0813, pedigree (2,2,5,1,2)
  (same comment as for MCPA-MCPB combined emissions to groundwater)
- MCPB [water, ground-]: 3.8765e-9 kg; name MCPB_ground; = MCPAB_ground/(MCPA_to_MCPB+1); lognormal variance with pedigree 0.008, pedigree (1,1,4,1,1)
  Calculated value. See Parameters.
- MCPB [air, non-urban air or from high stacks]: 3.639e-7 kg; name MCPB_air; = MCPAB_air/(MCPA_to_MCPB+1); lognormal variance with pedigree 0.008, pedigree (1,1,4,1,1)
  Calculated value. See Parameters.
- 2,4-D ester [air, non-urban air or from high stacks]: 2.16e-6 kg; source Dijkman, T.J. 2012; lognormal variance with pedigree 0.0833, pedigree (2,2,5,5,2)
  (same comment as for MCPA-MCPB combined emissions to groundwater)
- MCPB [soil, agricultural]: 3.0435e-5 kg; name MCPB_soil; = MCPAB_soil/(MCPA_to_MCPB+1); lognormal variance with pedigree 0.008, pedigree (1,1,4,1,1)
  Calculated value. See Parameters.
- 2,4-D amines [water, ground-]: 1.15e-6 kg; source Dijkman, T.J. 2012; lognormal variance with pedigree 0.0813, pedigree (2,2,5,1,2)
  (same comment as for MCPA-MCPB combined emissions to groundwater)
- Zinc, ion [water, surface water]: 0.00011023 kg; lognormal variance with pedigree 0.0907, pedigree (5,2,4,5,2)
  (same comment as for Lead)

## Sampling procedure
Literature and statistics data, opinions of experts in the field of agricultural production and agroeconomists.

## Extrapolations
This dataset has been extrapolated from an original dataset covering the geography of Quebec (Canada). Modelling of the Quebec dataset is described as follow:
Transports are modelled with standard distances. Machine usage is modelled with Québec diesel consumptions and field works (Beauregard, 2013) and Swiss machines. Mineral fertilizer types are extrapolated from overall mineral fertilizers sales in Québec (APNC 2011). Organic fertilizer types are extrapolated from animal manure supply data, per region in Québec, communicated by the Ministry of Agriculture (MAPAQ). Data about agricultural management practices are from BPR (2008. Suivi 2007 du Portrait agroenvironnemental des fermes du Québec). Emissions are calculated with standard methods according to ecoinvent documentation (Nemecek and Schnetzer, 2011. '01 crop production-direct field emissions natural resources' v1.2, August 2011, available at https://ecoquery.ecoinvent.org/File/Reports) and the World Food LCA Database guidelines (Nemecek et al. 2014, available at http://www.quantis-intl.com/microsites/wfldb/), except for : 1) pesticides emitted fractions (modelled using PestLCI 2.0, a global model, considering Québec average conditions for model input parameters, and considering that the degradation/uptake fraction calculated by PestLCI is actually emitted to soil - see the supporting documentation '01 crop production - Québec.pdf' for rationale), 2) phosphorus and phosphate emissions (modelled using ODEP, a Québec model, considering geospatialized weighted average conditions for soil, hydrology, and agricultural management practices), and 3) ammonia emissions from organic fertilizers which are calculated according to Québec conditions and agricultural management practices (coefficients are taken from Parent et Gagné (2010 and 2013 update). Furthermore, an IPCC Tier 2 approach is used for N2O emissions using regional and ecodistrict-based emission factors (Rochette et al., 2008). Due to lack of comprehensive data on pesticides use for Québec, data from a 2008 survey in the neighbouring province of Ontario are used (OMAFRA, 2008). Uncertainty in terms of the variance of the logtransformed data is the default value as provided by the Data Quality Guidelines for ecoinvent v3 (available at http://www.ecoinvent.org/support/documents-and-files/). Details on modelling and calculations are reported in the supporting documentation '01 crop production - Québec.pdf' available on ecoinvent reports web page (<https://ecoquery.ecoinvent.org/File/Reports>).

## Review by Emilia Moreno Ruiz 2015-11-02
Energy flow added, to allow CED calculations
