# chichibabin amination

Dataset: EcoSpold 2, unit process
Geography: RoW
Time period: 2010-01-01 to 2021-12-31
Technology level: current
Classification: ISIC rev.4 ecoinvent: 2011:Manufacture of basic chemicals
Scenario: Business-as-Usual
System model: Allocation, cut-off by classification
Generated by: Jürgen Sutter
Database: ecoinvent
isCopyrightProtected: true
accessRestrictedTo: 1

## General comment
The most important method for the manufacture of 2-aminopyridine is the reaction of pyridine with sodium amide (Chichibabin amination). Upon hydrolysis of the intermediate sodium salt, 2-aminopyridine is obtained in high yield.
2-Aminopyridine (C6H6N2; CAS 504-29-0) is a colourless solid. The major uses of 2-aminopyridine are as an intermediate for pharmaceuticals such as sulfapyridine, tripelennamine, piroxicam , and tenoxicam, as well as a variety of agrochemicals.
Frischknecht R., Jungbluth N., Althaus H.-J., Doka G., Dones R., Heck T., Hellweg S., Hischier R., Nemecek T., Rebitzer G. and Spielmann M. (2007) Overview and Methodology. Final report ecoinvent v2.0 No. 1. Swiss Centre for Life Cycle Inventories, Dübendorf, CH, retrieved from: www.ecoinvent.org.

Gendorf (2000) Umwelterklärung 2000, Werk Gendorf. Werk Gendorf, Burgkirchen as pdf-File under: http://www.gendorf.de/pdf/umwelterklaerung2000.pdf

Shinkichi Shimizu, Nanao Watanabe, Toshiaki Kataoka, Takayuki Shoji, Nobuyuki Abe, Sinji Morishita, Hisao Ichimura: Pyridine and Pyridine Derivatives. Published online: 2000. In: Ullmann's Encyclopedia of Industrial Chemistry, Seventh Edition, 2004 Electronic Release (ed. Fiedler E., Grossmann G., Kersebohm D., Weiss G. and Witte C.). 7 th Electronic Release Edition. Wiley InterScience, New York, DOI: 10.1002/14356007.a22_399

## Included activities end
Chichibabin amination including materials, energy uses, infrastructure and emissions.

## Geography
The inventory is modelled for the world.

## Technology
Chichibabin amination

## Time period
Time of publications

## Parameters
- fraction, cooling water, once-through system, to air: 0.004 dimensionless; name fraction_CW_OT_to_air; lognormal variance with pedigree 0.0413, pedigree (2,3,1,3,1)
  Calculated based on literature value (Scown, C.D., 2011, Water Footprint of U.S. Transportation Fuels and supplying information of the article) (Vionnet, S., Quantis Water Database - Technical Report, 2012).
- fraction, cooling water, to air: 0.3875 dimensionless; name fraction_CW_to_air; = (0.5*fraction_CW_OT_to_air)+(0.5*fraction_CW_R_to_air); lognormal variance with pedigree 0.092025, pedigree (4,4,3,2,4)
  Calculated value based on literature value (see comments of the other parametres present in this dataset) and expert opinion. In the case when no industry/literature data are available about the type of cooling or directly fraction, cooling water, to air specific for the process a default assumption is applied. It is assumed that the once-through cooling system is used in 50% of all cases and recirculating system is used in another 50% of all cases.
- fraction, cooling water, recirculating system, to air: 0.771 dimensionless; name fraction_CW_R_to_air; lognormal variance with pedigree 0.0413, pedigree (2,3,1,3,1)
  (same comment as for fraction, cooling water, once-through system, to air)
- fraction, cooling water, cooling pond system, to air: 0.032 dimensionless; name fraction_CW_CP_to_air; lognormal variance with pedigree 0.0413, pedigree (2,3,1,3,1)
  (same comment as for fraction, cooling water, once-through system, to air)
- fraction, water, decarbonised, to air: 0.3875 dimensionless; name fraction_WDC_to_air; = fraction_CW_to_air; lognormal variance with pedigree 0.092025, pedigree (4,4,3,2,4)
  Calculated value. See comments in the other parametres present in this dataset. Decarbonised water is considered to be always used as cooling water, thus cooling water fractions to air are applied to all carbonised water input flows to calculate the amount of water consumed in the processes.

## Reference product
- aminopyridine: 0 kg; name RP_amount_1; By-product classification allocatable product; CPC 341: Basic organic chemicals; CAS 504-29-0
  production volume 2.15289e6 kg; name RP_PV_1; = 505000/0.19
    Estimated value. According to the European Chemical Agency, the current consumption of aminopryridine in the EU is estimated to be 505000 kg. The EU accounts for 19% of the global GDP in 2018 (eurostat). This value is used to estimate the global consumption based on the European consumption.
    References:
    European Chemical Agency, General Infotmatio on Strontium carbonate, Accessible at: https://echa.europa.eu/registration-dossier/-/registered-dossier/14362 (last accessed 2020-11-12).
    The EU in the world, 2020 edition, eurostat
    Accessible at: https://ec.europa.eu/eurostat/documents/3217494/10934584/KS-EX-20-001-EN-N.pdf/8ac3b640-0c7e-65e2-9f79-d03f00169e17"
  property heating value, net 27.06 MJ
    LHV is calculated based on the elemental composition of the substance. Based on the name of the substance, the chemical formula of the substance is manually found to be: C5H6N2.
  property price 59 EUR2005; name RP_amount_1_price_EUR2005
    Temporary price data. Calculated as 90% of purchasers price based on: Average import and export prices (total trades (USD) divided by total weight (kg) in EU27, USA, China, Japan and India) from UN data - Ammonium chloride (http://data.un.org/Data.aspx?q=+Ammonium+chloride&d=ComTrade&f=_l1Code%3a29%3bcmdCode%3a282710; accessed 1 June 10).
  property carbon content, fossil 0.679054
    Calculated based on molecular structure. See tab "chemicals".
  property carbon content 0.679054
    carbon content on a dry matter basis (reserved; not for manual entry)
  property true value 59; name RP_amount_1_true_value
    allocation property applied in "true value" allocation // value calculated from revenue
  properties: wet mass 1 kg, water in wet mass 0 kg, dry mass 1 kg, carbon content, non-fossil 0, water content 0, carbon allocation 0.679054 kg
- hydrogen, liquid: 1 kg; name BP_amount_1; CPC 34210: Hydrogen, nitrogen, oxygen, carbon dioxide and rare gases; inorganic oxygen compounds of non-metals n.e.c.; By-product classification allocatable product; CAS 1333-74-0; pedigree (1,1,1,1,1)
  Stoichiometric calculation
  production volume 46111.9 kg; = RP_PV_1 * BP_amount_1 / RP_amount_1
    Calculated from production volume of reference product using the relative outputs.
  property price 2.68 EUR2005
    Calculated value based on data from United Nations Commodity Trade Statistics Database (comtrade.un.org). UN comtrade category: 280410 Hydrogen. Year 2005. Using exchange rate of 1EURO = 1.209 USD. Average of price of import into 5 main markets (EU, US, JP, IN and CN). Cross reference; Literature (http://www.ttcorp.com/pdf/marketReport.pdf). The price of hydrogen, liquid is 5-10 USD/kg.
  property heating value, net 120.21 MJ
    LHV is calculated based on the elemental composition of the substance. Based on the CAS number of the substance (001333-74-0), the chemical formula of the substance is found to be: H2, (PubChem 2020).
    Reference: Kim, S., Chen, J., Cheng, T., Gindulyte, A., He, J., He, S., Li, Q., Shoemaker, B. A., Thiessen, P. A., Yu, B., Zaslavsky, L., Zhang, J., & Bolton, E. E. (2019). PubChem 2019 update: improved access to chemical data. Nucleic acids research, 47(D1), D1102–D1109. https://doi.org/10.1093/nar/gky1033
  property carbon content 0
    carbon content on a dry matter basis (reserved; not for manual entry)
  property true value 0.0574017; name BP_amount_1_true_value
    allocation property applied in "true value" allocation // value calculated from revenue
  properties: water in wet mass 0 kg, wet mass 1 kg, water content 0, carbon content, non-fossil 0, dry mass 1 kg, carbon content, fossil 0, carbon allocation 0 kg

## Inputs from technosphere
- heat, from steam, in chemical industry: 0.00952971 MJ; lognormal variance with pedigree 0.1786, pedigree (4,5,5,5,5)
  Calculated based on literature data published by the industry. This value is a 5-year average of data (2015 - 2019) published by the Gendorf factory (Gendorf, 2016, Umwelterklärung, www.gendorf.de), (Gendorf, 2017, Umwelterklärung, www.gendorf.de), (Gendorf, 2020, Umwelterklärung, www.gendorf.de). The amount of heat used per kg of chemical substance produced is calculated using literature data published by the Gendorf factory based in Germany, which produces a wide range of chemical substances. The factory produced 1634200 tonnes of chemical substances in the year 2019 (Gendorf, 2020, Umwelterklärung, www.gendorf.de) and 870000 tonnes of intermediate products. The amount of heat in the year 2019 was 5101290 GJ (Gendorf, 2020, Umwelterklärung, www.gendorf.de) of which 90% was obtained from natural gas and 10% from steam. The resulting amount of heat from steam is 0.27 MJ/kg of chemical product produced. The 5-year average (2015 - 2019, weighted by production volume) is 0.21 MJ/kg. Cross-reference: the amount of chemicals produced (excluding intermediate products) in the EU-28 in the year 2017 was 291 million tonnes (Eurostat, http://ec.europa.eu/eurostat/statistics-explained/index.php/Chemicals_production_statistics, accessed 2021-01-21). The energy (both heat and electricity) consumed per kg of chemicals produced in 2017 is 7.58 MJ/kg. This is higher than the value calculated using data published by Gendorf – 3.53 MJ/kg, but that is to be expected as the intermediate products are not accounted for.
  Uncertainty: Estimation
  properties: heating value, net 1 MJ
- electricity, medium voltage: 0 kWh; pedigree (1,1,1,1,1)
  Calculated based on literature data published by the industry. This value is a 5-year average of data (2015 - 2019) published by the Gendorf factory (Gendorf, 2016, Umwelterklärung, www.gendorf.de), (Gendorf, 2017, Umwelterklärung, www.gendorf.de), (Gendorf, 2020, Umwelterklärung, www.gendorf.de). The amount of electricity per kg of chemical substance produced is calculated using literature data published by the Gendorf factory based in Germany, which produces a wide range of chemical substances. The factory produced 1634200 tonnes of chemical substances in the year 2019 (Gendorf, 2020, Umwelterklärung, www.gendorf.de) and 870000 tonnes of intermediate products. The amount of electricity consumed in the year 2019 was 3381300 GJ (Gendorf, 2020, Umwelterklärung, www.gendorf.de). The resulting amount of electricity is 0.375 kWh/kg (year 2019) of chemical substance produced. The 5-year average (2015 - 2019, weighted by production volume) is 0.3991 kWh/kg (1.44 MJ/kg). Cross-reference: the amount of chemicals produced (excluding intermediate products) in the EU-28 in the year 2017 was 291 million tonnes (Eurostat, http://ec.europa.eu/eurostat/statistics-explained/index.php/Chemicals_production_statistics, accessed 2021-01-21). The energy (both heat and electricity) consumed per kg of chemicals produced in 2017 is 7.58 MJ/kg. This is higher than the value calculated using data published by Gendorf – 3.53 MJ/kg, but that is to be expected as the intermediate products are not accounted for.
- chemical factory, organics: 1.81518e-11 unit; lognormal variance with pedigree 0.478, pedigree (4,5,5,5,5)
  "Calculated based on literature data published by the industry. For this activity, no information was readily available concerning infrastructure and land-use. Therefore, the infrastructure is estimated based on data from two chemical factories, the BASF site of Ludwigshafen and the chemical factory in Gendorf (which are both located in Germany), which produce a wide range of chemical substances. Based on this data, the following assumptions are made: the built area amounts to about 4.2 ha, the plant has an average output of 50'000 t/a and a lifespan of fifty years. The estimated infrastructure amount is therefore 4.00 E-10 units per kg of produced chemical.
  Uncertainty: Estimation
- pyridine: 0.039113 kg; lognormal variance with pedigree 0.218, pedigree (4,5,5,5,5)
  Stoichiometric calculation
  Uncertainty: Estimation
  properties: carbon content, fossil 0.759215, dry mass 1 kg, heating value, net 30.66 MJ, wet mass 1 kg
  note on carbon content, fossil: Calculated based on molecular structure. See tab "chemicals".
- water, decarbonised: 0 kg; name water_decarbonised_input; pedigree (1,1,1,1,1)
  Stoichiometric calculation
  Stoichiometric calculation
  Uncertainty: Stoechiometric calculation
  properties: wet mass 1 kg
- sodium amide: 0.0224175 kg; lognormal variance with pedigree 0.0807, pedigree (1,3,5,3,1)
  Stoichiometric calculation
  Uncertainty: Estimation
  properties: heating value, net 6.21 MJ, wet mass 1 kg, dry mass 1 kg
- wastewater, average: -1.04373e-7 m3; name wastewater_average; lognormal variance with pedigree 0.218, pedigree (4,5,5,5,5)
  Calculated based on literature data published by the industry. This value is a 5-year average of data (2015 - 2019) published by the Gendorf factory (Gendorf, 2016, Umwelterklärung, www.gendorf.de), (Gendorf, 2017, Umwelterklärung, www.gendorf.de), (Gendorf, 2020, Umwelterklärung, www.gendorf.de). The amount of wastewater (which is later on treated in the municipal WWTP) per kg of chemical substance produced is calculated using literature data published by the Gendorf factory based in Germany, which produces a wide range of chemical substances. The factory produced 1634200 tonnes of chemical substances in the year 2019 (Gendorf, 2020, Umwelterklärung, www.gendorf.de) and 870000 tonnes of intermediate products. The amount of wastewater which is later on treated in the municipal WWTP in the year 2019 was 6821 tonnes (Gendorf, 2020, Umwelterklärung, www.gendorf.de). The resulting amount of wastewater is 2.3E-06 m3/kg of chemical product produced.
  production volume 4.95166 m3; = RP_PV_1 * ( wastewater_average / RP_amount_1)
    Calculated from production volume of reference product using the relative outputs.
  property price 0 EUR2005; name wastewater_average_price_EUR2005
  properties: dry mass 0.346837 kg, water content 2882.2, carbon content, non-fossil 0.194039, wet mass 1000 kg
  note on carbon content, non-fossil: 0.0673 kg TOC/m3 (Tab A.17, ecoinvent v2.2 report 13_I). TOC was considered as Total Carbon.
- heat, district or industrial, natural gas: 0 MJ; pedigree (1,1,1,1,1)
  Calculated based on literature data published by the industry. This value is a 5-year average of data (2015 - 2019) published by the Gendorf factory (Gendorf, 2016, Umwelterklärung, www.gendorf.de), (Gendorf, 2017, Umwelterklärung, www.gendorf.de), (Gendorf, 2020, Umwelterklärung, www.gendorf.de). The amount of heat used per kg of chemical substance produced is calculated using literature data published by the Gendorf factory based in Germany, which produces a wide range of chemical substances. The factory produced 1634200 tonnes of chemical substances in the year 2019 (Gendorf, 2020, Umwelterklärung, www.gendorf.de) and 870000 tonnes of intermediate products. The amount of heat in the year 2019 was 5101290 GJ (Gendorf, 2020, Umwelterklärung, www.gendorf.de) of which 90% was obtained from natural gas and 10% from steam. The resulting amount of heat from natural gas is 1.77 MJ/kg of chemical product produced. The 5-year average (2015 - 2019, weighted by production volume) is 1.89 MJ/kg. Cross-reference: the amount of chemicals produced (excluding intermediate products) in the EU-28 in the year 2017 was 291 million tonnes (Eurostat, http://ec.europa.eu/eurostat/statistics-explained/index.php/Chemicals_production_statistics, accessed 2021-01-21). The energy (both heat and electricity) consumed per kg of chemicals produced in 2017 is 7.58 MJ/kg. This is higher than the value calculated using data published by Gendorf – 3.53 MJ/kg, but that is to be expected as the intermediate products are not accounted for.
  properties: heating value, net 1 MJ
- nitrogen, liquid: 0.000680694 kg; lognormal variance with pedigree 0.1786, pedigree (4,5,5,5,5)
  Calculated based on literature data published by the industry. This value is a 5-year average of data (2015 - 2019) published by the Gendorf factory (Gendorf, 2016, Umwelterklärung, www.gendorf.de), (Gendorf, 2017, Umwelterklärung, www.gendorf.de), (Gendorf, 2020, Umwelterklärung, www.gendorf.de). The amount of nitrogen per kg of chemical substance produced is calculated using literature data published by the Gendorf factory based in Germany, which produces a wide range of chemical substances. The factory produced 1634200 tonnes of chemical substances in the year 2019 (Gendorf, 2020, Umwelterklärung, www.gendorf.de) and 870000 tonnes of intermediate products. The reported amount of nitrogen used in 2019 was 2219300 Nm3 (Gendorf, 2020, Umwelterklärung, www.gendorf.de). One Nm3 of nitrogen is equal to 1.2506 kg. The resulting amount of nitrogen - the 5-year average (2015 - 2019, weighted by production volume) is 0.015 kg/kg. Nitrogen is mainly used during the production of chemicals for "blanketing", which is the process of applying gas to the vapour space of a container or vessel in order to control its composition.
  properties: wet mass 1 kg, dry mass 1 kg
- hydrochloric acid, without water, in 30% solution state: 0.0175794 kg; lognormal variance with pedigree 0.0807, pedigree (1,3,5,3,1)
  Stoichiometric calculation
  Uncertainty: Estimation
  properties: dry mass 1 kg, wet mass 1 kg, heating value, net 3.32 MJ
- tap water: 0 kg; pedigree (1,1,1,1,1)
  Calculated based on literature data published by the industry. This value is a 5-year average of data (2015 - 2019) published by the Gendorf factory (Gendorf, 2016, Umwelterklärung, www.gendorf.de), (Gendorf, 2017, Umwelterklärung, www.gendorf.de), (Gendorf, 2020, Umwelterklärung, www.gendorf.de). The amount of tap water per kg of chemical substance produced is calculated using literature data published by the Gendorf factory based in Germany, which produces a wide range of chemical substances. The factory produced 1634200 tonnes of chemical substances in the year 2019 (Gendorf, 2020, Umwelterklärung, www.gendorf.de) and 870000 tonnes of intermediate products. The amount of tap water consumed in the year 2019 was 56335 tonnes (Gendorf, 2020, Umwelterklärung, www.gendorf.de). The resulting amount of tap water is 0.022 kg/kg of chemical product produced. The 5-year average (2011 - 2015, weighted by production volume) is 0.023 kg/kg.
  properties: dry mass 0.000337476 kg, water content 2962.17, wet mass 1 kg, carbon content, fossil 0.00178991
  note on carbon content, fossil: Bicarbonate content is 2.93 mol/m3. CO2 content is 0.1 mol/m3 (ecoinvent v2.2 report 8, Tab 93.1).
- electricity, medium voltage: 0.000228292, 4.37767e-5, 0.000734919, 0.0106887, 0.00150658, 0.00490868 kWh (6 entries); lognormal variance with pedigree 0.218, pedigree (4,5,5,5,5)
  (same comment as for electricity, medium voltage)
- water, decarbonised: 0.000173291, 0.000450902, 0.00181859, 0.000231581, 0.00338381, 2.21364e-5, 0.0028724 kg (7 entries); lognormal variance with pedigree 0.0807, pedigree (1,3,5,3,1)
  (same comment as for water, decarbonised)
- heat, district or industrial, natural gas: 0.00130179, 0.0844656 MJ (2 entries); lognormal variance with pedigree 0.1786, pedigree (4,5,5,5,5)
  (same comment as for heat, district or industrial, natural gas)
- tap water: 1.62467e-5, 1.95567e-6, 3.23207e-6, 8.14999e-5, 2.1202e-6, 6.03087e-6, 0.000932645 kg (7 entries); lognormal variance with pedigree 0.1786, pedigree (4,5,5,5,5)
  (same comment as for tap water)

## Inputs from nature
- Water, well, in ground [natural resource, in water]: 3.63037e-5 m3; lognormal variance with pedigree 0.1786, pedigree (4,5,5,5,5)
  Calculated based on literature data published by the industry. This value is a 5-year average of data (2015 - 2019) published by the Gendorf factory (Gendorf, 2016, Umwelterklärung, www.gendorf.de), (Gendorf, 2017, Umwelterklärung, www.gendorf.de), (Gendorf, 2020, Umwelterklärung, www.gendorf.de). The amount of groundwater and surface water (river) extracted per kg of chemical substance produced is calculated using literature data published by the Gendorf factory based in Germany, which produces a wide range of chemical substances. The factory produced 1634200 tonnes of chemical substances in the year 2019 (Gendorf, 2020, Umwelterklärung, www.gendorf.de) and 870000 tonnes of intermediate products. The amount of groundwater and surface water (river) extracted in the year 2019 was 16145000 tonnes and 22635000 tonnes respectively (Gendorf, 2020, Umwelterklärung, www.gendorf.de).
- Water, cooling, unspecified natural origin [natural resource, in water]: 0.000635314 m3; lognormal variance with pedigree 0.1786, pedigree (4,5,5,5,5)
  Calculated based on literature data published by the industry. This value is a 5-year average of data (2015 - 2019) published by the Gendorf factory (Gendorf, 2016, Umwelterklärung, www.gendorf.de), (Gendorf, 2017, Umwelterklärung, www.gendorf.de), (Gendorf, 2020, Umwelterklärung, www.gendorf.de). The amount of water for cooling extracted per kg of chemical substance produced is calculated using literature data published by the Gendorf factory based in Germany, which produces a wide range of chemical substances. The factory produced 1634200 tonnes of chemical substances in the year 2019 (Gendorf, 2020, Umwelterklärung, www.gendorf.de) and 870000 tonnes of intermediate products. The reported amounts of water extracted as groundwater and surface water (river) are assumed to be used entirely for cooling purposes.
- Water, river [natural resource, in water]: 4.49258e-5 m3; lognormal variance with pedigree 0.1786, pedigree (4,5,5,5,5)
  (same comment as for Water, well, in ground)

## Emissions to nature
- BOD5, Biological Oxygen Demand [water, unspecified]: 9.15476e-5 kg; lognormal variance with pedigree 0.218, pedigree (4,5,5,5,5)
  Stoichiometric calculation
- Carbon dioxide, fossil [air, urban air close to ground]: 0.0025713 kg; lognormal variance with pedigree 0.184, pedigree (4,5,5,5,5)
  From water treatment
  Uncertainty: Estimation
- Water [air, unspecified]: 6.80694e-5 m3; name water_to_air_unspecified; lognormal variance with pedigree 0.130025, pedigree (4,4,5,2,4)
  Calculated to ensure the water balance. In general, in the case of recirculating cooling systems, 77% of the water input evaporates to air. In case of once-through cooling systems, 4% of the water input evaporates to air. The process water has in the chemical industry an average evaporation rate of 20.5%. In the specific case of the Gendorf factory, the calculated evaporation rate based on the data published is 6.3%. This matches the qualitative information, that the majority of the cooling systems in Gendorf are once-through and that the amount of cooling water used is significantly higher than the amount of process water used (Gendorf, 2020, Umwelterklärung, www.gendorf.de).
  property fraction, origin: salt water 0; name fraction_origin_salt_water
  property fraction, origin: fresh water 1; name fraction_origin_fresh_water
  property fraction, origin: unspecified 0; name fraction_origin_unspecified
- Nitrogen [air, unspecified]: 0.000680694 kg; lognormal variance with pedigree 0.218, pedigree (4,5,5,5,5)
  Calculated value. The amount of nitrogen released to air is equal to the amount of nitrogen entering the activity.
- Water [water, unspecified]: 0.000658004 m3; name water_to_water_unspecified; lognormal variance with pedigree 0.130025, pedigree (4,4,5,2,4)
  Calculated based on literature data published by the industry (Gendorf, 2020, Umwelterklärung, www.gendorf.de). The amount of water released back to the environment consists of the amount of process water treated in the internal WWTP and then released back to the environment and the amount of cooling water released back to the environment.
  property fraction, origin: salt water 0; name fraction_origin_salt_water_Ww
  property fraction, origin: unspecified 0; name fraction_origin_unspecified_Ww
  property fraction, origin: fresh water 1; name fraction_origin_fresh_water_Ww
- TOC, Total Organic Carbon [water, unspecified]: 3.69004e-5 kg; lognormal variance with pedigree 0.218, pedigree (4,5,5,5,5)
  Stoichiometric calculation
- Hydrogen [air, unspecified]: 4.88425e-6 kg; lognormal variance with pedigree 0.218, pedigree (4,5,5,5,5)
  Stoichiometric calculation
- Sodium, ion [water, surface water]: 0.0113535 kg; lognormal variance with pedigree 0.218, pedigree (4,5,5,5,5)
  Stoichiometric calculation
  Uncertainty: Estimation
- DOC, Dissolved Organic Carbon [water, unspecified]: 3.69004e-5 kg; lognormal variance with pedigree 0.218, pedigree (4,5,5,5,5)
  Stoichiometric calculation
- Chloride [water, surface water]: 0.0170924 kg; lognormal variance with pedigree 0.218, pedigree (4,5,5,5,5)
  Stoichiometric calculation
  Uncertainty: Estimation
- COD, Chemical Oxygen Demand [water, unspecified]: 9.15476e-5 kg; lognormal variance with pedigree 0.218, pedigree (4,5,5,5,5)
  Stoichiometric calculation

## Extrapolations
Transports and emissions are modelled with standard methods.
