# peat moss production, horticultural use

Dataset: EcoSpold 2, unit process
Geography: RoW
Time period: 2010-01-01 to 2021-12-31
Technology level: current
Classification: ISIC rev.4 ecoinvent: 0892:Extraction of peat
Synonyms: sphagnum peat moss
Scenario: Business-as-Usual
System model: Allocation, cut-off by classification
Generated by: Geneviève Martineau
Database: ecoinvent
isCopyrightProtected: true
accessRestrictedTo: 1

## General comment
This datasets represents the production of peat moss for horticultural use.
Sphagnum peat moss, rated H1-H4 within the "Von Post" scale (H1 to H6), is younger and less decomposed than combustible peat. It has a high value on the horticultural market. On the contrary, peat intended for energy production has higher von Post grades, is older, darker peat, with higher C content.
The reference flow is 1 m³ of dry peat moss in loose form (equivalent to not compressed). A density of 100 kg/m³ is considered for dry peat moss in loose form. All flows are calculated based on a weighted average of all Quebec sites covered by the data collection process.

Data quality indicators adjusted accordingly.

The plastic packaging in which the peat moss is sold in compressed form is NOT included. Here are some information on the 4 most common bag sizes:
-1.56 m³ compressed (3.11 m³ loose equivalent),
- 0.108 m³ compressed (0.215 m³ loose equivalent),
- 0.0622 m³ (0.125 m³ loose equivalent),
- 0.0793 m³ loose.
At the use phase, an average amount of 0.556 kg of LDPE plastic packaging per m³ of dry loose peat moss should be sent to waste management.

## Included activities start
Starts from the delivery on site of the material and energy inputs.

## Included activities end
This activity ends with compressed and bagged peat moss, ready for shipping to distributors.
This dataset includes: the opening (construction of roads; drainage, removal and clearing of vegetation), annual operations (maintenance of ditches, site preparation, peat harvesting), and site closure (restoration) of the peat bog; the administrative buildings and their energy consumption; the transport from the bog to the conditioning plant and conditioning (including compressing and bagging) of the harvested sphagnum peat moss; and land use and land transformation.
This datasets excludes: the wood and vegetation cleared during the site opening since it is left on site without further treatment (its aerobic degradation is assumed to have no net emissions), however, the energy and machinery required for their management are accounted for; the tertiary packaging (pallets and wrap).

Plastic packaging is also excluded and should be added to the use phase (see General Comment for details).

## Geography
Data from Quebec sites. Data quality indicators adjusted accordingly.

## Technology
Data collected from Quebec sites were used to represent an average technology. For site opening and annual operations, the specific machinery used by each site are considered. For site closure, a weighted average of five technological options (dry restoration, wet restoration, reforestation, plantation of berries and natural regenaration) was calculated considering the operations of Canadian peat bogs in recent years.

## Parameters
- power sawing, for wet restoration: 0.2 hour; name power_per_ha; lognormal variance with pedigree 0.0047, pedigree (3,2,1,5,1)
  For wet restoration only, 0.2 hour of power sawing per ha restored (source: questionnaires).
- density: 100 kg/m3; name density_loose; lognormal variance with pedigree 0.0012, pedigree (2,1,1,1,1)
  Dry peat density, before compressing.
- ratio chemical oxygen demand / total organic carbon: 2.7 dimensionless; name Ratio_COD_to_TOC; lognormal variance with pedigree 0.0427, pedigree (2,2,1,5,1)
  Following ecoinvent Data Quality Guidelines, section 5.9.7.
- straw for dry restoration: 696.094 kg/ha; name straw_per_ha; = 30*straw_bale_mass; lognormal variance with pedigree 0.0047, pedigree (3,2,1,5,1)
  30 bales/ha (source: questionnaires).
- drained surface: 7.8544e-5 ha; name drain_surface; = 1/yield_per_ha; lognormal variance with pedigree 0, pedigree (1,1,1,1,1)
  Peat bog area drained at site opening.
  Uncertainty: C
- fraction of peat bog to berry cultivation at closure: 0.06 dimensionless; name closing_Berry; lognormal variance with pedigree 0.1241, pedigree (3,2,1,5,1)
  At closure, 6% of peat bogs are restored for berry cultivation (source: questionnaires).
- post_occupation period considered: 149 year; name post_occupation_period; lognormal variance with pedigree 0.25, pedigree (5,5,5,5,5)
  Period, after the end of peat harvesting activities, necessary to return to natural carbon emission/uptake rates, when peat bog is either abandonded, reforested or used for berry cultivation.
  Uncertainty: V
- fraction of gravel road: 0.48 dimensionless; name fraction_gravel_road; = 1-fraction_sand_road; lognormal variance with pedigree 0, pedigree (1,1,1,1,1)
  Roads are either in gravel or sand (source: questionnaires).
  Uncertainty: C
- gravel, per surface of road: 10 kg/m2; name gravel_per_m2; lognormal variance with pedigree 0.0112, pedigree (4,3,1,5,1)
  Average (source: questionnaires).
- fraction of peat bog to wet restoration at closure: 0.07 dimensionless; name closing_wet_restoration; lognormal variance with pedigree 0.1241, pedigree (3,2,1,5,1)
  At closure 7% of peat bogs undergo wet restoration (source: questionnaires).
- wet restoration period: 57 year; name wet_restoration_period; lognormal variance with pedigree 0.0454, pedigree (3,3,2,5,2)
  Period necessary to return to natural carbon emission/uptake rates for wet restoration process: 57 years, based on scenario A described by Cleary et al.(2005) (i.e. conservative active restoration scenario). Most likely optimistic for wet restoration.
  Note: the restoration period is affected by numerous local factors, that vary from one site to another, even if it is assumed that the active restoration was performed following the best practices available.
  Uncertainty: V
- distance: 50 km; lognormal variance with pedigree 0.1306, pedigree (4,3,1,5,1)
  50 km transport from peat bog to conditioning/packaging plant (source: questionnaires).
- methane emission rate from undisturbed peatlands: 53.3333 kg/ha.yr; name CH4rate_natural; = 4/1000*16/12*10000; lognormal variance with pedigree 0.0052, pedigree (3,3,1,5,1)
  Cleary et al (2005). Emission of methane to atmosphere for undisturbed peatlands in Canada suitable for peat extraction: 4 g CH4-C/m².yr,
  (Conversions: 1 kg = 1000 g; 10000 m² =1 ha 1kg CH4-C = 16/12 kg CH4).
- pre-restoration period, wet restoration: 15 year; name pre_restoration_wet; uniform min 9, max 33, pedigree (3,3,1,5,1)
  Period, after the end of peat harvesting activities, before wet restoration is started. Weighted average (on peat production) based on 2 sites for Canada (source: questionnaires).
- carbon dioxide emission, abandonment: 72.7353 kg; name CO2_abandon; = (post_occ_period_constant*CO2rate_pre_restoration+post_occ_period_variable*(CO2rate_pre_restoration+CO2rate_pre_occupation)/2-post_occ_period_variable*CO2rate_pre_occupation)*(closing_abandoned+closing_reforestation+closing_Berry)/yield_per_ha; lognormal variance with pedigree 0, pedigree (1,1,1,1,1)
  Emissions occuring on abandoned, reforested and berry cultivation sites, from site closure until natural carbon emission/uptake rates are recovered.
  In these cases, two periods are considered:
  1. A first period having a constant CO2 emission rate;
  2. A second period during which the CO2 emission rate gradually returns to its natural uptake rate. A linear relation is assumed, At one point, CO2 emissions become null, then become negative, i.e. an uptake from the atmosphere. The calculation takes into account the amount of CO2 emitted and captured over the period of time with variable emission rate.
  Uncertainty: C
- methane emission rate during occupation of the peat bog: 18.6667 kg/ha.yr; name CH4rate_occupation; = 1.4*1000*16/12/100; lognormal variance with pedigree 0.0052, pedigree (3,3,1,5,1)
  Cleary et al. (2005), Table 1: Peatland under extraction emits: 1,4 t CH4-C/km².yr (conversions:1 km² = 100 ha; 1 t = 1000 kg; 1kg CH4-C = 16/12 kg CH4).
  Thus, 1,4 t CH4-C/km².yr = 18,7 kg CH4/ha.yr
- world_production_volume: 1.36e10 kg; name PV_World
  Wold production volume of horticultural peat, 2010. Source: http://minerals.usgs.gov/minerals/pubs/commodity/peat/myb1-2011-peat.pdf
- yield, peat: 12731.7 m³/ha; name yield_per_ha; lognormal variance with pedigree 0.3606, pedigree (3,3,1,5,1)
  On total lifetime of peat bog. Based on 19 sites (source: questionnaires).
- fertilisation for reforestation at closure: 45.4 kg/ha; name fertilizer; lognormal variance with pedigree 0.0446, pedigree (3,3,1,5,1)
  Source: questionnaires.
- post-occupation period, with constant emissions: 65 year; name post_occ_period_constant; lognormal variance with pedigree 0.25, pedigree (5,5,5,5,5)
  Period, after the end of peat harvesting activities, over which the carbon dioxide and methane emission rates are considered constant, when peat bog is eather abandonded, reforested or used for berry cultivation.
  Uncertainty: V
- active restoration period (dry): 10 year; name dry_restoration_period; lognormal variance with pedigree 0.0454, pedigree (3,3,2,5,2)
  Period necessary to return to natural carbon emission/uptake rates for dry restoration process: 10 years, estimated based on Zuback and Stack (2011) and Waddington et al (2010) (see below).
  Note: the restoration period is affected by numerous local factors, that vary from one site to another, even if it is assumed that the active restoration was performed following the best practices available.
  Sources:
  Zuback and Strack (PERG Workshop, 2011). Carbon dioxide and dissolved organic carbon dynamics of Bois-des-Bel 10 years post-restoration. Online: http://www.gret-perg.ulaval.ca/fileadmin/fichiers/fichiersGRET/pdf/colloques/Progr_resumes_Colloque2011_corr.pdf
  and
  Waddington, J.M., Strack, M., Greenwood, M.J. 2010. Towards restoring the net carbon sink function of degraded peatlands: short-term response in CO2 exchange to ecosystem-scale restoration. Journal of Geophysical Research-Biogeosciences, 115, G01008, doi: 10.1029/2009JG001090.
- methane emission, pre-restoration: 0.00273647 kg; name CH4_pre_restoration; = CH4rate_pre_restoration*(pre_restoration_dry*closing_dry_restoration+pre_restoration_wet*closing_wet_restoration)/yield_per_ha; lognormal variance with pedigree 0, pedigree (1,1,1,1,1)
  Emissions occuring from the end of peat harvesting activities until dry or wet restoration is started.
  Uncertainty: C
- fraction of peat loss during peat bog operation: 0.33 dimensionless; name peat_loss; uniform min 0.22, max 0.44, pedigree (3,2,2,5,2)
  Cleary et al. (2005), p.458. Between 22 and 44% of peat is lost from peatlands as CO2 and CH4 emissions due to the disturbance caused by peat extraction.
- additional dissolved organic carbon emitted to surface water: 0.0275 kg/m3; name additionnal_DOC; lognormal variance with pedigree 0.0441, pedigree (3,2,1,5,1)
  (Landry & Rochefort, 2011) 27,5 mg/l of additional dissolved organic carbon (DOC) emitted to neighbouring surface water during drainage at opening of the bog.
- post-occupation period, with gradual return to natural emission rates: 84 year; name post_occ_period_variable; = post_occupation_period-post_occ_period_constant; lognormal variance with pedigree 0, pedigree (1,1,1,1,1)
  After the constant emission rate period, period over which the carbon dioxide and methane emission rates gradually return to their natural (pre-occupation) rates, when peat bog is eather abandonded, reforested or used for berry cultivation.
  Uncertainty: C
- total occupation period: 178.89 year; name total_occupation_period; = lifetime_occupation+(pre_restoration_wet+wet_restoration_period)*closing_wet_restoration+(pre_restoration_dry+dry_restoration_period)*closing_dry_restoration+post_occupation_period*(closing_abandoned+closing_reforestation+closing_berry); lognormal variance with pedigree 0, pedigree (1,1,1,1,1)
  Total time period in which the peat bog is not in its natural state. In is estimated based on time periods and fractions of the total area involved in the different phases of operation (lifetime of operation, pre-restauration, restauration, and abandoned/post-occupation provided in the bracket).
  Uncertainty: C
- drained volume: 4275 m³/ha; name drain_vol; lognormal variance with pedigree 0.052, pedigree (4,4,1,5,1)
  Water volume drained and released to surface waters at site opening (source : questionnaires).
- carbon dioxide emission rate during restoration: 12320 kg/ha.yr; name CO2rate_restoration; = 336*1000*44/12/100; lognormal variance with pedigree 0.0052, pedigree (3,3,1,5,1)
  Cleary et al. (2005), Table 1: Cutover peatland under restoration (vacuum method) emits: 336 t CO2-C/km².yr (conversions:1 km² = 100 ha; 1 t = 1000 kg; 1kg CO2-C = 12/44 kg CO2).
  This emission rate was assumed applicable for wet and dry restoration.
- sand, per surface of road: 800 kg/m2; name sand_per_m2; lognormal variance with pedigree 0.0112, pedigree (4,3,1,5,1)
  Average (source: questionnaires).
- methane emission rate during restoration: 25.3333 kg/ha.yr; name CH4rate_restoration; = 1.9*1000*16/12/100; lognormal variance with pedigree 0.0052, pedigree (3,3,1,5,1)
  Cleary et al. (2005), Table 1: Cutover peatland under restoration (vacuum method) emits: 1,9 t CH4-C/km².yr (conversions:1 km² = 100 ha; 1 t = 1000 kg; 1kg CH4-C = 16/12 kg CH4).
  Thus, 1,9 t CH4-C/km².yr = 25,3 kg CH4/ha.yr
  This emission rate was assumed applicable for wet and dry restoration.
- methane emission, restoration: 0.010327 kg; name CH4_restoration; = CH4rate_restoration*(dry_restoration_period*closing_dry_restoration+wet_restoration_period*closing_wet_restoration)/yield_per_ha; lognormal variance with pedigree 0, pedigree (1,1,1,1,1)
  Emissions occuring during site restoration (dry and wet), from the begining of restoration activities until natural carbon emission/uptake rates are recovered.
  Uncertainty: C
- fraction of sand road: 0.52 dimensionless; name fraction_sand_road; lognormal variance with pedigree 0.0441, pedigree (3,2,1,5,1)
  Roads are either in gravel or sand (source: questionnaires).
- carbon dioxide uptake rate from undisturbed peatlands: 990 kg/ha.yr; name CO2rate_pre_occupation; = 27*1000*44/12/100; lognormal variance with pedigree 0.0052, pedigree (3,3,1,5,1)
  Cleary et al (2005). Uptake of carbon dioxide from the atmosphere for undisturbed peatlands in Canada suitable for peat extraction: 27 g CO2-C/m².yr,
  (Conversions: 1 kg = 1000 g; 10000 m² =1 ha 1kg CO2-C = 12/44 kg CH4).
- peat use, for dry restoration: 66.6667 m³/ha; name dry_restoration_peat_use; = 10000*0.1/15; lognormal variance with pedigree 0.0052, pedigree (3,3,1,5,1)
  For dry restoration, the top 10 cm of peat extracted from parcels in operation are spread on nearby parcels under restoration. It is assumed that peat extracted from 1 ha allows the restoration of 15 ha (source: questionnaires).
  (10000 m²/ha)
- carbon dioxide emission rate during occupation of the peat bog: 10193.3 kg/ha.yr; name CO2rate_occupation; = 278*1000*44/12/100; lognormal variance with pedigree 0.0052, pedigree (3,3,1,5,1)
  Cleary et al. (2005), Table 1: Peatland under extraction emits: 278 t CO2-C/km².yr (conversions:1 km² = 100 ha; 1 t = 1000 kg; 1kg CO2-C = 12/44 kg CO2).
- fraction of peat bog to dry restoration at closure: 0.12 dimensionless; name closing_dry_restoration; lognormal variance with pedigree 0.1241, pedigree (3,2,1,5,1)
  At closure 12% of peat bogs undergo dry restoration (source: questionnaires).
- methane emission, abandonment: 0.306821 kg; name CH4_abandon; = (post_occ_period_constant*CH4rate_pre_restoration+post_occ_period_variable*(CH4rate_pre_restoration+CH4rate_natural/2))*(closing_abandoned+closing_reforestation+closing_Berry)/yield_per_ha; lognormal variance with pedigree 0, pedigree (1,1,1,1,1)
  Emissions occuring on abandoned, reforested and berry cultivation sites, from site closure until natural carbon emission/uptake rates are recovered.
  In these cases, two periods are considered:
  1. A first period having a constant CH4 emission rate;
  2. A second period during which the CH4 emission rate gradually returns to its natural level. A linear relation is assumed,
  Uncertainty: C
- pre-restoration period, dry restoration: 8 year; name pre_restoration_dry; uniform min 5, max 25, pedigree (3,3,1,5,1)
  Period, after the end of peat harvesting activities, before dry restoration is started. Weighted average (on peat production) based on 9 sites for Canada (source: questionnaires).
- carbon dioxide natural uptake, avoided: 13.9102 kg; name CO2_uptake_avoided; = CO2rate_pre_occupation*total_occupation_period/yield_per_ha; lognormal variance with pedigree 0, pedigree (1,1,1,1,1)
  Natural carbon dioxide uptake that would have occured if peatland was not exploited for peat production.
  Uncertainty: C
- carbon dioxide emission, pre-restoration: 1.74818 kg; name CO2_pre_restoration; = CO2rate_pre_restoration*(pre_restoration_dry*closing_dry_restoration+pre_restoration_wet*closing_wet_restoration)/yield_per_ha; lognormal variance with pedigree 0, pedigree (1,1,1,1,1)
  (same comment as for methane emission, pre-restoration)
- carbon dioxide emission, occupation: 40.8319 kg; name CO2_occupation; = CO2rate_occupation*lifetime_occupation/yield_per_ha; lognormal variance with pedigree 0, pedigree (1,1,1,1,1)
  Emissions occuring during peat bog operation.
  Uncertainty: C
- carbon dioxide emission rate during temporary abandonment prior to restoration: 11073.3 kg/ha.yr; name CO2rate_pre_restoration; = 302*1000*44/12/100; lognormal variance with pedigree 0.0052, pedigree (3,3,1,5,1)
  Cleary et al. (2005), Table 1: Abandoned cutover peatland (vacuum method) emits: 302 t CH4-C/km².yr (conversions:1 km² = 100 ha; 1 t = 1000 kg; 1kg CO2-C = 12/44 kg CO2).
  This emission rate was assumed applicable for the pre-restoration period before dry or wet restoration is performed, as well as for sites abandoned, reforested, or used for berry cultivation at closure.
  This constant emission rate is applicable over the first post-occupation period.
- methane emission, natural: 0.749372 kg; name CH4_natural; = CH4rate_natural*total_occupation_period/yield_per_ha; lognormal variance with pedigree 0, pedigree (1,1,1,1,1)
  Natural methane emissions that would have occured if peatland was not exploited for peat production.
  Explanation:
  For a non disturbed peatland ("pre-occupation" phase), it is estimated that there are 4g C-CH4/m² (Cleary et al., 2005), or 53,5 kg CH4/ha emitted each year.
  During the different operation phase of the peat bog, the emissions are less than this natural methane emission rate, thus avoiding methane generation.
  These annual reference emissions (in kg CH4/ha.a) are multiplied by the total occupation period of the peat bog, and divided by the lifetime yield (in m³ peat/ha) to obtain the reference emission in kg methane per m³ of output.
  Uncertainty: C
- road surface: 0.04 m2; name road_surface; lognormal variance with pedigree 0.0441, pedigree (3,2,1,5,1)
  Average (source: questionnaires). A width of 5 m was used to estimate surface.
- fraction of peat bog abandoned at closure: 0.69 dimensionless; name closing_abandoned; lognormal variance with pedigree 0.1241, pedigree (3,2,1,5,1)
  At closure, 69% of peat bogs are abandoned or undergo natural regeneration (source: questionnaires).
- carbon dioxide, restoration: 5.02216 kg; name CO2_restoration; = CO2rate_restoration/yield_per_ha*(dry_restoration_period*closing_dry_restoration+wet_restoration_period*closing_wet_restoration); lognormal variance with pedigree 0, pedigree (1,1,1,1,1)
  (same comment as for methane emission, restoration)
- methane emission rate during temporary abandonment prior to restoration: 17.3333 kg/ha.yr; name CH4rate_pre_restoration; = 1.3*1000*16/12/100; lognormal variance with pedigree 0.0052, pedigree (3,3,1,5,1)
  Cleary et al. (2005), Table 1: Abandoned cutover peatland (vacuum method) emits: 1,3 t CH4-C/km².yr (conversions:1 km² = 100 ha; 1 t = 1000 kg; 1kg CH4-C = 16/12 kg CH4).
  Thus, 1,3 t CH4-C/km².yr = 17,3 kg CH4/ha.yr
  This emission rate was assumed applicable for the pre-restoration period before dry or wet restoration is performed, as well as for sites abandoned, reforested, or used for berry cultivation at closure.
  This constant emission rate is applicable over the first post-occupation period.
- methane emission, occupation: 0.0747739 kg; name CH4_occupation; = CH4rate_occupation*lifetime_occupation/yield_per_ha; lognormal variance with pedigree 0, pedigree (1,1,1,1,1)
  Emissions occuring during peat bog operation.
  Uncertainty: C
- ties, for straw bales: 0.01 kg; name ties_straw_bale; lognormal variance with pedigree 0.0506, pedigree (5,5,1,5,1)
  Ties for straw bales, for dry restoration only. 10 g of ties per bale is assumed.
- lifetime: 51 year; name lifetime_occupation
  Length of operation phase of peat bog. Average and uncertainty based on 19 sites (source: questionnaires).
- total of site closure: 1 dimensionless; = closing_abandoned+closing_reforestation+closing_Berry+closing_dry_restoration+closing_wet_restoration
  THIS PARAMETER MUST EQUAL 1. OTHERWISE, CHECK FRACTIONS OF PEAT BOG RESTORATION METHODS.
- ratio biological oxygen demand / chemical oxygen demand: 0.05 dimensionless; name Ratio_BOD_to_COD; lognormal variance with pedigree 0.0427, pedigree (2,2,1,5,1)
  Robert et al. (2008). In northern peatland, the ratio BOD/COD = 0,05 is observed.
- fraction of peat bog reforested at closure: 0.06 dimensionless; name closing_reforestation; lognormal variance with pedigree 0.1241, pedigree (3,2,1,5,1)
  At closure, 6% of peat bogs are reforested (source: questionnaires).

## Reference product
- peat moss: 1 m3; name peat_output; CPC 11050: Peat; By-product classification allocatable product
  Volume equivalent loose. Packed in plastic bag. Fossil carbon content of plastic packaging not included in peat moss product flow properties, preventing carbon inputs and outputs form balancing out.
  production volume 1.33639e8 m3; name Peat_PV; = PV_world/density_loose
    Wold production volume of horticultural peat, 2010. Source: http://www.indexmundi.com/en/commodities/minerals/peat/peat_t9.html
  property carbon content, fossil 0.59; = Carbon_peat
    fossil carbon content on a dry matter basis. Packaging excluded.
  property price 16.3 EUR2005; name peat_output_price_EUR2005
    Calculated based on literature value (UN Commodity Trade Statistics Database) using data on trade value and net weight (kg) for 5 reference countries/regions (EU-27, USA, JP, CN and IN) which weighted (by net weight) average is assumed to be a good approximation of the global price. The UN classification; 2703 Peat moss (accessed 20140509). Data for the year 2005. Assuming the density of peat is 100kg/m3. Cross-referenced with another source (USGS, http://minerals.usgs.gov/minerals/pubs/commodity/peat/myb1-2006-peat.pdf, accessed 20140509) the average price for peat in the US in 2005 was 13.84 USD/m3.
  property heating value, net 17.88 MJ
    LHV is calculated based on the Carbon content of the product. More details can be found on the respective documentation.
  property carbon content 0.59
    carbon content on a dry matter basis (reserved; not for manual entry)
  properties: carbon content, non-fossil 0, dry mass 100 kg, water in wet mass 0 kg, water content 0, wet mass 100 kg, carbon allocation 59 kg

## Inputs from technosphere
- building, hall, steel construction: 0.000203 m2; lognormal variance with pedigree 0.3107, pedigree (2,2,4,5,1)
  Conditioning plant and administrative buildings.
- straw: 0.00656088 kg; name mass_straw; = straw_per_ha/yield_per_ha*closing_dry_restoration; lognormal variance with pedigree 0.008, pedigree (1,1,4,1,1)
  For dry restoration only.
  Uncertainty: C
  property water content 0.135; name water_straw
  property carbon content, non-fossil 0.437377; name carbon_straw
  property bulk density 125 kg/m3; name straw_bulk_density
  property mass of a straw bale 23.2031 kg; name straw_bale_mass; = straw_bulk_density*(0.99*0.5*0.375)
  properties: dry mass 0.881 kg, wet mass 1 kg, heating value, net 14.25 MJ
  note on heating value, net: Literature value, Source: Phyllis2, database for (treated) biomass, algae, feedstocks for biogas production and biochar, https://phyllis.nl/Biomass/View/1271, ECN.TNO
  note on mass of a straw bale: Average bale dimensions were 990 mm long, 500 mm wide and 375 mm high, considering 125 kg/m³ bulk (source: Peter Walker (2004) "Compressoin load testing straw bale walls." Dept. Architecture & Civil Engineering University of Bath).
- transport, freight, lorry 16-32 metric ton, EURO3: 0 metric ton*km; pedigree (1,1,1,1,1)
  1000 kg/t
  Uncertainty: C
- heat, central or small-scale, natural gas: 0.000254976 MJ; = m3Fuel_Input_NaturalGas*Net_Heat_Value_NaturalGas*37.89/Fuel_use_NaturalGas; source Gaz Métro 2005; lognormal variance with pedigree 0.008, pedigree (1,1,4,1,1)
  Heating of administrative buildings.
  Uncertainty: C
  property corresponding fuel use, natural gas 1.0417 MJ; name Fuel_Use_NaturalGas
  property heating value, net 1 MJ; name Net_Heat_Value_NaturalGas
  property fuel input in physical units, m3, natural gas 7.01e-6 m3; name m3Fuel_Input_NaturalGas
  note on corresponding fuel use, natural gas: Lower heating value of the fuel input related to the heat/electricity output. Assume a 96% energy efficiency based on Section 5.3.6 of report "Life cycle Inventories of Energy Systems, Results for Current Systems in Switzerland and other UCTE Countries" (ecoinvent report No. 5, 2007)
  note on fuel input in physical units, m3, natural gas: m3 of natural gaz consummed for heating of administrative buildings (source: questionnaires).
- power sawing, without catalytic converter: 1.09962e-6 hour; = drain_surface*power_per_ha*closing_wet_restoration; lognormal variance with pedigree 0.008, pedigree (1,1,4,1,1)
  For wet restoration only.
  Uncertainty: C
- polypropylene, granulate: 2.82758e-6 kg; name Ties_straw; = ties_straw_bale*mass_straw/straw_bale_mass; lognormal variance with pedigree 0.008, pedigree (1,1,4,1,1)
  For dry restoration only, ties for straw bales.
  Uncertainty: C
  properties: carbon content, fossil 0.857143, wet mass 1 kg, dry mass 1 kg, heating value, net 32.78 MJ
  note on heating value, net: Value extracted from "treatment of waste polypropylene, open burning"
- electricity, low voltage: 0 kWh; pedigree (1,1,1,1,1)
  For conditioning plant and adminitrative buildings.
- waste polypropylene: 0 kg; name waste_PP; pedigree (1,1,1,1,1)
  Ties of straw bales used for site closure (dry restoration only).
  Uncertainty: C
  production volume 0 kg
    Calculated from production volume of reference product using the relative outputs.
  property dry mass 0.841 kg; name dry_mass_wastePP
  property price 0 EUR2005; name waste_PP_price_EUR2005
  properties: wet mass 1 kg, water content 0.189061, carbon content, fossil 0.825208, heating value, net 32.78 MJ
  note on heating value, net: Value assumed for all polypropylene products. Source: Phyllis2, database for (treated) biomass, algae, feedstocks for biogas production and biochar, https://phyllis.nl/Biomass/View/1186, ECN.TNO
- sand: 0 kg; pedigree (1,1,1,1,1)
  For road construction.
  Uncertainty: C
  properties: wet mass 1 kg, dry mass 1 kg
- ammonium nitrate: 0 kg; pedigree (1,1,1,1,1)
  The exchange has been updated from "ammonium nitrate, as N" into "ammonium nitrate" and therefore its amount has been scaled (multiplied) from 0.0002 kg by 2.8573 kg of "ammonium nitrate" per kg of "ammonium nitrate, as N". Original comment of the exchange is: For reforestation only.
  Uncertainty: C
  properties: wet mass 1 kg, dry mass 1 kg
- gravel, round: 0.192 kg; = fraction_gravel_road*road_surface*gravel_per_m2; lognormal variance with pedigree 0.008, pedigree (1,1,4,1,1)
  For road construction.
  Uncertainty: C
  properties: dry mass 1 kg, wet mass 1 kg
- diesel, burned in building machine: 6.25714 MJ; = 175.2/28; lognormal variance with pedigree 0.1786, pedigree (4,5,5,5,5)
  Place holder for tractors, excavators, bulldozers, mechanical diggers to come. 1 MJ input corresponding to 0.0234 kg diesel or 28 seconds of work at 3 kg diesel per hour (approximation). 175,2 hr total for all machines.
  properties: heating value, net 1 MJ
- extrusion, plastic film: 2.82758e-6 kg; = Ties_straw; lognormal variance with pedigree 0.008, pedigree (1,1,4,1,1)
  Production of PP ties for straw bales.
  Uncertainty: C
- transport, freight, lorry 16-32 metric ton, EURO3: 2.28525, 2.71475 metric ton*km (2 entries); lognormal variance with pedigree 0.008, pedigree (1,1,4,1,1)
  1000 kg/t
  Uncertainty: C
- electricity, low voltage: 0.0611281, 0.0111303, 0.251252, 0.0916668, 0.179211, 2.75146, 0.893488, 0.445138, 1.13552 kWh (9 entries); lognormal variance with pedigree 0.0113, pedigree (2,2,4,5,1)
  For conditioning plant and adminitrative buildings.
- waste polypropylene: -1.67814e-6, -1.12127e-7, -8.47999e-9, -4.63125e-8, -1.87097e-8, -4.3978e-8, -1.45442e-6 kg (7 entries); lognormal variance with pedigree 0.008, pedigree (1,1,4,1,1)
  Ties of straw bales used for site closure (dry restoration only).
  Uncertainty: C
  production volume 449.318 kg
  properties: wet mass 1 kg, water content 0.189061, carbon content, fossil 0.825208, dry mass 0.841 kg, heating value, net 32.78 MJ
- sand: 16.3592, 0.195873, 0.0849293 kg (3 entries); lognormal variance with pedigree 0.008, pedigree (1,1,4,1,1)
  For road construction.
  Uncertainty: C
- ammonium nitrate: 9.74908e-5, 0.00018289, 0.000330953 kg (3 entries); lognormal variance with pedigree 0.0086, pedigree (1,1,4,1,1)
  (same comment as for ammonium nitrate)

## Inputs from nature
All rows: lognormal variance with pedigree 0.008, pedigree (1,1,4,1,1)
- Transformation, from mineral extraction site [natural resource, land]: 0.78544 m2; = drain_surface*10000
  Restored surface, at site closure (10000 m²/ha)
  Uncertainty: C
- Transformation, from wetland, inland (non-use) [natural resource, land]: 0.82544 m2; = drain_surface*10000+road_surface
  Based on peatland surfaces declared in questionnaires. (10000 m²/ha)
  Uncertainty: C
- Water, lake [natural resource, in water]: 0.335775 m3; = drain_vol*drain_surface
  Drainage operations. Drained water emitted to river.
  Uncertainty: C
- Transformation, to grassland, natural (non-use) [natural resource, land]: 0.581953 m2; = drain_surface*10000*closing_abandoned+road_surface
  10000 m²/ha.
  Uncertainty: C
- Transformation, to forest, secondary (non-use) [natural resource, land]: 0.0471264 m2; = drain_surface*10000*closing_reforestation
  10000 m²/ha.
  Uncertainty: C
- Transformation, from traffic area, road network [natural resource, land]: 0.04 m2; = road_surface
  Uncertainty: C
- Occupation, traffic area, road network [natural resource, land]: 2.04 m2*year; = lifetime_occupation*road_surface
  Uncertainty: C
- Occupation, mineral extraction site [natural resource, land]: 40.0574 m2*year; = lifetime_occupation*drain_surface*10000
  10000 m²/ha
  Uncertainty: C
- Transformation, to mineral extraction site [natural resource, land]: 0.78544 m2; = drain_surface*10000
  Drained surface, at site opening (10000 m²/ha)
  Uncertainty: C
- Peat, in ground [natural resource, biotic]: 149.317 kg; = (peat_output/(1-peat_loss)+drain_surface*closing_dry_restoration*dry_restoration_peat_use)*density_loose; source Cleary, J. 2005
  Dry mass. Includes loss (mineralization to CO2 and CH4) during peat bog operation (33%) and use at site closure (0.04%, for dry restoration only). Peat is assumed to be lost before and after harvesting (due to overheating while stacked in field). From 22 to 44% of harvested volume is lost, assuming 350E3 t of peat per km² are extracted from a peat bog (Cleary 2005, p.458).
  Uncertainty: C
  property carbon content, fossil 0.59; name Carbon_peat
- Transformation, to permanent crop, non-irrigated [natural resource, land]: 0.0471264 m2; = drain_surface*10000*closing_Berry
  10000 m²/ha.
  Uncertainty: C
- Transformation, to wetland, inland (non-use) [natural resource, land]: 0.149234 m2; = drain_surface*10000*(closing_dry_restoration+closing_wet_restoration)
  10000 m²/ha.
  Uncertainty: C
- Transformation, to traffic area, road network [natural resource, land]: 0.04 m2; = road_surface
  Roads, at site opening
  Uncertainty: C

## Emissions to nature
- Iron, ion [water, unspecified]: 0.16 kg; source Röder, A. 2007; lognormal variance with pedigree 0.25, pedigree (5,5,5,5,5)
  Own assumption" as cited in ecoinvent v3.0 dataset "peat production, NORDEL 1994" for 1kg of peat, at mine (source:Nordic countries power association), multiplied by 100, considering the density of peat moss loose, dry used for this dataset.
  Uncertainty: N
- Methane, fossil [air, unspecified]: -0.354714 kg; = CH4_occupation+CH4_pre_restoration+CH4_restoration+CH4_abandon-CH4_natural; source Cleary, J. 2005
  Net emission.The exploitation of a peat bog is assumed to avoid CH4 emissions to air (compared to a non exploited bog, which emmits 4 gC/m².yr of CH4 according to Cleary et al. 2005).
- Sulfate [water, unspecified]: 0.33 kg; source Röder, A. 2007; lognormal variance with pedigree 0.25, pedigree (5,5,5,5,5)
  (same comment as for Iron, ion)
- COD, Chemical Oxygen Demand [water, surface water]: 0.0249313 kg; name COD; = TOC*Ratio_COD_to_TOC; source Josée Landry 2011; lognormal variance with pedigree 0.008, pedigree (1,1,4,1,1)
  Uncertainty: C
- Water [water, surface water]: 0.335775 m3; = drain_vol*drain_surface; lognormal variance with pedigree 0.008, pedigree (1,1,4,1,1)
  Drainage operations. Drained water emitted to river.
  Uncertainty: C
- Radon-222 [air, unspecified]: 0.3 kBq; source Röder, A. 2007; lognormal variance with pedigree 0.51, pedigree (5,5,5,5,5)
  (same comment as for Iron, ion)
- Dinitrogen monoxide [air, unspecified]: 0 kg; source Cleary, J. 2005
  For ombrotrophic peat bogs, as in Quebec and Eastern Canada, the increase of dinitrogen monoxide emissions, associated with the drainage of peatlands under extraction, is assumed to be negligeable (as opposed to nutrient-rich peat bogs) (Cleary, 2005; GIEC 2006, vol. 4, chap. 7).
- BOD5, Biological Oxygen Demand [water, surface water]: 0.00124657 kg; = COD*Ratio_BOD_to_COD; source Robert H. Kadlec 2008; lognormal variance with pedigree 0.008, pedigree (1,1,4,1,1)
  Uncertainty: C
- Particulates, > 10 um [air, unspecified]: 0.04 kg; source Röder, A. 2007; lognormal variance with pedigree 0.25, pedigree (5,5,5,5,5)
  (same comment as for Iron, ion)
- Carbon dioxide, fossil [air, unspecified]: 134.237 kg; = CO2_occupation+CO2_pre_restoration+CO2_restoration+CO2_abandon+CO2_uptake_avoided-CO2_straw; lognormal variance with pedigree 0.0106, pedigree (3,1,4,1,1)
  Net emission. Considering CO2 generated during production cycle and "avoided" natural CO2 uptake. CO2 from straw decomposition was substacted to avoid double counting.
- TOC, Total Organic Carbon [water, surface water]: 0.00923383 kg; name TOC; = DOC; lognormal variance with pedigree 0.008, pedigree (1,1,4,1,1)
  Following ecoinvent Data Quality Guidelines, section 5.9.7 (v.3.0)
  Uncertainty: C
- DOC, Dissolved Organic Carbon [water, surface water]: 0.00923383 kg; name DOC; = drain_vol*drain_surface*additionnal_DOC; source Josée Landry 2011; lognormal variance with pedigree 0.008, pedigree (1,1,4,1,1)
  Uncertainty: C
- Solids, inorganic [water, unspecified]: 0.35 kg; source Röder, A. 2007; lognormal variance with pedigree 0.25, pedigree (5,5,5,5,5)
  (same comment as for Iron, ion)
- Carbon dioxide, non-fossil [air, unspecified]: 0.0105145 kg; name CO2_straw; = (carbon_straw*mass_straw)/carbon_CO2bio; lognormal variance with pedigree 0.008, pedigree (1,1,4,1,1)
  Straw used for dry restoration only. It is assumed that all the straw will degrade in aerobic conditions.
  Uncertainty: C
  property carbon content, non-fossil 0.272916; name carbon_CO2bio

## Sampling procedure
Information were collected by questionnaires in 2006 and 2010 from five companies operating in Quebec. Data concerning annual operations (maintenance of ditches, site preparation, peat harvesting) as well as administrative buildings, transport and conditioning operations were provided in 2006, and judged applicable for 2010 by the data providers.
Data for peat bog opening, preparation and closure were updated in 2010.

## Extrapolations
For each unit operation, a weighted average (based on production) was calculated for the sites for which the most detailed information was available. Depending on the operation, the data do not include the same data sources.
For site closure operations, it was assumed that the distribution of management approaches, between natural regeneration, reforestation, rewetting, and ecological restoration, was the same for Quebec as for Canada since Quebec data were insufficiant and Canadian data were used.
Data quality indicators adjusted accordingly.

## Review by Emilia Moreno Ruiz 2014-05-28
heat input corrected

## Review by Dominic Notter 2013-10-17
o.k.
