# treatment of waste plastic, consumer electronics, municipal incineration with fly ash extraction

Dataset: EcoSpold 2, unit process
Geography: CH
Time period: 2006-01-01 to 2021-12-31
Technology level: current
Classification: ISIC rev.4 ecoinvent: 3821:Treatment and disposal of non-hazardous waste
Synonyms: Siedlungsabfallverbrennung; municipal waste incineration; Kehrichtverbrennung
Scenario: Business-as-Usual
System model: Allocation, cut-off by classification
Share of production covered: 100 %
Generated by: Gabor Doka
Published in: Doka G. 2015
Database: ecoinvent
isCopyrightProtected: true
accessRestrictedTo: 1

## General comment
This dataset represents the activity of waste disposal of waste plastic, consumer electronics in a municipal solid waste incinerator (MSWI) // Recommended use of this dataset: For plastic parts from consumer electronics, which go to disposal as part of communal waste mixture, either after a separation procedure, or in small amounts as illegal disposal of a larger item of waste electronics (WEEE). // // Waste composition (wet, in ppm): upper heating value 36.29 MJ/kg; lower heating value 34.78 MJ/kg; H2O 11129; O 41000; H 75000; C 821000; S 300; N 13100; P 600; B n.a.; Cl 6300; Br 6800; F 130; I n.a.; Ag n.a.; As 10; Ba 137; Cd 115; Co 29.478; Cr 34; Cu 3194.1; Hg 1.4; Mn 4; Mo 2; Ni 703; Pb 127; Sb 4795.2; Se 1.9596; Sn 267; V 0.5; Zn 361; Be 0.46656; Sc n.a.; Sr 82.582; Ti 4187; Tl 0.37325; W n.a.; Si 3547; Fe 1483; Ca 3177; Al 2020; K 233; Mg n.a.; Na 128; // Share of carbon in waste that is biogenic 0%. // Share of metals in waste not oxidised and bulk-recyclable (exclude very small or thin parts) Iron: 0%; Alu: 0%; Copper: 0%. // Recovery of metal scrap from bottom ash to recycling: 0g iron scrap, 0g aluminium scrap, 0g copper scrap. From this waste, the FLUWA process in the technology mix recovers 0.000829kg (DM) of a hydroxide sludge to be recycled in zinc furnaces. // Ultimately one kg of this waste produces 0.05771 kg of bottom ash (can include some washed ash) and 0.01215 kg of residues, which are landfilled (technology mix). Additional solidification of residues with 0.004859 kg of cement.Net energy production: 4.48MJ/kg electric energy and 8.66MJ/kg thermal energy. //

## Included activities start
waste incineration from waste reception gate and delivery into waste bunker at incinerator plant site (without transports to the incinerator)

## Included activities end
Waste-specific short-term emissions to water from leachate. Long-term emissions from landfill to ground water.

## Geography
Specific to the technology mix encountered in Switzerland in 2012.

## Technology
average Swiss MSWI plants in 2010 (grate incinerators) with electrostatic precipitator for fly ash (ESP), wet flue gas scrubber and 25% SNCR , 42.77% SCR-high dust , 32.68% SCR-low dust -DeNOx facilities and 0% without Denox (weighted according to mass of burnt waste, representing Swiss average). Efficiency of iron scrap separation from slag : 58%. Efficiency of non-ferrous scrap separation from slag : 31%. The technology mix for this dataset includes a filter ash treatment (FLUWA) of a share of 46.22%. Gross electric efficiency technology mix 15.84% and Gross thermal efficiency technology mix 28.51%

## Time period
Waste composition as given in literature reference, theoretical data or other source. Transfer coefficients for modern MSWI.

## Reference product
- waste plastic, consumer electronics: -1 kg; name RP_amount_1; CPC 39270: Waste, parings and scrap of plastics; By-product classification Waste
  Main reference product of this activity (supply of disposal service).
  production volume 7.9089e6 kg; name RP_PV_1
    based on corresponding global production volume of MSW fraction in conventional MSWI (wo fly ash extraction) and scaled down to annual Swiss incinerated MSW mass of 3.02 mio. tonnes.
  property heating value, net 34.78 MJ
    Assumed equal to "waste plastic, consumer electronics, sorted".
  property price 0 EUR2005; name RP_amount_1_price_EUR2005
    Waste products are assigned a price of zero as they are assumed to require further treatment.
  property carbon content 0.83024
    carbon content on a dry matter basis (reserved; not for manual entry)
  properties: manganese content 4.045e-6, chromium content 3.4383e-5, cobalt content 2.9809e-5, lead content 0.00012843, selenium content 1.9816e-6, antimony content 0.0048492, vanadium content 5.0563e-7, beryllium content 4.7181e-7, strontium content 8.3511e-5, tin content 0.00027, zinc content 0.00036506, aluminium content 0.0020427, potassium content 0.00023562, carbon content, fossil 0.83024, sodium content 0.00012944, silicon content 0.0035869, titanium content 0.0042341, water content 0.011254, calcium content 0.0032128, thallium content 3.7745e-7, wet mass 1 kg, oxygen content 0.041461, hydrogen content 0.075844, water in wet mass 0.011129 kg, chlorine content 0.0063709, dry mass 0.98887 kg, iron content 0.0014997, nitrogen content 0.013247, cadmium content 0.00011629, nickel content 0.00071091, barium content 0.00013854, phosphorus content 0.00060675, sulfur content 0.00030338, arsenic content 1.0113e-5, fluorine content 0.00013146, bromine content 0.0068765, molybdenum content 2.0225e-6, mercury content 1.4158e-6, copper content 0.0032301, carbon allocation 0.820999 kg

## By-products
- electricity, for reuse in municipal waste incineration only: 0 kWh; name E_el_prod_MSWI; CPC 17100: Electrical energy; By-product classification allocatable product; pedigree (1,1,1,1,1)
  Net electricity generated from this waste and used in internal MSWI plant energy redistribution.
  Uncertainty: uncertainty is calculated from uncertainties in waste composition and uncertainties in energy efficiency and the uncertainty in internal energy demand
  production volume 9.8395e6 kWh
    calculated in proportion to reference product waste input to incinerator
  property exergy 3.6 MJ; name E_el_prod_MSWI_exergy
    This exergy property is based on the exergy content of the product.
  property true value relation 3.6; name E_el_prod_MSWI_true_value_relation
    property to calculate "true value" from
  property price 0.1 EUR2005; name E_el_prod_MSWI_price_EUR2005
    Estimated to be the same price as in case of electricity, medium voltage.
- heat, for reuse in municipal waste incineration only: 0 MJ; name E_th_prod_MSWI; By-product classification allocatable product; CPC 17300: Steam and hot water; pedigree (1,1,1,1,1)
  Net useful heat generated from this waste and used in internal MSWI plant energy redistribution.
  Uncertainty: uncertainty is calculated from uncertainties in waste composition and uncertainties in energy efficiency and the uncertainty in internal energy demand
  production volume 6.8466e7 MJ
    calculated in proportion to reference product waste input to incinerator
  property price 0.0106 EUR2005; name E_th_prod_MSWI_price_EUR2005
    Average European district heat price from Ecoheatcool and Euroheat 2005-2006, Ecoheat Work package 1: The European heat market. Final report. 10.6 EUR/GJ i s the price of district heat. http://www.solarthermalworld.org/files/Ecoheatcool%20WP1%20Web.pdf?download
  property true value relation 0.1842; name E_th_prod_MSWI_true_value_relation
    property to calculate "true value" from
  property exergy 0.1842 MJ; name E_th_prod_MSWI_exergy
    This exergy property is based on the exergy content of the product.
- metalliferous hydroxide sludge: 0 kg; By-product classification Recyclable; CPC 1429: Other non-ferrous metal ores and concentrates (other than uranium or thorium ores and concentrates); pedigree (1,1,1,1,1)
  Metalliferous hydroxide sludge from filter ash leaching (FLUWA).
  Uncertainty: uncertainty is calculated from uncertainties in waste composition and transfer coefficients to filter ash in incinerator and the uncertainty of the transfer coefficients of the FLUWA process.
  production volume 0 kg
    calculated in proportion to reference product waste input to incinerator
  property price 0.0042 EUR2005
    World market value of manure, deflated with barley world market price and consumer price index, based on [http://www.gov.pe.ca/photos/original/af_NM_manconv.pdf].
  property heating value, net 0 MJ
    Non combustible products are assumed to have an LHV equal to zero (0).
  property carbon content 0.051511
    carbon content on a dry matter basis (reserved; not for manual entry)
  properties: nickel content 0.00078935, tin content 0.00028419, antimony content 0.062767, selenium content 2.5104e-5, mercury content 3.0772e-6, zinc content 0.076805, aluminium content 0.00016814, thallium content 4.55e-6, iron content 0.00019739, strontium content 1.1361e-6, calcium content 0.038658, potassium content 0.0017878, titanium content 0.0004142, beryllium content 8.4103e-6, dry mass 0.25 kg, sodium content 0.0012682, silicon content 0.00022667, carbon content, fossil 0.051511, wet mass 1 kg, water in wet mass 0.75 kg, water content 3, arsenic content 0.00011176, chlorine content 0.18322, bromine content 0.162, oxygen content 0.32809, fluorine content 0.0022876, sulfur content 0.022255, manganese content 4.9312e-6, molybdenum content 0.00014786, chromium content 0.00019658, copper content 0.0016009, phosphorus content 0.014207, barium content 4.6512e-5, cadmium content 0.047265, lead content 0.0027657, vanadium content 3.4355e-6, cobalt content 0.00087719, carbon allocation 0.0128778 kg

## Inputs from technosphere
- hydrochloric acid, without water, in 30% solution state: 0.00037074 kg; lognormal variance with pedigree 0.075779, pedigree (1,1,4,1,1)
  Auxilliary inputs for the wastewater treatment stage of the incinerator plant.
  Uncertainty: uncertainty calculated from uncertainty in average HCl input, of transfer coefficients in the incinerator, and the uncertainty of the waste composition of this waste
  properties: dry mass 1 kg, wet mass 1 kg, heating value, net 3.32 MJ
- municipal waste incineration facility: 2.5e-10 unit
  Demands per kilogram waste.
- residual material landfill: 5.0459e-11 unit; lognormal variance with pedigree 0.064759, pedigree (1,1,4,1,1)
  Landfill infrastructure required for landfilling of incineration residues.
  Uncertainty: uncertainty is calculated from uncertainties in waste composition and transfer coefficients in incinerator
- iron (III) chloride, without water, in 40% solution state: 6.6169e-5 kg; lognormal variance with pedigree 0.2786, pedigree (1,1,4,1,1)
  Auxilliary inputs for the wastewater treatment stage of the incinerator plant.
  Uncertainty: uncertainty calculated from uncertainty in average FeCl3 input, of transfer coefficients in the incinerator, and the uncertainty of the waste composition of this waste
  properties: wet mass 1 kg, dry mass 1 kg
- titanium dioxide: 0.00014624 kg; lognormal variance with pedigree 1.0275, pedigree (1,1,4,1,1)
  Input to DeNOx stage (TiO2 catalyst carrier)
  Uncertainty: uncertainty calculated from uncertainty in average DeNOx input, uncertainty in the share of thermal NOx, uncertainty of nitrogen content in average municipal waste and the uncertainty in nitrogen content in *this* waste.
  properties: dry mass 1 kg, wet mass 1 kg
- chemical, organic: 2.8744e-5 kg; lognormal variance with pedigree 0.84283, pedigree (1,1,4,1,1)
  Auxilliary inputs for the wastewater treatment stage of the incinerator plant. Proxy for (pure) Trisodium-trimercapto-s-triazine (CAS 17766-26-6), used as 15% diluted solution, aka TMT15.
  Uncertainty: uncertainty calculated from uncertainty in average TMT15 input, of transfer coefficients in the incinerator, and the uncertainty of the waste composition of this waste
  properties: wet mass 1 kg, heating value, net 19.03 MJ, carbon content, fossil 0.628, dry mass 1 kg
- ammonia, anhydrous, liquid: 0.0023342 kg; lognormal variance with pedigree 0.67075, pedigree (1,1,4,1,1)
  Input to DeNOx stage (100% NH3).
  Uncertainty: uncertainty calculated from uncertainty in average DeNOx input, uncertainty in the share of thermal NOx, uncertainty of nitrogen content in average municipal waste and the uncertainty in nitrogen content in *this* waste.
  properties: dry mass 1 kg, wet mass 1 kg
- spent activated carbon with mercury: -7.4689e-6 kg; name BP_amount_1; lognormal variance with pedigree 1.5325, pedigree (1,1,4,1,1)
  Spent ion exchanger charged with mercury, from FLUWA filter ash treatment, approximated here with Spent activated carbon with mercury, deposited undergound in a polyethylene Big Bag.
  Uncertainty: uncertainty calculated from uncertainty in of transfer coefficients in the incinerator, and the uncertainty of the waste composition of this waste.
  production volume 59.0708 kg; = ABS(RP_PV_1 * (BP_amount_1 / RP_amount_1))
    Calculated from production volume of reference product using the relative outputs.
  property price 0 EUR2005; name BP_amount_1_price_EUR2005
  properties: heating value, net 18.18 MJ, dry mass 1 kg, wet mass 1 kg, carbon content, fossil 0.6
- process-specific burdens, residual material landfill: 0.02422 kg; lognormal variance with pedigree 0.064759, pedigree (1,1,4,1,1)
  Mass-specific expenditures required for landfilling of incineration residues.;activityLink introduced to establish a direct link to the corresponding regional supply of this product
  Uncertainty: uncertainty is calculated from uncertainties in waste composition and transfer coefficients in incinerator
- chemical, inorganic: 0.000176 kg; lognormal variance with pedigree 0.20818, pedigree (1,1,4,1,1)
  Auxilliary inputs for the wastewater treatment stage of the incinerator plant. Proxy for Polyelectrolyte.
  Uncertainty: uncertainty calculated from uncertainty in average Polyelectrolyte input, of transfer coefficients in the incinerator, and the uncertainty of the waste composition of this waste
  properties: wet mass 1 kg, dry mass 1 kg, carbon content, fossil 0.003
- process-specific burdens, slag landfill: 0.057713 kg; lognormal variance with pedigree 0.054358, pedigree (1,1,4,1,1)
  Mass-specific expenditures required for landfilling of bottom ash.;activityLink introduced to establish a direct link to the corresponding regional supply of this product
  Uncertainty: uncertainty is calculated from uncertainties in waste composition and transfer coefficients in incinerator
- heat, district or industrial, natural gas: 0.4365 MJ; lognormal variance with pedigree 0.67075, pedigree (1,1,4,1,1)
  Input to DeNOx stage, to heat up flue gas in low-dust SCR.
  Uncertainty: uncertainty calculated from uncertainty in average DeNOx input, uncertainty in the share of thermal NOx, uncertainty of nitrogen content in average municipal waste and the uncertainty in nitrogen content in *this* waste.
  properties: heating value, net 1 MJ
- cement, unspecified: 0.0048592 kg; lognormal variance with pedigree 0.073843, pedigree (1,1,4,1,1)
  Cement required for solidification of landfilled residual material.
  Uncertainty: Uncertainty calculated from uncertainty of the waste composition of this waste, of transfer coefficients in the incinerator and of the solidification recipe.
  properties: wet mass 1 kg, dry mass 1 kg
- cationic resin: 7.0954e-6 kg; lognormal variance with pedigree 1.5325, pedigree (1,1,4,1,1)
  Auxilliary input for mercury removal in filter ash treatment (FLUWA).
  Uncertainty: uncertainty calculated from uncertainty in of transfer coefficients in the incinerator, and the uncertainty of the waste composition of this waste
  properties: dry mass 0.5 kg, carbon content, fossil 0.521606, water content 1, wet mass 1 kg, heating value, net 6.68 MJ
- waste cement, hydrated: -0.012148 kg; lognormal variance with pedigree 0.073843, pedigree (1,1,4,1,1)
  Hydrated cement output for solidification of landfilled residual material.
  Uncertainty: Uncertainty calculated from uncertainty of the waste composition of this waste and transfer coefficients in the incinerator and of the solidification recipe.
  production volume 96078 kg
    calculated in proportion to reference product waste input to incinerator
  properties: dry mass 1 kg, wet mass 1 kg
- sodium hydroxide, without water, in 50% solution state: 0.0011372 kg; lognormal variance with pedigree 0.18697, pedigree (1,1,4,1,1)
  Auxilliary inputs for the flue gas treatment stage of the incinerator plant, and partially in the filter ash treatment (FLUWA).
  Uncertainty: uncertainty calculated from uncertainty in average NaOH input, of transfer coefficients in the incinerator, and the uncertainty of the waste composition of this waste
  properties: dry mass 1 kg, heating value, net 3.03 MJ, wet mass 1 kg
- water, decarbonised: 2.0864 kg; lognormal variance with pedigree 0.2786, pedigree (1,1,4,1,1)
  Incinerator process water used in flue gas scrubber stage.
  Uncertainty: uncertainty calculated from uncertainty in average water input, and the uncertainty of the waste composition of this waste
  properties: wet mass 1 kg
- chromium oxide, flakes: 2.9846e-6 kg; lognormal variance with pedigree 1.0275, pedigree (1,1,4,1,1)
  Input to DeNOx stage. Active component in SCR catalyst (vanadium pentoxide, V2O5), here approximated with the available chromium trioxide.
  Uncertainty: uncertainty calculated from uncertainty in average DeNOx input, uncertainty in the share of thermal NOx, uncertainty of nitrogen content in average municipal waste and the uncertainty in nitrogen content in *this* waste.
  properties: dry mass 1 kg, wet mass 1 kg
- transport, freight, lorry, unspecified: 0.0030554 metric ton*km; lognormal variance with pedigree 0.036687, pedigree (1,1,4,1,1)
  Transport services to transport incineration residues to landfills and filter ash to external treatments (FLUWA).
  Uncertainty: uncertainty calculated from uncertainty of the waste composition of this waste, uncertainty of transfer coefficients and the uncertainty in generic transportation distances
- quicklime, milled, packed: 0.0037134 kg; lognormal variance with pedigree 0.3703, pedigree (1,1,4,1,1)
  Auxilliary inputs for the flue gas treatment stage of the incinerator plant.
  Uncertainty: uncertainty calculated from uncertainty in average CaO input, of transfer coefficients in the incinerator, and the uncertainty of the waste composition of this waste
  properties: water content 0.010101, dry mass 0.99 kg, wet mass 1 kg
- slag landfill: 1.026e-10 unit; lognormal variance with pedigree 0.054358, pedigree (1,1,4,1,1)
  Landfill infrastructure required for landfilling of bottom ash.
  Uncertainty: uncertainty is calculated from uncertainties in waste composition and transfer coefficients in incinerator
- hydrogen peroxide, without water, in 50% solution state: 0.00082586 kg; lognormal variance with pedigree 0.092213, pedigree (1,1,4,1,1)
  Auxilliary oxidising agent for filter ash treatment (FLUWA).
  Uncertainty: uncertainty calculated from uncertainty in of transfer coefficients in the incinerator, and the uncertainty of the waste composition of this waste
  properties: wet mass 1 kg, heating value, net 7.13 MJ, dry mass 1 kg
- metalliferous hydroxide sludge: -0.0033159 kg; lognormal variance with pedigree 0.057848, pedigree (1,1,4,1,1)
  (same comment as for metalliferous hydroxide sludge)
  production volume 26225 kg
  properties: antimony content 0.062767, zinc content 0.076805, calcium content 0.038658, dry mass 0.25 kg, carbon content, fossil 0.051511, wet mass 1 kg, water content 3, chlorine content 0.18322, bromine content 0.162, oxygen content 0.32809, sulfur content 0.022255, cadmium content 0.047265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

## Inputs from nature
- Oxygen [natural resource, in air]: 2.7886 kg; lognormal variance with pedigree 0.0167115, pedigree (1,1,4,1,1)
  Oxygen from ambient air needed to combust and oxidise this waste. Net demand, i.e. without O2 leaving the plant in flue gas uncombusted.
  Uncertainty: uncertainty is calculated from uncertainties in waste composition and transfer coefficients to flue gas and soild residues in incinerator

## Emissions to nature
- Titanium [air, urban air close to ground]: 3.4737e-6 kg; lognormal variance with pedigree 0.50235, pedigree (1,1,4,1,1)
  Emission to air from waste composition and transfer coefficients.
  Uncertainty: uncertainty is calculated from uncertainties in waste composition and transfer coefficients in incinerator
- Toluene [air, urban air close to ground]: 2.3273e-8 kg; lognormal variance with pedigree 0.072342, pedigree (1,1,4,1,1)
  Incomplete combustion product emitted to air.
  Uncertainty: uncertainty calculated from uncertainty in average operation emissions, and the uncertainty of the flue gas volume from this waste.
- Aluminium [water, surface water]: 2.0589e-7 kg; lognormal variance with pedigree 0.92412, pedigree (1,1,4,1,1)
  Emissions to water from waste composition and transfer coefficients in incinerator and landfills.
  Uncertainty: uncertainty is calculated from uncertainties in waste composition and transfer coefficients in incinerator and landfills
- Thallium [air, urban air close to ground]: 3.7325e-10 kg; lognormal variance with pedigree 1.7268, pedigree (1,1,4,1,1)
  (same comment as for Titanium)
- Benzene, pentachloro- [air, urban air close to ground]: 6.1479e-11 kg; lognormal variance with pedigree 0.072342, pedigree (1,1,4,1,1)
  (same comment as for Toluene)
- Calcium, ion [water, surface water]: 5.7386e-5 kg; lognormal variance with pedigree 0.22525, pedigree (1,1,4,1,1)
  (same comment as for Aluminium)
- Silicon [air, urban air close to ground]: 5.5245e-9 kg; lognormal variance with pedigree 0.57263, pedigree (1,1,4,1,1)
  (same comment as for Titanium)
- Benzene, hexachloro- [air, urban air close to ground]: 2.4331e-11 kg; lognormal variance with pedigree 0.072342, pedigree (1,1,4,1,1)
  (same comment as for Toluene)
- Potassium, ion [water, surface water]: 6.3182e-5 kg; lognormal variance with pedigree 0.33328, pedigree (1,1,4,1,1)
  (same comment as for Aluminium)
- Iron [air, urban air close to ground]: 2.6578e-9 kg; lognormal variance with pedigree 0.68004, pedigree (1,1,4,1,1)
  (same comment as for Titanium)
- Phenol, pentachloro- [air, urban air close to ground]: 5.0675e-12 kg; lognormal variance with pedigree 0.072342, pedigree (1,1,4,1,1)
  (same comment as for Toluene)
- Chromium, ion [water, surface water]: 4.4141e-9 kg; lognormal variance with pedigree 0.72753, pedigree (1,1,4,1,1)
  (same comment as for Aluminium)
- Calcium [air, urban air close to ground]: 2.5003e-5 kg; lognormal variance with pedigree 0.5303, pedigree (1,1,4,1,1)
  (same comment as for Titanium)
- Heat, waste [water, surface water]: 6.1506 MJ; lognormal variance with pedigree 0.022505, pedigree (1,1,4,1,1)
  Waste heat generated from heating value of this waste plus any electricity required to process it.
  Uncertainty: uncertainty is calculated from uncertainties in waste composition and uncertainties in energy efficiency and the uncertainty in internal energy demand
- Sodium, ion [water, surface water]: 4.2124e-5 kg; lognormal variance with pedigree 0.32071, pedigree (1,1,4,1,1)
  (same comment as for Aluminium)
- Aluminium [air, urban air close to ground]: 1.6469e-9 kg; lognormal variance with pedigree 0.64402, pedigree (1,1,4,1,1)
  (same comment as for Titanium)
- Benzo(a)pyrene [air, urban air close to ground]: 2.5895e-13 kg; lognormal variance with pedigree 0.36828, pedigree (1,1,4,1,1)
  (same comment as for Toluene)
- BOD5, Biological Oxygen Demand [water, ground-, long-term]: 0.00199 kg; lognormal variance with pedigree 0.019655, pedigree (1,1,4,1,1)
  Long-term emissions from landfilling of incineration residues.
  Uncertainty: uncertainty is calculated from uncertainties in waste composition and transfer coefficients in incinerator and landfills.
- Potassium [air, urban air close to ground]: 1.1511e-6 kg; lognormal variance with pedigree 0.86959, pedigree (1,1,4,1,1)
  (same comment as for Titanium)
- Heat, waste [air, urban air close to ground]: 26.687 MJ; lognormal variance with pedigree 0.022505, pedigree (1,1,4,1,1)
  (same comment as for Heat, waste)
- COD, Chemical Oxygen Demand [water, ground-, long-term]: 0.0060839 kg; lognormal variance with pedigree 0.019655, pedigree (1,1,4,1,1)
  (same comment as for BOD5, Biological Oxygen Demand)
- Sodium [air, urban air close to ground]: 1.0509e-6 kg; lognormal variance with pedigree 0.95041, pedigree (1,1,4,1,1)
  (same comment as for Titanium)
- Water [water, surface water]: 0.000713778 m3; lognormal variance with pedigree 1.1878, pedigree (1,1,4,1,1)
  Process water released to surface water.
  Uncertainty: uncertainty calculated from uncertainty in process water input and the uncertainty of fraction to surface water.
- TOC, Total Organic Carbon [water, ground-, long-term]: 0.0024074 kg; lognormal variance with pedigree 0.019655, pedigree (1,1,4,1,1)
  (same comment as for BOD5, Biological Oxygen Demand)
- BOD5, Biological Oxygen Demand [water, surface water]: 0.00061078 kg; lognormal variance with pedigree 0.025687, pedigree (1,1,4,1,1)
  (same comment as for Aluminium)
- DOC, Dissolved Organic Carbon [water, ground-, long-term]: 0.0024074 kg; lognormal variance with pedigree 0.019655, pedigree (1,1,4,1,1)
  (same comment as for BOD5, Biological Oxygen Demand)
- COD, Chemical Oxygen Demand [water, surface water]: 0.00062414 kg; lognormal variance with pedigree 0.025524, pedigree (1,1,4,1,1)
  (same comment as for Aluminium)
- Water [air, urban air close to ground]: 0.0019792 m3; lognormal variance with pedigree 0.78833, pedigree (1,1,4,1,1)
  Water vapour from waste humidity, hydrogen oxidation and part of the process water.
  Uncertainty: Uncertainty calculated from uncertainty in waste composition, process water input and the uncertainty of fraction to air.
- Sulfate [water, ground-, long-term]: 0.00071728 kg; lognormal variance with pedigree 0.61417, pedigree (1,1,4,1,1)
  (same comment as for BOD5, Biological Oxygen Demand)
- TOC, Total Organic Carbon [water, surface water]: 0.00027223 kg; lognormal variance with pedigree 0.025499, pedigree (1,1,4,1,1)
  (same comment as for Aluminium)
- Carbon monoxide, fossil [air, urban air close to ground]: 1.978e-5 kg; lognormal variance with pedigree 0.74013, pedigree (1,1,4,1,1)
  (same comment as for Toluene)
- Nitrate [water, ground-, long-term]: 0.00046985 kg; lognormal variance with pedigree 0.35285, pedigree (1,1,4,1,1)
  (same comment as for BOD5, Biological Oxygen Demand)
- Cadmium, ion [water, ground-, long-term]: 1.8438e-5 kg; lognormal variance with pedigree 4.9547, pedigree (1,1,4,1,1)
  (same comment as for BOD5, Biological Oxygen Demand)
- Sulfate [water, surface water]: 0.00012259 kg; lognormal variance with pedigree 0.42658, pedigree (1,1,4,1,1)
  (same comment as for Aluminium)
- Carbon dioxide, fossil [air, urban air close to ground]: 2.9922 kg; lognormal variance with pedigree 0.0092298, pedigree (1,1,4,1,1)
  (same comment as for Titanium)
- Phosphate [water, ground-, long-term]: 5.3961e-5 kg; lognormal variance with pedigree 5.1061, pedigree (1,1,4,1,1)
  (same comment as for BOD5, Biological Oxygen Demand)
- Cobalt [water, ground-, long-term]: 2.5788e-5 kg; lognormal variance with pedigree 1.0936, pedigree (1,1,4,1,1)
  (same comment as for BOD5, Biological Oxygen Demand)
- DOC, Dissolved Organic Carbon [water, surface water]: 0.00027223 kg; lognormal variance with pedigree 0.025499, pedigree (1,1,4,1,1)
  (same comment as for Aluminium)
- Methane, fossil [air, urban air close to ground]: 1.7455e-7 kg; lognormal variance with pedigree 0.072342, pedigree (1,1,4,1,1)
  (same comment as for Toluene)
- Chloride [water, ground-, long-term]: 0.00079357 kg; lognormal variance with pedigree 0.42302, pedigree (1,1,4,1,1)
  (same comment as for BOD5, Biological Oxygen Demand)
- Chromium VI [water, ground-, long-term]: 1.8091e-6 kg; lognormal variance with pedigree 2.5053, pedigree (1,1,4,1,1)
  (same comment as for BOD5, Biological Oxygen Demand)
- Nitrate [water, surface water]: 0.0001683 kg; lognormal variance with pedigree 0.23399, pedigree (1,1,4,1,1)
  (same comment as for Aluminium)
- Sulfur dioxide [air, urban air close to ground]: 3.1903e-6 kg; lognormal variance with pedigree 0.83594, pedigree (1,1,4,1,1)
  (same comment as for Titanium)
- Bromine [water, ground-, long-term]: 0.00035251 kg; lognormal variance with pedigree 0.43162, pedigree (1,1,4,1,1)
  (same comment as for BOD5, Biological Oxygen Demand)
- Copper, ion [water, ground-, long-term]: 0.0030092 kg; lognormal variance with pedigree 0.51009, pedigree (1,1,4,1,1)
  (same comment as for BOD5, Biological Oxygen Demand)
- Phosphate [water, surface water]: 8.9337e-7 kg; lognormal variance with pedigree 0.35398, pedigree (1,1,4,1,1)
  (same comment as for Aluminium)
- Nitrogen oxides [air, urban air close to ground]: 0.00086908 kg; lognormal variance with pedigree 0.72585, pedigree (1,1,4,1,1)
  Sum of fuel-Nox and thermal-NOx emitted to air after DeNOx stage.
  Uncertainty: uncertainty calculated from uncertainty in average N-emissions and uncertainty in the share of thermal NOx and the uncertainty in nitrogen content in *this* waste.
- Fluoride [water, ground-, long-term]: 8.6732e-5 kg; lognormal variance with pedigree 0.57084, pedigree (1,1,4,1,1)
  (same comment as for BOD5, Biological Oxygen Demand)
- Mercury [water, ground-, long-term]: 2.94e-7 kg; lognormal variance with pedigree 1.5776, pedigree (1,1,4,1,1)
  (same comment as for BOD5, Biological Oxygen Demand)
- Chloride [water, surface water]: 0.005351 kg; lognormal variance with pedigree 0.16583, pedigree (1,1,4,1,1)
  (same comment as for Aluminium)
- Ammonia [air, urban air close to ground]: 2.7445e-6 kg; lognormal variance with pedigree 0.72585, pedigree (1,1,4,1,1)
  Nitrogen species emitted to air after DeNOx stage.
  Uncertainty: uncertainty calculated from uncertainty in average N-emissions and uncertainty in the share of thermal NOx and the uncertainty in nitrogen content in *this* waste.
- Arsenic, ion [water, ground-, long-term]: 6.0965e-6 kg; lognormal variance with pedigree 1.2766, pedigree (1,1,4,1,1)
  (same comment as for BOD5, Biological Oxygen Demand)
- Manganese [water, ground-, long-term]: 3.1778e-6 kg; lognormal variance with pedigree 2.1227, pedigree (1,1,4,1,1)
  (same comment as for BOD5, Biological Oxygen Demand)
- Bromine [water, surface water]: 0.0063098 kg; lognormal variance with pedigree 0.107947, pedigree (1,1,4,1,1)
  (same comment as for Aluminium)
- Dinitrogen monoxide [air, urban air close to ground]: 0.00019538 kg; lognormal variance with pedigree 1.1174, pedigree (1,1,4,1,1)
  (same comment as for Ammonia)
- Barium [water, ground-, long-term]: 0.00010009 kg; lognormal variance with pedigree 1.2774, pedigree (1,1,4,1,1)
  (same comment as for BOD5, Biological Oxygen Demand)
- Molybdenum [water, ground-, long-term]: 1.542e-6 kg; lognormal variance with pedigree 1.4865, pedigree (1,1,4,1,1)
  (same comment as for BOD5, Biological Oxygen Demand)
- Fluoride [water, surface water]: 3.7836e-5 kg; lognormal variance with pedigree 0.60027, pedigree (1,1,4,1,1)
  (same comment as for Aluminium)
- Cyanide [air, urban air close to ground]: 4.1976e-5 kg; lognormal variance with pedigree 1.1174, pedigree (1,1,4,1,1)
  (same comment as for Ammonia)
- Nickel, ion [water, ground-, long-term]: 0.00068661 kg; lognormal variance with pedigree 0.69968, pedigree (1,1,4,1,1)
  (same comment as for BOD5, Biological Oxygen Demand)
- Arsenic, ion [water, surface water]: 3.7781e-6 kg; lognormal variance with pedigree 1.1674, pedigree (1,1,4,1,1)
  (same comment as for Aluminium)
- Phosphorus [air, urban air close to ground]: 6.0975e-7 kg; lognormal variance with pedigree 0.75258, pedigree (1,1,4,1,1)
  (same comment as for Titanium)
- Lead [water, ground-, long-term]: 8.942e-5 kg; lognormal variance with pedigree 2.4734, pedigree (1,1,4,1,1)
  (same comment as for BOD5, Biological Oxygen Demand)
- Barium [water, surface water]: 5.8129e-8 kg; lognormal variance with pedigree 0.74238, pedigree (1,1,4,1,1)
  (same comment as for Aluminium)
- Hydrogen chloride [air, urban air close to ground]: 3.5951e-6 kg; lognormal variance with pedigree 0.45475, pedigree (1,1,4,1,1)
  (same comment as for Titanium)
- Antimony [water, ground-, long-term]: 0.0019458 kg; lognormal variance with pedigree 0.41263, pedigree (1,1,4,1,1)
  (same comment as for BOD5, Biological Oxygen Demand)
- Cadmium, ion [water, surface water]: 2.044e-8 kg; lognormal variance with pedigree 0.95035, pedigree (1,1,4,1,1)
  (same comment as for Aluminium)
- Bromine [air, urban air close to ground]: 3.3966e-6 kg; lognormal variance with pedigree 0.44716, pedigree (1,1,4,1,1)
  (same comment as for Titanium)
- Selenium [water, ground-, long-term]: 1.5038e-6 kg; lognormal variance with pedigree 0.9624, pedigree (1,1,4,1,1)
  (same comment as for BOD5, Biological Oxygen Demand)
- Cobalt [water, surface water]: 4.8572e-9 kg; lognormal variance with pedigree 1.6521, pedigree (1,1,4,1,1)
  (same comment as for Aluminium)
- Hydrogen fluoride [air, urban air close to ground]: 8.7707e-7 kg; lognormal variance with pedigree 0.94621, pedigree (1,1,4,1,1)
  (same comment as for Titanium)
- Tin, ion [water, ground-, long-term]: 0.0001772 kg; lognormal variance with pedigree 0.95794, pedigree (1,1,4,1,1)
  (same comment as for BOD5, Biological Oxygen Demand)
- Chromium VI [water, surface water]: 5.2101e-7 kg; lognormal variance with pedigree 1.1898, pedigree (1,1,4,1,1)
  (same comment as for Aluminium)
- Arsenic [air, urban air close to ground]: 7.8333e-8 kg; lognormal variance with pedigree 1.2881, pedigree (1,1,4,1,1)
  (same comment as for Titanium)
- Vanadium, ion [water, ground-, long-term]: 3.7876e-7 kg; lognormal variance with pedigree 1.2864, pedigree (1,1,4,1,1)
  (same comment as for BOD5, Biological Oxygen Demand)
- Copper, ion [water, surface water]: 2.7633e-7 kg; lognormal variance with pedigree 0.76617, pedigree (1,1,4,1,1)
  (same comment as for Aluminium)
- Barium [air, urban air close to ground]: 5.3773e-7 kg; lognormal variance with pedigree 0.94306, pedigree (1,1,4,1,1)
  (same comment as for Titanium)
- Zinc, ion [water, ground-, long-term]: 0.0001621 kg; lognormal variance with pedigree 1.6189, pedigree (1,1,4,1,1)
  (same comment as for BOD5, Biological Oxygen Demand)
- Mercury [water, surface water]: 7.4494e-9 kg; lognormal variance with pedigree 1.7035, pedigree (1,1,4,1,1)
  (same comment as for Aluminium)
- Cadmium [air, urban air close to ground]: 5.8616e-8 kg; lognormal variance with pedigree 0.97248, pedigree (1,1,4,1,1)
  (same comment as for Titanium)
- Beryllium [water, ground-, long-term]: 4.3786e-7 kg; lognormal variance with pedigree 1.6335, pedigree (1,1,4,1,1)
  (same comment as for BOD5, Biological Oxygen Demand)
- Manganese [water, surface water]: 4.9945e-10 kg; lognormal variance with pedigree 1.3285, pedigree (1,1,4,1,1)
  (same comment as for Aluminium)
- Cobalt [air, urban air close to ground]: 5.361e-8 kg; lognormal variance with pedigree 1.149, pedigree (1,1,4,1,1)
  (same comment as for Titanium)
- Strontium [water, ground-, long-term]: 8.2493e-5 kg; lognormal variance with pedigree 0.99525, pedigree (1,1,4,1,1)
  (same comment as for BOD5, Biological Oxygen Demand)
- Molybdenum [water, surface water]: 3.3279e-7 kg; lognormal variance with pedigree 0.95668, pedigree (1,1,4,1,1)
  (same comment as for Aluminium)
- Chromium [air, urban air close to ground]: 2.9689e-8 kg; lognormal variance with pedigree 1.1343, pedigree (1,1,4,1,1)
  (same comment as for Titanium)
- Titanium, ion [water, ground-, long-term]: 0.001253 kg; lognormal variance with pedigree 0.72917, pedigree (1,1,4,1,1)
  (same comment as for BOD5, Biological Oxygen Demand)
- Nickel, ion [water, surface water]: 4.6412e-7 kg; lognormal variance with pedigree 1.335, pedigree (1,1,4,1,1)
  (same comment as for Aluminium)
- Copper [air, urban air close to ground]: 2.9255e-7 kg; lognormal variance with pedigree 0.55141, pedigree (1,1,4,1,1)
  (same comment as for Titanium)
- Thallium [water, ground-, long-term]: 2.8646e-7 kg; lognormal variance with pedigree 1.433, pedigree (1,1,4,1,1)
  (same comment as for BOD5, Biological Oxygen Demand)
- Lead [water, surface water]: 8.6487e-9 kg; lognormal variance with pedigree 0.78383, pedigree (1,1,4,1,1)
  (same comment as for Aluminium)
- Mercury [air, urban air close to ground]: 3.9695e-8 kg; lognormal variance with pedigree 1.5416, pedigree (1,1,4,1,1)
  (same comment as for Titanium)
- Silicon [water, ground-, long-term]: 0.00070608 kg; lognormal variance with pedigree 4.5492, pedigree (1,1,4,1,1)
  (same comment as for BOD5, Biological Oxygen Demand)
- Antimony [water, surface water]: 0.00094239 kg; lognormal variance with pedigree 0.4378, pedigree (1,1,4,1,1)
  (same comment as for Aluminium)
- Manganese [air, urban air close to ground]: 7.6391e-10 kg; lognormal variance with pedigree 1.4262, pedigree (1,1,4,1,1)
  (same comment as for Titanium)
- Iron, ion [water, ground-, long-term]: 0.00075939 kg; lognormal variance with pedigree 1.2313, pedigree (1,1,4,1,1)
  (same comment as for BOD5, Biological Oxygen Demand)
- Selenium [water, surface water]: 3.9042e-7 kg; lognormal variance with pedigree 1.0532, pedigree (1,1,4,1,1)
  (same comment as for Aluminium)
- Molybdenum [air, urban air close to ground]: 2.6316e-9 kg; lognormal variance with pedigree 1.5056, pedigree (1,1,4,1,1)
  (same comment as for Titanium)
- Calcium, ion [water, ground-, long-term]: 0.0028665 kg; lognormal variance with pedigree 0.47098, pedigree (1,1,4,1,1)
  (same comment as for BOD5, Biological Oxygen Demand)
- Tin, ion [water, surface water]: 2.4135e-7 kg; lognormal variance with pedigree 0.76363, pedigree (1,1,4,1,1)
  (same comment as for Aluminium)
- Nickel [air, urban air close to ground]: 8.8313e-7 kg; lognormal variance with pedigree 0.73076, pedigree (1,1,4,1,1)
  (same comment as for Titanium)
- Aluminium [water, ground-, long-term]: 0.0015929 kg; lognormal variance with pedigree 0.52691, pedigree (1,1,4,1,1)
  (same comment as for BOD5, Biological Oxygen Demand)
- Vanadium, ion [water, surface water]: 1.3202e-9 kg; lognormal variance with pedigree 1.6181, pedigree (1,1,4,1,1)
  (same comment as for Aluminium)
- Lead [air, urban air close to ground]: 1.0463e-8 kg; lognormal variance with pedigree 0.97248, pedigree (1,1,4,1,1)
  (same comment as for Titanium)
- Potassium, ion [water, ground-, long-term]: 0.00016719 kg; lognormal variance with pedigree 0.57024, pedigree (1,1,4,1,1)
  (same comment as for BOD5, Biological Oxygen Demand)
- Zinc, ion [water, surface water]: 2.2056e-8 kg; lognormal variance with pedigree 0.70757, pedigree (1,1,4,1,1)
  (same comment as for Aluminium)
- Antimony [air, urban air close to ground]: 3.8413e-9 kg; lognormal variance with pedigree 0.53733, pedigree (1,1,4,1,1)
  (same comment as for Titanium)
- Sodium, ion [water, ground-, long-term]: 8.3774e-5 kg; lognormal variance with pedigree 0.64851, pedigree (1,1,4,1,1)
  (same comment as for BOD5, Biological Oxygen Demand)
- Beryllium [water, surface water]: 2.9036e-10 kg; lognormal variance with pedigree 2.2748, pedigree (1,1,4,1,1)
  (same comment as for Aluminium)
- Selenium [air, urban air close to ground]: 2.3377e-8 kg; lognormal variance with pedigree 1.4984, pedigree (1,1,4,1,1)
  (same comment as for Titanium)
- NMVOC, non-methane volatile organic compounds, unspecified origin [air, urban air close to ground]: 5.2957e-7 kg; lognormal variance with pedigree 0.072342, pedigree (1,1,4,1,1)
  (same comment as for Toluene)
- Strontium [water, surface water]: 5.3989e-8 kg; lognormal variance with pedigree 1.6644, pedigree (1,1,4,1,1)
  (same comment as for Aluminium)
- Tin [air, urban air close to ground]: 1.7441e-10 kg; lognormal variance with pedigree 0.91365, pedigree (1,1,4,1,1)
  (same comment as for Titanium)
- Particulates, < 2.5 um [air, urban air close to ground]: 1.3893e-6 kg; lognormal variance with pedigree 0.36828, pedigree (1,1,4,1,1)
  (same comment as for Toluene)
- Titanium, ion [water, surface water]: 8.524e-7 kg; lognormal variance with pedigree 0.3914, pedigree (1,1,4,1,1)
  (same comment as for Aluminium)
- Vanadium [air, urban air close to ground]: 1.0604e-8 kg; lognormal variance with pedigree 1.6701, pedigree (1,1,4,1,1)
  (same comment as for Titanium)
- Particulates, > 2.5 um, and < 10um [air, urban air close to ground]: 6.9813e-9 kg; lognormal variance with pedigree 0.166, pedigree (1,1,4,1,1)
  (same comment as for Toluene)
- Thallium [water, surface water]: 2.6568e-10 kg; lognormal variance with pedigree 1.722, pedigree (1,1,4,1,1)
  (same comment as for Aluminium)
- Zinc [air, urban air close to ground]: 2.4197e-7 kg; lognormal variance with pedigree 0.81829, pedigree (1,1,4,1,1)
  (same comment as for Titanium)
- Dioxins, measured as 2,3,7,8-tetrachlorodibenzo-p-dioxin [air, urban air close to ground]: 2.3271e-14 kg; lognormal variance with pedigree 0.36828, pedigree (1,1,4,1,1)
  (same comment as for Toluene)
- Silicon [water, surface water]: 1.8417e-6 kg; lognormal variance with pedigree 0.68287, pedigree (1,1,4,1,1)
  (same comment as for Aluminium)
- Strontium [air, urban air close to ground]: 8.2582e-9 kg; lognormal variance with pedigree 1.0313, pedigree (1,1,4,1,1)
  (same comment as for Titanium)
- Benzene [air, urban air close to ground]: 1.1636e-8 kg; lognormal variance with pedigree 0.072342, pedigree (1,1,4,1,1)
  (same comment as for Toluene)
- Iron, ion [water, surface water]: 2.9273e-8 kg; lognormal variance with pedigree 1.0832, pedigree (1,1,4,1,1)
  (same comment as for Aluminium)

## Extrapolations
This dataset has been extrapolated from year 2012 to the year of the calculation (2021). The uncertainty has been adjusted accordingly.
