# sponge iron production

Dataset: EcoSpold 2, unit process
Geography: IN
Time period: 2000-01-01 to 2021-12-31
Technology level: current
Classification: EcoSpold01Categories: metals/extraction
Classification: ISIC rev.4 ecoinvent: 2410:Manufacture of basic iron and steel
Synonyms: Direct Reduced Iron
Scenario: Business-as-Usual
System model: Allocation, cut-off by classification
Share of production covered: 8 %
Generated by: Harshita Soni
Published in: Soni H. 2017
Database: ecoinvent
isCopyrightProtected: true
accessRestrictedTo: 1

## General comment
This dataset has been created by calculating the weighted average of information received from three sponge iron manufacturing facilities in India. Sponge iron is also known as Direct Reduced Iron (DRI).
India is the world's second largest producer of sponge iron, most of which is produced primarily through the coal based method of production. Growth in the sponge iron production can be attributed largely to the popularity of secondary steelmaking route, which has shown a phenomenal growth in India. The proportion of crude steel produced by the secondary steel sector rose from 26 mMT(37%) in 1999-2k to 54 mMT(59%) in 2007-08. This has been mainly due to the lower investment cost of the EAF as compared with the integrated blast furnace--oxygen converter route and also because of its greater flexibility of product mix.

The process of sponge iron manufacturing involves removal of oxygen from iron ore. When that happens, the departing oxygen causes micro pores in the ore body, turning it porous. When the eventual product is observed under a microscope, it resembles a honeycomb structure, which looks spongy in texture. Hence the name sponge iron.

Sponge iron is an iron source relatively uniform in composition, and virtually free from tramp elements. It is used increasingly in Electric Arc and Induction furnaces to dilute the contaminants present in the scrap used in these processes. It has an associated energy value in the form of combined carbon, which has a tendency to increase furnace efficiency. For captive DRI production facilities, there is an added advantage that the delivery of hot DRI to the furnace can reduce energy consumption to 16 - 20%.
Reference: Ministry of Steel, India
Reference: Indian Minerals
Yearbook 2015

## Included activities start
After iron ore mining, beneficiation and pelletization, iron ore and iron pellets are sent as input through this process to produce direct reduced iron or sponge iron.

## Included activities end
This activity ends at the exit of sponge iron manufacturing unit.

## Geography
The three plants are located in Karnataka and Orissa in India

## Technology
Direct-reduced iron (DRI), also called sponge iron, DRI is produced from the direct reduction of iron ore (in the form of lumps, pellets or fines) to iron by a reducing gas or elementary carbon produced from natural gas or coal. Many ores are suitable for direct reduction.

DRI is produced from the direct reduction of iron ore (in the form of lumps, pellets, or fines) to iron by a reducing gas or elementary carbon produced from natural gas or coal. This reduction takes place in the temperature range 800- 1050 degrees C when reducing gases; mainly Hydrogen and Carbon-monoxide; react with the iron oxides to produce iron.

The degree of metallization, defined as the extent of conversion of iron oxide into metallic iron, is 92-96% in a typical DRI process. This high percentage of metallization makes DRI a highly suitable input for steel making. The specific investment and operating costs of DRI plants are low compared to integrated steel plants and are more suitable for many developing countries where supplies of coking coal are limited. This holds true for India where most of the coking coal has to be imported.

## Time period
The data was collected in 2017 for the year 2014-15.

## Parameters
- fraction, process water, to air: 0.2 dimensionless; name fraction_PW_to_air; lognormal variance with pedigree 0.092025, pedigree (4,4,3,2,4)
  Literature value (Statistics Canada, 2007 & Shaffer, K.H., 2008, Consumptive water use in the Great Lakes Basin, USGS) (Vionnet, S., Quantis Water Database - Technical Report, 2012).

## Reference product
- sponge iron: 1 kg; name RP_amount; By-product classification allocatable product; CPC 41116: Ferrous products obtained by direct reduction of iron ore and other spongy ferrous products, in lumps, pellets[…]; CAS 7439-89-6
  "Sponge iron is a good substitute for scrap
  which is required by the electric arc furnaces and
  induction furnaces or mini-steel plants in the
  country. The availability of indigenous metal
  scrap is scarce, and therefore, to meet the
  domestic demand, scrap is usually imported.
  Sponge iron is a viable alternative for scrap and
  is produced by direct reduction of high-grade iron
  ore or pellets to metallic iron ore in solid state by
  using coal or natural gas as reductant. It is also
  known as Direct Reduced Iron (DRI) or Hot
  Briquetted Iron (HBI)."
  Direct-reduced iron (DRI), also called sponge iron is produced from direct reduction of iron (in the form of lump, pellets or fines) by a reducing gases produced from natural gas or coal. This reduction takes place in the temperature range 800- 1050 degrees C when reducing gases; mainly Hydrogen and Carbon-monoxide; react with the iron oxides to produce iron. The degree of metallization, defined as the extent of conversion of iron oxide into metallic iron, is 92-96% in a typical DRI process. This high percentage of metallization makes DRI a highly suitable input for steel making. The specific investment and operating costs of DRI plants are low compared to integrated steel plants and are more suitable for many developing countries where supplies of coking coal are limited. This holds true for India where most of the coking coal has to be imported.
  Natural Gas based DRI is a highly efficient technique of manufacturing sponge iron that creates less environmental impact - However the challenge in this manufacturing technique is the availability of natural gas. Therefore, DRI production in India is primarily coal based.
  Coal gasification in India is rare and has not been included in this dataset.
  production volume 3.6818e10 kg; name RP_PV
    Source: worldsteel, 2020; data for 2019.
    References
    worldsteel (2020). Steel Statistical Yearbook 2020 [online].Available from: https://www.worldsteel.org/en/dam/jcr:5001dac8-0083-46f3-aadd-35aa357acbcc/Steel%2520Statistical%2520Yearbook%25202020%2520%2528concise%2520version%2529.pdf (accessed 20.07.2021).
  property heating value, net 3.03 MJ
    LHV is calculated based on the Carbon content of the product. More details can be found on the respective documentation.
  property price 0.363251 EUR2005; name RP_amount_price_EUR2005
    Calculated value. Value reported to be 22000 Rupies per tonne (https://www.indiamart.com/proddetail/dri-sponge-iron-14923381055.html and ahttps://www.alibaba.com/premium/sponge_iron.html?src=sem_ggl&cmpgn=897160740&adgrp=44663374477&fditm=&tgt=aud-409780726781:kwd-311963946857&locintrst=&locphyscl=1003297&mtchtyp=p&ntwrk=g&device=c&dvcmdl=&creative=210141214737&plcmnt=&plcmntcat=&p1=&p2=&aceid=&position=1t1&gclid=CjwKCAjw4sLVBRAlEiwASblR-y5ngI3zF7xe9q3_sdSGuFc7wEVKwd38cv7GBW-2csj4Z7R4ezoQHRoCT6kQAvD_BwE and https://www.steelmint.com/spongeiron-prices-indian)
  property carbon content 0.1
    carbon content on a dry matter basis (reserved; not for manual entry)
  properties: iron content 0.82, water in wet mass 0 kg, carbon content, non-fossil 0, dry mass 1 kg, wet mass 1 kg, water content 0, sulfur content 0.03, carbon content, fossil 0.1, phosphorus content 0.05, carbon allocation 0.1 kg

## Inputs from technosphere
- diesel: 0.000175 kg; lognormal variance with pedigree 0.005825, pedigree (3,3,3,2,2)
  Based on data received from three sponge iron manufacturing plants in India
  properties: wet mass 1 kg, carbon content, fossil 0.865, heating value, net 42.8 MJ, dry mass 1 kg
  note on carbon content, fossil: C-content of diesel is 86.5% (ecoinvent v2.2 report 6_IV, Tab 3.14)
- blast furnace sludge: -0.100357 kg; name sludge; lognormal variance with pedigree 0.3052, pedigree (3,3,3,1,2)
  Based on data received from three sponge iron manufacturing plants in India
  EcoSpold01Location=CH
  production volume 3.69494e9 kg; = RP_PV * (sludge / RP_amount)
    Calculated from production volume of reference product using the relative outputs.
  property price 0 EUR2005; name sludge_price_EUR2005
  properties: wet mass 1 kg, water content 0.0940919, carbon content, fossil 0.339168, dry mass 0.914 kg
- inert waste, for final disposal: -0.3 kg; name BP_amount_1; lognormal variance with pedigree 0.0058, pedigree (3,3,3,1,2)
  It is assumed that if 0.33 kg of iron ore and 1.08 kg of iron pellets are used as input that results in 1 kg of sponger iron and 0.1 kg of sludge as output, 0.3 kg must be generated as inert waste.
  production volume 1.10454e10 kg; = RP_PV * (BP_amount_1 / RP_amount)
    Calculated from production volume of reference product using the relative outputs.
  property price 0 EUR2005; name BP_amount_1_price_EUR2005
  properties: water content 0.00502513, dry mass 0.995 kg, wet mass 1 kg
- wastewater from pig iron production: -0.0014408 m3; name wastewater; = (water_UNO_input*(1 - fraction_PW_to_air))*-1; lognormal variance with pedigree 0.0452, pedigree (3,3,3,1,2)
  It is assumed that 80% of water consumed as input to the process is sent out as wastewater for treatment. The wastewater after treatment is recycled and reused again in the process.
  production volume 5.30474e7 m3; = RP_PV * (wastewater / RP_amount)
    Calculated from production volume of reference product using the relative outputs.
  property price 0 EUR2005; name wastewater_price_EUR2005
  properties: carbon content, fossil 1.2149e-5, dry mass 0.337476 kg, wet mass 1000 kg, water content 2962.17
- oxygen, liquid: 0.04076 kg; lognormal variance with pedigree 0.0052, pedigree (3,3,3,1,2)
  Based on data received from three sponge iron manufacturing plants in India
  properties: wet mass 1 kg, dry mass 1 kg
- hard coal: 0.453751 kg; lognormal variance with pedigree 0.0058, pedigree (3,3,3,1,2)
  Based on data received from three sponge iron manufacturing plants in India
  properties: wet mass 1 kg, heating value, net 27.91 MJ, dry mass 0.94 kg, carbon content, fossil 0.845, water content 0.0638298
  note on heating value, net: Based on the Characterization factor of Hard coal in the CED method
  note on carbon content, fossil: C content 75-94% (specified in Tab 1.1, report 6, part VI). A mean content of 0.845 kg C/ kg dry hard coal was considered
- iron ore concentrate: 0.328 kg; lognormal variance with pedigree 0.0052, pedigree (3,3,3,1,2)
  Based on data received from three sponge iron manufacturing plants in India
  EcoSpold01Location=GLO
  properties: dry mass 1 kg, wet mass 1 kg
- iron pellet: 1.0872 kg; lognormal variance with pedigree 0.0052, pedigree (3,3,3,1,2)
  EcoSpold01Location=GLO
  Based on data received from three sponge iron manufacturing plants in India
  properties: dry mass 1 kg, wet mass 1 kg
- dolomite: 0.01306 kg; lognormal variance with pedigree 0.0052, pedigree (3,3,3,1,2)
  Based on data received from three sponge iron manufacturing plants in India
  properties: carbon content, fossil 0.130435, heating value, net 3.95 MJ, wet mass 1 kg, dry mass 1 kg
- nitrogen, liquid: 0.04878 kg; lognormal variance with pedigree 0.0052, pedigree (3,3,3,1,2)
  Based on data received from three sponge iron manufacturing plants in India
  properties: wet mass 1 kg, dry mass 1 kg
- blast furnace: 1.3333e-11 unit; lognormal variance with pedigree 0.2952, pedigree (3,3,3,1,2)
  EcoSpold01Location=RER
  Based on ecoinvent dataset " pig iron production, GLO" accessed through ecoeditor on 20170815

## Inputs from nature
- Water, unspecified natural origin [natural resource, in ground]: 0.001801 m3; name water_UNO_input; lognormal variance with pedigree 0.0152, pedigree (3,3,3,1,2)
  Based on data received from three sponge iron manufacturing plants in India

## Emissions to nature
- Nickel [air, unspecified]: 1.5957e-8 kg; lognormal variance with pedigree 0.6552, pedigree (3,3,3,1,2)
  Based on ecoinvent dataset " pig iron production, GLO" accessed through ecoeditor on 20170815
- Sulfur dioxide [air, unspecified]: 0.00013298 kg; lognormal variance with pedigree 0.0052, pedigree (3,3,3,1,2)
  (same comment as for Nickel)
- Lead [air, unspecified]: 6.9149e-8 kg; lognormal variance with pedigree 0.6552, pedigree (3,3,3,1,2)
  (same comment as for Nickel)
- Carbon monoxide, fossil [air, unspecified]: 0.0013404 kg; lognormal variance with pedigree 0.6552, pedigree (3,3,3,1,2)
  (same comment as for Nickel)
- Particulates, > 2.5 um, and < 10um [air, unspecified]: 1.5957e-6 kg; lognormal variance with pedigree 0.1252, pedigree (3,3,3,1,2)
  (same comment as for Nickel)
- Manganese [air, unspecified]: 7.4468e-8 kg; lognormal variance with pedigree 0.6552, pedigree (3,3,3,1,2)
  (same comment as for Nickel)
- Particulates, > 10 um [air, unspecified]: 1.5957e-6 kg; lognormal variance with pedigree 0.0452, pedigree (3,3,3,1,2)
  (same comment as for Nickel)
- Nitrogen oxides [air, unspecified]: 7.9787e-5 kg; lognormal variance with pedigree 0.0452, pedigree (3,3,3,1,2)
  (same comment as for Nickel)
- Carbon dioxide, fossil [air, unspecified]: 1.22 kg; lognormal variance with pedigree 0.0052, pedigree (3,3,3,1,2)
  Based on amount and types of fuel inputs and outputs.
- Hydrogen sulfide [air, unspecified]: 1.0745e-5 kg; lognormal variance with pedigree 0.0452, pedigree (3,3,3,1,2)
  (same comment as for Nickel)
- Dioxins, measured as 2,3,7,8-tetrachlorodibenzo-p-dioxin [air, unspecified]: 2.6596e-15 kg; lognormal variance with pedigree 0.3052, pedigree (3,3,3,1,2)
  (same comment as for Nickel)
- Particulates, < 2.5 um [air, unspecified]: 2.8723e-5 kg; lognormal variance with pedigree 0.3052, pedigree (3,3,3,1,2)
  (same comment as for Nickel)
- Water [air, unspecified]: 0.0003602 m3; = water_UNO_input*(fraction_PW_to_air); lognormal variance with pedigree 0.0058, pedigree (3,3,3,1,2)
  Based on mathematical formula

## Sampling procedure
Main in- and outputs based on weighted average of data received from three manufacturing facilities in India. Total sponge iron produced in India is 22.43 million tonnes. Sponge iron data received from three manufacturing units:1.7 million tonnes.

## Extrapolations
This dataset has been extrapolated from year 2017 to the year of the calculation (2021). The uncertainty has been adjusted accordingly.
