# treatment of used intermodal shipping container, 40-foot, high-cube

Dataset: EcoSpold 2, unit process
Geography: GLO
Time period: 2010-01-01 to 2021-12-31
Technology level: current
Classification: EcoSpold01Categories: transport systems/road
Classification: ISIC rev.4 ecoinvent: 3830:Materials recovery
Scenario: Business-as-Usual
System model: Allocation, cut-off by classification
Generated by: Tereza Levova
Database: ecoinvent
isCopyrightProtected: true
accessRestrictedTo: 1

## General comment
This dataset represents the treatment of used intermodal shipping container.

## Included activities start
The activity starts when the used container enters the waste treatment facility.

The data on energy needed during dismantling are unknown.

## Included activities end
The activity ends by different waste materials being ready for further treatment.

## Technology
The inventory is created by looking at the material composition of the container.

## Reference product
- used intermodal shipping container, 40-foot, high-cube: -1 unit; name used_container_RP; By-product classification Waste; CPC 39990: Other wastes n.e.c.
  production volume 264000 unit; name used_container_RP_PV
    Estimated to be the same as the amount of containers produced each year.
  property price 0 EUR2005; name used_container_RP_price_EUR2005
    Waste products are assigned a price of zero as they are assumed to require further treatment.
  property carbon content 0.0625
    carbon content on a dry matter basis (reserved; not for manual entry)
  properties: carbon content, fossil 0.0109375, carbon content, non-fossil 0.0515625, dry mass 3811.9 kg, wet mass 3840 kg, water in wet mass 28.086 kg, water content 0.0073679, carbon allocation 238.244 kg

## By-products
- waste wood, post-consumer: 0 kg; CPC 3928: Sawdust and wood waste and scrap; By-product classification Recyclable
  Calculated value based on the composition of the container.
  production volume 0 kg; = ABS(used_container_RP_PV * (BP_amount_3 / used_container_RP))
    Calculated from production volume of reference product using the relative outputs.
  property price 0.079 EUR2005
    Temporary price data. Calculated as 90% of purchasers price based on: 2005 import prices (total trades (USD) divided by total weight (kg) in biggest economies of the world: EU27, USA, Brasil, China, India, Japan and Russia) from UN Commodity Trade Statistics Database (http://data.un.org/Explorer.aspxDatabase [Accessed 2011.06.23]). Commodity: Sawdust, wood waste or scrap
  property heating value, net 9.99 MJ
    LHV is calculated based on the Carbon content of the product. More details can be found on the respective documentation.
  property carbon content 0.494
    carbon content on a dry matter basis (reserved; not for manual entry)
  properties: water in wet mass 0.4 kg, water content 0.4, dry mass 1 kg, carbon content, fossil 0, carbon content, non-fossil 0.494, wet mass 1.4 kg, carbon allocation 0.494 kg

## Inputs from technosphere
- waste rubber, unspecified: 0 kg; name BP_amount_1; pedigree (1,1,1,1,1)
  Calculated value based on the composition of the container.
  production volume 0 kg
    Calculated from production volume of reference product using the relative outputs.
  property price 0 EUR2005; name BP_amount_1_price_EUR2005
  properties: wet mass 1 kg, dry mass 1 kg, carbon content, fossil 0.853, heating value, net 27.19 MJ
  note on heating value, net: Value taken from the general comment of the treatment dataset.
- building, hall: 0.00325744 m2; = 1/(( lifetime_building*365)/(12.192*2.438*2)); lognormal variance with pedigree 0.318, pedigree (4,5,3,1,1)
  Calculated value based on estimates.
  1m2 of hall is available every day for 50 years
  1 container occupies during the dismantling the area of its based for the period of 2 days
  property lifetime 50 year; name lifetime_building
- scrap steel: 0 kg; name BP_amount_2; pedigree (1,1,1,1,1)
  Calculated value based on the composition of the container.
  production volume 0 kg
    Calculated from production volume of reference product using the relative outputs.
  property price 0 EUR2005; name BP_amount_2_price_EUR2005
  properties: wet mass 1 kg, dry mass 1 kg
- waste wood, post-consumer: -466.712 kg
  Calculated value based on the composition of the container.
  production volume 1.23212e8 kg
  properties: price 0.079 EUR2005, water content 0.4, dry mass 1 kg, carbon content, non-fossil 0.494, wet mass 1.4 kg, heating value, net 9.99 MJ
- waste rubber, unspecified: -2.88288, -0.121023, -2.88288 kg (3 entries); lognormal variance with pedigree 0.0026, pedigree (1,1,3,1,1)
  Calculated value based on the composition of the container.
  production volume 1.55411e6 kg
- scrap steel: -813.006, -1.03005, -2524.86 kg (3 entries); lognormal variance with pedigree 0.0026, pedigree (1,1,3,1,1)
  Calculated value based on the composition of the container.
  production volume 8.8147e8 kg

## Extrapolations
This dataset has been extrapolated from year 2014 to the year of the calculation (2021). The uncertainty has been adjusted accordingly.

## Review by Gabor Doka 2014-12-19
passed
