# gas power plant construction, 300MW electrical

Dataset: EcoSpold 2, unit process
Geography: GLO
Time period: 1990-01-01 to 2021-12-31
Technology level: current
Classification: ISIC rev.4 ecoinvent: 4220:Construction of utility projects
Classification: EcoSpold01Categories: natural gas/power plants
Tags: ConvertedDataset
Scenario: Business-as-Usual
System model: Allocation, cut-off by classification
Generated by: Thomas Heck
Published in: Faist Emmenegger, M. 2007
Database: ecoinvent
isCopyrightProtected: true
accessRestrictedTo: 1

## General comment
Average gas power plant 300 MWe.
[This dataset was already contained in the ecoinvent database version 2. It was not individually updated during the transfer to ecoinvent version 3. Life Cycle Impact Assessment results may still have changed, as they are affected by changes in the supply chain, i.e. in other datasets. This dataset was generated following the ecoinvent quality guidelines for version 2. It may have been subject to central changes described in the ecoinvent version 3 change report (http://www.ecoinvent.org/database/ecoinvent-version-3/reports-of-changes/), and the results of the central updates were reviewed extensively. The changes added e.g. consistent water flows and other information throughout the database. The documentation of this dataset can be found in the ecoinvent reports of version 2, which are still available via the ecoinvent website. The change report linked above covers all central changes that were made during the conversion process.]

## Included activities end
The module includes the most important materials used for construction. It includes also the energy requirements for construction; transport is implicitly included in energy consumption.

## Technology
Average installed gas power plant

## Reference product
- gas power plant, 300MW electrical: 1 unit; By-product classification allocatable product; CPC 53262: Power plants
  EcoSpold01Location=GLO
  production volume 1 unit
    Dummy value to be replaced by measured, estimated or calculated value
  property price 5.0491e6 EUR2005
    Calculated based on inputs: The price of the product has been calculated as a sum of the values of the material and energy inputs for this product. This value is therefore a rough estimation. It may underestimate the real price since there are additional expenses when producing any product. These expences can include for example labour costs, treatment of waste materials and profit for the producer. Please consider carefully whether this level of data quality is acceptable for your application.

## Inputs from technosphere
- heat, district or industrial, other than natural gas: 3.306e7 MJ; lognormal variance with pedigree 0.72, pedigree (5,5,5,5,5)
  extrapolated from Faist Emmenegger et al. (2003), uncertainty of amount of material and of energy needed
  EcoSpold01Location=RER
  Uncertainty: , uncertainty of amount of material and of energy needed
  properties: heating value, net 1 MJ
- diesel, burned in building machine: 3.48e7 MJ; lognormal variance with pedigree 0.72, pedigree (5,5,5,5,5)
  extrapolated from Faist Emmenegger et al. (2003), uncertainty of amount of material and of energy needed
  EcoSpold01Location=GLO
  Uncertainty: , uncertainty of amount of material and of energy needed
  properties: heating value, net 1 MJ
- electricity, medium voltage: 708000 kWh; lognormal variance with pedigree 0.72, pedigree (5,5,5,5,5)
  EcoSpold01Location=UCTE
  extrapolated from Faist Emmenegger et al. (2003), uncertainty of amount of material and of energy needed
  Uncertainty: , uncertainty of amount of material and of energy needed
- reinforcing steel: 1.65e6 kg; lognormal variance with pedigree 0.46, pedigree (5,5,5,5,5)
  EcoSpold01Location=RER
  extrapolated from Faist Emmenegger et al. (2003), basic uncertainty
  Uncertainty: , basic uncertainty
  properties: wet mass 1 kg, dry mass 1 kg, carbon content, fossil 0.004
- copper, cathode: 225000 kg; lognormal variance with pedigree 0.46, pedigree (5,5,5,5,5)
  extrapolated from Faist Emmenegger et al. (2003), basic uncertainty
  EcoSpold01Location=RER
  Uncertainty: , basic uncertainty
  properties: wet mass 1 kg, dry mass 1 kg
- aluminium, cast alloy: 72000 kg; = 225000*0.32; lognormal variance with pedigree 0.46, pedigree (5,5,5,5,5)
  extrapolated from Faist Emmenegger et al. (2003), basic uncertainty
  Uncertainty: , basic uncertainty
  property water content 0; name water_content
  property water in wet mass 0 kg; name WWM
  property carbon content, non-fossil 0; name C_content_non_fossil
  property carbon content, fossil 0; name C_content_fossil
  properties: wet mass 1 kg, dry mass 1 kg
- aluminium, wrought alloy: 153000 kg; = 225000*0.68; lognormal variance with pedigree 0.46, pedigree (5,5,5,5,5)
  (same comment as for aluminium, cast alloy)
  properties: dry mass 1 kg, wet mass 1 kg
- concrete, normal: 5450 m3; lognormal variance with pedigree 0.46, pedigree (5,5,5,5,5)
  EcoSpold01Location=CH
  extrapolated from Faist Emmenegger et al. (2003), basic uncertainty
  Uncertainty: , basic uncertainty
  properties: water content 0.086758, dry mass 2190 kg, wet mass 2380 kg
- stone wool, packed: 450000 kg; lognormal variance with pedigree 0.46, pedigree (5,5,5,5,5)
  (same comment as for concrete, normal)
  properties: dry mass 1 kg, carbon content, fossil 0.015401, wet mass 1 kg
  note on carbon content, fossil: The chemical composition of the glass fibres used in the rock wool production is similar to the composition of naturally cooled volcano basalt and has a composition listed in Tab. 3.1 and 3.2 in ecoinvent v2.2 report 16, part XIV. Rock wool contains: a minimum of 96% mineral fibres,between 0.5 and 3.0 weight percent of phenolic resin depending on the specific product characteristics, and about 0.2 percent mineral oil (ecoinvent v2.2 report 16, part XIV). An average composition of 1.8% phenolic resin, 0.2% mineral oil, and 98% mineral fibres has been assumed and used to calculate C content of the rock wool
- polyethylene, low density, granulate: 450000 kg; lognormal variance with pedigree 0.46, pedigree (5,5,5,5,5)
  (same comment as for copper, cathode)
  properties: carbon content, fossil 0.857143, dry mass 1 kg, wet mass 1 kg, heating value, net 42.47 MJ
  note on carbon content, fossil: Polyethylene is formed out of a huge amount of ethylene monomers (C2H4) (ecoinvent v2.2 report 11_II). MW=28 g/mol

## Inputs from nature
- Transformation, to industrial area [natural resource, land]: 60000 m2; lognormal variance with pedigree 0.34, pedigree (1,1,5,1,1)
  estimated from range of values in literature
- Occupation, industrial area [natural resource, land]: 2.16e6 m2*year; lognormal variance with pedigree 0.52, pedigree (1,1,5,1,1)
  uncertainty of land use and life time
- Transformation, from unspecified [natural resource, land]: 60000 m2; lognormal variance with pedigree 0.34, pedigree (1,1,5,1,1)
  estimated from range of values in literature

## Sampling procedure
Literature

## Extrapolations
This dataset has been extrapolated from year 2005 to the year of the calculation (2021). The uncertainty has been adjusted accordingly.

## Review by Thomas Kägi 2007-08-31
passed
