# transport, freight, conveyor belt

Dataset: EcoSpold 2, unit process
Geography: GLO
Time period: 2000-01-01 to 2021-12-31
Technology level: current
Classification: ISIC rev.4 ecoinvent: 492:Other land transport
Scenario: Business-as-Usual
System model: Allocation, cut-off by classification
Generated by: Florentine Brunner
Database: ecoinvent
isCopyrightProtected: true
accessRestrictedTo: 1

## General comment
This activity describes the transport of bulk materials, such as ores or hard coal, by means of an industrial, overland conveyor belt. This type of conveyor belt is specifically designed for heavy industrial applications and freight transport. It is therefore not applicable for lighter applications such as for example conveyors at logistic distribution centers, airport luggage claims, supermarket cash desks etc. Following are exemplary images.
Most commonly such conveyors are used for short distance transport of bulk material within an industrial site, but also longer-distance transport over several kilometers can be done cost effectively with modern conveyor technology (Shipp, n.d.).
Reference(s): Shipp S., n.d., Advances in Conveyor Technology, https://www.beumergroup.com/uploads/tx_bbbrochures/BEUMER_WP_Conveyor_Advances.pdf, accessed 16.02.2018)

## Included activities start
The activity starts after loading of the material on the conveyor
.

## Included activities end
The activity ends before unloading of the material from the conveyor.

## Geography
generic data, not specific to a geography

## Technology
Energy efficiency of the conveyor reflects conventional conveyor technology in 2010.

## Time period
The dataset represents the operation of average conveyor technology operational in 2010. With an estimated lifetime of 30 years it can be expected that this represents average conveyor technology at least until 2020.

## Reference product
- transport, freight, conveyor belt: 1 metric ton*km; name RP_amount_1; CPC 65: Freight transport services; By-product classification allocatable product
  production volume 4 metric ton*km; name RP_PV_1
    This is a place holder value.
  property price 0.0200104 EUR2005; name RP_amount_1_price_EUR2005
    Calculated based on inputs: The price of the product has been calculated as a sum of the values of the material and energy inputs for this product. This value is therefore a rough estimation. It may underestimate the real price since there are additional expenses when producing any product. These expences can include for example labour costs, treatment of waste materials and profit for the producer. Please consider carefully whether this level of data quality is acceptable for your application.

## Inputs from technosphere
- conveyor belt: 7.4e-10 m; lognormal variance with pedigree 0.51, pedigree (5,5,5,5,5)
  Average amount of meters of conveyor required for the transport of 1tkm derived from two case studies reported by Günther et al. (2010). Mind that this number may vary depending on the specific application and shall hence be evaluated for the case of application.
  Reference(s): W. A. Günthner, Ch. Tilke, S. Rakitsch (2010). Energy Efficiency in Bulk Materials Handling. In: bulk solids handling, Vol. 30 (2010), No. 3, Pages 138 - 142. Online from <http://www.fml.mw.tum.de/fml/images/Publikationen/G%C3%BCnthner_Tilke_Rakitsch_BulkSolidsHandling_03-10_EnergyEfficiency.pdf>, 28 August, 2017
- electricity, medium voltage: 0.2 kWh; lognormal variance with pedigree 0.2106, pedigree (5,5,5,5,5)
  Estimation for average energy requirements of belt conveyors used for transport of heavy bulk materials such as mining ores or hard coal based on reports by Beumer Group (n.d.) (0.2 kWh/tkm) and Günthner et al. (2010) (0.127-0.38kWh/tkm) and a study by Norgate and Haque (2013) (0.162 kW h/tkm). Reference(s): Beumer Group (n.d.). Advances in Conveyor Technology. Retreived online from <https://www.beumergroup.com/uploads/tx_bbbrochures/WP_Advances_in_Conveyor_Technology.pdf>, 28 August 2017
  W. A. Günthner, Ch. Tilke, S. Rakitsch (2010). Energy Efficiency in Bulk Materials Handling. In: bulk solids handling, Vol. 30 (2010), No. 3, Pages 138 - 142. Online from <http://www.fml.mw.tum.de/fml/images/Publikationen/G%C3%BCnthner_Tilke_Rakitsch_BulkSolidsHandling_03-10_EnergyEfficiency.pdf>, 28 August, 2017
  Norgate, T., Haque, N., 2013, The greenhouse gas impact of IPCC and ore-sorting technologies. Online at <https://ac-els-cdn-com.proxy.lib.chalmers.se/S0892687512003810/1-s2.0-S0892687512003810-main.pdf?_tid=f7b863ec-af2f-11e7-997f-00000aacb362&acdnat=1507800801_3a6e9732b324c9ef50eb17117d56d913>, accessed 12 October 2017.
- lubricating oil: 0 kg; name a_lubricant; pedigree (1,1,1,1,1)
  Own assumption: need of lubricating oil for maintenance of 1000kg per year. Divided by average yearly capacity of about 300000tkm in case studies in Gänther et al. (2010). Reference(s): W. A. Günthner, Ch. Tilke, S. Rakitsch (2010). Energy Efficiency in Bulk Materials Handling. In: bulk solids handling, Vol. 30 (2010), No. 3, Pages 138 - 142. Online from <http://www.fml.mw.tum.de/fml/images/Publikationen/G%C3%BCnthner_Tilke_Rakitsch_BulkSolidsHandling_03-10_EnergyEfficiency.pdf>, 28 August, 2017
  properties: dry mass 1 kg, carbon content, fossil 0.75, heating value, net 40.2 MJ, wet mass 1 kg
  note on carbon content, fossil: Lubricating oil is produced from diesel. C-content/dry mass of fats and oils considered 75%, from: ecoinvent v2.2 report, n 15a, pg 40
  note on heating value, net: Literature value, Source: IPCC 2006, 2006 IPCC Guidelines for National Greenhouse Gas Inventories, Prepared by the National Greenhouse Gas Inventories Programme, Eggleston H.S., Buendia L., Miwa K., Ngara T. and Tanabe K. (eds). Published: IGES, Japan
- waste mineral oil: 0 kg; name BP_amount_1; pedigree (1,1,1,1,1)
  Own assumption. Amount of waste oil corresponding to halft the amount of lubricating oil needed for maintenance. The other half is assumed to be released to soil.
  production volume 0 kg
    Calculated from production volume of reference product using the relative outputs.
  property price 0 EUR2005; name BP_amount_1_price_EUR2005
  properties: carbon content, fossil 0.864444, heating value, net 34.7 MJ, water content 0.111111, wet mass 1 kg, dry mass 0.9 kg
  note on carbon content, fossil: Tab A.6, ecoinvent v2.2 report 13_I. C content has been calculated after data in the tables, and then referred to 1 kg DM
  note on heating value, net: Value taken from the general comment of the treatment dataset.
- lubricating oil: 6.09e-7, 2.891e-6 kg (2 entries); lognormal variance with pedigree 0.2106, pedigree (5,5,5,5,5)
  (same comment as for lubricating oil)
- waste mineral oil: -4.8036e-7, -1.18918e-8, -1.25775e-6 kg (3 entries); lognormal variance with pedigree 0.2106, pedigree (5,5,5,5,5)
  (same comment as for waste mineral oil)
  production volume 7e-6 kg

## Emissions to nature
- Oils, unspecified [soil, unspecified]: 1.75e-6 kg; = a_lubricant*0.5; lognormal variance with pedigree 0.25, pedigree (5,5,5,5,5)
  (same comment as for waste mineral oil)

## Sampling procedure
Based on literature and estimates.

## Extrapolations
This dataset has been extrapolated from year 2020 to the year of the calculation (2021). The uncertainty has been adjusted accordingly.
