# frit production, for ceramic tile

Dataset: EcoSpold 2, unit process
Geography: GLO
Time period: 2012-01-01 to 2021-12-31
Technology level: current
Classification: ISIC rev.4 ecoinvent: 2011:Manufacture of basic chemicals
Classification: EcoSpold01Categories: chemicals/organics
Scenario: Business-as-Usual
System model: Allocation, cut-off by classification
Generated by: Catherine Reid
Published in: Kellenberger D. 2007
Database: ecoinvent
isCopyrightProtected: true
accessRestrictedTo: 1

## General comment
This dataset represents the production of frit in 2012.

Frit is a ceramic chemicals that have been melted together and cooled rapidly, then ground to a fine powder. They are the main component of nearly all ceramic glazes and are present in many compositions of different materials where a glass faze is needed.

This dataset is an approximation of frit production. The amount of intermediate exchanges have been calculated based on frit raw materials's composition used in ceramic tiles production. (Nicoletti G.M., Notarnicola B. and Tassielli G. (2002) Comparative Life Cylce Assessment of flooring materials: ceramic versus marble tiles. In: Journal of Cleaner Production).

## Included activities start
From reception of the reactants at the factory gate.

## Included activities end
This activity ends with the production of frit. Infrastructures are calculated with standard values.

## Technology
data represents a rough estimation of the production process

## Time period
Dataset based on modelling only, therefore data entry is the reference year

## Reference product
- frit, for ceramic tile: 1 kg; CPC 35110: Paints and varnishes and related products; By-product classification allocatable product
  production volume 4 kg
    This is a placeholder value that does not reflect real-world production volumes. This dataset does not currently require a real-world production volume to work in the databse framework, and not actual data were collected yet. This has no negative effect on the results of the ecoinvent database.
  property price 7.72528 EUR2005
    Calculated based on inputs: The price of the product has been calculated as a sum of the values of the material and energy inputs for this product. This value is therefore a rough estimation. It may underestimate the real price since there are additional expenses when producing any product. These expences can include for example labour costs, treatment of waste materials and profit for the producer. Please consider carefully whether this level of data quality is acceptable for your application.
  property carbon content 0
    carbon content on a dry matter basis (reserved; not for manual entry)
  properties: wet mass 1 kg, water in wet mass 0 kg, carbon content, fossil 0, water content 0, carbon content, non-fossil 0, dry mass 1 kg, carbon allocation 0 kg

## Inputs from technosphere
- lime, packed: 0 kg; source Kellenberger D. 2007; pedigree (1,1,1,1,1)
  Literature value: based on ceramic tiles ecoinvent dataset v.3.0. Assume to be equivalent to colemanite.
  properties: wet mass 1 kg, dry mass 0.998 kg, water content 0.00200401, carbon content, fossil 0.117492
- barite: 0.00713 kg; source Kellenberger D. 2007; lognormal variance with pedigree 0.0646, pedigree (4,5,4,1,4)
  Literature value based on chemicals used as frit in ceramic tiles dataset (ecoinvent v2). Barite used as a proxy to modelled barium oxide.
  properties: wet mass 1 kg, dry mass 1 kg
- zinc oxide: 0.0434 kg; source Kellenberger D. 2007; lognormal variance with pedigree 0.0646, pedigree (4,5,4,1,4)
  Literature value based on chemicals used as frit in ceramic tiles dataset (ecoinvent v2).
  properties: wet mass 1 kg, dry mass 1 kg
- lead: 0.0852 kg; source Kellenberger D. 2007; lognormal variance with pedigree 0.0646, pedigree (4,5,4,1,4)
  Literature value based on chemicals used as frit in ceramic tiles dataset (ecoinvent v2). Lead used as a proxy to modelled lead oxide.
  properties: dry mass 1 kg, wet mass 1 kg
- aluminium oxide, non-metallurgical: 0 kg; source Kellenberger D. 2007; pedigree (1,1,1,1,1)
  Literature value based on chemicals used as frit in ceramic tiles dataset (ecoinvent v2).
  properties: wet mass 1 kg, dry mass 1 kg
- feldspar: 0.158 kg; source Kellenberger D. 2007; lognormal variance with pedigree 0.0646, pedigree (4,5,4,1,4)
  Literature value based on chemicals used as frit in ceramic tiles dataset (ecoinvent v2).
  properties: wet mass 1 kg, dry mass 1 kg
- chemical factory, organics: 4e-10 unit; source Althaus H.-J. 2007; lognormal variance with pedigree 0.094, pedigree (4,5,4,1,4)
  Literature value taken from chemicals datasets in ecoinvent v2. The assumption for chemical factory is based on the fact that frit is a ceramic chemicals.
- silica sand: 0.178 kg; source Kellenberger D. 2007; lognormal variance with pedigree 0.0646, pedigree (4,5,4,1,4)
  Literature value based on chemicals used as frit in ceramic tiles dataset (ecoinvent v2). Silica sand used as a proxy to modelled quartz and feldspar.
  properties: dry mass 0.99 kg, water content 0.010101, wet mass 1 kg
- zirconium oxide: 0.235 kg; source Kellenberger D. 2007; lognormal variance with pedigree 0.0646, pedigree (4,5,4,1,4)
  Literature value based on chemicals used as frit in ceramic tiles dataset (ecoinvent v2). Zirconium oxide used as a proxy to modelled zirconium powders.
  properties: dry mass 1 kg, wet mass 1 kg
- sodium perborate, tetrahydrate, powder: 0 kg; source Kellenberger D. 2007; pedigree (1,1,1,1,1)
  Literature value based on chemicals used as frit in ceramic tiles dataset (ecoinvent v2). Sodium perborate used as a proxy to modelled penta-hydrate borax.
  properties: heating value, net 7.04 MJ, wet mass 1 kg, dry mass 1 kg
- titanium dioxide: 0 kg; source Kellenberger D. 2007; pedigree (1,1,1,1,1)
  Literature value based on chemicals used as frit in ceramic tiles dataset (ecoinvent v2). Titanium dioxide used as a proxy to modelled titanium oxide.
  properties: dry mass 1 kg, wet mass 1 kg
- dolomite: 0 kg; source Kellenberger D. 2007; pedigree (1,1,1,1,1)
  Literature value based on chemicals used as frit in ceramic tiles dataset (ecoinvent v2).
  properties: heating value, net 3.95 MJ, wet mass 1 kg, dry mass 1 kg, carbon content, fossil 0.130435
- tin dioxide: 0.000628 kg; source Kellenberger D. 2007; lognormal variance with pedigree 0.0646, pedigree (4,5,4,1,4)
  Literature value based on chemicals used as frit in ceramic tiles dataset (ecoinvent v2). Tin dioxide used as a proxy to modelled tin oxide.
  properties: wet mass 1 kg, dry mass 1 kg
- lime, packed: 0.0305798, 0.000778562, 0.0611416 kg (3 entries); source Kellenberger D. 2007; lognormal variance with pedigree 0.0646, pedigree (4,5,4,1,4)
  (same comment as for lime, packed)
- aluminium oxide, non-metallurgical: 0.00425896, 0.00072104 kg (2 entries); source Kellenberger D. 2007; lognormal variance with pedigree 0.0646, pedigree (4,5,4,1,4)
  Literature value based on chemicals used as frit in ceramic tiles dataset (ecoinvent v2).
- sodium perborate, tetrahydrate, powder: 0.0258854, 0.0524146 kg (2 entries); source Kellenberger D. 2007; lognormal variance with pedigree 0.0646, pedigree (4,5,4,1,4)
  (same comment as for sodium perborate, tetrahydrate, powder)
- titanium dioxide: 0.000473333, 0.000946667 kg (2 entries); source Kellenberger D. 2007; lognormal variance with pedigree 0.0646, pedigree (4,5,4,1,4)
  (same comment as for titanium dioxide)
- dolomite: 0.0401687, 0.0758313 kg (2 entries); source Kellenberger D. 2007; lognormal variance with pedigree 0.0646, pedigree (4,5,4,1,4)
  Literature value based on chemicals used as frit in ceramic tiles dataset (ecoinvent v2).

## Extrapolations
This dataset has been extrapolated from year 2012 to the year of the calculation (2021). The uncertainty has been adjusted accordingly.
