# treatment of waste sealing sheet, polyvinylchloride, municipal incineration

Dataset: EcoSpold 2, unit process
Geography: RoW
Time period: 2006-01-01 to 2021-12-31
Technology level: current
Classification: ISIC rev.4 ecoinvent: 3821:Treatment and disposal of non-hazardous waste
Synonyms: Kehrichtverbrennung; Siedlungsabfallverbrennung; municipal waste incineration
Scenario: Business-as-Usual
System model: Allocation, cut-off by classification
Share of production covered: 1.8 %
Generated by: Gabor Doka
Published in: Doka G. 2013
Database: ecoinvent
isCopyrightProtected: true
accessRestrictedTo: 1

## General comment
This dataset represents the activity of waste disposal of waste sealing sheet, polyvinylchloride in a municipal solid waste incinerator (MSWI) // Recommended use of this dataset: For disposal of bulk or small parts of PVC sealing sheet (waste building product) // Inventoried waste contains 1.7% Glass; 53.9% PVC sealing sheet; 11% Filler (lime); 33.4% plastiziser; . // Waste composition (wet, in ppm): upper heating value 23.26 MJ/kg; lower heating value 22.53 MJ/kg; H2O 1387.9; O 124680; H 61320; C 490710; S 1000; N 553.8; P n.a.; B n.a.; Cl 249040; Br 38.689; F 8.1246; I n.a.; Ag n.a.; As 1.2205; Ba 103.08; Cd 1.4498; Co 17.46; Cr 28.23; Cu 14.921; Hg 0.47261; Mn 44.17; Mo n.a.; Ni 11.754; Pb 14601; Sb 23.748; Se 1.1607; Sn 205.09; V 159.26; Zn 33.914; Be 0.27635; Sc n.a.; Sr 48.914; Ti 552.7; Tl 0.22108; W n.a.; Si 6104.5; Fe 2059.2; Ca 45238; Al 110.54; K n.a.; Mg n.a.; Na 1906; // Share of carbon in waste that is biogenic 0%. // Share of metals in waste not oxidised and bulk-recyclable (exclude very small or thin parts) Iron: 0%; Alu: 0%; Copper: 0%. // One kg of this waste produces 0.1693 kg of slag and 0.1292 kg of residues, which are landfilled. Additional solidification with 0.05169 kg of cement. // Net energy production: 2.6MJ/kg electric energy and 5.64MJ/kg thermal energy. // Recovery of metal scrap to recycling: 0g iron scrap, 0g aluminium scrap, 0g copper scrap.

## Included activities start
waste incineration from waste reception gate and delivery into waste bunker at incinerator plant site (without transports to the incinerator)

## Included activities end
Waste-specific short-term emissions to water from leachate. Long-term emissions from landfill to ground water.

## Geography
Specific to the technology mix encountered in Switzerland in 2010. Well applicable to modern incineration practices in Europe, North America or Japan.

## Technology
average Swiss MSWI plants in 2010 (grate incinerators) with electrostatic precipitator for fly ash (ESP), wet flue gas scrubber and 25% SNCR , 42.77% SCR-high dust , 32.68% SCR-low dust -DeNOx facilities and 0% without Denox (weighted according to mass of burnt waste, representing Swiss average). Efficiency of iron scrap separation from slag : 58%. Efficiency of non-ferrous scrap separation from slag : 31%. Gross electric efficiency technology mix 15.84% and Gross thermal efficiency technology mix 28.51%

## Time period
Waste composition as given in literature reference, theoretical data or other source. Transfer coefficients for modern MSWI.

## Reference product
- waste sealing sheet, polyvinylchloride: -1 kg; CPC 39270: Waste, parings and scrap of plastics; By-product classification Waste; CAS 9002-86-2
  Main reference product of this activity (supply of disposal service).
  production volume 1.8038e8 kg
    based on estimate on MSW in WTE globally and share of building products in Swiss MSW based on an unqualified estimate of building demand of Swiss population.
  property price 0 EUR2005
    Waste products are assigned a price of zero as they are assumed to require further treatment.
  property carbon content 0.435136
    carbon content on a dry matter basis (reserved; not for manual entry)
  properties: dry mass 0.9836 kg, water in wet mass 0.0164 kg, carbon content, non-fossil 0, carbon content, fossil 0.435136, water content 0.0166734, wet mass 1 kg, heating value, net 21.5 MJ, carbon allocation 0.428 kg

## By-products
- electricity, for reuse in municipal waste incineration only: 0 kWh; name E_el_prod_MSWI; CPC 17100: Electrical energy; By-product classification allocatable product; pedigree (1,1,1,1,1)
  Net electricity generated from this waste and used in internal MSWI plant energy redistribution.
  Uncertainty: uncertainty is calculated from uncertainties in waste composition and uncertainties in energy efficiency and the uncertainty in internal energy demand
  production volume 1.3037e8 kWh
    calculated in proportion to reference product waste input to incinerator
  property true value relation 3.6; name E_el_prod_MSWI_true_value_relation
    property to calculate "true value" from
  property exergy 3.6 MJ; name E_el_prod_MSWI_exergy
    This exergy property is based on the exergy content of the product.
  property price 0.1 EUR2005; name E_el_prod_MSWI_price_EUR2005
    Estimated to be the same price as in case of electricity, medium voltage.
- heat, for reuse in municipal waste incineration only: 0 MJ; name E_th_prod_MSWI; By-product classification allocatable product; CPC 17300: Steam and hot water; pedigree (1,1,1,1,1)
  (same comment as for electricity, for reuse in municipal waste incineration only)
  production volume 1.0178e9 MJ
    calculated in proportion to reference product waste input to incinerator
  property exergy 0.1842 MJ; name E_th_prod_MSWI_exergy
    This exergy property is based on the exergy content of the product.
  property true value relation 0.1842; name E_th_prod_MSWI_true_value_relation
    property to calculate "true value" from
  property price 0.0106 EUR2005; name E_th_prod_MSWI_price_EUR2005
    Average European district heat price from Ecoheatcool and Euroheat 2005-2006, Ecoheat Work package 1: The European heat market. Final report. 10.6 EUR/GJ i s the price of district heat. http://www.solarthermalworld.org/files/Ecoheatcool%20WP1%20Web.pdf?download

## Inputs from technosphere
- chromium oxide, flakes: 7.9671e-7 kg; lognormal variance with pedigree 0.54626, pedigree (1,1,4,1,1)
  Input to DeNOx stage.
  Uncertainty: uncertainty calculated from uncertainty in average DeNOx input, uncertainty in the share of thermal NOx, uncertainty of nitrogen content in average municipal waste and the uncertainty in nitrogen content in *this* waste.
  properties: wet mass 1 kg, dry mass 1 kg
- slag landfill: 2.8756e-10 unit; lognormal variance with pedigree 0.044434, pedigree (1,1,4,1,1)
  Landfill infrastructure required for landfilling of bottom ash.
  Uncertainty: uncertainty is calculated from uncertainties in waste composition and transfer coefficients in incinerator
- cement, unspecified: 0 kg; pedigree (1,1,1,1,1)
  Cement required for solidification of landfilled residual material.
  Uncertainty: Uncertainty calculated from uncertainty of the waste composition of this waste, of transfer coefficients in the incinerator and of the solidification recipe.
  properties: wet mass 1 kg, dry mass 1 kg
- residual material landfill: 2.6924e-10 unit; lognormal variance with pedigree 0.035712, pedigree (1,1,4,1,1)
  Landfill infrastructure required for landfilling of incineration residues.
  Uncertainty: uncertainty is calculated from uncertainties in waste composition and transfer coefficients in incinerator
- process-specific burdens, residual material landfill: 0 kg; pedigree (1,1,1,1,1)
  Mass-specific expenditures required for landfilling of incineration residues.
  Uncertainty: uncertainty is calculated from uncertainties in waste composition and transfer coefficients in incinerator
- quicklime, milled, packed: 0.1325 kg; lognormal variance with pedigree 0.059483, pedigree (1,1,4,1,1)
  Auxilliary inputs for the flue gas treatment stage of the incinerator plant.
  Uncertainty: uncertainty calculated from uncertainty in average CaO input, of transfer coefficients in the incinerator, and the uncertainty of the waste composition of this waste
  properties: dry mass 0.99 kg, water content 0.010101, wet mass 1 kg
- ammonia, anhydrous, liquid: 0 kg; pedigree (1,1,1,1,1)
  Input to DeNOx stage (100% NH3).
  Uncertainty: uncertainty calculated from uncertainty in average DeNOx input, uncertainty in the share of thermal NOx, uncertainty of nitrogen content in average municipal waste and the uncertainty in nitrogen content in *this* waste.
  properties: dry mass 1 kg, wet mass 1 kg
- water, decarbonised: 0 kg; pedigree (1,1,1,1,1)
  Incinerator process water used in flue gas scrubber stage.
  Uncertainty: uncertainty calculated from uncertainty in average water input, and the uncertainty of the waste composition of this waste
  properties: wet mass 1 kg
- process-specific burdens, slag landfill: 0 kg; pedigree (1,1,1,1,1)
  Mass-specific expenditures required for landfilling of bottom ash.
  Uncertainty: uncertainty is calculated from uncertainties in waste composition and transfer coefficients in incinerator
- waste cement, hydrated: 0 kg; pedigree (1,1,1,1,1)
  Hydrated cement output for solidification of landfilled residual material.
  Uncertainty: Uncertainty calculated from uncertainty of the waste composition of this waste and transfer coefficients in the incinerator and of the solidification recipe.
  production volume 0 kg
    calculated in proportion to reference product waste input to incinerator
  properties: wet mass 1 kg, dry mass 1 kg
- heat, district or industrial, natural gas: 0 MJ; pedigree (1,1,1,1,1)
  Input to DeNOx stage, to heat up flue gas in low-dust SCR.
  Uncertainty: uncertainty calculated from uncertainty in average DeNOx input, uncertainty in the share of thermal NOx, uncertainty of nitrogen content in average municipal waste and the uncertainty in nitrogen content in *this* waste.
  properties: heating value, net 1 MJ
- iron (III) chloride, without water, in 40% solution state: 0.000312 kg; lognormal variance with pedigree 0.25185, pedigree (1,1,4,1,1)
  Auxilliary inputs for the wastewater treatment stage of the incinerator plant.
  Uncertainty: uncertainty calculated from uncertainty in average FeCl3 input, of transfer coefficients in the incinerator, and the uncertainty of the waste composition of this waste
  properties: wet mass 1 kg, dry mass 1 kg
- municipal waste incineration facility: 2.5e-10 unit
  Demands per kilogram waste.
- chemical, organic: 8.1482e-6 kg; lognormal variance with pedigree 1.6039, pedigree (1,1,4,1,1)
  Auxilliary inputs for the wastewater treatment stage of the incinerator plant. Proxy for (pure) Trisodium-trimercapto-s-triazine (CAS 17766-26-6), used as 15% diluted solution, aka TMT15.
  Uncertainty: uncertainty calculated from uncertainty in average TMT15 input, of transfer coefficients in the incinerator, and the uncertainty of the waste composition of this waste
  properties: carbon content, fossil 0.628, wet mass 1 kg, dry mass 1 kg, heating value, net 19.03 MJ
- titanium dioxide: 3.9039e-5 kg; lognormal variance with pedigree 0.54626, pedigree (1,1,4,1,1)
  Input to DeNOx stage (TiO2 catalyst carrier)
  Uncertainty: uncertainty calculated from uncertainty in average DeNOx input, uncertainty in the share of thermal NOx, uncertainty of nitrogen content in average municipal waste and the uncertainty in nitrogen content in *this* waste.
  properties: wet mass 1 kg, dry mass 1 kg
- chemical, inorganic: 0.0073888 kg; lognormal variance with pedigree 0.058935, pedigree (1,1,4,1,1)
  Auxilliary inputs for the wastewater treatment stage of the incinerator plant. Proxy for Polyelectrolyte.
  Uncertainty: uncertainty calculated from uncertainty in average Polyelectrolyte input, of transfer coefficients in the incinerator, and the uncertainty of the waste composition of this waste
  properties: wet mass 1 kg, carbon content, fossil 0.003, dry mass 1 kg
- sodium hydroxide, without water, in 50% solution state: 0.025672 kg; lognormal variance with pedigree 0.058012, pedigree (1,1,4,1,1)
  Auxilliary inputs for the flue gas treatment stage of the incinerator plant.
  Uncertainty: uncertainty calculated from uncertainty in average NaOH input, of transfer coefficients in the incinerator, and the uncertainty of the waste composition of this waste
  properties: dry mass 1 kg, heating value, net 3.03 MJ, wet mass 1 kg
- hydrochloric acid, without water, in 30% solution state: 0.0019421 kg; lognormal variance with pedigree 0.058935, pedigree (1,1,4,1,1)
  Auxilliary inputs for the wastewater treatment stage of the incinerator plant.
  Uncertainty: uncertainty calculated from uncertainty in average HCl input, of transfer coefficients in the incinerator, and the uncertainty of the waste composition of this waste
  properties: heating value, net 3.32 MJ, dry mass 1 kg, wet mass 1 kg
- transport, freight, lorry, unspecified: 0 metric ton*km; pedigree (1,1,1,1,1)
  Transport services to transport incineration residues to landfills.
  Uncertainty: uncertainty calculated from uncertainty of the waste composition of this waste, uncertainty of transfer coefficients and the uncertainty in generic transportation distances
- cement, unspecified: 0.00746439, 0.00155312, 0.000113755, 0.00032424, 0.00733279, 0.000215825, 0.0023704, 0.000286792, 0.0320327 kg (9 entries); lognormal variance with pedigree 0.044796, pedigree (1,1,4,1,1)
  (same comment as for cement, unspecified)
- process-specific burdens, residual material landfill: 0.0365587, 0.0926813 kg (2 entries); lognormal variance with pedigree 0.035712, pedigree (1,1,4,1,1)
  (same comment as for process-specific burdens, residual material landfill)
- ammonia, anhydrous, liquid: 0.00013061, 1.12275e-5, 1.74671e-5, 3.46085e-5, 3.39072e-5, 3.55384e-6, 1.5887e-5, 0.000375839 kg (8 entries); lognormal variance with pedigree 0.22633, pedigree (1,1,4,1,1)
  (same comment as for ammonia, anhydrous, liquid)
- water, decarbonised: 0.789837, 2.05515, 8.28891, 2.02411, 0.40805, 1.34175, 0.0740724, 1.05552, 2.45873, 15.423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 kg (12 entries); lognormal variance with pedigree 0.25185, pedigree (1,1,4,1,1)
  (same comment as for water, decarbonised)
- process-specific burdens, slag landfill: 0.0457549, 0.115995 kg (2 entries); lognormal variance with pedigree 0.044434, pedigree (1,1,4,1,1)
  (same comment as for process-specific burdens, slag landfill)
- waste cement, hydrated: -0.0365587, -0.0926813 kg (2 entries); lognormal variance with pedigree 0.044796, pedigree (1,1,4,1,1)
  (same comment as for waste cement, hydrated)
  production volume 2.3312e7 kg
- heat, district or industrial, natural gas: 0.00129689, 0.0310759, 0.0841472 MJ (3 entries); lognormal variance with pedigree 0.22633, pedigree (1,1,4,1,1)
  (same comment as for heat, district or industrial, natural gas)
- transport, freight, lorry, unspecified: 0.00133198, 0.000208538, 0.0100985 metric ton*km (3 entries); lognormal variance with pedigree 0.024882, pedigree (1,1,4,1,1)
  (same comment as for transport, freight, lorry, unspecified)

## Inputs from nature
- Oxygen [natural resource, in air]: 1.8564 kg; lognormal variance with pedigree 0.028604, pedigree (1,1,4,1,1)
  Oxygen from ambient air needed to combust and oxidise this waste. Net demand, i.e. without O2 leaving the plant in flue gas uncombusted.
  Uncertainty: uncertainty is calculated from uncertainties in waste composition and transfer coefficients to flue gas and soild residues in incinerator

## Emissions to nature
- Vanadium, ion [water, surface water]: 2.5427e-7 kg; lognormal variance with pedigree 1.0129, pedigree (1,1,4,1,1)
  Emissions to water from waste composition and transfer coefficients in incinerator and landfills.
  Uncertainty: uncertainty is calculated from uncertainties in waste composition and transfer coefficients in incinerator and landfills
- Tin [air, urban air close to ground]: 1.3396e-10 kg; lognormal variance with pedigree 0.95041, pedigree (1,1,4,1,1)
  Emission to air from waste composition and transfer coefficients.
  Uncertainty: uncertainty is calculated from uncertainties in waste composition and transfer coefficients in incinerator
- Bromine [air, urban air close to ground]: 1.9325e-8 kg; lognormal variance with pedigree 1.1196, pedigree (1,1,4,1,1)
  (same comment as for Tin)
- Zinc, ion [water, surface water]: 2.903e-9 kg; lognormal variance with pedigree 0.90635, pedigree (1,1,4,1,1)
  (same comment as for Vanadium, ion)
- Sulfate [water, ground-, long-term]: 0.0024767 kg; lognormal variance with pedigree 0.38408, pedigree (1,1,4,1,1)
  Long-term emissions from landfilling of incineration residues.
  Uncertainty: uncertainty is calculated from uncertainties in waste composition and transfer coefficients in incinerator and landfills.
- Sodium [air, urban air close to ground]: 6.6501e-6 kg; lognormal variance with pedigree 0.59394, pedigree (1,1,4,1,1)
  (same comment as for Tin)
- Selenium [air, urban air close to ground]: 1.3847e-8 kg; lognormal variance with pedigree 1.5703, pedigree (1,1,4,1,1)
  (same comment as for Tin)
- COD, Chemical Oxygen Demand [water, surface water]: 0.00061857 kg; lognormal variance with pedigree 0.048701, pedigree (1,1,4,1,1)
  (same comment as for Vanadium, ion)
- Titanium, ion [water, ground-, long-term]: 0.00016523 kg; lognormal variance with pedigree 0.86326, pedigree (1,1,4,1,1)
  (same comment as for Sulfate)
- Carbon monoxide, fossil [air, urban air close to ground]: 4.384e-5 kg; lognormal variance with pedigree 0.8262, pedigree (1,1,4,1,1)
  Incomplete combustion product emitted to air.
  Uncertainty: uncertainty calculated from uncertainty in average operation emissions, and the uncertainty of the flue gas volume from this waste.
- Lead [air, urban air close to ground]: 1.2028e-6 kg; lognormal variance with pedigree 0.36661, pedigree (1,1,4,1,1)
  (same comment as for Tin)
- Cobalt [water, ground-, long-term]: 1.4223e-5 kg; lognormal variance with pedigree 1.1251, pedigree (1,1,4,1,1)
  (same comment as for Sulfate)
- Heat, waste [water, surface water]: 4.0279 MJ; lognormal variance with pedigree 0.040153, pedigree (1,1,4,1,1)
  Waste heat generated from heating value of this waste plus any electricity required to process it.
  Uncertainty: uncertainty is calculated from uncertainties in waste composition and uncertainties in energy efficiency and the uncertainty in internal energy demand
- TOC, Total Organic Carbon [water, ground-, long-term]: 0.0079952 kg; lognormal variance with pedigree 0.026069, pedigree (1,1,4,1,1)
  (same comment as for Sulfate)
- Lead [water, ground-, long-term]: 0.0070599 kg; lognormal variance with pedigree 3.4974, pedigree (1,1,4,1,1)
  (same comment as for Sulfate)
- Sulfur dioxide [air, urban air close to ground]: 1.0634e-5 kg; lognormal variance with pedigree 0.6775, pedigree (1,1,4,1,1)
  (same comment as for Tin)
- Titanium, ion [water, surface water]: 2.0607e-7 kg; lognormal variance with pedigree 0.56927, pedigree (1,1,4,1,1)
  (same comment as for Vanadium, ion)
- Barium [air, urban air close to ground]: 4.0459e-7 kg; lognormal variance with pedigree 0.97983, pedigree (1,1,4,1,1)
  (same comment as for Tin)
- Thallium [water, surface water]: 1.3544e-10 kg; lognormal variance with pedigree 1.9404, pedigree (1,1,4,1,1)
  (same comment as for Vanadium, ion)
- Zinc, ion [water, ground-, long-term]: 1.2118e-5 kg; lognormal variance with pedigree 2.893, pedigree (1,1,4,1,1)
  (same comment as for Sulfate)
- Silicon [water, ground-, long-term]: 5.2231e-5 kg; lognormal variance with pedigree 6.1023, pedigree (1,1,4,1,1)
  (same comment as for Sulfate)
- Hydrogen chloride [air, urban air close to ground]: 0.00014211 kg; lognormal variance with pedigree 0.081654, pedigree (1,1,4,1,1)
  (same comment as for Tin)
- Thallium [water, ground-, long-term]: 1.29e-7 kg; lognormal variance with pedigree 1.3374, pedigree (1,1,4,1,1)
  (same comment as for Sulfate)
- BOD5, Biological Oxygen Demand [water, surface water]: 0.00057103 kg; lognormal variance with pedigree 0.044519, pedigree (1,1,4,1,1)
  (same comment as for Vanadium, ion)
- Tin, ion [water, surface water]: 5.4257e-9 kg; lognormal variance with pedigree 1.5452, pedigree (1,1,4,1,1)
  (same comment as for Vanadium, ion)
- Chromium VI [water, ground-, long-term]: 2.1088e-6 kg; lognormal variance with pedigree 1.9529, pedigree (1,1,4,1,1)
  (same comment as for Sulfate)
- Antimony [water, ground-, long-term]: 1.5102e-5 kg; lognormal variance with pedigree 1.126, pedigree (1,1,4,1,1)
  (same comment as for Sulfate)
- Particulates, < 2.5 um [air, urban air close to ground]: 3.0791e-6 kg; lognormal variance with pedigree 0.42937, pedigree (1,1,4,1,1)
  (same comment as for Carbon monoxide, fossil)
- Benzene [air, urban air close to ground]: 2.579e-8 kg; lognormal variance with pedigree 0.099542, pedigree (1,1,4,1,1)
  (same comment as for Carbon monoxide, fossil)
- Antimony [water, surface water]: 8.185e-6 kg; lognormal variance with pedigree 1.1612, pedigree (1,1,4,1,1)
  (same comment as for Vanadium, ion)
- Phenol, pentachloro- [air, urban air close to ground]: 1.1231e-11 kg; lognormal variance with pedigree 0.099542, pedigree (1,1,4,1,1)
  (same comment as for Carbon monoxide, fossil)
- Barium [water, ground-, long-term]: 5.1912e-5 kg; lognormal variance with pedigree 2.3032, pedigree (1,1,4,1,1)
  (same comment as for Sulfate)
- Copper, ion [water, surface water]: 1.9208e-9 kg; lognormal variance with pedigree 1.0888, pedigree (1,1,4,1,1)
  (same comment as for Vanadium, ion)
- Manganese [water, ground-, long-term]: 2.7249e-5 kg; lognormal variance with pedigree 2.0577, pedigree (1,1,4,1,1)
  (same comment as for Sulfate)
- Barium [water, surface water]: 1.3874e-8 kg; lognormal variance with pedigree 1.2557, pedigree (1,1,4,1,1)
  (same comment as for Vanadium, ion)
- Cadmium, ion [water, surface water]: 1.4168e-10 kg; lognormal variance with pedigree 1.2837, pedigree (1,1,4,1,1)
  (same comment as for Vanadium, ion)
- Vanadium [air, urban air close to ground]: 3.3777e-6 kg; lognormal variance with pedigree 0.91365, pedigree (1,1,4,1,1)
  (same comment as for Tin)
- DOC, Dissolved Organic Carbon [water, surface water]: 0.00026767 kg; lognormal variance with pedigree 0.047573, pedigree (1,1,4,1,1)
  (same comment as for Vanadium, ion)
- Thallium [air, urban air close to ground]: 2.2108e-10 kg; lognormal variance with pedigree 1.7902, pedigree (1,1,4,1,1)
  (same comment as for Tin)
- Particulates, > 2.5 um, and < 10um [air, urban air close to ground]: 1.5473e-8 kg; lognormal variance with pedigree 0.20727, pedigree (1,1,4,1,1)
  (same comment as for Carbon monoxide, fossil)
- Iron, ion [water, ground-, long-term]: 0.0010388 kg; lognormal variance with pedigree 0.74927, pedigree (1,1,4,1,1)
  (same comment as for Sulfate)
- Copper [air, urban air close to ground]: 1.3544e-9 kg; lognormal variance with pedigree 1.2589, pedigree (1,1,4,1,1)
  (same comment as for Tin)
- Chromium, ion [water, surface water]: 1.7537e-9 kg; lognormal variance with pedigree 1.1757, pedigree (1,1,4,1,1)
  (same comment as for Vanadium, ion)
- Mercury [water, surface water]: 5.9613e-10 kg; lognormal variance with pedigree 1.2592, pedigree (1,1,4,1,1)
  (same comment as for Vanadium, ion)
- Carbon dioxide, fossil [air, urban air close to ground]: 1.7403 kg; lognormal variance with pedigree 0.022684, pedigree (1,1,4,1,1)
  (same comment as for Tin)
- Arsenic, ion [water, surface water]: 7.2769e-7 kg; lognormal variance with pedigree 1.4353, pedigree (1,1,4,1,1)
  (same comment as for Vanadium, ion)
- Silicon [water, surface water]: 2.2524e-7 kg; lognormal variance with pedigree 1.5229, pedigree (1,1,4,1,1)
  (same comment as for Vanadium, ion)
- Mercury [air, urban air close to ground]: 1.3307e-8 kg; lognormal variance with pedigree 1.6772, pedigree (1,1,4,1,1)
  (same comment as for Tin)
- Nitrate [water, ground-, long-term]: 1.9919e-5 kg; lognormal variance with pedigree 0.74805, pedigree (1,1,4,1,1)
  (same comment as for Sulfate)
- Strontium [water, ground-, long-term]: 4.885e-5 kg; lognormal variance with pedigree 1.0647, pedigree (1,1,4,1,1)
  (same comment as for Sulfate)
- Sodium, ion [water, surface water]: 0.00035383 kg; lognormal variance with pedigree 0.32605, pedigree (1,1,4,1,1)
  (same comment as for Vanadium, ion)
- Nickel, ion [water, ground-, long-term]: 1.1297e-5 kg; lognormal variance with pedigree 1.2255, pedigree (1,1,4,1,1)
  (same comment as for Sulfate)
- Copper, ion [water, ground-, long-term]: 1.3342e-5 kg; lognormal variance with pedigree 1.2026, pedigree (1,1,4,1,1)
  (same comment as for Sulfate)
- Cyanide [air, urban air close to ground]: 1.7745e-6 kg; lognormal variance with pedigree 1.5171, pedigree (1,1,4,1,1)
  Nitrogen species emitted to air after DeNOx stage.
  Uncertainty: uncertainty calculated from uncertainty in average N-emissions and uncertainty in the share of thermal NOx and the uncertainty in nitrogen content in *this* waste.
- Chloride [water, surface water]: 0.19119 kg; lognormal variance with pedigree 0.04739, pedigree (1,1,4,1,1)
  (same comment as for Vanadium, ion)
- NMVOC, non-methane volatile organic compounds, unspecified origin [air, urban air close to ground]: 1.1737e-6 kg; lognormal variance with pedigree 0.099542, pedigree (1,1,4,1,1)
  (same comment as for Carbon monoxide, fossil)
- Fluoride [water, surface water]: 6.2124e-7 kg; lognormal variance with pedigree 0.85174, pedigree (1,1,4,1,1)
  (same comment as for Vanadium, ion)
- Nickel [air, urban air close to ground]: 1.4302e-8 kg; lognormal variance with pedigree 1.2735, pedigree (1,1,4,1,1)
  (same comment as for Tin)
- Bromine [water, ground-, long-term]: 3.729e-6 kg; lognormal variance with pedigree 1.0979, pedigree (1,1,4,1,1)
  (same comment as for Sulfate)
- Lead [water, surface water]: 1.3966e-6 kg; lognormal variance with pedigree 0.31386, pedigree (1,1,4,1,1)
  (same comment as for Vanadium, ion)
- Selenium [water, surface water]: 3.9209e-7 kg; lognormal variance with pedigree 1.2466, pedigree (1,1,4,1,1)
  (same comment as for Vanadium, ion)
- Aluminium [water, ground-, long-term]: 7.9937e-5 kg; lognormal variance with pedigree 0.87547, pedigree (1,1,4,1,1)
  (same comment as for Sulfate)
- Benzene, hexachloro- [air, urban air close to ground]: 5.3925e-11 kg; lognormal variance with pedigree 0.099542, pedigree (1,1,4,1,1)
  (same comment as for Carbon monoxide, fossil)
- Titanium [air, urban air close to ground]: 4.5854e-7 kg; lognormal variance with pedigree 0.76715, pedigree (1,1,4,1,1)
  (same comment as for Tin)
- Cobalt [air, urban air close to ground]: 3.1754e-8 kg; lognormal variance with pedigree 1.2223, pedigree (1,1,4,1,1)
  (same comment as for Tin)
- Dioxins, measured as 2,3,7,8-tetrachlorodibenzo-p-dioxin [air, urban air close to ground]: 5.1576e-14 kg; lognormal variance with pedigree 0.42937, pedigree (1,1,4,1,1)
  (same comment as for Carbon monoxide, fossil)
- Vanadium, ion [water, ground-, long-term]: 7.424e-5 kg; lognormal variance with pedigree 0.67757, pedigree (1,1,4,1,1)
  (same comment as for Sulfate)
- Aluminium [air, urban air close to ground]: 9.0124e-11 kg; lognormal variance with pedigree 1.0313, pedigree (1,1,4,1,1)
  (same comment as for Tin)
- Manganese [water, surface water]: 6.8756e-9 kg; lognormal variance with pedigree 0.92778, pedigree (1,1,4,1,1)
  (same comment as for Vanadium, ion)
- Chromium [air, urban air close to ground]: 1.9722e-8 kg; lognormal variance with pedigree 1.1636, pedigree (1,1,4,1,1)
  (same comment as for Tin)
- Iron, ion [water, surface water]: 5.4133e-8 kg; lognormal variance with pedigree 0.85208, pedigree (1,1,4,1,1)
  (same comment as for Vanadium, ion)
- Sodium, ion [water, ground-, long-term]: 0.0015455 kg; lognormal variance with pedigree 0.44435, pedigree (1,1,4,1,1)
  (same comment as for Sulfate)
- TOC, Total Organic Carbon [water, surface water]: 0.00026767 kg; lognormal variance with pedigree 0.047573, pedigree (1,1,4,1,1)
  (same comment as for Vanadium, ion)
- Selenium [water, ground-, long-term]: 7.5385e-7 kg; lognormal variance with pedigree 1.1509, pedigree (1,1,4,1,1)
  (same comment as for Sulfate)
- Methane, fossil [air, urban air close to ground]: 3.8685e-7 kg; lognormal variance with pedigree 0.099542, pedigree (1,1,4,1,1)
  (same comment as for Carbon monoxide, fossil)
- Hydrogen fluoride [air, urban air close to ground]: 5.4814e-8 kg; lognormal variance with pedigree 1.3144, pedigree (1,1,4,1,1)
  (same comment as for Tin)
- Mercury [water, ground-, long-term]: 3.3104e-8 kg; lognormal variance with pedigree 3.1241, pedigree (1,1,4,1,1)
  (same comment as for Sulfate)
- Cadmium [air, urban air close to ground]: 7.3567e-10 kg; lognormal variance with pedigree 1.5559, pedigree (1,1,4,1,1)
  (same comment as for Tin)
- Nitrate [water, surface water]: 7.0596e-6 kg; lognormal variance with pedigree 0.5229, pedigree (1,1,4,1,1)
  (same comment as for Vanadium, ion)
- Chloride [water, ground-, long-term]: 0.057708 kg; lognormal variance with pedigree 0.062034, pedigree (1,1,4,1,1)
  (same comment as for Sulfate)
- Chromium VI [water, surface water]: 6.314e-7 kg; lognormal variance with pedigree 1.2149, pedigree (1,1,4,1,1)
  (same comment as for Vanadium, ion)
- Nickel, ion [water, surface water]: 7.8819e-9 kg; lognormal variance with pedigree 1.8073, pedigree (1,1,4,1,1)
  (same comment as for Vanadium, ion)
- Sulfate [water, surface water]: 0.0005073 kg; lognormal variance with pedigree 0.31661, pedigree (1,1,4,1,1)
  (same comment as for Vanadium, ion)
- Calcium, ion [water, ground-, long-term]: 0.045041 kg; lognormal variance with pedigree 0.20587, pedigree (1,1,4,1,1)
  (same comment as for Sulfate)
- Aluminium [water, surface water]: 1.1963e-8 kg; lognormal variance with pedigree 1.1715, pedigree (1,1,4,1,1)
  (same comment as for Vanadium, ion)
- Bromine [water, surface water]: 3.494e-5 kg; lognormal variance with pedigree 0.53817, pedigree (1,1,4,1,1)
  (same comment as for Vanadium, ion)
- Heat, waste [air, urban air close to ground]: 17.599 MJ; lognormal variance with pedigree 0.040153, pedigree (1,1,4,1,1)
  (same comment as for Heat, waste)
- Cobalt [water, surface water]: 3.1633e-9 kg; lognormal variance with pedigree 1.5098, pedigree (1,1,4,1,1)
  (same comment as for Vanadium, ion)
- DOC, Dissolved Organic Carbon [water, ground-, long-term]: 0.0079952 kg; lognormal variance with pedigree 0.026069, pedigree (1,1,4,1,1)
  (same comment as for Sulfate)
- Fluoride [water, ground-, long-term]: 7.2844e-6 kg; lognormal variance with pedigree 0.79332, pedigree (1,1,4,1,1)
  (same comment as for Sulfate)
- Water [water, surface water]: 0.00046679 m3; lognormal variance with pedigree 1.0808, pedigree (1,1,4,1,1)
  Process water released to surface water.
  Uncertainty: uncertainty calculated from uncertainty in process water input and the uncertainty of fraction to surface water.
- Calcium, ion [water, surface water]: 0.00019739 kg; lognormal variance with pedigree 0.67125, pedigree (1,1,4,1,1)
  (same comment as for Vanadium, ion)
- Cadmium, ion [water, ground-, long-term]: 1.1182e-7 kg; lognormal variance with pedigree 6.9402, pedigree (1,1,4,1,1)
  (same comment as for Sulfate)
- Beryllium [water, ground-, long-term]: 2.5256e-7 kg; lognormal variance with pedigree 1.6614, pedigree (1,1,4,1,1)
  (same comment as for Sulfate)
- Arsenic [air, urban air close to ground]: 8.2259e-9 kg; lognormal variance with pedigree 1.5631, pedigree (1,1,4,1,1)
  (same comment as for Tin)
- Manganese [air, urban air close to ground]: 8.4356e-9 kg; lognormal variance with pedigree 1.1122, pedigree (1,1,4,1,1)
  (same comment as for Tin)
- Strontium [water, surface water]: 3.0798e-8 kg; lognormal variance with pedigree 1.7768, pedigree (1,1,4,1,1)
  (same comment as for Vanadium, ion)
- Tin, ion [water, ground-, long-term]: 7.8491e-5 kg; lognormal variance with pedigree 1.7564, pedigree (1,1,4,1,1)
  (same comment as for Sulfate)
- Iron [air, urban air close to ground]: 3.6904e-9 kg; lognormal variance with pedigree 0.63684, pedigree (1,1,4,1,1)
  (same comment as for Tin)
- Antimony [air, urban air close to ground]: 1.9023e-11 kg; lognormal variance with pedigree 1.2369, pedigree (1,1,4,1,1)
  (same comment as for Tin)
- Zinc [air, urban air close to ground]: 2.0992e-8 kg; lognormal variance with pedigree 1.1343, pedigree (1,1,4,1,1)
  (same comment as for Tin)
- Ammonia [air, urban air close to ground]: 7.3261e-7 kg; lognormal variance with pedigree 0.27004, pedigree (1,1,4,1,1)
  (same comment as for Cyanide)
- Benzene, pentachloro- [air, urban air close to ground]: 1.3626e-10 kg; lognormal variance with pedigree 0.099542, pedigree (1,1,4,1,1)
  (same comment as for Carbon monoxide, fossil)
- Beryllium [water, surface water]: 1.7308e-10 kg; lognormal variance with pedigree 2.2558, pedigree (1,1,4,1,1)
  (same comment as for Vanadium, ion)
- Dinitrogen monoxide [air, urban air close to ground]: 8.2598e-6 kg; lognormal variance with pedigree 1.5171, pedigree (1,1,4,1,1)
  (same comment as for Cyanide)
- Benzo(a)pyrene [air, urban air close to ground]: 5.7391e-13 kg; lognormal variance with pedigree 0.42937, pedigree (1,1,4,1,1)
  (same comment as for Carbon monoxide, fossil)
- Nitrogen oxides [air, urban air close to ground]: 0.00023199 kg; lognormal variance with pedigree 0.27004, pedigree (1,1,4,1,1)
  Sum of fuel-Nox and thermal-NOx emitted to air after DeNOx stage.
  Uncertainty: uncertainty calculated from uncertainty in average N-emissions and uncertainty in the share of thermal NOx and the uncertainty in nitrogen content in *this* waste.
- Water [air, urban air close to ground]: 0.0013863 m3; lognormal variance with pedigree 0.74482, pedigree (1,1,4,1,1)
  Water vapour from waste humidity, hydrogen oxidation and part of the process water.
  Uncertainty: Uncertainty calculated from uncertainty in waste composition, process water input and the uncertainty of fraction to air.
- COD, Chemical Oxygen Demand [water, ground-, long-term]: 0.020205 kg; lognormal variance with pedigree 0.026069, pedigree (1,1,4,1,1)
  (same comment as for Sulfate)
- Toluene [air, urban air close to ground]: 5.158e-8 kg; lognormal variance with pedigree 0.099542, pedigree (1,1,4,1,1)
  (same comment as for Carbon monoxide, fossil)
- Arsenic, ion [water, ground-, long-term]: 4.8462e-7 kg; lognormal variance with pedigree 1.552, pedigree (1,1,4,1,1)
  (same comment as for Sulfate)
- BOD5, Biological Oxygen Demand [water, ground-, long-term]: 0.0066091 kg; lognormal variance with pedigree 0.026069, pedigree (1,1,4,1,1)
  (same comment as for Sulfate)
- Strontium [air, urban air close to ground]: 4.8914e-9 kg; lognormal variance with pedigree 1.0975, pedigree (1,1,4,1,1)
  (same comment as for Tin)
