# treatment of ash from deinking sludge, residual material landfill

Dataset: EcoSpold 2, unit process
Geography: CH
Time period: 1994-01-01 to 2021-12-31
Technology level: current
Classification: ISIC rev.4 ecoinvent: 3822:Treatment and disposal of hazardous waste
Classification: EcoSpold01Categories: waste management/residual material landfill
Synonyms: Ash from the incineration of deinking sludge in recycling paper production
Tags: Treatment; ConvertedDataset
Scenario: Business-as-Usual
System model: Allocation, cut-off by classification
Generated by: Gabor Doka (obsolete)
Published in: Doka G. 2009
Database: ecoinvent
isCopyrightProtected: true
accessRestrictedTo: 1

## General comment
Inventoried waste contains 100% Ash, from Incineration of Deinking Sludge, to landfill; .
waste composition (wet, in ppm): H2O n.a.; O 423290; H n.a.; C n.a.; S 4000; N n.a.; P n.a.; B n.a.; Cl n.a.; Br n.a.; F n.a.; I n.a.; Ag n.a.; As n.a.; Ba n.a.; Cd 0.05; Co n.a.; Cr 1; Cu 4.4; Hg 0.0025; Mn n.a.; Mo n.a.; Ni 0.7; Pb 2; Sb n.a.; Se n.a.; Sn n.a.; V n.a.; Zn 6.8; Be n.a.; Sc n.a.; Sr n.a.; Ti n.a.; Tl n.a.; W n.a.; Si 198300; Fe n.a.; Ca 250000; Al 124400; K n.a.; Mg n.a.; Na n.a.;
Share of carbon in waste that is biogenic 60.4%.
Additional solidification with 0.4 kg of cement.
[This dataset was already contained in the ecoinvent database version 2. It was not individually updated during the transfer to ecoinvent version 3. Life Cycle Impact Assessment results may still have changed, as they are affected by changes in the supply chain, i.e. in other datasets. This dataset was generated following the ecoinvent quality guidelines for version 2. It may have been subject to central changes described in the ecoinvent version 3 change report (http://www.ecoinvent.org/database/ecoinvent-version-3/reports-of-changes/), and the results of the central updates were reviewed extensively. The changes added e.g. consistent water flows and other information throughout the database. The documentation of this dataset can be found in the ecoinvent reports of version 2, which are still available via the ecoinvent website. The change report linked above covers all central changes that were made during the conversion process.]

## Included activities end
Waste-specific short-term emissions to water from leachate. Long-term emissions from landfill to ground water. Expenditures for solidificalion with cement (user-specified option)

## Geography
Technology encountered in Switzerland in 2000. Landfill includes base seal and leachate collection system.

## Technology
Swiss residual material landfill for polluted, inorganic waste. With base seal and leachate collection system. Recultivation after closure.

## Time period
Waste composition as given in literature reference, theoretical data or other source. Transfer coefficients from prospective model.

## Reference product
- ash from deinking sludge: -1 kg; CPC 39: Wastes or scraps; By-product classification Waste
  EcoSpold01Location=CH
  production volume 4.23269e9 kg
    Calculated from the production volumes of the four processes that use this treatment activity
  property carbon content, non-fossil 0
    Tab 6.22, ecoinvent v2.2 report 11_III & Tab A.10, ecoinvent v2.2 report 13_I
  property price 0 EUR2005
    Waste products are assigned a price of zero as they are assumed to require further treatment.
  property carbon content, fossil 0
    Tab 6.22, ecoinvent v2.2 report 11_III & Tab A.10, ecoinvent v2.2 report 13_I
  property carbon content 0
    carbon content on a dry matter basis (reserved; not for manual entry)
  properties: dry mass 1 kg, water content 0, water in wet mass 0 kg, wet mass 1 kg, carbon allocation 0 kg

## Inputs from technosphere
- cement, unspecified: 0.4 kg; lognormal variance with pedigree 0.05, pedigree (1,1,5,1,1)
  EcoSpold01Location=CH
  Cement for solidification of residual material waste. Uncertainty in mass from solidification recipe.
  properties: wet mass 1 kg, dry mass 1 kg
- waste cement, hydrated: -1 kg; lognormal variance with pedigree 0.05, pedigree (1,1,5,1,1)
  Hydrated cement for solidification of residual material waste. Uncertainty in mass from solidification recipe.
  EcoSpold01Location=CH
  production volume 4.23269e9 kg
    Calculated from the production volume of ash from deinking sludge, 0% water in proportion to the respective output amounts.
  properties: wet mass 1 kg, dry mass 1 kg
- process-specific burdens, residual material landfill: 1 kg; lognormal variance with pedigree 0.04, pedigree (1,1,5,1,1)
  EcoSpold01Location=CH
  demands per kilogram waste. uncertainty is heeded in the module;activityLink introduced to establish a direct link to the corresponding regional supply of this product
- residual material landfill: 2.0833e-9 unit; lognormal variance with pedigree 0.04, pedigree (1,1,5,1,1)
  demands per kilogram waste. uncertainty is heeded in the module
  EcoSpold01Location=CH

## Emissions to nature
- Sulfate [water, surface water]: 0.0012875 kg; lognormal variance with pedigree 0.63, pedigree (1,1,5,1,1)
  uncertainty is calculated from uncertainties in waste composition and transfer coefficients in residual landfill
- Mercury [water, ground-, long-term]: 1.18e-10 kg; lognormal variance with pedigree 4.29, pedigree (1,1,5,1,1)
  uncertainty is calculated from uncertainties in waste composition and transfer coefficients in incinerator and landfills.
- Lead [water, surface water]: 1.7319e-11 kg; lognormal variance with pedigree 2.8, pedigree (1,1,5,1,1)
  (same comment as for Sulfate)
- Calcium, ion [water, surface water]: 3.7712e-5 kg; lognormal variance with pedigree 0.99, pedigree (1,1,5,1,1)
  (same comment as for Sulfate)
- Zinc, ion [water, surface water]: 1.3913e-10 kg; lognormal variance with pedigree 2.52, pedigree (1,1,5,1,1)
  (same comment as for Sulfate)
- Aluminium [water, ground-, long-term]: 0.036928 kg; lognormal variance with pedigree 0.51, pedigree (1,1,5,1,1)
  (same comment as for Mercury)
- Chromium VI [water, surface water]: 6.0113e-8 kg; lognormal variance with pedigree 1.78, pedigree (1,1,5,1,1)
  (same comment as for Sulfate)
- Copper, ion [water, ground-, long-term]: 1.6938e-7 kg; lognormal variance with pedigree 4.07, pedigree (1,1,5,1,1)
  (same comment as for Mercury)
- Nickel, ion [water, surface water]: 4.2308e-10 kg; lognormal variance with pedigree 2.37, pedigree (1,1,5,1,1)
  (same comment as for Sulfate)
- Copper, ion [water, surface water]: 2.8276e-10 kg; lognormal variance with pedigree 2.43, pedigree (1,1,5,1,1)
  (same comment as for Sulfate)
- Nickel, ion [water, ground-, long-term]: 2.5343e-7 kg; lognormal variance with pedigree 1.91, pedigree (1,1,5,1,1)
  (same comment as for Mercury)
- Silicon [water, surface water]: 0.00044597 kg; lognormal variance with pedigree 0.66, pedigree (1,1,5,1,1)
  (same comment as for Sulfate)
- Aluminium [water, surface water]: 6.165e-5 kg; lognormal variance with pedigree 0.89, pedigree (1,1,5,1,1)
  (same comment as for Sulfate)
- Chromium VI [water, ground-, long-term]: 1.8989e-7 kg; lognormal variance with pedigree 1.62, pedigree (1,1,5,1,1)
  (same comment as for Mercury)
- Cadmium, ion [water, surface water]: 5.6668e-13 kg; lognormal variance with pedigree 3.21, pedigree (1,1,5,1,1)
  (same comment as for Sulfate)
- Sulfate [water, ground-, long-term]: 0.010713 kg; lognormal variance with pedigree 0.52, pedigree (1,1,5,1,1)
  (same comment as for Mercury)
- Cadmium, ion [water, ground-, long-term]: 3.3944e-10 kg; lognormal variance with pedigree 8.19, pedigree (1,1,5,1,1)
  (same comment as for Mercury)
- Calcium, ion [water, ground-, long-term]: 0.02259 kg; lognormal variance with pedigree 1.53, pedigree (1,1,5,1,1)
  (same comment as for Mercury)
- Zinc, ion [water, ground-, long-term]: 8.3341e-8 kg; lognormal variance with pedigree 6.2, pedigree (1,1,5,1,1)
  (same comment as for Mercury)
- Mercury [water, surface water]: 1.97e-13 kg; lognormal variance with pedigree 2.95, pedigree (1,1,5,1,1)
  (same comment as for Sulfate)
- Silicon [water, ground-, long-term]: 0.19785 kg; lognormal variance with pedigree 0.11, pedigree (1,1,5,1,1)
  (same comment as for Mercury)
- Lead [water, ground-, long-term]: 1.0374e-8 kg; lognormal variance with pedigree 8.44, pedigree (1,1,5,1,1)
  (same comment as for Mercury)

## Sampling procedure
Landfill model based on observed leachate concentrations in literature. Extrapolated to 60'000 years heeding chemical characteristics. Initial waste composition from various literature sources.

## Extrapolations
This dataset has been extrapolated from year 2000 to the year of the calculation (2021). The uncertainty has been adjusted accordingly.

## Review by Niels Jungbluth 2009-02-15
passed.
