# deep well closure, for geothermal power, onshore, 6000m

Dataset: EcoSpold 2, unit process
Geography: GLO
Time period: 2008-01-01 to 2021-12-31
Technology level: current
Classification: ISIC rev.4 ecoinvent: 0990:Support activities for other mining and quarrying
Synonyms: deep borehole closure
Tags: Geothermal power; Infrastructure
Scenario: Business-as-Usual
System model: Allocation, cut-off by classification
Generated by: Christian Bauer
Published in: Rogge S. 2004
Database: ecoinvent
isCopyrightProtected: true
accessRestrictedTo: 1

## General comment
This dataset represents the closure of a borehole of 6000 m depth for geothermal power generation in an unspecific rock formation. A usage duration of 20 years is estimated, after which the well is filled with cement and gravel and sealed with a concrete slab.

## Included activities start
This is a service for closure of disused deep onshore wells.

## Included activities end
This activity ends with the closed and sealed well.

This dataset includes the materials needed for the closure. No energy is needed for the filling, only transports accounted for in the corresponding market datasets.

This dataset doesn't include recuperation of the land used.

## Time period
The exchanges in this dataset have a lifetime assigned of 20 years. Thus they are only taken from the market in 20 years, not today.

## Reference product
- deep well closure: 1 m; CPC 54262: General construction services of power plants; By-product classification allocatable product
  production volume 1e-14 m
    No wells which were used for geothermal power were closed in 2008. A very small production volume was added in order to allow the geothermal power plant to link to this dataset, until the database allows linking to treatment activities in the future.
  property price 0.176452 EUR2005
    Calculated based on inputs: The price of the product has been calculated as a sum of the values of the material and energy inputs for this product. This value is therefore a rough estimation. It may underestimate the real price since there are additional expenses when producing any product. These expences can include for example labour costs, treatment of waste materials and profit for the producer. Please consider carefully whether this level of data quality is acceptable for your application.

## Inputs from technosphere
All rows: source Rogge S. 2004
- cement, alternative constituents 21-35%: 0 kg; pedigree (1,1,1,1,1)
  Literature value/estimation. The total cement use is taken from the literature source mentioned; the proportion of different cement types has been estimated.
  property carbon content, non-fossil 0; name ceme_C_content_non_fossil
  property carbon content, fossil 0; name ceme_C_content_fossil
  property water content 0; name ceme_water_content
  property dry mass 1 kg; name ceme_DM
  property wet mass 1 kg; name ceme_WM
  property water in wet mass 0 kg; name ceme_WWM
- gravel, round: 0 kg; pedigree (1,1,1,1,1)
  Literature value/estimation. The total gravel use is taken from the literature source mentioned; the proportion of different gravel types has been estimated.
  properties: dry mass 1 kg, lifetime 20 year, wet mass 1 kg
- cement, Portland: 0 kg; pedigree (1,1,1,1,1)
  (same comment as for cement, alternative constituents 21-35%)
  properties: wet mass 1 kg, dry mass 1 kg
- gravel, crushed: 0 kg; pedigree (1,1,1,1,1)
  (same comment as for gravel, round)
  properties: wet mass 1 kg, lifetime 20 year, dry mass 1 kg
- cement, alternative constituents 21-35%: 0.230242, 0.0423681, 0.00175061, 0.600639 kg (4 entries); lognormal variance with pedigree 0.0867, pedigree (4,3,5,3,3)
  (same comment as for cement, alternative constituents 21-35%)
  properties: dry mass 1 kg, wet mass 1 kg
- gravel, round: 0.003822, 14.6962 kg (2 entries); lognormal variance with pedigree 0.0867, pedigree (4,3,5,3,3)
  (same comment as for gravel, round)
- cement, Portland: 0.08576, 0.0887617, 0.00406904, 0.00286218, 0.00496047, 0.00102966, 0.0993093, 0.00418012, 0.584068 kg (9 entries); lognormal variance with pedigree 0.0867, pedigree (4,3,5,3,3)
  (same comment as for cement, alternative constituents 21-35%)
- gravel, crushed: 0.728615, 0.159157, 0.000962, 0.0145708, 2.79669 kg (5 entries); lognormal variance with pedigree 0.0867, pedigree (4,3,5,3,3)
  (same comment as for gravel, round)

## Sampling procedure
Literature

## Extrapolations
This dataset has been extrapolated from year 2008 to the year of the calculation (2021). The uncertainty has been adjusted accordingly.

## Review by Bo Weidema 2012-01-12
As an exception, this dataset was only reviewed by one reviewer.
