# packing, cement

Dataset: EcoSpold 2, unit process
Geography: RoW
Time period: 1997-01-01 to 2021-12-31
Technology level: current
Classification: EcoSpold01Categories: construction materials/others
Classification: ISIC rev.4 ecoinvent: 8292:Packaging activities
Tags: ConvertedDataset
Scenario: Business-as-Usual
System model: Allocation, cut-off by classification
Generated by: Daniel Kellenberger (obsolete)
Published in: Kellenberger D. 2004
Database: ecoinvent
isCopyrightProtected: true
accessRestrictedTo: 1

## General comment
The packing and loading process is normalized with an annual production volume of 1'500'000 kg/a. The estimated lifespan of the machines is 25 years.
[This dataset was already contained in the ecoinvent database version 2. It was not individually updated during the transfer to ecoinvent version 3. Life Cycle Impact Assessment results may still have changed, as they are affected by changes in the supply chain, i.e. in other datasets. This dataset was generated following the ecoinvent quality guidelines for version 2. It may have been subject to central changes described in the ecoinvent version 3 change report (http://www.ecoinvent.org/database/ecoinvent-version-3/reports-of-changes/), and the results of the central updates were reviewed extensively. The changes added e.g. consistent water flows and other information throughout the database. The documentation of this dataset can be found in the ecoinvent reports of version 2, which are still available via the ecoinvent website. The change report linked above covers all central changes that were made during the conversion process.]

## Included activities end
Includes the process of packing, transportation within the plant and loading of the bags on paletts. The machines for these processes are taken into account. The waste treatment after use by the end-user and transports of the packing materials are included. Energy demand not included as it is included in the different concrete types.

## Geography
Data are from one company (packing, lime products) in Switzerland, adapted for cement.

## Technology
Assumption: same process as for packing of lime products

## Reference product
- packing, cement: 1 kg; CPC 85400: Packaging services; By-product classification allocatable product
  EcoSpold01Location=CH
  production volume 3.96633 kg
    This is a placeholder value that does not reflect real-world production volumes. This dataset does not currently require a real-world production volume to work in the database framework, and no actual data were collected yet. This has no negative effect on the results of the ecoinvent database.
  properties: price 0.0729 EUR2005

## Inputs from technosphere
- polyethylene, high density, granulate: 0.000123 kg; lognormal variance with pedigree 0.32, pedigree (5,5,5,5,5)
  EcoSpold01Location=RER
  properties: carbon content, fossil 0.857143, dry mass 1 kg, wet mass 1 kg, heating value, net 42.47 MJ
  note on carbon content, fossil: Polyethylene is formed out of a huge amount of ethylene monomers (C2H4) (ecoinvent v2.2 report 11_II). MW=28 g/mol
- EUR-flat pallet: 0.0001 unit; lognormal variance with pedigree 0.1786, pedigree (4,5,5,5,5)
  EcoSpold01Location=RER
  properties: heating value, net 335.11 MJ, water content 0.2, carbon content, fossil 0.0311351, dry mass 18.3333 kg, wet mass 22 kg, carbon content, non-fossil 0.58833
  note on carbon content, fossil: C content in components of the pallet (ecoinvent v2.2 report 7_part XVIII)
- conveyor belt: 3.33e-10 m; lognormal variance with pedigree 0.1786, pedigree (4,5,5,5,5)
  EcoSpold01Location=RER
- waste graphical paper: 0 kg; pedigree (1,1,1,1,1)
  EcoSpold01Location=CH
  production volume 0 kg
    Calculated from the production volume of packing, cement in proportion to the respective output amounts.
  properties: dry mass 0.888 kg, heating value, net 14.12 MJ, water content 0.126126, carbon content, non-fossil 0.454955, wet mass 1 kg
  note on heating value, net: Value taken from the general comment of the treatment dataset.
- industrial machine, heavy, unspecified: 1.33e-6 kg; lognormal variance with pedigree 0.054, pedigree (1,4,5,5,1)
  EcoSpold01Location=RER
- waste wood, untreated: 0 kg; pedigree (1,1,1,1,1)
  EcoSpold01Location=CH
  production volume 0 kg
    (same comment as for waste graphical paper)
  properties: wet mass 1 kg, dry mass 0.8 kg, heating value, net 13.99 MJ, water content 0.25, carbon content, non-fossil 0.48632
  note on carbon content, non-fossil: Tab A.4, ecoinvent v2.2 report 13_I. C content has been referred to 1 kg DM,
- waste polyethylene: 0 kg; pedigree (1,1,1,1,1)
  EcoSpold01Location=CH
  production volume 0 kg
    (same comment as for waste graphical paper)
  properties: carbon content, fossil 0.825301, water content 0.00401606, dry mass 0.996 kg, wet mass 1 kg, heating value, net 42.47 MJ
  note on carbon content, fossil: C content in 1 kg DM was calculated using data in Tab A.1, ecoinvent v2.2 report 13_I
- extrusion, plastic film: 0.000123 kg; lognormal variance with pedigree 0.2106, pedigree (5,5,5,5,5)
  EcoSpold01Location=RER
- kraft paper: 0.00157 kg; lognormal variance with pedigree 0.32, pedigree (5,5,5,5,5)
  EcoSpold01Location=RER
  properties: dry mass 0.945 kg, heating value, net 14.11 MJ, carbon content, fossil 0.0020219, carbon content, non-fossil 0.41662, wet mass 1 kg, water content 0.0582011
  note on carbon content, fossil: Fossil C content was calculated after fossil C contents of chemicals used in the production of the paper (in Tab 9.4 ecoinvent v2.2 report 11_III, part 9).
  note on carbon content, non-fossil: Biogenic C content was calculated after biogenic C contents of chemicals used in the production of the paper (in Tab 9.4 ecoinvent v2.2 report 11_III, part 9). The cellulose content in 1 kg of paper (on a wet mas basis) was estimated as (1-chemical content), C content of cellulose was considered 0.44 kgC/kg dry mass (ecoinvent v2.2 report, n 15a, pg 40)
- waste graphical paper: -0.000145229, -2.21772e-5, -1.9392e-6, -8.01356e-5, -7.81389e-6, -1.44643e-5, -0.000350367, -0.00269787 kg (8 entries); lognormal variance with pedigree 0.072, pedigree (1,4,5,5,3)
  EcoSpold01Location=CH
  production volume 0.00996 kg
- waste wood, untreated: -0.000177923, -2.20918e-5, -1.61516e-6, -6.20493e-5, -9.37416e-6, -1.48198e-5, -0.000277029, -0.0023605 kg (8 entries); lognormal variance with pedigree 0.1786, pedigree (4,5,5,5,5)
  EcoSpold01Location=CH
  production volume 0.0087762 kg
- waste polyethylene: -1.36827e-5, -9.14229e-7, -6.91416e-8, -3.77609e-7, -1.5255e-7, -3.58575e-7, -1.16583e-5, -9.57868e-5 kg (8 entries); lognormal variance with pedigree 0.072, pedigree (1,4,5,5,3)
  EcoSpold01Location=CH
  production volume 0.000369 kg

## Sampling procedure
Measured data of one Swiss plant for packing of lime products

## Extrapolations
See geography This dataset has been copied from an original dataset covering the geography CH. The uncertainty has been adjusted accordingly.

## Review by Roberto Dones 2005-07-19
passed
