# hydropower plant construction, reservoir, non-alpine regions

Dataset: EcoSpold 2, unit process
Geography: RoW
Time period: 1945-01-01 to 2021-12-31
Technology level: current
Classification: ISIC rev.4 ecoinvent: 4220:Construction of utility projects
Classification: EcoSpold01Categories: hydro power/production of components
Tags: ConvertedDataset
Scenario: Business-as-Usual
System model: Allocation, cut-off by classification
Generated by: Christian Bauer
Published in: Bolliger, R. 2007
Database: ecoinvent
isCopyrightProtected: true
accessRestrictedTo: 1

## General comment
This study adresses Swiss dams only. The data have been directly applied to preliminary describe dam-mixes in non alpine regions, increasing the uncertainty factors somewhat. Non alpine regions are all European countries except of Switzerland, Austria, Italy and France. Considering the difficulty to clearly seperate within the Swiss dams system for some of the dams function for normal electricity generation from pumping storage, the same basic information has been used for the modules describing the two functions. A representative sample of Swiss dams with a height of more than 30 metres is taken into account for calculating the numbers. Lifetime is assumed to be 150 years for the dam and 80 years rest of materials. The data refers to plant construction of a mix of types of dams built between 1945 and 1970, therefore they might not be representative for more modern construction, nor for an individual type.
[This dataset was already contained in the ecoinvent database version 2. It was not individually updated during the transfer to ecoinvent version 3. Life Cycle Impact Assessment results may still have changed, as they are affected by changes in the supply chain, i.e. in other datasets. This dataset was generated following the ecoinvent quality guidelines for version 2. It may have been subject to central changes described in the ecoinvent version 3 change report (http://www.ecoinvent.org/database/ecoinvent-version-3/reports-of-changes/), and the results of the central updates were reviewed extensively. The changes added e.g. consistent water flows and other information throughout the database. The documentation of this dataset can be found in the ecoinvent reports of version 2, which are still available via the ecoinvent website. The change report linked above covers all central changes that were made during the conversion process.]

## Included activities end
Includes the most important materials used for the construction: cement, gravel, water, steel, explosives. Also includes transports and energy used for the construction. Inluded direct burdens to the environment are particle emissions caused by the construction and the disposal of the dam.

## Geography
Data for Swiss avergage conditions, directly used here.

## Technology
Construction technology refers to a mix of types of dams built in Switzerland between 1945 and 1970, therefore they might not be representative for more modern construction, nor for an individual type.

## Parameters
- fraction, tap water, to air: 0.15 dimensionless; name fraction_TW_to_air; lognormal variance with pedigree 0.092025, pedigree (4,4,3,2,4)
- fraction, process water, to air: 0.15 dimensionless; name fraction_PW_to_air; lognormal variance with pedigree 0.092025, pedigree (4,4,3,2,4)

## Reference product
- hydropower plant, reservoir, non-alpine regions: 1 unit; CPC 53262: Power plants; By-product classification allocatable product
  EcoSpold01Location=RER
  production volume 2.67763 unit
    This is a placeholder value that does not reflect real-world production volumes. This dataset does not currently require a real-world production volume to work in the database framework, and no actual data were collected yet. This has no negative effect on the results of the ecoinvent database.
  property price 5.36981e10 EUR2005
    Calculated based on literature. Data supplied by 2.0 Consultants. 2003 data from EU27 I/O database-79 Building, non-residential EU 27. Based on consumption of iron basic, iron, after first processing, fabricated metal products (except machinery) and machinery and equipment - 1131000000 kg.

## Inputs from technosphere
- steel, chromium steel 18/8, hot rolled: 1.92e8 kg; lognormal variance with pedigree 0.342, pedigree (1,1,5,5,1)
  own assumption, includes lifetime
  EcoSpold01Location=RER
  properties: wet mass 1 kg, dry mass 1 kg, carbon content, fossil 0.0008
  note on carbon content, fossil: Stainless steel model is the grade 304 steel (18/8 stainless, 18% chromium 8% nickel; max. 0.08% C)
- explosive, tovex: 4.87e7 kg; lognormal variance with pedigree 0.342, pedigree (1,1,5,5,1)
  own assumption, includes lifetime
  EcoSpold01Location=CH
  properties: water content 0.0869565, dry mass 0.92 kg, carbon content, fossil 0.0483756, wet mass 1 kg
  note on carbon content, fossil: Composition in Tab 4.1, ecoinvent v2.2 report n 7-part XVIII. 23% of wet mass consists of CH6N2O3
- reinforcing steel: 1.71e8 kg; lognormal variance with pedigree 0.342, pedigree (1,1,5,5,1)
  EcoSpold01Location=RER
  own assumption, includes lifetime
  properties: carbon content, fossil 0.004, wet mass 1 kg, dry mass 1 kg
- gravel, round: 7.8e10 kg; lognormal variance with pedigree 0.342, pedigree (1,1,5,5,1)
  own assumption, includes lifetime
  EcoSpold01Location=CH
  properties: dry mass 1 kg, wet mass 1 kg
- electricity, medium voltage: 0 kWh; pedigree (1,1,1,1,1)
  EcoSpold01Location=UCTE
  own assumption, includes lifetime
- cement, Portland: 0 kg; pedigree (1,1,1,1,1)
  EcoSpold01Location=CH
  own assumption, includes lifetime
  properties: wet mass 1 kg, dry mass 1 kg
- steel, low-alloyed, hot rolled: 7.68e8 kg; lognormal variance with pedigree 0.342, pedigree (1,1,5,5,1)
  own assumption, includes lifetime
  EcoSpold01Location=RER
  properties: carbon content, fossil 0.005, wet mass 1 kg, dry mass 1 kg
  note on carbon content, fossil: Low alloyed steel composition given in Tab. 3.2 ecoinvent v2.2 report 10_partII. Steel assumed to have a C content of 0.5%
- waste reinforced concrete: -9.21e10 kg; lognormal variance with pedigree 0.182, pedigree (1,1,5,5,1)
  EcoSpold01Location=CH
  own assumption, includes lifetime
  production volume 2.763e11 kg
    Calculated from the production volume of hydropower plant, reservoir, non-alpine regions in proportion to the respective output amounts.
  properties: water content 0.00585407, dry mass 0.99418 kg, wet mass 1 kg
- tap water: 0 kg; name tap_water_input; pedigree (1,1,1,1,1)
  Estimation. Data are adopted from the Swiss power plant sample as it stands. For reservoir power plants built in other European countries than Austria, Italy, France and Switzerland an uncertainty factor of 3 is assumed. This is due to the fact that major differences in hydrological and geological conditions, construction technology and landscape can occur.
  For 1 m3 of concrete 0.8 m3 of gravel, 0.127 m3 of water and 0.073 m3 of cement are mixed. This corresponds to 127 kg of water or 1.63 g water per kWh. The total water consumption for one hydro power plant unit is 4.95. 10^9 kg/unit.
  Estimation. Data are adopted from the Swiss power plant sample as it stands. For reservoir power plants built in other European countries than Austria, Italy, France and Switzerland an uncertainty factor of 3 is assumed. This is due to the fact that major differences in hydrological and geological conditions, construction technology and landscape can occur.
  For 1 m3 of concrete 0.8 m3 of gravel, 0.127 m3 of water and 0.073 m3 of cement are mixed. This corresponds to 127 kg of water or 1.63 g water per kWh. The total water consumption for one hydro power plant unit is 4.95. 10^9 kg/unit.
  EcoSpold01Location=RER
  Uncertainty: An uncertainty factor of 3 is assumed.
  properties: water content 2962.17, wet mass 1 kg, dry mass 0.000337476 kg, carbon content, fossil 0.00178991
  note on carbon content, fossil: Bicarbonate content is 2.93 mol/m3. CO2 content is 0.1 mol/m3 (ecoinvent v2.2 report 8, Tab 93.1).
- diesel, burned in building machine: 5.15e9 MJ; lognormal variance with pedigree 0.112, pedigree (1,1,5,5,1)
  own assumption, includes lifetime
  EcoSpold01Location=GLO
  properties: heating value, net 1 MJ
- electricity, medium voltage: 3.55466e7, 6.81631e6, 1.14432e8, 1.66431e9, 2.34585e8, 7.64313e8 kWh (6 entries); lognormal variance with pedigree 0.182, pedigree (1,1,5,5,1)
  EcoSpold01Location=UCTE
  own assumption, includes lifetime
- cement, Portland: 3.25722e7, 4.75706e7, 1.01013e9, 5.64512e7, 1.13016e9, 4.63065e7, 6.64681e9 kg (7 entries); lognormal variance with pedigree 0.342, pedigree (1,1,5,5,1)
  EcoSpold01Location=CH
  own assumption, includes lifetime
- tap water: 7.70518e7, 9.27497e6, 1.53284e7, 3.86522e8, 1.00553e7, 2.8602e7, 4.42317e9 kg (7 entries); lognormal variance with pedigree 0.342, pedigree (1,1,5,5,1)
  (same comment as for tap water)

## Emissions to nature
- Particulates, > 2.5 um, and < 10um [air, non-urban air or from high stacks]: 9.22e6 kg; lognormal variance with pedigree 0.342, pedigree (1,1,5,5,1)
  own assumption, includes lifetime
- Particulates, > 10 um [air, non-urban air or from high stacks]: 2.43e7 kg; lognormal variance with pedigree 0.402, pedigree (1,1,5,5,1)
  own assumption, includes lifetime
- Water [air, unspecified]: 742500 m3; name water_to_air_unspecified; lognormal variance with pedigree 0.0827, pedigree (2,2,5,5,1)
  Calculated value based on literature values and expert opinion. See comments in the parametres' comment field.
  property fraction, origin: fresh water 1; name fraction_origin_fresh_water
  property fraction, origin: unspecified 0; name fraction_origin_unspecified
  property fraction, origin: salt water 0; name fraction_origin_salt_water
- Particulates, < 2.5 um [air, non-urban air or from high stacks]: 2.1e6 kg; lognormal variance with pedigree 0.572, pedigree (1,1,5,5,1)
  own assumption, includes lifetime
- Water [water, unspecified]: 4.2075e6 m3; name water_to_water_unspecified; lognormal variance with pedigree 0.0827, pedigree (2,2,5,5,1)
  (same comment as for Water)
  property wet mass 1000 kg; name WM
  property fraction, origin: fresh water 1; name fraction_origin_fresh_water_Ww
  property fraction, origin: salt water 0; name fraction_origin_salt_water_Ww
  property fraction, origin: unspecified 0; name fraction_origin_unspecified_Ww
  property dry mass 0 kg; name DM
  property carbon content, fossil 0; name C_content_fossil
  property water in wet mass 1000 kg; name WWM
  property carbon content, non-fossil 0; name C_content_non_fossil

## Sampling procedure
literature

## Extrapolations
see Geography/Text This dataset has been copied from an original dataset covering the geography RER. The uncertainty has been adjusted accordingly.

## Review by Christian Bauer 2009-02-24
Passed.
