# fibre cement facing tile production, small format

Dataset: EcoSpold 2, unit process
Geography: RoW
Time period: 2007-01-01 to 2021-12-31
Technology level: current
Classification: EcoSpold01Categories: construction materials/coverings
Classification: ISIC rev.4 ecoinvent: 2395:Manufacture of articles of concrete, cement and plaster
Tags: ConvertedDataset
Scenario: Business-as-Usual
System model: Allocation, cut-off by classification
Generated by: Hans-Jörg Althaus
Published in: Hischier, R. 2009
Database: ecoinvent
isCopyrightProtected: true
accessRestrictedTo: 1

## General comment
Data are based on a in depth analysis of the production of Eternit Switzerland. Different products (base colours & coatings) are averaged.
[This dataset was already contained in the ecoinvent database version 2. It was not individually updated during the transfer to ecoinvent version 3. Life Cycle Impact Assessment results may still have changed, as they are affected by changes in the supply chain, i.e. in other datasets. This dataset was generated following the ecoinvent quality guidelines for version 2. It may have been subject to central changes described in the ecoinvent version 3 change report (http://www.ecoinvent.org/database/ecoinvent-version-3/reports-of-changes/), and the results of the central updates were reviewed extensively. The changes added e.g. consistent water flows and other information throughout the database. The documentation of this dataset can be found in the ecoinvent reports of version 2, which are still available via the ecoinvent website. The change report linked above covers all central changes that were made during the conversion process.]

## Included activities end
All processes relating to the product at the Eternit production plant in Niederurnen and in Payern are included. Also included are the material and energy input and the waste treatment services corresponding to these processes.

## Geography
Production in Switzerland for World wide market

## Technology
Raw tile production, drying, coating

## Parameters
- fraction, process water, to air: 0.15 dimensionless; name fraction_PW_to_air; lognormal variance with pedigree 0.092025, pedigree (4,4,3,2,4)
- fraction, tap water, to air: 0.15 dimensionless; name fraction_TW_to_air; lognormal variance with pedigree 0.092025, pedigree (4,4,3,2,4)

## Reference product
- fibre cement facing tile, small format: 1 kg; By-product classification allocatable product; CPC 37540: Tiles, flagstones, bricks and similar articles, of cement, concrete or artificial stone
  EcoSpold01Location=CH
  production volume 3.96633 kg
    This is a placeholder value that does not reflect real-world production volumes. This dataset does not currently require a real-world production volume to work in the database framework, and no actual data were collected yet. This has no negative effect on the results of the ecoinvent database.
  property price 0.704 EUR2005
    Estimation. 2005 import and export prices (total trades (USD) divided by total weight (kg) in CH from UN Commodity Trade Statistics Database. Commodity: Tiles & flagstones of cement, concrete, artificial stone
  property carbon content, non-fossil 0.0115
    Tab 5.1, ecoinvent v2.2 report 7, part IX. Fibres (pulp) 2.5%. Fibres (polyvinyl alcohol) 3.7%. C-content/dry mass of natural fibres was considered 46% (from "Evolutionary and Biochemical Aspects", A.D. Kay and T. Vrede (in Global Ecology, 2010, Elsevier B.V., S.E. Jørgensen Ed.)). C-content/dry mass of polyvinyl alcohol ((C2H4O)x) was considered =24/44.
  property carbon content, fossil 0.0201818
    (same comment as for fibre cement facing tile, small format)
  property heating value, net 0 MJ
    Non combustible products are assumed to have an LHV equal to zero (0).
  property carbon content 0.0316818
    carbon content on a dry matter basis (reserved; not for manual entry)
  properties: wet mass 1 kg, dry mass 1 kg, water content 0, water in wet mass 0 kg, carbon allocation 0.0316818 kg

## Inputs from technosphere
- hazardous waste, for incineration: 0 kg; pedigree (1,1,1,1,1)
  EcoSpold01Location=CH
  composite
  production volume 0 kg
    Calculated from the production volume of fibre cement facing tile, small format in proportion to the respective output amounts.
  properties: water content 0.333333, carbon content, fossil 0.554667, heating value, net 17 MJ, wet mass 1 kg, dry mass 0.75 kg
  note on carbon content, fossil: Tab A.6, ecoinvent v2.2 report 13_I. C content has been calculated after data in the tables, and then referred to 1 kg DM
  note on heating value, net: Value taken from the general comment of the treatment dataset.
- heat, central or small-scale, other than natural gas: 0 MJ; pedigree (1,1,1,1,1)
  composite
  EcoSpold01Location=CH
  properties: heating value, net 1 MJ
- heat, district or industrial, natural gas: 0 MJ; pedigree (1,1,1,1,1)
  composite
  EcoSpold01Location=RER
  properties: heating value, net 1 MJ
- cement, Portland: 0 kg; pedigree (1,1,1,1,1)
  EcoSpold01Location=CH
  composite
  properties: wet mass 1 kg, dry mass 1 kg
- iron sulfate: 0.001134 kg; lognormal variance with pedigree 0.042, pedigree (1,1,5,5,1)
  EcoSpold01Location=RER
  properties: wet mass 1 kg, dry mass 1 kg
- municipal solid waste: 0 kg; pedigree (1,1,1,1,1)
  EcoSpold01Location=CH
  composite
  production volume 0 kg
    (same comment as for hazardous waste, for incineration)
  properties: wet mass 1 kg, dry mass 0.771 kg, carbon content, fossil 0.171549, water content 0.297017, carbon content, non-fossil 0.261655, heating value, net 11.74 MJ
  note on carbon content, fossil: MSW composition in tab 4.1, ecoinvent v2.2 report 13_I. C content referred to 1 kg DM
- carbon dioxide, liquid: 0.002134 kg; lognormal variance with pedigree 0.042, pedigree (1,1,5,5,1)
  EcoSpold01Location=RER
  properties: wet mass 1 kg, carbon content, fossil 0.272727, dry mass 1 kg, heating value, net 8.27 MJ
- acrylic dispersion, without water, in 65% solution state: 0.012393 kg; lognormal variance with pedigree 0.042, pedigree (1,1,5,5,1)
  EcoSpold01Location=RER
  properties: dry mass 1 kg, carbon content, fossil 0.549932, wet mass 1 kg, heating value, net 16.66 MJ
  note on carbon content, fossil: Dispersants ensure that the individual particles in the emulsion paint do not combine to form agglomerates.The poly(acrylic acids) are suitable dispersing agents (Ullmann), and have therefore been used as representative example. Their formula is (C3H4O2)n. The formulation of this specific dispersion includes 50% acrylic binder
- iron (III) chloride, without water, in 40% solution state: 0.0007288 kg; lognormal variance with pedigree 0.042, pedigree (1,1,5,5,1)
  EcoSpold01Location=CH
  properties: wet mass 1 kg, dry mass 1 kg
- polyethylene, high density, granulate: 0.012292 kg; lognormal variance with pedigree 0.042, pedigree (1,1,5,5,1)
  composite
  EcoSpold01Location=RER
  properties: dry mass 1 kg, wet mass 1 kg, heating value, net 42.47 MJ, carbon content, fossil 0.857143
  note on carbon content, fossil: Polyethylene is formed out of a huge amount of ethylene monomers (C2H4) (ecoinvent v2.2 report 11_II). MW=28 g/mol
- electricity, medium voltage: 0 kWh; pedigree (1,1,1,1,1)
  EcoSpold01Location=CH
  composite
- wastewater, unpolluted: -0.00010664 m3; lognormal variance with pedigree 0.042, pedigree (1,1,5,5,1)
  EcoSpold01Location=CH
  production volume 0.00031992 m3
    (same comment as for hazardous waste, for incineration)
  properties: carbon content, fossil 0.00178991, carbon content, non-fossil 0.00178991, water content 2962.17, dry mass 0.337476 kg, wet mass 1000 kg
  note on carbon content, fossil: Assumed to be like in tap water. Bicarbonate content is 2.93 mol/m3. CO2 content is 0.1 mol/m3 (ecoinvent v2.2 report 8, Tab 93.1).
- stone wool factory: 2.22e-10 unit; lognormal variance with pedigree 0.042, pedigree (1,1,5,5,1)
  EcoSpold01Location=CH
- paraffin: 0.00087924 kg; lognormal variance with pedigree 0.042, pedigree (1,1,5,5,1)
  EcoSpold01Location=RER
  properties: carbon content, fossil 0.847059, dry mass 1 kg, wet mass 1 kg, heating value, net 41.5 MJ
  note on carbon content, fossil: An average composition of C12H26 (molecular weight of 170 g/mol) was assumed for n-parafins, after ecoinvent v2.2 report 8, part II, pg 398
  note on heating value, net: Indicative value. Reference: Fuels - Higher and Lower Calorific Values, available at: https://www.engineeringtoolbox.com/fuels-higher-calorific-values-d_169.html
- lubricating oil: 0.000835 kg; lognormal variance with pedigree 0.042, pedigree (1,1,5,5,1)
  EcoSpold01Location=RER
  properties: heating value, net 40.2 MJ, wet mass 1 kg, carbon content, fossil 0.75, dry mass 1 kg
  note on heating value, net: Literature value, Source: IPCC 2006, 2006 IPCC Guidelines for National Greenhouse Gas Inventories, Prepared by the National Greenhouse Gas Inventories Programme, Eggleston H.S., Buendia L., Miwa K., Ngara T. and Tanabe K. (eds). Published: IGES, Japan
  note on carbon content, fossil: Lubricating oil is produced from diesel. C-content/dry mass of fats and oils considered 75%, from: ecoinvent v2.2 report, n 15a, pg 40
- inert waste, for final disposal: -0.1465 kg; lognormal variance with pedigree 0.042, pedigree (1,1,5,5,1)
  composite
  EcoSpold01Location=CH
  production volume 0.4395 kg
    (same comment as for hazardous waste, for incineration)
  properties: water content 0.00502513, wet mass 1 kg, dry mass 0.995 kg
- transport, freight, light commercial vehicle: 0 metric ton*km; pedigree (1,1,1,1,1)
  composite. This flow has been changed during revision. It replaces the old flow "energy and combustion emissions, light commercial vehicle"
- tap water: 0 kg; name tap_water_input; source Kull, T. 2008; pedigree (1,1,1,1,1)
  EcoSpold01Location=CH
  Literature value.
  properties: wet mass 1 kg, dry mass 0.000337476 kg, water content 2962.17, carbon content, fossil 0.00178991
  note on carbon content, fossil: Bicarbonate content is 2.93 mol/m3. CO2 content is 0.1 mol/m3 (ecoinvent v2.2 report 8, Tab 93.1).
- sulfate pulp, unbleached: 0.034057 kg; lognormal variance with pedigree 0.042, pedigree (1,1,5,5,1)
  composite
  properties: carbon content, non-fossil 0.494, price 0.355 EUR2005, water content 0.111111, wet mass 1 kg, dry mass 0.9 kg, heating value, net 13.23 MJ
  note on carbon content, non-fossil: C content of dry mass of sulfate pulp is 0.494 kgC/kg dry wood (ecoinvent v2.2 report 6_IX & ecoinvent v2.2 report 9). No other C containing products in the formulation of the pulp.
- vinyl acetate: 0.017973 kg; lognormal variance with pedigree 0.042, pedigree (1,1,5,5,1)
  EcoSpold01Location=RER
  composite
  properties: wet mass 1 kg, dry mass 1 kg, carbon content, fossil 0.55814, heating value, net 25.35 MJ
  note on carbon content, fossil: Vinyl acetate (CH3CO2CH=CH2) (ecoinvent v2.2 report 11_II), C4H6O2. MW=86 g/mol
- sodium hydroxide, without water, in 50% solution state: 0.000546 kg; lognormal variance with pedigree 0.042, pedigree (1,1,5,5,1)
  EcoSpold01Location=RER
  properties: dry mass 1 kg, wet mass 1 kg, heating value, net 3.03 MJ
- waste wood, untreated: 0 kg; pedigree (1,1,1,1,1)
  composite
  EcoSpold01Location=CH
  production volume 0 kg
    (same comment as for hazardous waste, for incineration)
  properties: water content 0.25, wet mass 1 kg, dry mass 0.8 kg, heating value, net 13.99 MJ, carbon content, non-fossil 0.48632
  note on carbon content, non-fossil: Tab A.4, ecoinvent v2.2 report 13_I. C content has been referred to 1 kg DM,
- lime: 0.023648 kg; lognormal variance with pedigree 0.042, pedigree (1,1,5,5,1)
  composite
  EcoSpold01Location=CH
  properties: wet mass 1 kg, carbon content, fossil 0.120005, dry mass 1 kg
- hazardous waste, for incineration: -0.000412411, -0.000857589 kg (2 entries); lognormal variance with pedigree 0.042, pedigree (1,1,5,5,1)
  EcoSpold01Location=CH
  composite
  production volume 0.00381 kg
- heat, central or small-scale, other than natural gas: 0.000363724, 0.0264827 MJ (2 entries); lognormal variance with pedigree 0.042, pedigree (1,1,5,5,1)
  composite
  EcoSpold01Location=CH
- heat, district or industrial, natural gas: 0.00859871, 0.206042, 0.557919 MJ (3 entries); lognormal variance with pedigree 0.042, pedigree (1,1,5,5,1)
  composite
  EcoSpold01Location=RER
- cement, Portland: 0.00311939, 0.00455577, 0.0934668, 0.0967383, 0.00540625, 0.108234, 0.0044347, 0.636555 kg (8 entries); lognormal variance with pedigree 0.042, pedigree (1,1,5,5,1)
  EcoSpold01Location=CH
  composite
- municipal solid waste: -2.19573e-5, -5.53269e-6, -7.90654e-6, -0.00126553, -0.0155291 kg (5 entries); lognormal variance with pedigree 0.042, pedigree (1,1,5,5,1)
  EcoSpold01Location=CH
  composite
  production volume 0.05049 kg
- electricity, medium voltage: 0.00291161, 0.000558322, 0.01282, 0.0424446, 0.00937307, 0.136323, 0.0192148, 0.0626047 kWh (8 entries); lognormal variance with pedigree 0.042, pedigree (1,1,5,5,1)
  EcoSpold01Location=CH
  composite
- transport, freight, light commercial vehicle: 0.000388239, 0.000187641, 0.00322012 metric ton*km (3 entries); lognormal variance with pedigree 0.04, pedigree (1,1,5,1,1)
  (same comment as for transport, freight, light commercial vehicle)
- tap water: 0.00437213, 0.000526287, 0.000869775, 0.187024, 0.0219323, 0.000570563, 0.00162296, 0.250982 kg (8 entries); source Kull, T. 2008; lognormal variance with pedigree 0.042, pedigree (1,1,5,5,1)
  EcoSpold01Location=CH
  Literature value.
- waste wood, untreated: -3.04101e-6, -3.77587e-7, -2.76058e-8, -1.06053e-6, -1.6022e-7, -2.53295e-7, -4.73488e-6, -4.03449e-5 kg (8 entries); lognormal variance with pedigree 0.042, pedigree (1,1,5,5,1)
  composite
  EcoSpold01Location=CH
  production volume 0.00015 kg

## Inputs from nature
- Water, well, in ground [natural resource, in water]: 0.005211 m3; name water_well_in_ground_input; source Kull, T. 2008; lognormal variance with pedigree 0.042, pedigree (1,1,5,5,1)
  Literature value.

## Emissions to nature
- COD, Chemical Oxygen Demand [water, surface water]: 0.00037668 kg; lognormal variance with pedigree 0.042, pedigree (1,1,5,5,1)
- Chromium VI [water, surface water]: 7.3e-8 kg; lognormal variance with pedigree 0.042, pedigree (1,1,5,5,1)
- Water [water, unspecified]: 0.00482707 m3; name water_to_water_unspecified; lognormal variance with pedigree 0.0827, pedigree (2,2,5,5,1)
  Calculated value based on literature values and expert opinion. See comments in the parametres' comment field.
  property fraction, origin: fresh water 1; name fraction_origin_fresh_water_Ww
  property water in wet mass 1000 kg; name WWM
  property carbon content, non-fossil 0; name C_content_non_fossil
  property wet mass 1000 kg; name WM
  property dry mass 0 kg; name DM
  property carbon content, fossil 0; name C_content_fossil
  property fraction, origin: unspecified 0; name fraction_origin_unspecified_Ww
  property fraction, origin: salt water 0; name fraction_origin_salt_water_Ww
- TOC, Total Organic Carbon [water, surface water]: 0.000139511 kg; lognormal variance with pedigree 0.042, pedigree (1,1,5,5,1)
  Calculated by default as TOC (gC) = COD/2.7 (COD measured in g O2). Should more correctly be calculated from the carbon content of the specified emissions to water.
- BOD5, Biological Oxygen Demand [water, surface water]: 0.00075336 kg; lognormal variance with pedigree 0.042, pedigree (1,1,5,5,1)
  Calculated as 0.5*COD.
- DOC, Dissolved Organic Carbon [water, surface water]: 0.000139511 kg; lognormal variance with pedigree 0.042, pedigree (1,1,5,5,1)
  Calculated as equal to TOC.
- NMVOC, non-methane volatile organic compounds, unspecified origin [air, unspecified]: 0.00066759 kg; lognormal variance with pedigree 0.042, pedigree (1,1,5,5,1)
- Water [air, unspecified]: 0.000851835 m3; name water_to_air_unspecified; lognormal variance with pedigree 0.0827, pedigree (2,2,5,5,1)
  (same comment as for Water)
  property fraction, origin: fresh water 1; name fraction_origin_fresh_water
  property fraction, origin: unspecified 0; name fraction_origin_unspecified
  property fraction, origin: salt water 0; name fraction_origin_salt_water

## Sampling procedure
Measurement in plant (1 year)

## Extrapolations
none This dataset has been copied from an original dataset covering the geography CH. The uncertainty has been adjusted accordingly.

## Review by Roland Hischier 2009-02-06
to be validated
self-validated by hja for test calcualtion
