# electronic component production, passive, mobile, earpiece and speaker

Dataset: EcoSpold 2, unit process
Geography: GLO
Time period: 2014-01-01 to 2021-12-31
Technology level: current
Classification: ISIC rev.4 ecoinvent: 2610:Manufacture of electronic components and boards
Scenario: Business-as-Usual
System model: Allocation, cut-off by classification
Generated by: Johannes Müller
Database: ecoinvent
isCopyrightProtected: true
accessRestrictedTo: 1

## General comment
This activity represents the production of 1kg of an earpiece and speaker used in a smartphone (Fairphone 1). The unit of kg was chosen for the dataset to be scalable. The materials used were identified by composition analysis and inserted as raw materials. According to the source the unidentified materials were added as "electronic components, passive, unspecified" and the production effort was approximated by "inductor, auxilliaries and energy use".
Source: Güvendik, M. (2014). From smartphone to futurephone: assessing the environmental impacts of different circular economy scenarios of a smartphone using LCA.

## Included activities start
From reception of materials and auxiliares at the factory gate.

## Included activities end
The activity includes the materials, processes and energy (included through processing datasets) use for the production of a set of earpiece and speaker used in mobile phones. Data on factory and packaging are not included.

## Geography
Geography GLO was chosen because the dataset aims to represent the production of an average electronic device.

## Technology
Literature source points to manufacturing in China. Production efforts and energy use are included with "inductor, auxilliaries and energy use".

## Time period
Data for composition are from 2014 but represent current technology.

## Parameters
- Weight of tablet speakers: 0.00407535 kg; name weight_speaker_tablet
  Weighted Average. Calculated from different sources.
  Sources:
  - Hischier, R., Achachlouei, M. A. and Hilty, L. M. (2014) ‘Evaluating the sustainability of electronic media: Strategies for life cycle inventory data collection and their implications for LCA results’, Environmental Modelling and Software, 56(Lci), pp. 27–36. doi: 10.1016/j.envsoft.2014.01.001.
  - Hischier, R. et al. (2015) ‘Grey Energy and Environmental Impacts of ICT Hardware’, in ICT Innovations for Sustainability. Springer, pp. 171–189. doi: 10.1007/978-3-319-09228-7.
  - Apple Inc. (2014) 9.7-inch iPad Pro Environmental Report. Available at: http://www.apple.com/environment/reports/.
  - Apple Inc. (2019) iPad Environmental report.
  - Apple Inc. (2017) iPad Environmental Report.
  - Apple Inc. (2017) 10.5-inch iPad Pro Environmental Report.
  - Apple Inc. (2017) 12.9-inch iPad Pro Environmental Report.
- Weight of smartphone speakers: 0.00184217 kg; name weight_speaker_smartphone
  Literature Value. Source: Güvendik, M. (2014). From smartphone to futurephone: assessing the environmental impacts of different circular economy scenarios of a smartphone using LCA.

## Reference product
- electronic component, passive, mobile, earpiece and speaker: 1 kg; CPC 47401: Parts for the goods of subclasses 47221 to 47223; By-product classification allocatable product
  production volume 3.19577e6 kg; name PV_RP; = 1416000000*weight_speaker_smartphone+144100000*weight_speaker_tablet
    Sum of sold Smartphones and Tablet in 2019 adjusted by respective weight of the components.
    Smartphones (1.416e9): Units sold from 4Q18: 383E6, 1Q19: 311E6, 2Q19:346.3E6, 3Q19:375.2E6. Source: Trendforce Corp, (2019, January 29). Global Smartphone Market Cooling in 2019 with a YoY Decline of 10% in Production Volume, Says TrendForce [Press Release]. Retrieved from https://press.trendforce.com/press/20190129-3208.html, Trendforce Corp, (2019, May 16). Apple Fell to Number Three in 1Q19, While a Worsening US-China Trade Dispute May Add Insult to Injury, Says TrendForce [Press Release]. Retrieved from https://press.trendforce.com/press/20190516-3245.html, Trendforce Corp, (2019, November 28). Global Smartphone Production Volume Grows 9.2% in 3Q19, with Minor Projected Decline in 4Q19, Says TrendForce [Press Release]. Retrieved from https://press.trendforce.com/press/20191128-3313.html
    Tablets (144.1e6): IDC Worldwide Quarterly PCD Tracker (2020, January 30). Worldwide Tablet Shipments Continue to Decline in Q4 2019, According to IDC [Press Release]. Retrieved from https://www.idc.com/getdoc.jsp?containerId=prUS45959420
  property price 656.834 EUR2005; = 1.21*(1/0.00184217)
    Calculated based on inputs: The price of the product has been calculated as a sum of the values of the material and energy inputs for this product. This value is therefore a rough estimation. It may underestimate the real price since there are additional expenses when producing any product. These expences can include for example labour costs, treatment of waste materials and profit for the producer. Please consider carefully whether this level of data quality is acceptable for your application.
  property carbon content 0.189507
    carbon content on a dry matter basis (reserved; not for manual entry)
  properties: water in wet mass 0 kg, wet mass 1 kg, carbon content, fossil 0.186965, water content 0, carbon content, non-fossil 0.00254276, dry mass 1 kg, carbon allocation 0.189507 kg

## Inputs from technosphere
- nickel, class 1: 0.00607979 kg; name ni; lognormal variance with pedigree 0.0138, pedigree (2,4,4,5,2)
  Literature Value. From composition analysis. Scaled to result in a dataset with weight of 1kg.
  properties: dry mass 1 kg, wet mass 1 kg
- neodymium oxide: 0.00917396 kg; name neo; lognormal variance with pedigree 0.0138, pedigree (2,4,4,5,2)
  (same comment as for nickel, class 1)
  properties: wet mass 1 kg, dry mass 1 kg
- praseodymium oxide: 0.0016828 kg; name prase; lognormal variance with pedigree 0.0138, pedigree (2,4,4,5,2)
  (same comment as for nickel, class 1)
  properties: dry mass 1 kg, wet mass 1 kg
- pig iron: 0 kg; name fe; pedigree (1,1,1,1,1)
  (same comment as for nickel, class 1)
  properties: dry mass 1 kg, carbon content, fossil 0.045, wet mass 1 kg
- chromium: 0.0270876 kg; name ch; lognormal variance with pedigree 0.0138, pedigree (2,4,4,5,2)
  (same comment as for nickel, class 1)
  properties: wet mass 1 kg, dry mass 1 kg
- samarium-europium-gadolinium oxide: 0.000960823 kg; name sam; lognormal variance with pedigree 0.0138, pedigree (2,4,4,5,2)
  (same comment as for nickel, class 1)
  properties: dry mass 1 kg, wet mass 1 kg
- inductor, auxilliaries and energy use: 0.441962 kg; = cu+zi+ni+ch+fe+co+neo+prase+sam; lognormal variance with pedigree 0.0138, pedigree (2,4,4,5,2)
  Literature Value. Proxy for production efforts. Amount is sum of identified materials.
- cobalt: 0.00141138 kg; name co; lognormal variance with pedigree 0.0138, pedigree (2,4,4,5,2)
  (same comment as for nickel, class 1)
  properties: dry mass 1 kg, wet mass 1 kg
- zinc: 0.134624 kg; name zi; lognormal variance with pedigree 0.0138, pedigree (2,4,4,5,2)
  (same comment as for nickel, class 1)
  properties: dry mass 1 kg, wet mass 1 kg
- copper, cathode: 0.0410928 kg; name cu; lognormal variance with pedigree 0.0138, pedigree (2,4,4,5,2)
  (same comment as for nickel, class 1)
  properties: wet mass 1 kg, dry mass 1 kg
- electronic component, passive, unspecified: 0.558038 kg; lognormal variance with pedigree 0.0138, pedigree (2,4,4,5,2)
  Literature Value. Represents unidentified Materials. Scaled to result in a dataset with weight of 1kg.
  properties: dry mass 1 kg, carbon content, non-fossil 0.0045566, carbon content, fossil 0.317311, wet mass 1 kg
- pig iron: 0.0186368, 0.201213 kg (2 entries); lognormal variance with pedigree 0.0138, pedigree (2,4,4,5,2)
  (same comment as for nickel, class 1)

## Sampling procedure
The materials were determined by composition analysis (Güvendik, 2014). Unidentified materials were added as "electronic components, passive, unspecified". The production effort was approximated by "inductor, auxilliaries and energy use".

## Extrapolations
This dataset has been extrapolated from year 2020 to the year of the calculation (2021). The uncertainty has been adjusted accordingly.
