# electrolysis of lithium chloride

Dataset: EcoSpold 2, unit process
Geography: GLO
Time period: 2000-01-01 to 2021-12-31
Technology level: current
Classification: ISIC rev.4 ecoinvent: 2011:Manufacture of basic chemicals
Classification: EcoSpold01Categories: metals/extraction
Tags: ConvertedDataset
Scenario: Business-as-Usual
System model: Allocation, cut-off by classification
Share of production covered: 100 %
Generated by: Jürgen Sutter
Published in: Sutter, J. 2007
Database: ecoinvent
isCopyrightProtected: true
accessRestrictedTo: 1

## General comment
This dataset represents the direct electrolysis of lithium chloride. The functional unit is 1 kg lithium chloride. Within the electrolysis of lithium chloride, lithium and chlorine are derived as co-products. The system includes the process with consumption of raw materials, energy, infrastructure, and land use, as well as the generation of emissions to water. It also includes transportation of the raw materials. Transient or unstable operations like starting-up or shutting-down, are not included, but the production during stable operation conditions. Storage and transportation of the final product are also not included. It is assumed that the manufacturing plants are located in an urban/industrial area and consequently the emissions are categorised as emanating in a high population density area. The emissions into water are assumed to be emitted into rivers. Emissions to air are not included.
[This dataset was already contained in the ecoinvent database version 2. It was not individually updated during the transfer to ecoinvent version 3. Life Cycle Impact Assessment results may still have changed, as they are affected by changes in the supply chain, i.e. in other datasets. This dataset was generated following the ecoinvent quality guidelines for version 2. It may have been subject to central changes described in the ecoinvent version 3 change report (http://www.ecoinvent.org/database/ecoinvent-version-3/reports-of-changes/), and the results of the central updates were reviewed extensively. The changes added e.g. consistent water flows and other information throughout the database. The documentation of this dataset can be found in the ecoinvent reports of version 2, which are still available via the ecoinvent website. The change report linked above covers all central changes that were made during the conversion process.]

## Included activities start
From the reception of lithium chloride at the factory gate.

## Included activities end
Lithium chloride electrolysis including materials, energy uses, infrastructure and emissions.

## Geography
The inventory is modelled for the world..

## Technology
Lithium chloride electrolysis is the only process to produce lithium metal. Lithium metal is produced by the electrolysis of molten lithium chloride, whose melting point of 614 °C is lowered by addition of potassium chloride. The lithium chloride – potassium chloride eutectic, with 44.3 % lithium chloride, melts at 352 °C. The salt mixtures used in industry contain 45 – 55 % lithium chloride, which allows electrolysis to be carried out at 400 – 460 °C.
2 LiCL → 2 Li + Cl2
The electrolytic cells most commonly employed resemble the Downs cell used for the produc-tion of sodium, although the American lithium electrolytic cell and other special cells may be used.
Wietelmann, U., Bauer, R.: Lithium and Lithium Compounds. Published online: 2000. In: Ullmann's Encyclopedia of Industrial Chemistry, Seventh Edition, 2004 Electronic Release (ed. Fiedler E., Grossmann G., Kersebohm D., Weiss G. and Witte C.). 7 th Electronic Release Edition. Wiley InterScience, New York, Online-Version under: http://www.mrw.interscience.wiley.com/emrw/9783527306732/home

## Time period
Time of publications.

## Parameters
- fraction, cooling water, once-through system, to air: 0.004 dimensionless; name fraction_CW_OT_to_air; lognormal variance with pedigree 0.0413, pedigree (2,3,1,3,1)
  Calculated based on literature value (Scown, C.D., 2011, Water Footprint of U.S. Transportation Fuels and supplying information of the article) (Vionnet, S., Quantis Water Database - Technical Report, 2012).
- fraction, cooling water, recirculating system, to air: 0.771 dimensionless; name fraction_CW_R_to_air; lognormal variance with pedigree 0.0413, pedigree (2,3,1,3,1)
  (same comment as for fraction, cooling water, once-through system, to air)
- fraction, cooling water, to air: 0.3875 dimensionless; name fraction_CW_to_air; = (0.5*fraction_CW_OT_to_air)+(0.5*fraction_CW_R_to_air); lognormal variance with pedigree 0.092025, pedigree (4,4,3,2,4)
  Calculated value based on literature value (see comments of the other parametres present in this dataset) and expert opinion. In the case when no industry/literature data are available about the type of cooling or directly fraction, cooling water, to air specific for the process a default assumption is applied. It is assumed that the once-through cooling system is used in 50% of all cases and recirculating system is used in another 50% of all cases.
- fraction, cooling water, cooling pond system, to air: 0.032 dimensionless; name fraction_CW_CP_to_air; lognormal variance with pedigree 0.0413, pedigree (2,3,1,3,1)
  (same comment as for fraction, cooling water, once-through system, to air)

## Reference product
- lithium: 0 kg; CPC 34231: Chemical elements n.e.c.; inorganic acids except phosphoric, nitric and sulphonitric; inorganic oxygen compoun[…]; By-product classification allocatable product; CAS 7439-93-2
  Lithium, a silvery white metal, is the lightest element that is solid at normal temperature. Its natural isotopes, Ar 6.015, and 7Li, Ar 7.016 are not radioactive. The artificial isotopes 8Li, 9Li, and 11Li have half-lifes of 842, 178, and 8.7 ms, respectively. The electronic configuration of the free atom is 1 s2 2 s1. The atomic radius is 0.155 nm (in the metal), and the ionic radius is 0.086 nm. Lithium is a member of group 1 of the periodic table and thus has a valence of + 1. In many respects (e.g., the strong alkalinity of lithium hydroxide solutions and the reactivity of the metal) it has the character of an alkali metal, but it also exemplifies the diagonal relationship in the periodic table in its resemblance to magnesium: the metal forms only the oxide on combustion (not the peroxide), and with nitrogen it forms the nitride directly.
  The largest application of lithium metal is the production of organolithium compounds, principally butyllithium, and lithium hydride.
  Lithium is used as a reducing agent in organic chemistry, as a solution in liquid ammonia for Birch reductions, and in the synthesis of vitamins.
  A rapidly growing application of lithium metal is in sacrificial anodes in batteries. Lithium has a high electrochemical equivalent (3.86 A·h/g) and a low electrochemical potential (- 3.045 V). The main advantages of lithium batteries are high power output, extremely good storage properties (low rate of self-discharge), and relatively small power loss at low temperature. Commercially produced primary cells have counterelectrodes made of manganese dioxide, chromium oxide (CrOx), or graphite loaded with sulfur dioxide or thionyl chloride, and electrolytes consisting of lithium salts dissolved in organic solvents such as propylene carbonate or dimethoxyethane. They have cell voltages up to 3 V and energy densities up to 300 W h/kg. Secondary lithium cells, some based on aluminum - lithium alloys, are being investigated extensively.
  Lithium metal is becoming increasingly important as an alloying component; it is also used as a deoxidizing and desulfurizing agent, especially for copper, nickel, and alloy steels.
  Lithium and its compounds play a number of important roles in the nuclear industry, e.g., in the production of tritium, as a heat-exchange cooling medium, as a shielding material, and in the form of a molten salt mixture, as a solvent for other nuclear fuels.
  These applications depend on the extremely large difference in neutron capture cross section and absorption distance between the two stable lithium isotopes.
  EcoSpold01Location=GLO
  production volume 1e6 kg
    Na
    Estimated share of Li that is produced as metal
  property price 48.4283 EUR2005
    Calculated based on inputs: The price of the product has been calculated as the difference between the price of chlorine and the sum of the prices for material and energy inputs for this process. (Lithium chloride at a price of 6.92EUR/kg, medium voltage electricity at 0.1EUR per kWh). This value is therefore a rough estimation. It may underestimate the real price since there are additional expenses when producing any product. These expences can include for example labour costs, treatment of waste materials and profit for the producer as well as price fluctuations of a global trade market. Please consider carefully whether this level of data quality is acceptable for your application.
  property carbon content 0
    carbon content on a dry matter basis (reserved; not for manual entry)
  property true value 7.26425
    allocation property applied in "true value" allocation // value calculated from revenue
  properties: water content 0, wet mass 1 kg, dry mass 1 kg, carbon content, non-fossil 0, carbon content, fossil 0, water in wet mass 0 kg, carbon allocation 0 kg
- chlorine, gaseous: 1 kg; CPC 34231: Chemical elements n.e.c.; inorganic acids except phosphoric, nitric and sulphonitric; inorganic oxygen compoun[…]; By-product classification allocatable product; CAS 7782-50-5
  EcoSpold01Location=GLO
  production volume 5e6 kg
    Na
    Calculated from proportional output of main product (lithium)
  property price 0.141 EUR2005
    Global average price for gaseous chlorine derived from the global average price of liquid chlorine by substracting the cost of inputs (0.07 KWh of electricity, medium voltage) needed for the liquefaction (0.007EUR/kg of liquid chlorine at an electricity price of 0.1EUR/kWh). The price for liquid chlorine (0.148 EUR/kg) was calculated as weighted average of the European (238Eur/tonne), US (223EUR/tonne) and the Chinese (84EUR/tonne) (Tecnon OrbiCHem, 2016) price according to the region's market shares (Europe 15%, US 20%, China 45%) scaled to 100% (ruschlor.ru, 2014).
    Reference(s):
    Tecnon OrbiCHem. 2016. Chem-Netfacts, Chemical insight an foresight - on a single page, Chlorine, 1 April 2016, document requested at http://www.orbichem.com/Chem-Netfacts.aspx?P_ID=208, 6 October 2017;
    ruschlor.ru. 2014. International Outlook for the Future of the Chinese Chlor-Alkali Industry retrieved from http://ruschlor.ru/english/images/stories/Pekin%20/Otchet_Engl/_.doc, 6 October 2017
  property carbon content 0
    carbon content on a dry matter basis (reserved; not for manual entry)
  property true value 0.10575
    allocation property applied in "true value" allocation // value calculated from revenue
  properties: water content 0, wet mass 1 kg, carbon content, fossil 0, water in wet mass 0 kg, dry mass 1 kg, carbon content, non-fossil 0, carbon allocation 0 kg

## Inputs from technosphere
- lithium chloride: 0.0191316 kg; source Wietelmann, U. 2004; lognormal variance with pedigree 0.076, pedigree (4,5,5,1,1)
  EcoSpold01Location=GLO
  Stoechiometric calculation. The values for the consumption of the raw materials are calculated with an yield of 90%.
  Uncertainty: Stoechiometric calculation
  properties: dry mass 1 kg, wet mass 1 kg
- electricity, medium voltage: 0.0860923 kWh; = 0.15*30; lognormal variance with pedigree 0.04, pedigree (1,1,5,1,1)
  EcoSpold01Location=UCTE
  Literature value. Ullmanns 2005. According to its source the electricity input for this type of process and technology ranges from 28 to 32 kWh per kg of lithium produced. 30 is the average of 28 and 32 kWh. Given the fact that the process yields 0.15 kg of lithium the electricity input was scaled accordingly (30 kWh per kg lithium times 0.15 kg of lithium yields 4.5 kWh).
  Uncertainty: Ullmanns 2005
- chemical factory, organics: 6.88738e-12 unit; lognormal variance with pedigree 0.448, pedigree (4,5,5,5,5)
  Estimation. The infrastructure is estimated based on the module "chemical plant, organics". This module assumes a built area of about 4.2 ha, an average output of 50'000 t/a, and plant life of fifty years
  EcoSpold01Location=RER
  Uncertainty: Estimation

## Inputs from nature
- Water, cooling, unspecified natural origin [natural resource, in water]: 0.000413243 m3; name water_cooling_UNO_input; source Gendorf 2000; lognormal variance with pedigree 0.198, pedigree (4,5,5,5,5)
  Estimation. This value was approximated with data from an large chemical plant site in Germany producing 2.05 Mt a-1 (intermediates included) of different chemicals. This value was used in this inventory as approximation for the cooling water consumption of the lithium chloride electrolysis.
  Uncertainty: Estimation

## Emissions to nature
- Water [water, unspecified]: 0.000253111 m3; name water_to_water_unspecified; = water_cooling_UNO_input*(1-fraction_CW_to_air); lognormal variance with pedigree 0.0807, pedigree (2,2,5,1,1)
  Calculated value based on literature values and expert opinion. See comments in the parametres' comment field.
  property water in wet mass 1000 kg; name WWM
  property carbon content, fossil 0; name C_content_fossil
  property fraction, origin: salt water 0; name fraction_origin_salt_water_Ww
  property wet mass 1000 kg; name WM
  property fraction, origin: fresh water 0; name fraction_origin_fresh_water_Ww
  property carbon content, non-fossil 0; name C_content_non_fossil
  property fraction, origin: unspecified 1; name fraction_origin_unspecified_Ww
  property dry mass 0 kg; name DM
- Chloride [water, surface water]: 0.00159429 kg; lognormal variance with pedigree 0.448, pedigree (4,5,5,5,5)
  Estimation. The remaining amount of unreacted lithium chloride (10 % of the input) is assumed to leave the production process with the waste water.
  Uncertainty: Estimation
- Lithium, ion [water, surface water]: 0.000318867 kg; lognormal variance with pedigree 0.828, pedigree (4,5,5,5,5)
  (same comment as for Chloride)
- Water [air, unspecified]: 0.000160132 m3; name water_to_air_unspecified; = (water_cooling_UNO_input*fraction_CW_to_air); lognormal variance with pedigree 0.0807, pedigree (2,2,5,1,1)
  (same comment as for Water)
  property fraction, origin: unspecified 1; name fraction_origin_unspecified
  property fraction, origin: salt water 0; name fraction_origin_salt_water
  property fraction, origin: fresh water 0; name fraction_origin_fresh_water

## Sampling procedure
Literature data

## Extrapolations
Emissions are estimated. Infrastructure and transports are calculated with standard values.

## Review by Roland Hischier 2011-09-23
Transfer of documentation done.

## Review by Emilia Moreno Ruiz 2017-08-03
electricity input corrected

## Review by Roland Hischier 2009-01-28
passed.
none
