# maintenance, passenger car, electric, without battery

Dataset: EcoSpold 2, unit process
Geography: GLO
Time period: 2000-01-01 to 2021-12-31
Technology level: current
Classification: ISIC rev.4 ecoinvent: 4520:Maintenance and repair of motor vehicles
Classification: EcoSpold01Categories: transport systems/road
Scenario: Business-as-Usual
System model: Allocation, cut-off by classification
Generated by: Andrea Del Duce
Published in: Spielmann M. 2007
Database: ecoinvent
isCopyrightProtected: true
accessRestrictedTo: 1

## General comment
The maintenance of the battery electric vehicle is derived from the maintenance of a conventional passenger car. The battery replacement is not included. The dataset has been taken directly from ecoinvent version 2.2 removing the battery and adding the by-products of copper, iron and plastic.
[This dataset was already contained in the ecoinvent database version 2. It was not individually updated during the transfer to ecoinvent version 3. Life Cycle Impact Assessment results may still have changed, as they are affected by changes in the supply chain, i.e. in other datasets. This dataset was generated following the ecoinvent quality guidelines for version 2. It may have been subject to central changes described in the ecoinvent version 3 change report (http://www.ecoinvent.org/database/ecoinvent-version-3/reports-of-changes/), and the results of the central updates were reviewed extensively. The changes added e.g. consistent water flows and other information throughout the database. The documentation of this dataset can be found in the ecoinvent reports of version 2, which are still available via the ecoinvent website. The change report linked above covers all central changes that were made during the conversion process.]

## Included activities start
The inventory takes as input the varius materials needed for the maintenance, with the exception of the battery.

## Included activities end
The dataset returns the service of maintenance as well as the by-products (wastes) which derive from it.

## Geography
Data represent Swiss conditions, but are also valid for other European countries

## Technology
Middle class passsenger car.

## Reference product
- maintenance, passenger car, electric, without battery: 1 unit; name RP_amount_1; By-product classification allocatable product; CPC 87141: Maintenance and repair services of motor vehicles
  production volume 45000 unit; name RP_PV_1
    Very rough estimate of 45000 pure battery electric passenger cars produced in 2012 based on the projection for the USA shown in http://www1.eere.energy.gov/vehiclesandfuels/pdfs/1_million_electric_vehicles_rpt.pdf. This value has been taken as annual production volume.
  property price 280.734 EUR2005
    Calculated based on inputs: The price of the product has been calculated as a sum of the values of the material and energy inputs for this product. This value is therefore a rough estimation. It may underestimate the real price since there are additional expenses when producing any product. These expences can include for example labour costs, treatment of waste materials and profit for the producer. Please consider carefully whether this level of data quality is acceptable for your application.

## By-products
- iron scrap, unsorted: 0 kg; CPC 39310: Slag, dross, scalings and other waste from the manufacture of iron or steel; By-product classification Recyclable; pedigree (1,1,1,1,1)
  Disposal of maintenance materials.The values of the pedigree matrix have been taken from the respective voice of the maintenance dataset but have been slightly modified.
  production volume 0 kg; = RP_PV_1 * (BP_amount_1 / RP_amount_1)
    Calculated from production volume of reference product using the relative outputs.
  property price 0.149 EUR2005
    Temporary price data. Calculated as 90% of purchasers price based on: estimated at 85% of sorted scrap
  property carbon content 0
    carbon content on a dry matter basis (reserved; not for manual entry)
  properties: carbon content, fossil 0, water in wet mass 0 kg, carbon content, non-fossil 0, water content 0, wet mass 1 kg, dry mass 1 kg, carbon allocation 0 kg
- copper scrap, sorted, pressed: 0 kg; CPC 39361: Waste and scrap of copper; By-product classification Recyclable; pedigree (1,1,1,1,1)
  (same comment as for iron scrap, unsorted)
  production volume 0 kg; = RP_PV_1 * (BP_amount_4 / RP_amount_1)
    Calculated from production volume of reference product using the relative outputs.
  property price 2.84 EUR2005
    Temporary price data. Calculated as 90% of purchasers price based on: Source: USGS Mineral Yearbook 2007, Table 1 in <http://minerals.usgs.gov/minerals/pubs/commodity/recycle/myb1-2007-recyc.pdf>
  property carbon content 0
    carbon content on a dry matter basis (reserved; not for manual entry)
  properties: wet mass 1 kg, dry mass 1 kg, water in wet mass 0 kg, carbon content, non-fossil 0, water content 0, carbon content, fossil 0, carbon allocation 0 kg

## Inputs from technosphere
- copper, cathode: 0.3 kg; source Spielmann M. 2007
  EcoSpold01Location=RER
  Identical to ecoinvent data set of passenger car (Spielmann et al. 2007), No.14 Transport
  properties: dry mass 1 kg, wet mass 1 kg
- ethylene: 0 kg; source Spielmann M. 2007; pedigree (1,1,1,1,1)
  Identical to ecoinvent data set of passenger car (Spielmann et al. 2007), No.14 Transport
  EcoSpold01Location=RER
  Uncertainty: Identical to ecoinvent data set of passenger car (Spielmann et al. 2007), No.14 Transport
  properties: wet mass 1 kg, carbon content, fossil 0.857143, dry mass 1 kg, heating value, net 43.22 MJ
- waste plastic, mixture: 0 kg; name BP_amount_2; pedigree (1,1,1,1,1)
  Disposal of maintenance materials. Sum of all plastic materials and rubber in maintenance dataset. The values of the pedigree matrix have been taken from the respective voice of the maintenance dataset but have been slightly modified.
  production volume 0 kg
    Calculated from production volume of reference product using the relative outputs.
  property price 0 EUR2005; name BP_amount_2_price_EUR2005
  property water in wet mass 0.153 kg; name WWM
  property carbon content, non-fossil 0; name C_content_non_fossil
  property water content 0.180638; name water_content
  property wet mass 1 kg; name WM
  property carbon content, fossil 0.747344; name C_content_fossil
  property dry mass 0.847 kg; name DM
  properties: heating value, net 30.79 MJ
  note on heating value, net: Value taken from the general comment of the treatment dataset.
- electricity, medium voltage: 583 kWh; source Spielmann M. 2007; lognormal variance with pedigree 0.0626, pedigree (2,4,5,5,3)
  Identical to ecoinvent data set of passenger car (Spielmann et al. 2007), No.14 Transport
  EcoSpold01Location=UCTE
  Uncertainty: Identical to ecoinvent data set of passenger car (Spielmann et al. 2007), No.14 Transport
- hazardous waste, for incineration: 0 kg; name BP_amount_3; pedigree (1,1,1,1,1)
  Disposal of ehtylene glycol, no emissions have been assumed.
  Uncertainty: Identical to ecoinvent data set of passenger car (Spielmann et al. 2007), No.14 Transport
  production volume 0 kg
    Calculated from production volume of reference product using the relative outputs.
  property price 0 EUR2005; name BP_amount_3_price_EUR2005
  properties: carbon content, fossil 0.554667, water content 0.333333, dry mass 0.75 kg, wet mass 1 kg, heating value, net 17 MJ
  note on carbon content, fossil: Tab A.6, ecoinvent v2.2 report 13_I. C content has been calculated after data in the tables, and then referred to 1 kg DM
- steel, low-alloyed, hot rolled: 11 kg; source Spielmann M. 2007; lognormal variance with pedigree 0.0626, pedigree (2,4,5,5,3)
  EcoSpold01Location=RER
  Identical to ecoinvent data set of passenger car (Spielmann et al. 2007), No.14 Transport
  Uncertainty: Identical to ecoinvent data set of passenger car (Spielmann et al. 2007), No.14 Transport
  properties: dry mass 1 kg, wet mass 1 kg, carbon content, fossil 0.005
  note on carbon content, fossil: Low alloyed steel composition given in Tab. 3.2 ecoinvent v2.2 report 10_partII. Steel assumed to have a C content of 0.5%
- synthetic rubber: 116 kg; source Spielmann M. 2007; lognormal variance with pedigree 0.0626, pedigree (2,4,5,5,3)
  (same comment as for steel, low-alloyed, hot rolled)
  properties: carbon content, fossil 0.871949, heating value, net 26.42 MJ, dry mass 1 kg, wet mass 1 kg
  note on carbon content, fossil: EPDM (Ethylene-propene-diene terpolymer) rubber is a terpolymer of ethylene, propene, and a diene with the residual unsaturated portion of the diene in the side chain (ecoinvent v2.2 report 7-part XX & Ullmann). Chemical formula (deduced from Evidences of Solvent-Induced Miscibility in Polychloroprene-co-Ethylene-Propene Diene Terpolymer Blends, Dubey et al., Journal of Applied Polymer Science, 2009, 111:1884–1891): C20H35
- polypropylene, granulate: 6 kg; source Spielmann M. 2007; lognormal variance with pedigree 0.0626, pedigree (2,4,5,5,3)
  (same comment as for ethylene)
  properties: wet mass 1 kg, carbon content, fossil 0.857143, dry mass 1 kg, heating value, net 32.78 MJ
  note on carbon content, fossil: Polypropylene is formed by the polymerisation of propylene, C3H6 (ecoinvent v2.2 report 11_II)
  note on heating value, net: Value extracted from "treatment of waste polypropylene, open burning"
- polyethylene, high density, granulate: 5 kg; source Spielmann M. 2007; lognormal variance with pedigree 0.0626, pedigree (2,4,5,5,3)
  (same comment as for ethylene)
  properties: wet mass 1 kg, dry mass 1 kg, carbon content, fossil 0.857143, heating value, net 42.47 MJ
  note on carbon content, fossil: Polyethylene is formed out of a huge amount of ethylene monomers (C2H4) (ecoinvent v2.2 report 11_II). MW=28 g/mol
- ethylene glycol: 2 kg; source Spielmann M. 2007; lognormal variance with pedigree 0.0626, pedigree (2,4,5,5,3)
  (same comment as for steel, low-alloyed, hot rolled)
  properties: dry mass 1 kg, carbon content, fossil 0.387097, wet mass 1 kg, heating value, net 23.44 MJ
- iron scrap, unsorted: -11 kg; lognormal variance with pedigree 0.0452, pedigree (2,4,5,5,1)
  (same comment as for iron scrap, unsorted)
  production volume 495000 kg
  properties: price 0.149 EUR2005, wet mass 1 kg, dry mass 1 kg
- copper scrap, sorted, pressed: -0.3 kg; lognormal variance with pedigree 0.0452, pedigree (2,4,5,5,1)
  (same comment as for iron scrap, unsorted)
  production volume 13500 kg
  properties: price 2.84 EUR2005, wet mass 1 kg, dry mass 1 kg
- ethylene: 13.0198, 0.394472, 24.5858 kg (3 entries); source Spielmann M. 2007; lognormal variance with pedigree 0.0626, pedigree (2,4,5,5,3)
  (same comment as for ethylene)
- waste plastic, mixture: -12.2243, -0.942425, -0.389255, -0.369634, -14.1048, -0.157255, -0.0712741, -98.7411 kg (8 entries); lognormal variance with pedigree 0.0452, pedigree (2,4,5,5,1)
  (same comment as for waste plastic, mixture)
  production volume 5.715e6 kg
  properties: heating value, net 30.79 MJ, water content 0.180638, wet mass 1 kg, carbon content, fossil 0.747344, dry mass 0.847 kg
- hazardous waste, for incineration: -0.644, -0.0168338, -1.33917 kg (3 entries); lognormal variance with pedigree 0.0626, pedigree (2,4,5,5,3)
  (same comment as for hazardous waste, for incineration)
  production volume 90000 kg

## Emissions to nature
- Ethene [air, urban air close to ground]: 38 kg; lognormal variance with pedigree 0.064, pedigree (3,4,5,5,3)
  Emission of ethylene during maintenance.
  Uncertainty: Identical to ecoinvent data set of passenger car (Spielmann et al. 2007), No.14 Transport

## Sampling procedure
Data is derived from LCI of a Golf A4.

## Extrapolations
This dataset has been extrapolated from year 2009 to the year of the calculation (2021). The uncertainty has been adjusted accordingly.

## Review by Christian Bauer 2012-09-11
passed
