# yarn production, silk, long fibre

Dataset: EcoSpold 2, unit process
Geography: IN
Time period: 2015-04-01 to 2021-03-31
Technology level: current
Classification: EcoSpold01Categories: textiles/processing
Classification: ISIC rev.4 ecoinvent: 1311:Preparation and spinning of textile fibres
Scenario: Business-as-Usual
System model: Allocation, cut-off by classification
Generated by: Madhuri Nigam
Published in: Faist Emmenegger, M. 2018
Database: ecoinvent
isCopyrightProtected: true
accessRestrictedTo: 1

## General comment
Inventory refers to 1 kg twisted yarn ready for weaving
This dataset covers all relevant input and output flows of the represented gate to gate unit process with a good overall data quality. The inventory is mainly based on industry data. The dataset represents the regional average of Silk yarn production process. Silk thread, also called yarn, is formed by throwing, or twisting, the reeled silk. As the silk filaments are reeled onto bobbins, they are twisted in a particular manner to achieve a certain texture of yarn. For instance, "singles" consist of several filaments which are twisted together in one direction. They are turned tightly for sheer fabrics and loosely for thicker fabrics. Combinations of singles and untwisted fibers may be twisted together in certain patterns to achieve desired textures of fabrics such as crepe de chine, voile, or tram. Fibers may also be manufactured in different patterns for use in the nap of fabrics, for the outside, or for the inside of the fabric.
The silk yarn is put through rollers to make the width more uniform. The yarn is inspected, weighed, and packaged. Finally, the yarn is shipped to fabric manufacturers.

## Included activities start
Activity starts from reeled raw silk as input

## Included activities end
This activity ends with produced 1 kg yarn which is ready for weaving.
Machinery is excluded.

## Geography
Reeling centre run by government was chosen to provide data based on its technical representativeness of the current state of business and their willingness to participate.

## Technology
Each cocoon is made up of a filament between 600 and 900 meters long. Nine cocoons are reeled togetehr to form a 20 denier filament at the reeling stage. Four of these super-fine filaments are doubled together to make one yarn on doubling machine and wound on to spools. This filament is then twisted in next operation and then wound into skeins.
since this dataset reflects a handloom process, there are no machinery modelled

## Reference product
- yarn, silk: 1 kg; CPC 26110: Raw silk (not thrown); By-product classification allocatable product; pedigree (1,1,1,1,1)
  There is no coproduct or waste being generated here. Since, reeled silk is simply doubled up and rereeled in this process. No recircularisation either.
  production volume 5.7046e7 kg; = 5.7046E+07
    Data for year 2015 Source: http://inserco.org/en/statistics
  property price 31.0125 EUR2005
    Estimated value. This price is averaged from 3 different suppliers available in the commercial webstore of alibaba. The price refers to both bulk and commercial quantity purchase. All websites were retrieved on the 1st of July 2019. THe exchange rate used is from 2010 when 1 USD - 0.827 EUR.
    Sources:
    https://www.alibaba.com/product-detail/100-Raw-Silk-Yarn-20-22D_60581755281.html?spm=a2700.7724838.2017115.245.739d3ce0qElQov
    https://www.alibaba.com/product-detail/100-mulberry-silk-roving-raw-silk_60745859786.html?spm=a2700.7724838.2017115.48.739d3ce0qElQov
  property carbon content, non-fossil 0.465
    "Carbon content on a dry mass basis. All carbon is assumed to be biogenic due to the nature of the product. Carbon content of cotton is 0.44 kg of non-fossil carbon per kg of dry mass of cotton. Value is calculated based on the the composition of silk which is 64% cellulose. The data uses composition of silk fibers accessed on 10/11/2017 on: http://textilefashionstudy.com/chemical-composition-of-silk-fiber-silk-natural-fiber/
  property heating value, net 13.59 MJ
    LHV is calculated based on the Carbon content of the product. More details can be found on the respective documentation.
  property carbon content 0.465
    carbon content on a dry matter basis (reserved; not for manual entry)
  properties: water in wet mass 0.03 kg, carbon content, fossil 0, wet mass 1 kg, dry mass 0.97 kg, water content 0.0309278, carbon allocation 0.45105 kg

## Inputs from technosphere
- reeled raw silk hank: 1 kg; lognormal variance with pedigree 0.0052, pedigree (2,4,3,1,1)
  properties: carbon content, non-fossil 0.3769, dry mass 0.97 kg, water content 0.0309278, wet mass 1 kg, heating value, net 11 MJ
  note on carbon content, non-fossil: "Carbon content on a dry mass basis. All carbon is assumed to be biogenic due to the nature of the product. Carbon content of cotton is 0.44 kg of non-fossil carbon per kg of dry mass of cotton. Value is calculated based on the the composition of silk which is 64% cellulose. The data uses composition of silk fibers accessed on 10/11/2017 on: http://textilefashionstudy.com/chemical-composition-of-silk-fiber-silk-natural-fiber/ "
- building, hall: 0.00410256 m2; = 800/(3900*50); lognormal variance with pedigree 0.3026, pedigree (2,1,3,1,1)
  800 square meters of building area divided by plant production per year and life time of the plant
- electricity, low voltage: 0.72 kWh; = 0.360+0.360; lognormal variance with pedigree 0.0046, pedigree (1,4,3,1,1)
  sum of electricity used for
  Winding , doubling 1hp
  Twisting and final winding 1hp

## Sampling procedure
Data has been obtained from a Silk reeling and spinning plant located in Hoshangabad in the state of Madhya Pradesh (Central India) based on the representativeness of currently used technology,

## Extrapolations
This dataset has been extrapolated from year 2016 to the year of the calculation (2021). The uncertainty has been adjusted accordingly.
