# heat production, lignite briquette, at stove 5-15kW

Dataset: EcoSpold 2, unit process
Geography: Europe without Switzerland
Time period: 1988-01-01 to 2021-12-31
Technology level: current
Classification: EcoSpold01Categories: lignite/heating systems
Classification: ISIC rev.4 ecoinvent: 3530:Steam and air conditioning supply
Tags: ConvertedDataset
Scenario: Business-as-Usual
System model: Allocation, cut-off by classification
Generated by: Christian Bauer
Published in: Röder, A. 2004
Database: ecoinvent
isCopyrightProtected: true
accessRestrictedTo: 1

## General comment
This dataset represents the production of heat from a 5-15 kW coal stove filled with 1 MJ of lignite briquettes. The lifetime of the coal stove is 30 years, which corresponds to 1600 fully load hours per year. The heating value is 19.5 MJ/kg and the efficiency factor is 70%.
[This dataset was already contained in the ecoinvent database version 2. It was not individually updated during the transfer to ecoinvent version 3. Life Cycle Impact Assessment results may still have changed, as they are affected by changes in the supply chain, i.e. in other datasets. This dataset was generated following the ecoinvent quality guidelines for version 2. It may have been subject to central changes described in the ecoinvent version 3 change report (http://www.ecoinvent.org/database/ecoinvent-version-3/reports-of-changes/), and the results of the central updates were reviewed extensively. The changes added e.g. consistent water flows and other information throughout the database. The documentation of this dataset can be found in the ecoinvent reports of version 2, which are still available via the ecoinvent website. The change report linked above covers all central changes that were made during the conversion process.]

## Included activities start
From reception of hard coal briquettes.

## Included activities end
This activity ends with produced heat at the coal stove filled with 1 MJ of lignite briquettes. The dataset includes transport and all emissions to air as well as the ash disposal. The dataset doesn’t include emissions to water as it is assumed that the coal is stored in a covered storage area.

## Technology
Average technology installed in early 1990s. The efficiency factor of a coal stove is between 50% and 70%. Since the coal stove is installed in the room to be heated, losses occur especially through the large amounts of flue gas and through incomplete combustion. An efficiency factor of 70% is assumed. Since neither ventilators nor air supply pumps are required for hot water circulation, no auxiliary energy is needed.
Reference:
Braun H., Angrüner B., Ecker P., Gschaider R., Sorger A., Wurst F., Ellinger R. (1991) Emissionen bei der Verbennung. Wien.
DGMK-Arbeitskreis (1992) Ansatzpunkte und Potentiale zur Minderung des Treibhauseffektes aus Sicht der fossilen Energieträger. Hamburg.
Fritsche U., Rausch L., Simon K.-H. (1989) Umweltwirkungsanalyse von Energiesystemen: Gesamt-Emissions-Modell Integrierter Systeme (GEMIS). Darmstadt/Kassel, Deutschland.
Jensch W. (1988) Vergleich von Energiesystemen unterschiedlicher Zentralisierung. IfE-Schriftenreihe Heft 22, München.
Menke C., Leithner R. (1990) Auswirkung der Energieversorgung auf die Luftqualität in der Region Braunschweig. In: BWK, Band 42, Nr.7/8, s.446-456.

## Parameters
- scaling factor: 1.42857 dimensionless; name scaling_factor

## Reference product
- heat, central or small-scale, other than natural gas: 1 MJ; = 0.7 * scaling_factor; CPC 17300: Steam and hot water; By-product classification allocatable product
  Amount was scaled to 1.
  EcoSpold01Location=RER
  production volume 2.26e10 MJ; name heat_apv
    Assumption. This production volume does not represent a realistic value, but reflects the share of heat from coal sources on the market for heat, central or small-scale, other than natural gas.
    See talk pages for further discussion.
    A relation of 1:100 between the geographies RER and RoW was assumed.
    //Original comment //:
    IEA coal and Peat statistics for 2007 (http://www.iea.org/stats/coaldata.asp?COUNTRY_CODE=29), residential, commercial and agriculture. All brown coal briquettes and lignite in kg converted to MJ heat out by multiplying with 0.67 (conversion efficiency on a gross heating value basis) and dividing by 0.10545 (kg/MJ gross heating value)
  property price 0.0106 EUR2005
    Average European district heat price from Ecoheatcool and Euroheat 2005-2006, Ecoheat Work package 1: The European heat market. Final report. 10.6 EUR/GJ i s the price of district heat. http://www.solarthermalworld.org/files/Ecoheatcool%20WP1%20Web.pdf?download
  properties: heating value, net 1 MJ, Corresponding fuel use 1.42857 MJ

## Inputs from technosphere
- coal stove, 5-15kW: 8.27143e-7 unit; = 5.79E-07 * scaling_factor; lognormal variance with pedigree 0.3513, pedigree (2,3,5,3,1)
  Amount was scaled to the amount of reference product.
  EcoSpold01Location=RER
  Uncertainty: infrastructure
- lignite ash: -0.00342857 kg; name lignite_ash; = (0.0024 * scaling_factor)*-1; source Ruhrkohle 1987; lognormal variance with pedigree 0.1101, pedigree (5,1,5,3,1)
  EcoSpold01Location=DE
  Estimation. It is assumed that 100% of the ash is disposed. The ash content is 4%. The density of dry ash is 400 to 650 kg/m3.
  Amount was scaled to the amount of reference product.
  Uncertainty: assumption: no reuse
  production volume 7.74857e7 kg; = heat_apv*lignite_ash
    Calculated from the production volume of lignite briquette, burned in stove 5-15kW in proportion to the respective output amounts.
  property price 0 EUR2005; name lignite_ash_price_EUR2005
  properties: wet mass 1 kg, dry mass 1 kg
- lignite briquettes: 1.42857 MJ; = 1 * scaling_factor; source Schlösser N. 1991; lognormal variance with pedigree 0.0582, pedigree (4,2,5,3,1)
  Estimation. For the quality of lignite fuel data are available from Rheinbraun. The main elements represent annual averages. The caloric value is 19.5 MJ/kg, the bulk density is 710-750 kg/m3, the water content is 19% and the ash content is 4%. Further values are 53.2% of carbonate, 0.6% of nitrogen, 0.35% of sulfur, 0.0025% of chlorine, 0.001% of flour.
  Amount was scaled to the amount of reference product.
  EcoSpold01Location=DE
  Uncertainty: fuel input
  properties: water content 0.234568, dry mass 0.0415385 kg, carbon content, fossil 0.65679, wet mass 0.0512821 kg, heating value, net 8.8 MJ
  note on carbon content, fossil: 53.2% C and 19% water in wet mass (ecoinvent v2.1 report 6_VI Table 7.1)

## Emissions to nature
- Propane [air, urban air close to ground]: 1.42857e-5 kg; = 1E-05 * scaling_factor; lognormal variance with pedigree 0.0913, pedigree (2,3,5,3,1)
  Modeled, based on “heat production, coal, emissions to air” - pdf-document on the dedicated talk page of ecoinvent (www.ecoinvent.org/documentation). The emission data are taken from the literature reporting measurements performed at the end of the 1980s in Germany and are based on the composition of the coal.
  Amount was scaled to the amount of reference product.
  Uncertainty: total NMVOC and profile estimate
- Titanium [air, urban air close to ground]: 3.61429e-7 kg; = 2.53E-07 * scaling_factor; lognormal variance with pedigree 0.7261, pedigree (4,5,5,3,1)
  Modeled, based on “heat production, coal, emissions to air” - pdf-document on the dedicated talk page of ecoinvent (www.ecoinvent.org/documentation). Emissions of trace elements were calculated using the ash content in the coal and average transfer coefficients for coal power plants with ash retention of 98 %.
  Amount was scaled to the amount of reference product.
  Uncertainty: from trace element balance; see report for details
- Strontium [air, urban air close to ground]: 3.78571e-7 kg; = 2.65E-07 * scaling_factor; lognormal variance with pedigree 0.7261, pedigree (4,5,5,3,1)
  (same comment as for Titanium)
- Thorium-228 [air, urban air close to ground]: 1.05714e-5 kBq; = 7.4E-06 * scaling_factor; lognormal variance with pedigree 0.7261, pedigree (4,5,5,3,1)
  Modeled, based on “heat production, coal, emissions to air” - pdf-document on the dedicated talk page of ecoinvent (www.ecoinvent.org/documentation). From radioactivity of the elements.
  Amount was scaled to the amount of reference product.
  Uncertainty: from radioactivity of the elements; see report for details
- Selenium [air, urban air close to ground]: 1.08286e-7 kg; = 7.58E-08 * scaling_factor; lognormal variance with pedigree 0.7261, pedigree (4,5,5,3,1)
  (same comment as for Titanium)
- Carbon monoxide, fossil [air, urban air close to ground]: 0.00571429 kg; = 0.004 * scaling_factor; lognormal variance with pedigree 0.6913, pedigree (2,3,5,3,1)
  Modeled, based on “heat production, coal, emissions to air” - pdf-document on the dedicated talk page of ecoinvent (www.ecoinvent.org/documentation). The emission data are taken from the literature reporting measurements performed at the end of the 1980s in Germany and are based on the composition of the coal.
  Amount was scaled to the amount of reference product.
  Uncertainty: typical value
- Magnesium [air, urban air close to ground]: 1.08286e-5 kg; = 7.58E-06 * scaling_factor; lognormal variance with pedigree 0.7261, pedigree (4,5,5,3,1)
  (same comment as for Titanium)
- Thorium [air, urban air close to ground]: 4.32857e-9 kg; = 3.03E-09 * scaling_factor; lognormal variance with pedigree 0.7261, pedigree (4,5,5,3,1)
  (same comment as for Titanium)
- Lead-210 [air, urban air close to ground]: 8.85714e-5 kBq; = 6.2E-05 * scaling_factor; lognormal variance with pedigree 0.7261, pedigree (4,5,5,3,1)
  (same comment as for Thorium-228)
- Sodium [air, urban air close to ground]: 3.24286e-6 kg; = 2.27E-06 * scaling_factor; lognormal variance with pedigree 0.7261, pedigree (4,5,5,3,1)
  (same comment as for Titanium)
- Hydrogen fluoride [air, urban air close to ground]: 1.77143e-7 kg; = 1.24E-07 * scaling_factor; lognormal variance with pedigree 0.1161, pedigree (4,5,5,3,1)
  (same comment as for Titanium)
- Benzo(a)pyrene [air, urban air close to ground]: 2.85714e-8 kg; = 2E-08 * scaling_factor; lognormal variance with pedigree 0.0913, pedigree (2,3,5,3,1)
  (same comment as for Propane)
- Manganese [air, urban air close to ground]: 3.61429e-8 kg; = 2.53E-08 * scaling_factor; lognormal variance with pedigree 0.7261, pedigree (4,5,5,3,1)
  (same comment as for Titanium)
- Radon-222 [air, urban air close to ground]: 5.71429e-6 kBq; = 4E-06 * scaling_factor; lognormal variance with pedigree 0.7261, pedigree (4,5,5,3,1)
  (same comment as for Thorium-228)
- Radon-220 [air, urban air close to ground]: 5.71429e-6 kBq; = 4E-06 * scaling_factor; lognormal variance with pedigree 0.7261, pedigree (4,5,5,3,1)
  (same comment as for Thorium-228)
- Sulfur dioxide [air, urban air close to ground]: 0.000142857 kg; = 0.0001 * scaling_factor; lognormal variance with pedigree 0.0761, pedigree (4,5,5,3,1)
  Modeled, based on “heat production, coal, emissions to air” - pdf-document on the dedicated talk page of ecoinvent (www.ecoinvent.org/documentation). The emission data are taken from the literature reporting measurements performed at the end of the 1980s in Germany and are based on the composition of the coal.
  Amount was scaled to the amount of reference product.
  Uncertainty: from S-balance
- Tin [air, urban air close to ground]: 2.88571e-9 kg; = 2.02E-09 * scaling_factor; lognormal variance with pedigree 0.7261, pedigree (4,5,5,3,1)
  (same comment as for Titanium)
- Potassium [air, urban air close to ground]: 2.17143e-6 kg; = 1.52E-06 * scaling_factor; lognormal variance with pedigree 0.7261, pedigree (4,5,5,3,1)
  (same comment as for Titanium)
- Aluminium [air, urban air close to ground]: 1.7e-5 kg; = 1.19E-05 * scaling_factor; lognormal variance with pedigree 0.7261, pedigree (4,5,5,3,1)
  (same comment as for Titanium)
- Propene [air, urban air close to ground]: 7.14286e-6 kg; = 5E-06 * scaling_factor; lognormal variance with pedigree 0.0913, pedigree (2,3,5,3,1)
  (same comment as for Propane)
- NMVOC, non-methane volatile organic compounds, unspecified origin [air, urban air close to ground]: 2.48571e-5 kg; = 1.74E-05 * scaling_factor; lognormal variance with pedigree 0.0913, pedigree (2,3,5,3,1)
  (same comment as for Propane)
- Dinitrogen monoxide [air, urban air close to ground]: 7.14286e-7 kg; = 5E-07 * scaling_factor; lognormal variance with pedigree 0.0913, pedigree (2,3,5,3,1)
  (same comment as for Carbon monoxide, fossil)
- Scandium [air, urban air close to ground]: 9.02857e-10 kg; = 6.32E-10 * scaling_factor; lognormal variance with pedigree 0.7261, pedigree (4,5,5,3,1)
  (same comment as for Titanium)
- Barium [air, urban air close to ground]: 3.61429e-7 kg; = 2.53E-07 * scaling_factor; lognormal variance with pedigree 0.7261, pedigree (4,5,5,3,1)
  (same comment as for Titanium)
- Hydrocarbons, aliphatic, unsaturated [air, urban air close to ground]: 7.14286e-6 kg; = 5E-06 * scaling_factor; lognormal variance with pedigree 0.0913, pedigree (2,3,5,3,1)
  (same comment as for Propane)
- Iron [air, urban air close to ground]: 1.94286e-5 kg; = 1.36E-05 * scaling_factor; lognormal variance with pedigree 0.7261, pedigree (4,5,5,3,1)
  (same comment as for Titanium)
- Particulates, < 2.5 um [air, urban air close to ground]: 2.85714e-5 kg; = 2E-05 * scaling_factor; lognormal variance with pedigree 0.3761, pedigree (4,5,5,3,1)
  Modeled, based on “heat production, coal, emissions to air” - pdf-document on the dedicated talk page of ecoinvent (www.ecoinvent.org/documentation). Size distribution of particles has been estimated on the basis of recent information from U.S. Environmental Protection Agency (EPA).
  Amount was scaled to the amount of reference product.
  Uncertainty: total PM and profile estimates
- Lead [air, urban air close to ground]: 5.41429e-8 kg; = 3.79E-08 * scaling_factor; lognormal variance with pedigree 0.7261, pedigree (4,5,5,3,1)
  (same comment as for Titanium)
- Uranium [air, urban air close to ground]: 7.21429e-9 kg; = 5.05E-09 * scaling_factor; lognormal variance with pedigree 0.7261, pedigree (4,5,5,3,1)
  (same comment as for Titanium)
- Particulates, > 10 um [air, urban air close to ground]: 0.0002 kg; = 0.00014 * scaling_factor; lognormal variance with pedigree 0.1161, pedigree (4,5,5,3,1)
  (same comment as for Particulates, < 2.5 um)
- Hydrocarbons, aliphatic, alkanes, unspecified [air, urban air close to ground]: 7.14286e-6 kg; = 5E-06 * scaling_factor; lognormal variance with pedigree 0.0913, pedigree (2,3,5,3,1)
  (same comment as for Propane)
- Bromine [air, urban air close to ground]: 2.17143e-8 kg; = 1.52E-08 * scaling_factor; lognormal variance with pedigree 0.7261, pedigree (4,5,5,3,1)
  (same comment as for Titanium)
- Particulates, > 2.5 um, and < 10um [air, urban air close to ground]: 5.71429e-5 kg; = 4E-05 * scaling_factor; lognormal variance with pedigree 0.1961, pedigree (4,5,5,3,1)
  (same comment as for Particulates, < 2.5 um)
- Potassium-40 [air, urban air close to ground]: 2.38571e-5 kBq; = 1.67E-05 * scaling_factor; lognormal variance with pedigree 0.7261, pedigree (4,5,5,3,1)
  (same comment as for Thorium-228)
- Hydrogen chloride [air, urban air close to ground]: 4.72857e-6 kg; = 3.31E-06 * scaling_factor; lognormal variance with pedigree 0.1161, pedigree (4,5,5,3,1)
  (same comment as for Titanium)
- Beryllium [air, urban air close to ground]: 3.61429e-9 kg; = 2.53E-09 * scaling_factor; lognormal variance with pedigree 0.7261, pedigree (4,5,5,3,1)
  (same comment as for Titanium)
- Uranium-238 [air, urban air close to ground]: 1.91429e-5 kBq; = 1.34E-05 * scaling_factor; lognormal variance with pedigree 0.7261, pedigree (4,5,5,3,1)
  (same comment as for Thorium-228)
- Ethene [air, urban air close to ground]: 4.28571e-5 kg; = 3E-05 * scaling_factor; lognormal variance with pedigree 0.0913, pedigree (2,3,5,3,1)
  (same comment as for Propane)
- Mercury [air, urban air close to ground]: 1.62857e-8 kg; = 1.14E-08 * scaling_factor; lognormal variance with pedigree 0.7261, pedigree (4,5,5,3,1)
  (same comment as for Titanium)
- Methane, fossil [air, urban air close to ground]: 0.000428571 kg; = 0.0003 * scaling_factor; lognormal variance with pedigree 0.0913, pedigree (2,3,5,3,1)
  (same comment as for Carbon monoxide, fossil)
- Benzene [air, urban air close to ground]: 7.14286e-6 kg; = 5E-06 * scaling_factor; lognormal variance with pedigree 0.0913, pedigree (2,3,5,3,1)
  (same comment as for Propane)
- Hydrogen sulfide [air, urban air close to ground]: 1.42857e-7 kg; = 1E-07 * scaling_factor; lognormal variance with pedigree 0.0913, pedigree (2,3,5,3,1)
  (same comment as for Carbon monoxide, fossil)
- Polonium-210 [air, urban air close to ground]: 0.000162857 kBq; = 0.000114 * scaling_factor; lognormal variance with pedigree 0.7261, pedigree (4,5,5,3,1)
  (same comment as for Thorium-228)
- Antimony [air, urban air close to ground]: 3.61429e-8 kg; = 2.53E-08 * scaling_factor; lognormal variance with pedigree 0.7261, pedigree (4,5,5,3,1)
  (same comment as for Titanium)
- Chromium [air, urban air close to ground]: 1.00143e-7 kg; = 7.01E-08 * scaling_factor; lognormal variance with pedigree 0.7261, pedigree (4,5,5,3,1)
  (same comment as for Titanium)
- Formaldehyde [air, urban air close to ground]: 1.42857e-7 kg; = 1E-07 * scaling_factor; lognormal variance with pedigree 0.0913, pedigree (2,3,5,3,1)
  (same comment as for Propane)
- Ethyne [air, urban air close to ground]: 7.14286e-6 kg; = 5E-06 * scaling_factor; lognormal variance with pedigree 0.0913, pedigree (2,3,5,3,1)
  (same comment as for Propane)
- Boron [air, urban air close to ground]: 1.62857e-5 kg; = 1.14E-05 * scaling_factor; lognormal variance with pedigree 0.7261, pedigree (4,5,5,3,1)
  (same comment as for Titanium)
- Phenol [air, urban air close to ground]: 7.14286e-7 kg; = 5E-07 * scaling_factor; lognormal variance with pedigree 0.0913, pedigree (2,3,5,3,1)
  (same comment as for Propane)
- Toluene [air, urban air close to ground]: 1.42857e-6 kg; = 1E-06 * scaling_factor; lognormal variance with pedigree 0.0913, pedigree (2,3,5,3,1)
  (same comment as for Propane)
- Dioxins, measured as 2,3,7,8-tetrachlorodibenzo-p-dioxin [air, urban air close to ground]: 2.85714e-15 kg; = 2E-15 * scaling_factor; lognormal variance with pedigree 0.3513, pedigree (2,3,5,3,1)
  Modeled, based on “heat production, coal, emissions to air” - pdf-document on the dedicated talk page of ecoinvent (www.ecoinvent.org/documentation). The emission data are taken from the literature reporting measurements performed at the end of the 1980s in Germany and are based on the composition of the coal.
  Amount was scaled to the amount of reference product.
- Vanadium [air, urban air close to ground]: 1.9e-7 kg; = 1.33E-07 * scaling_factor; lognormal variance with pedigree 0.7261, pedigree (4,5,5,3,1)
  (same comment as for Titanium)
- Silicon [air, urban air close to ground]: 0.000172857 kg; = 0.000121 * scaling_factor; lognormal variance with pedigree 0.7261, pedigree (4,5,5,3,1)
  (same comment as for Titanium)
- Copper [air, urban air close to ground]: 3.78571e-8 kg; = 2.65E-08 * scaling_factor; lognormal variance with pedigree 0.7261, pedigree (4,5,5,3,1)
  (same comment as for Titanium)
- Phosphorus [air, urban air close to ground]: 1.44286e-7 kg; = 1.01E-07 * scaling_factor; lognormal variance with pedigree 0.7261, pedigree (4,5,5,3,1)
  (same comment as for Titanium)
- Chromium VI [air, urban air close to ground]: 1.01143e-9 kg; = 7.08E-10 * scaling_factor; lognormal variance with pedigree 0.52, pedigree (1,1,5,1,1)
  (same comment as for Dioxins, measured as 2,3,7,8-tetrachlorodibenzo-p-dioxin)
- Cadmium [air, urban air close to ground]: 1.10143e-8 kg; = 7.71E-09 * scaling_factor; lognormal variance with pedigree 0.7261, pedigree (4,5,5,3,1)
  (same comment as for Titanium)
- Cobalt [air, urban air close to ground]: 5.41429e-8 kg; = 3.79E-08 * scaling_factor; lognormal variance with pedigree 0.7261, pedigree (4,5,5,3,1)
  (same comment as for Titanium)
- Calcium [air, urban air close to ground]: 7.21429e-5 kg; = 5.05E-05 * scaling_factor; lognormal variance with pedigree 0.7261, pedigree (4,5,5,3,1)
  (same comment as for Titanium)
- Ethane [air, urban air close to ground]: 2.14286e-5 kg; = 1.5E-05 * scaling_factor; lognormal variance with pedigree 0.0913, pedigree (2,3,5,3,1)
  (same comment as for Propane)
- Xylene [air, urban air close to ground]: 4.71429e-6 kg; = 3.3E-06 * scaling_factor; lognormal variance with pedigree 0.0913, pedigree (2,3,5,3,1)
  (same comment as for Propane)
- Carbon dioxide, fossil [air, urban air close to ground]: 0.130714 kg; = 0.0915 * scaling_factor; lognormal variance with pedigree 0.0408, pedigree (2,2,5,3,1)
  Modeled, based on “heat production, coal, emissions to air” - pdf-document on the dedicated talk page of ecoinvent (www.ecoinvent.org/documentation). The emission data are taken from the literature reporting measurements performed at the end of the 1980s in Germany and are based on the composition of the coal.
  Amount was scaled to the amount of reference product.
  Uncertainty: from carbon balance
- Zinc [air, urban air close to ground]: 1.44286e-8 kg; = 1.01E-08 * scaling_factor; lognormal variance with pedigree 0.7261, pedigree (4,5,5,3,1)
  (same comment as for Titanium)
- Nickel [air, urban air close to ground]: 8.12857e-8 kg; = 5.69E-08 * scaling_factor; lognormal variance with pedigree 0.7261, pedigree (4,5,5,3,1)
  (same comment as for Titanium)
- Radium-226 [air, urban air close to ground]: 2.28571e-5 kBq; = 1.6E-05 * scaling_factor; lognormal variance with pedigree 0.7261, pedigree (4,5,5,3,1)
  (same comment as for Thorium-228)
- Nitrogen oxides [air, urban air close to ground]: 0.000142857 kg; = 0.0001 * scaling_factor; lognormal variance with pedigree 0.0913, pedigree (2,3,5,3,1)
  (same comment as for Carbon monoxide, fossil)
- Molybdenum [air, urban air close to ground]: 6.31429e-8 kg; = 4.42E-08 * scaling_factor; lognormal variance with pedigree 0.7261, pedigree (4,5,5,3,1)
  (same comment as for Titanium)
- Iodine [air, urban air close to ground]: 6.5e-8 kg; = 4.55E-08 * scaling_factor; lognormal variance with pedigree 0.7261, pedigree (4,5,5,3,1)
  (same comment as for Titanium)
- Arsenic [air, urban air close to ground]: 7.21429e-8 kg; = 5.05E-08 * scaling_factor; lognormal variance with pedigree 0.7261, pedigree (4,5,5,3,1)
  (same comment as for Titanium)
- Thallium [air, urban air close to ground]: 1.8e-10 kg; = 1.26E-10 * scaling_factor; lognormal variance with pedigree 0.7261, pedigree (4,5,5,3,1)
  (same comment as for Titanium)
- Thorium-232 [air, urban air close to ground]: 6.57143e-6 kBq; = 4.6E-06 * scaling_factor; lognormal variance with pedigree 0.7261, pedigree (4,5,5,3,1)
  (same comment as for Thorium-228)
- Radium-228 [air, urban air close to ground]: 1.22857e-5 kBq; = 8.6E-06 * scaling_factor; lognormal variance with pedigree 0.7261, pedigree (4,5,5,3,1)
  (same comment as for Thorium-228)

## Sampling procedure
Based on literature data.

## Extrapolations
This dataset has been extrapolated from year 1992 to the year of the calculation (2021). The uncertainty has been adjusted accordingly.

## Review by Roland Hischier 2011-09-23
Tansfer of documentation done.

## Review by Hans-Jörg Althaus 2005-07-19
passed
