# calcareous marl production

Dataset: EcoSpold 2, unit process
Geography: CH
Time period: 1997-01-01 to 2021-12-31
Technology level: current
Classification: ISIC rev.4 ecoinvent: 0810:Quarrying of stone, sand and clay
Classification: EcoSpold01Categories: construction materials/additives
Synonyms: lime; Kalk; mergeliger; Mergel; clay
Tags: ConvertedDataset
Scenario: Business-as-Usual
System model: Allocation, cut-off by classification
Generated by: Tina Künniger
Published in: Kellenberger D. 2007
Database: ecoinvent
isCopyrightProtected: true
accessRestrictedTo: 1

## General comment
[This dataset was already contained in the ecoinvent database version 2. It was not individually updated during the transfer to ecoinvent version 3. Life Cycle Impact Assessment results may still have changed, as they are affected by changes in the supply chain, i.e. in other datasets. This dataset was generated following the ecoinvent quality guidelines for version 2. It may have been subject to central changes described in the ecoinvent version 3 change report (http://www.ecoinvent.org/database/ecoinvent-version-3/reports-of-changes/), and the results of the central updates were reviewed extensively. The changes added e.g. consistent water flows and other information throughout the database. The documentation of this dataset can be found in the ecoinvent reports of version 2, which are still available via the ecoinvent website. The change report linked above covers all central changes that were made during the conversion process.]

## Included activities end
includes a mix of 3/4 pure limestone and 1/4 clay

## Technology
composed from pure limestone and clay

## Reference product
- calcareous marl: 1 kg; CPC 15120: Marble and other calcareous monumental or building stone; By-product classification allocatable product
  EcoSpold01Location=CH
  production volume 0.0336675 kg
    This is a placeholder value that does not reflect real-world production volumes. This dataset does not currently require a real-world production volume to work in the database framework, and no actual data were collected yet. This has no negative effect on the results of the ecoinvent database. The placeholder value of this activity was scaled according to the nominal GDP of 2005 (source: United Nations, http://data.un.org/Glossary.aspx?q=GDP+%28current+US%24%29, accessed 20130726) to reflect an appropriate share of the global production volume, which is also a placeholder value.
  property price 0.0061 EUR2005
    Source: USGS MINERAL COMMODITY SUMMARIES 2010. Pg 152. http://minerals.usgs.gov/minerals/pubs/mcs/2015/mcs2015.pdf
  property carbon content, fossil 0.087767
    composed from 3/4 pure limestone and 1/4 clay, ecoinvent v2.2 report 7 part II pg 14. C content of limestone is 0.117 kg/kg WM
  property carbon content 0.087767
    carbon content on a dry matter basis (reserved; not for manual entry)
  properties: water content 0, carbon content, non-fossil 0, dry mass 1 kg, wet mass 1 kg, heating value, net 0 MJ, water in wet mass 0 kg, carbon allocation 0.087767 kg

## Inputs from technosphere
- limestone, crushed, washed: 0.75 kg; lognormal variance with pedigree 0.0581, pedigree (4,2,5,1,1)
  EcoSpold01Location=CH
  properties: carbon content, fossil 0.117257, water content 0.00200401, wet mass 1 kg, dry mass 0.998 kg
  note on carbon content, fossil: Table 3.1, ecoinvent v2.2 report 7, part VII, pg 3. MW CaCO3=100, MW MgCO3=84. C content of limestone is 0.117257 kg/kg DM
- clay: 0.25 kg; lognormal variance with pedigree 0.0581, pedigree (4,2,5,1,1)
  EcoSpold01Location=CH
  properties: water content 0.0362694, dry mass 0.965 kg, wet mass 1 kg

## Sampling procedure
share of literature

## Extrapolations
This dataset has been extrapolated from year 2001 to the year of the calculation (2021). The uncertainty has been adjusted accordingly.

## Review by Roberto Dones 2003-07-04
Passed
