# polyethylene pipe production, DN 200, SDR 41

Dataset: EcoSpold 2, unit process
Geography: RER
Time period: 2003-01-01 to 2021-12-31
Technology level: current
Classification: ISIC rev.4 ecoinvent: 2819:Manufacture of other general-purpose machinery
Classification: EcoSpold01Categories: ventilation/production of components
Tags: ConvertedDataset
Scenario: Business-as-Usual
System model: Allocation, cut-off by classification
Generated by: Alex Primas
Published in: Hässig, W. 2007
Database: ecoinvent
isCopyrightProtected: true
accessRestrictedTo: 1

## General comment
Production of a typical component used for a ventilation system in a multi family house. The house considered in the investigation includes 6 flats with 130 m2 floor area each and a ventilation rate of 120 m3/h.
[This dataset was already contained in the ecoinvent database version 2. It was not individually updated during the transfer to ecoinvent version 3. Life Cycle Impact Assessment results may still have changed, as they are affected by changes in the supply chain, i.e. in other datasets. This dataset was generated following the ecoinvent quality guidelines for version 2. It may have been subject to central changes described in the ecoinvent version 3 change report (http://www.ecoinvent.org/database/ecoinvent-version-3/reports-of-changes/), and the results of the central updates were reviewed extensively. The changes added e.g. consistent water flows and other information throughout the database. The documentation of this dataset can be found in the ecoinvent reports of version 2, which are still available via the ecoinvent website. The change report linked above covers all central changes that were made during the conversion process.]

## Included activities end
Materials used for the production. Estimation of electricity use for the different production steps. Energy use for heating of the production building. Transport of raw materials to the plant. Estimation for the Infrastructure of the Production site included.

## Geography
Data for production in Germany used.

## Technology
Extruded polyethylene tube with 5mm wall thickness. Weight 3 kg/m

## Time period
Materials investigated in 2003

## Reference product
- polyethylene pipe, DN 200, SDR 41: 1 m; CPC 36320: Tubes, pipes and hoses, and fittings therefor, of plastics; By-product classification allocatable product
  EcoSpold01Location=RER
  production volume 1.32237 m
    This is a placeholder value that does not reflect real-world production volumes. This dataset does not currently require a real-world production volume to work in the database framework, and no actual data were collected yet. This has no negative effect on the results of the ecoinvent database. The placeholder value of this activity was scaled according to the nominal GDP of 2005 (source: United Nations, http://data.un.org/Glossary.aspx?q=GDP+%28current+US%24%29, accessed 20130726) to reflect an appropriate share of the global production volume, which is also a placeholder value.
  property price 7.63 EUR2005
    Average 2005 prices for EU27, USA, China, Japan and India from Import/Export data (US$ and tonnes) in UN Commodity Trade Statistics Database; Commodity: Tube, pipe or hose, rigid, of polyethylene. Unit in EUR/kg is converted to EUR/m based on dataset for pipe production in Ecoinvent database.
  property carbon content 0.857143
    carbon content on a dry matter basis (reserved; not for manual entry)
  properties: heating value, net 127.41 MJ, carbon content, non-fossil 0, water content 0, carbon content, fossil 0.857143, dry mass 3 kg, water in wet mass 0 kg, wet mass 3 kg, carbon allocation 2.57143 kg

## Inputs from technosphere
- heat, district or industrial, natural gas: 4.1325 MJ; lognormal variance with pedigree 0.076, pedigree (4,5,5,1,1)
  EcoSpold01Location=RER
  Data estimated from related companies
  Uncertainty: Data estimated from related companies
  properties: heating value, net 1 MJ
- polyethylene, high density, granulate: 3.15 kg; lognormal variance with pedigree 0.0526, pedigree (2,4,5,1,1)
  EcoSpold01Location=RER
  Questionnaire
  Uncertainty: Questionnaire
  properties: carbon content, fossil 0.857143, dry mass 1 kg, wet mass 1 kg, heating value, net 42.47 MJ
  note on carbon content, fossil: Polyethylene is formed out of a huge amount of ethylene monomers (C2H4) (ecoinvent v2.2 report 11_II). MW=28 g/mol
- extrusion, plastic pipes: 3.15 kg; lognormal variance with pedigree 0.0526, pedigree (2,4,5,1,1)
  Questionnaire
  EcoSpold01Location=RER
  Uncertainty: Questionnaire
- heat, district or industrial, other than natural gas: 4.1325 MJ; lognormal variance with pedigree 0.07, pedigree (1,1,5,1,1)
  4,5,1,1,1,5; Data estimated from related companies
  EcoSpold01Location=RER
  properties: heating value, net 1 MJ
- waste polyethylene: -0.15 kg; lognormal variance with pedigree 0.07, pedigree (4,4,5,1,1)
  Estimations on precentage material disposed
  EcoSpold01Location=CH
  Uncertainty: Estimations on precentage material disposed
  production volume 0.15 kg
    Calculated from the production volume of earth tube heat exchanger, polyethylene, DN 200 in proportion to the respective output amounts.
  properties: water content 0.00401606, heating value, net 42.47 MJ, wet mass 1 kg, carbon content, fossil 0.825301, dry mass 0.996 kg
  note on heating value, net: Value taken from the general comment of the treatment dataset.
  note on carbon content, fossil: C content in 1 kg DM was calculated using data in Tab A.1, ecoinvent v2.2 report 13_I
- electricity, medium voltage: 0.33 kWh; lognormal variance with pedigree 0.108, pedigree (3,5,5,1,3)
  Data estimated from related processes
  EcoSpold01Location=UCTE
  Uncertainty: Data estimated from related processes
- plastic processing factory: 2.22e-9 unit; lognormal variance with pedigree 0.394, pedigree (4,5,5,1,3)
  Calculated with data of a similar company
  EcoSpold01Location=RER
  Uncertainty: Calculated with data of a similar company

## Sampling procedure
Questionnaire and technical information of producer. Data of one common product used.

## Extrapolations
This dataset has been extrapolated from year 2003 to the year of the calculation (2021). The uncertainty has been adjusted accordingly.

## Review by Rolf Frischknecht 2007-08-16
passed
none
