# zinc coating, coils

Dataset: EcoSpold 2, unit process
Geography: RER
Time period: 1996-01-01 to 2021-12-31
Technology level: current
Classification: EcoSpold01Categories: metals/processing
Classification: ISIC rev.4 ecoinvent: 2592:Treatment and coating of metals; machining
Synonyms: sendzimir; hot dip coating; galvanizing
Tags: ConvertedDataset
Scenario: Business-as-Usual
System model: Allocation, cut-off by classification
Share of production covered: 0 %
Generated by: Silvio Blaser
Published in: Classen M. 2009
Database: ecoinvent
isCopyrightProtected: true
accessRestrictedTo: 1

## General comment
This module is applicable, if continuous zinc coating (galvanising) of hot or cold rolled strip- or wire-coils has to be inventoried. Data given per tonne of coated product are transformed by dividing them by the mean surface area of 64 m2/t (corresponding to ca. 4.2 mm thickness). The zinc coating layer is between 20 to 45 um thick. The ecoinvent module "zinc coating, pieces, adjustment per um" can be used for adjustin for thiner or thicker zinc layers of coated coils, but it 1.53 um of it have to be inventoried per um layer thickness adjustment. This is because the zinc consumption per um is higher for coil coating than it is fo piece coating. For the chemicals and the zinc, 100 km of 32t lorry transport were invnetoried. The softened industrial water is assumed to be produced at the coating plant. Continuous wire coating can be approximated with this module.
[This dataset was already contained in the ecoinvent database version 2. It was not individually updated during the transfer to ecoinvent version 3. Life Cycle Impact Assessment results may still have changed, as they are affected by changes in the supply chain, i.e. in other datasets. This dataset was generated following the ecoinvent quality guidelines for version 2. It may have been subject to central changes described in the ecoinvent version 3 change report (http://www.ecoinvent.org/database/ecoinvent-version-3/reports-of-changes/), and the results of the central updates were reviewed extensively. The changes added e.g. consistent water flows and other information throughout the database. The documentation of this dataset can be found in the ecoinvent reports of version 2, which are still available via the ecoinvent website. The change report linked above covers all central changes that were made during the conversion process.]

## Included activities end
Includes the process steps surface cleaning (by means of chemical and/or thermal treatment), heat treatment, immersion in a bath of molten zinc and finishing treatment. Also includes zinc input and transportation to coiling plant. Does not include the steel strip or sheet beeing coated.

## Geography
Data-set is representive for European Union

## Technology
Average technique for EU.

## Parameters
- fraction, water, deionised, to air: 0.15 dimensionless; name fraction_WDI_to_air; = fraction_PW_to_air; lognormal variance with pedigree 0.092025, pedigree (4,4,3,2,4)
  Calculated value. See comment in the other parametres present in this dataset. Deionised water is considered to be always used as process water, thus process water fractions to air are applied to all deionised water input flows to calculate the amount of water consumed in the processes.
- fraction, process water, to air: 0.15 dimensionless; name fraction_PW_to_air; lognormal variance with pedigree 0.092025, pedigree (4,4,3,2,4)
  Literature value. In case when no industry/process specific data are available, default evaporation fraction value is used. This value is 15% and is based on literature (Statistics Canada, 2007 & Shaffer, K.H., 2008, Consumptive water use in the Great Lakes Basin, USGS & Shiklomanov, 2003, World Water Resources at the Beginning of the 21st Century) and has been approved by an expert.

## Reference product
- zinc coat, coils: 1 m2; CPC 39365: Waste and scrap of zinc; By-product classification allocatable product
  EcoSpold01Location=RER
  production volume 1.32237 m2
    This is a placeholder value that does not reflect real-world production volumes. This dataset does not currently require a real-world production volume to work in the database framework, and no actual data were collected yet. This has no negative effect on the results of the ecoinvent database. The placeholder value of this activity was scaled according to the nominal GDP of 2005 (source: United Nations, http://data.un.org/Glossary.aspx?q=GDP+%28current+US%24%29, accessed 20130726) to reflect an appropriate share of the global production volume, which is also a placeholder value.
  property price 1.17575 EUR2005
    Calculated based on inputs: The price of the product has been calculated as a sum of the values of the material and energy inputs for this product. This value is therefore a rough estimation. It may underestimate the real price since there are additional expenses when producing any product. These expences can include for example labour costs, treatment of waste materials and profit for the producer. Please consider carefully whether this level of data quality is acceptable for your application.

## Inputs from technosphere
- waste mineral oil: 0 kg; pedigree (1,1,1,1,1)
  EcoSpold01Location=CH
  production volume 0 kg
    Calculated from the production volume of zinc coat, coils in proportion to the respective output amounts.
  properties: water content 0.111111, dry mass 0.9 kg, heating value, net 34.7 MJ, carbon content, fossil 0.864444, wet mass 1 kg
  note on heating value, net: Value taken from the general comment of the treatment dataset.
  note on carbon content, fossil: Tab A.6, ecoinvent v2.2 report 13_I. C content has been calculated after data in the tables, and then referred to 1 kg DM
- water, deionised: 0 kg; name water_deionised_input; pedigree (1,1,1,1,1)
  EcoSpold01Location=CH
  properties: wet mass 1 kg
- sludge from steel rolling: -0.00951 kg; lognormal variance with pedigree 0.5, pedigree (1,1,5,1,1)
  EcoSpold01Location=CH
  calculated from max value assuming lognormal distribution
  production volume 0.00951 kg
    (same comment as for waste mineral oil)
  properties: water content 0.25, carbon content, fossil 0.0123943, wet mass 1 kg, dry mass 0.8 kg
- soda ash, light, crystalline, heptahydrate: 0.00167 kg; lognormal variance with pedigree 0.0486, pedigree (1,5,5,1,1)
  EcoSpold01Location=RER
  properties: carbon content, fossil 0.0517241, dry mass 1 kg, wet mass 1 kg, heating value, net 3.43 MJ
- sodium hydroxide, without water, in 50% solution state: 0.00352 kg; lognormal variance with pedigree 0.16, pedigree (1,1,5,1,1)
  EcoSpold01Location=RER
  calculated from max value assuming lognormal distribution
  properties: dry mass 1 kg, wet mass 1 kg, heating value, net 3.03 MJ
- nitrogen, liquid: 0.63 kg; lognormal variance with pedigree 0.25, pedigree (1,1,5,1,1)
  EcoSpold01Location=RER
  calculated from max value assuming lognormal distribution
  properties: wet mass 1 kg, dry mass 1 kg
- heat, district or industrial, other than natural gas: 0.196829 MJ; lognormal variance with pedigree 0.08, pedigree (1,1,5,1,1)
  properties: heating value, net 1 MJ
- zinc: 0.679 kg; lognormal variance with pedigree 0.12, pedigree (1,1,5,1,1)
  calculated from max value assuming lognormal distribution
  EcoSpold01Location=RER
  properties: dry mass 1 kg, wet mass 1 kg
- rolling mill: 2.54e-12 unit; lognormal variance with pedigree 0.3601, pedigree (4,4,5,3,1)
  EcoSpold01Location=RER
  activityLink introduced to establish a direct link to the corresponding regional supply of this product
- hydrochloric acid, without water, in 30% solution state: 0.34 kg; lognormal variance with pedigree 0.0486, pedigree (1,5,5,1,1)
  EcoSpold01Location=RER
  properties: wet mass 1 kg, dry mass 1 kg, heating value, net 3.32 MJ
- aluminium sulfate, powder: 6.07e-5 kg; lognormal variance with pedigree 0.0586, pedigree (2,5,5,1,1)
  EcoSpold01Location=RER
  properties: wet mass 1 kg, dry mass 1 kg
- lubricating oil: 0.053 kg; lognormal variance with pedigree 0.07, pedigree (1,1,5,1,1)
  calculated from max value assuming lognormal distribution
  EcoSpold01Location=RER
  properties: carbon content, fossil 0.75, dry mass 1 kg, wet mass 1 kg, heating value, net 40.2 MJ
  note on carbon content, fossil: Lubricating oil is produced from diesel. C-content/dry mass of fats and oils considered 75%, from: ecoinvent v2.2 report, n 15a, pg 40
  note on heating value, net: Literature value, Source: IPCC 2006, 2006 IPCC Guidelines for National Greenhouse Gas Inventories, Prepared by the National Greenhouse Gas Inventories Programme, Eggleston H.S., Buendia L., Miwa K., Ngara T. and Tanabe K. (eds). Published: IGES, Japan
- electricity, medium voltage: 0.344749 kWh; lognormal variance with pedigree 0.08, pedigree (1,1,5,1,1)
  EcoSpold01Location=UCTE
  calculated from max value assuming lognormal distribution
- ammonia, anhydrous, liquid: 0.00306 kg; lognormal variance with pedigree 0.45, pedigree (1,1,5,1,1)
  EcoSpold01Location=RER
  calculated from max value assuming lognormal distribution
  properties: wet mass 1 kg, dry mass 1 kg
- heat, district or industrial, natural gas: 17.8326 MJ; lognormal variance with pedigree 0.08, pedigree (1,1,5,1,1)
  calculated from max value assuming lognormal distribution
  EcoSpold01Location=RER
  properties: heating value, net 1 MJ
- hydrogen, liquid: 0.00192 kg; lognormal variance with pedigree 0.13, pedigree (1,1,5,1,1)
  calculated from max value assuming lognormal distribution
  EcoSpold01Location=RER
  properties: dry mass 1 kg, wet mass 1 kg, heating value, net 120.21 MJ
- waste mineral oil: -0.00343496, -8.5036e-5 kg (2 entries); lognormal variance with pedigree 0.098, pedigree (1,5,5,1,1)
  EcoSpold01Location=CH
  production volume 0.00352 kg
- water, deionised: 4.01555, 0.014455 kg (2 entries); lognormal variance with pedigree 0.178, pedigree (4,5,5,5,5)
  EcoSpold01Location=CH

## Inputs from nature
- Water, unspecified natural origin [natural resource, in water]: 0.0118 m3; name water_UNO_input; lognormal variance with pedigree 0.058, pedigree (1,5,5,1,1)

## Emissions to nature
- Chromium VI [water, unspecified]: 6.72e-8 kg; lognormal variance with pedigree 0.16, pedigree (1,1,5,1,1)
  calculated from max value assuming lognormal distribution
- Water [water, unspecified]: 0.0134555 m3; name water_to_water_unspecified; = (water_deionised_input/1000)*(1-fraction_WDI_to_air)+water_UNO_input*(1-fraction_PW_to_air); lognormal variance with pedigree 0.0807, pedigree (2,2,5,1,1)
  Calculated value based on literature values and expert opinion. See comments in the parametres' comment field.
  property water in wet mass 1000 kg; name WWM
  property dry mass 0 kg; name DM
  property carbon content, fossil 0; name C_content_fossil
  property fraction, origin: salt water 0; name fraction_origin_salt_water_Ww
  property fraction, origin: fresh water 0.25458; name fraction_origin_fresh_water_Ww
  property carbon content, non-fossil 0; name C_content_non_fossil
  property fraction, origin: unspecified 0.74542; name fraction_origin_unspecified_Ww
  property wet mass 1000 kg; name WM
- COD, Chemical Oxygen Demand [water, unspecified]: 0.000428 kg; lognormal variance with pedigree 0.76, pedigree (1,1,5,1,1)
  calculated from max value assuming lognormal distribution
- Lead [water, unspecified]: 1.31e-7 kg; lognormal variance with pedigree 0.698, pedigree (1,5,5,1,1)
- Arsenic [air, unspecified]: 3.71e-9 kg; lognormal variance with pedigree 0.098, pedigree (1,5,5,1,1)
- Iron [air, unspecified]: 2.73e-5 kg; lognormal variance with pedigree 0.098, pedigree (1,5,5,1,1)
- BOD5, Biological Oxygen Demand [water, unspecified]: 0.000428 kg; lognormal variance with pedigree 1.48, pedigree (1,1,5,1,1)
  Twice the uncertainty of COD
- Zinc, ion [water, unspecified]: 1.56e-6 kg; lognormal variance with pedigree 2.28, pedigree (1,1,5,1,1)
  calculated from max value assuming lognormal distribution
- Water [air, unspecified]: 0.0023745 m3; name water_to_air_unspecified; = (water_deionised_input/1000*fraction_WDI_to_air)+(water_UNO_input*fraction_PW_to_air); lognormal variance with pedigree 0.0807, pedigree (2,2,5,1,1)
  (same comment as for Water)
  property fraction, origin: fresh water 0.25458; name fraction_origin_fresh_water
  property fraction, origin: unspecified 0.74542; name fraction_origin_unspecified
  property fraction, origin: salt water 0; name fraction_origin_salt_water
- Lead [air, unspecified]: 6.63e-8 kg; lognormal variance with pedigree 0.098, pedigree (1,5,5,1,1)
- Nickel, ion [water, unspecified]: 1.98e-7 kg; lognormal variance with pedigree 0.37, pedigree (1,1,5,1,1)
  calculated from max value assuming lognormal distribution
- Chloride [water, unspecified]: 3.13e-5 kg; lognormal variance with pedigree 0.098, pedigree (1,5,5,1,1)
- Iron [soil, unspecified]: 0.00994 kg; lognormal variance with pedigree 0.73, pedigree (1,1,5,1,1)
  calculated from max value assuming lognormal distribution
- Suspended solids, unspecified [water, unspecified]: 5.33e-6 kg; lognormal variance with pedigree 1.19, pedigree (1,1,5,1,1)
  calculated from max value assuming lognormal distribution
- Zinc [air, unspecified]: 1.31e-5 kg; lognormal variance with pedigree 0.098, pedigree (1,5,5,1,1)
- Oils, unspecified [water, unspecified]: 6.94e-6 kg; lognormal variance with pedigree 0.85, pedigree (1,1,5,1,1)
  calculated from max value assuming lognormal distribution
- Phosphorus [water, unspecified]: 1.17e-7 kg; lognormal variance with pedigree 1.29, pedigree (1,1,5,1,1)
  calculated from max value assuming lognormal distribution
- Hydrocarbons, unspecified [water, unspecified]: 1.16e-6 kg; lognormal variance with pedigree 0.358, pedigree (1,5,5,1,1)
- Cadmium [air, unspecified]: 2.56e-8 kg; lognormal variance with pedigree 0.098, pedigree (1,5,5,1,1)
- Sodium [air, unspecified]: 4.49e-7 kg; lognormal variance with pedigree 0.178, pedigree (1,5,5,1,1)
- Iron, ion [water, unspecified]: 1.15e-5 kg; lognormal variance with pedigree 1.14, pedigree (1,1,5,1,1)
  calculated from max value assuming lognormal distribution
- Ammonia [air, unspecified]: 0.109 kg; lognormal variance with pedigree 0.178, pedigree (1,5,5,1,1)
- DOC, Dissolved Organic Carbon [water, unspecified]: 1.99e-5 kg; lognormal variance with pedigree 1.72, pedigree (1,1,5,1,1)
  Twice the uncertainty of TOC
- Particulates, > 2.5 um, and < 10um [air, unspecified]: 0.0171 kg; lognormal variance with pedigree 0.178, pedigree (1,5,5,1,1)
- Sodium, ion [water, unspecified]: 0.00404 kg; lognormal variance with pedigree 0.098, pedigree (1,5,5,1,1)
- Particulates, > 10 um [air, unspecified]: 0.0057 kg; lognormal variance with pedigree 0.098, pedigree (1,5,5,1,1)
- Hydrogen chloride [air, unspecified]: 0.0505 kg; lognormal variance with pedigree 0.1686, pedigree (2,5,5,1,1)
- Chromium, ion [water, unspecified]: 1.44e-6 kg; lognormal variance with pedigree 0.16, pedigree (1,1,5,1,1)
  calculated from max value assuming lognormal distribution
- TOC, Total Organic Carbon [water, unspecified]: 1.99e-5 kg; lognormal variance with pedigree 0.94, pedigree (1,1,5,1,1)
  calculated from max value assuming lognormal distribution

## Sampling procedure
Literature

## Extrapolations
This dataset has been extrapolated from year 2002 to the year of the calculation (2021). The uncertainty has been adjusted accordingly.

## Review by Roland Hischier 2003-08-14
Passed.
