# fruit tree seedling production, for planting

Dataset: EcoSpold 2, unit process
Geography: RoW
Time period: 2000-01-01 to 2021-12-31
Technology level: current
Classification: ISIC rev.4 ecoinvent: 0130:Plant propagation
Tags: WFLDB
Scenario: Business-as-Usual
System model: Allocation, cut-off by classification
Generated by: [System]
Database: ecoinvent
isCopyrightProtected: true
accessRestrictedTo: 1

## General comment
This global dataset is a copy of the regional CH dataset, except for the following modifications.
The production volume represents the global annual production.
The geographicalCorrelation score of every pedigree matrix of was changed to '5'.
The comments below were part of the CH regional dataset.
The dataset refers to the production of 25600 of fruit tree seedlings which is the yield of 1 ha of one nursery period which lasts 824 days. This dataset refers to an average situation; for specific situations exchanges might differ substantially due to site specific parameters

## Included activities start
The activity starts with the production of rootstocks and stems and the process of grafting. This activity includes agricultural machinery, mineral and organic fertilisers, pesticides and ground cultivation.

## Included activities end
The dataset contains the production tree seedlings in a nursery for plantation in fruit tree orchards such as apple orchards. The seedlings are produced on the open field, without irrigation. Transport from the nursery to the farm is not included. The activity ends with a one year old tree seedling at the nursery ready to be sold for plantation in a fruit orchard.

## Time period
Time period referring to the data source: 2000-2000. Based on expert opinion data is considered to be valid at least up to 2012.

## Reference product
- fruit tree seedling, for planting: 1 unit; CPC 01961: Live plants; bulbs, tubers and roots; cuttings and slips; mushroom spawn; By-product classification allocatable product
  production volume 1.30484e10 unit
    Source: FAOSTAT. Average, 2009-2012. Calculation method: fruit tree area * planting density
  property price 0.397706 EUR2005
    Calculated based on inputs: The price of the product has been calculated as a sum of the values of the material and energy inputs for this product. This value is therefore a rough estimation. It may underestimate the real price since there are additional expenses when producing any product. These expences can include for example labour costs, treatment of waste materials and profit for the producer. Please consider carefully whether this level of data quality is acceptable for your application.
  property carbon content, non-fossil 0.439481
    calculation: C-content of components according to ecoinvent report No. 15a. Source of composition: https://ndb.nal.usda.gov/ndb/search/. Unspecific seedling used as proxy.
  property carbon content 0.439481
    carbon content on a dry matter basis (reserved; not for manual entry)
  properties: water content 0.73, dry mass 0.578035 kg, carbon content, fossil 0, water in wet mass 0.421965 kg, wet mass 1 kg, carbon allocation 0.254036 kg

## Inputs from technosphere
- tillage, rotary cultivator: 3.90625e-5 ha; lognormal variance with pedigree 0.0153563, pedigree (2,1,4,5,1)
  Corresponds to 1 pass-through per year
- electricity, low voltage: 0 kWh; pedigree (1,1,1,1,1)
  Corresponds to 19796 MJ/ha per year
- inorganic nitrogen fertiliser, as N: 0 kg; pedigree (1,1,1,1,1)
  Corresponds to 90.0 kg/ha per year
  properties: wet mass 1 kg, dry mass 1 kg
- tractor, 4-wheel, agricultural: 0.000106336 kg; lognormal variance with pedigree 1.21997, pedigree (2,1,4,5,1)
  Corresponds to machinery operation of 0.00018 h per tree seedling respectively 4.7 h/ha. Assumptions: machinery weight of 3000 kg, 7000 hours lifetime and 0.74 repair factor; representativness of this class of machinery are for example: tractor.
- hoeing: 0.000234375 ha; lognormal variance with pedigree 0.0153563, pedigree (2,1,4,5,1)
  Cultivation within nursery rows, corresponds to 6 pass-throughs per year
- compost: 7.8125e-5 kg; lognormal variance with pedigree 0.0158498, pedigree (2,2,4,5,1)
  Corresponds to 2.0 kg/ha per year
  properties: nitrogen content 0.014, wet mass 1 kg, dry mass 0.5 kg, nickel content 1.63e-5, potassium content 0.01, mercury content 1.2e-7, chromium content 2.23e-5, lead content 4.9e-5, phosphorus content 0.0035, copper content 5.77e-5, water content 1, cadmium content 3.6e-7, zinc content 0.000184, carbon content, non-fossil 0.183645
- inorganic phosphorus fertiliser, as P2O5: 0 kg; pedigree (1,1,1,1,1)
  Corresponds to 11.42 kg/ha per year
  properties: wet mass 1 kg, dry mass 1 kg
- mulching: 0.000417578 ha; lognormal variance with pedigree 0.0153563, pedigree (2,1,4,5,1)
  Cultivation of grass area between nursery rows, corresponds to 10.69 pass-throughs per year
- packaging, for pesticides: 0.00142734 kg; lognormal variance with pedigree 0.0592, pedigree (4,3,4,5,4)
  Total amount of active substance/s of pesticides needed for the production of fruit tree seedling, for planting is calculated to be circa 7.14E-04 kg. Pesticide/s used in this dataset is/are: '[thio]carbamate-compound', 'copper oxide', 'cyclic N-compound', 'nitrile-compound'. The total amount of active substance/s is doubled in order to account for the packaging of the dilluted product of pesticide/s that is/are applied. Therefore, 1.43E-03 kg of packaging for pesticides is justified with this exchange.
  properties: wet mass 1 kg, price 0.0642 EUR2005, heating value, net 25.97 MJ, dry mass 1 kg, carbon content, fossil 0.85714
- agricultural trailer: 0.00569648 kg; lognormal variance with pedigree 1.21997, pedigree (2,1,4,5,1)
  Corresponds to machinery operation of 0.00308 h per tree seedling respectively 78.7 h/ha. Assumptions: machinery weight of 1000 kg, 1000 hours lifetime and 0.54 repair factor; representativness of this class of machinery are for example: seeder, hoe or self-loading trailer.
- nitrile-compound: 0.000193906 kg; lognormal variance with pedigree 0.0158498, pedigree (2,2,4,5,1)
  Fungicide, corresponds to 4.96 kg/ha per year
  properties: dry mass 1 kg, wet mass 1 kg, carbon content, fossil 0.344995
- cyclic N-compound: 1.44727e-5 kg; lognormal variance with pedigree 0.0158498, pedigree (2,2,4,5,1)
  Fungicide, corresponds to 0.37 kg/ha per year
  properties: wet mass 1 kg, dry mass 1 kg, carbon content, fossil 0.641962
- [thio]carbamate-compound: 2.31563e-5 kg; lognormal variance with pedigree 0.0158498, pedigree (2,2,4,5,1)
  Insecticide, corresponds to 0.59 kg/ha per year
  properties: wet mass 1 kg, dry mass 1 kg, carbon content, fossil 0.626349
- potassium chloride: 0.00659128 kg; lognormal variance with pedigree 0.0153563, pedigree (2,1,4,5,1)
  The exchange has been updated from 'potassium chloride, as K2O' into 'potassium chloride' and therefore its amount has been scaled (multiplied) from 0.0042 kg by 1.5829 kg of 'potassium chloride' per kg of 'potassium chloride, as K2O'. Original comment of the exchange is: Corresponds to 106.6 kg/ha per year
  properties: dry mass 1 kg, wet mass 1 kg
- diesel, burned in agricultural machinery: 0.000871563 MJ; lognormal variance with pedigree 0.0153563, pedigree (2,1,4,5,1)
  Corresponds to 22.31 MJ/ha per year; used for divers transport om the farm with tractor and trailer
- agricultural machinery, unspecified: 0.000651055 kg; lognormal variance with pedigree 1.21997, pedigree (2,1,4,5,1)
  The functional unit is 1kg machinery during its lifetime. Calculations are made with a mean machinery weight of 1000 kg, 1000 hours lifetime and 0.54 repair factor. Representatives of this class of machinery are for example: seeder, hoe or self-loading trailer.
- potassium sulfate: 0.00385168 kg; lognormal variance with pedigree 0.0153563, pedigree (2,1,4,5,1)
  The exchange has been updated from 'potassium sulfate, as K2O' into 'potassium sulfate' and therefore its amount has been scaled (multiplied) from 0.0021 kg by 1.85 kg of 'potassium sulfate' per kg of 'potassium sulfate, as K2O'.
  properties: wet mass 1 kg, dry mass 1 kg
- fertilising, by broadcaster: 0.000288359 ha; lognormal variance with pedigree 0.0153563, pedigree (2,1,4,5,1)
  Corresponds to 7.38 applications per year
- copper oxide: 0.000482137 kg; lognormal variance with pedigree 0.0158498, pedigree (2,2,4,5,1)
  Fungicide, corresponds to 12.34 kg/ha per year
  properties: wet mass 1 kg, dry mass 1 kg
- application of plant protection product, by field sprayer: 0.000871563 ha; lognormal variance with pedigree 0.0158498, pedigree (2,2,4,5,1)
  Corresponds to 22.31 applications per year
- tillage, harrowing, by rotary harrow: 7.8125e-5 ha; lognormal variance with pedigree 0.0153563, pedigree (2,1,4,5,1)
  Corresponds to 2 pass-throughs per year
- packaging, for fertilisers: 0.0361156 kg; lognormal variance with pedigree 0.0592, pedigree (4,3,4,5,4)
  Total amount of active substance/s of fertilisers needed for the production of 'fruit tree seedling, for planting' is calculated to be circa 1.81E-02 kg. Fertiliser/s used in this dataset is/are: 'ammonium nitrate, as N', 'nitrogen fertiliser, as N', 'phosphate fertiliser, as P2O5', 'potassium chloride, as K2O', 'potassium sulfate, as K2O'. The total amount of active substance/s is doubled in order to account for the packaging of the dilluted product of fertiliser/s that is/are applied. Therefore, 3.61E-02 kg of packaging for fertilisers is justified with this exchange.
  properties: price 0.0642 EUR2005, heating value, net 25.01 MJ, wet mass 1 kg, dry mass 1 kg, carbon content, fossil 0.825301
  note on carbon content, fossil: Considering a chemical formula (C2H4)n for polyethylene, carbon content-fossil is calculated to be 0.856286 kg of Carbon per kg of dry mass.
- mowing, by rotary mower: 3.90625e-5 ha; lognormal variance with pedigree 0.0153563, pedigree (2,1,4,5,1)
  Corresponds to 1 pass-through per year
- ammonium nitrate: 0 kg; pedigree (1,1,1,1,1)
  The exchange has been updated from 'ammonium nitrate, as N' into 'ammonium nitrate' and therefore its amount has been scaled (multiplied) from 0.0079 kg by 2.8573 kg of 'ammonium nitrate' per kg of 'ammonium nitrate, as N'. Original comment of the exchange is: Corresponds to 200.96 kg/ha per year
  properties: wet mass 1 kg, dry mass 1 kg
- shed, large, wood, non-insulated, fire-unprotected: 0.00226953 m2; lognormal variance with pedigree 1.21997, pedigree (2,1,4,5,1)
  For storage of divers materials 58.1 m2/ha and year
  properties: Surface 264 m2, lifetime 50 year
- electricity, low voltage: 0.00807283, 0.00146991, 0.0331814, 0.115928, 0.0236674, 0.363369, 0.0587868, 0.168805 kWh (8 entries); lognormal variance with pedigree 0.0153563, pedigree (2,1,4,5,1)
  Corresponds to 19796 MJ/ha per year
- inorganic nitrogen fertiliser, as N: 3.16471e-7, 1.68651e-5, 2.11444e-6, 2.42413e-5, 6.13814e-7, 2.16661e-5, 2.84371e-6, 6.88411e-6, 7.61094e-5, 4.54535e-5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 kg (63 entries); lognormal variance with pedigree 0.0153563, pedigree (2,1,4,5,1)
  Corresponds to 90.0 kg/ha per year
- inorganic phosphorus fertiliser, as P2O5: 3.79844e-8, 3.14713e-6, 2.01784e-7, 4.08313e-6, 4.49519e-8, 3.2695e-6, 8.83055e-8, 4.65003e-7, 2.56001e-5, 5.39423e-6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 kg (63 entries); lognormal variance with pedigree 0.0153563, pedigree (2,1,4,5,1)
  Corresponds to 11.42 kg/ha per year
- ammonium nitrate: 0.003938, 0.00512355, 0.0133684 kg (3 entries); lognormal variance with pedigree 0.0153563, pedigree (2,1,4,5,1)
  (same comment as for ammonium nitrate)

## Inputs from nature
- Carbon dioxide, in air [natural resource, in air]: 0.071 kg; lognormal variance with pedigree 0.177866, pedigree (2,2,4,5,1)
  Calculated based on C-content of harvested product. Corresponds to 1810 kg/ha. The CO2 uptake is calculated from the carbon content of the product (i.e. tree seedlings); it is estimated by the following assumptions: tree hight 1.50 m; tree dyameter 0.01 m; specific weight of dry wood (20% water content) 650 kg/m3; (results in 0.077 kg/tree dry wood; CO2 fixation: 600 kg CO2/m3 dry wood
- Energy, gross calorific value, in biomass [natural resource, biotic]: 1.45 MJ; lognormal variance with pedigree 0.177866, pedigree (2,2,4,5,1)
  Corresponds to 2910 MJ/ha. Assumptions: gross caloric value 19 MJ/kg dry wood (20% water content); 0.077 kg/tree dry wood after nursery.
- Transformation, to pasture, man made, intensive [natural resource, land]: 0.0484766 m2; lognormal variance with pedigree 0.0462144, pedigree (2,1,4,5,1)
  corresponds to 1241 m2 land use change related to 10000 of nursery area
- Occupation, pasture, man made, intensive [natural resource, land]: 0.915508 m2*year; lognormal variance with pedigree 0.0220616, pedigree (2,1,4,5,1)
  Related to the duration from harvest date of previous crop to harvest date of main crop
- Transformation, from pasture, man made, intensive [natural resource, land]: 0.0484766 m2; lognormal variance with pedigree 0.0462144, pedigree (2,1,4,5,1)
  corresponds to 1241 m2 land use change related to 10000 of nursery area

## Emissions to nature
- Chromium, ion [water, ground-]: 1.64973e-6 kg; source Freiermuth R. 2006; lognormal variance with pedigree 0.358938, pedigree (2,2,4,5,1)
  Corresponds to 4.2E-02 kg/ha per year
- Chromium, ion [water, surface water]: 3.87395e-7 kg; source Freiermuth R. 2006; lognormal variance with pedigree 0.358938, pedigree (2,2,4,5,1)
  Corresponds to 9.9E-03 kg/ha per year
- Copper, ion [water, ground-]: 3.48832e-7 kg; source Freiermuth R. 2006; lognormal variance with pedigree 0.358938, pedigree (2,2,4,5,1)
  Corresponds to 8.9E-03 kg/ha per year
- Copper, ion [water, surface water]: 3.67816e-7 kg; source Freiermuth R. 2006; lognormal variance with pedigree 0.358938, pedigree (2,2,4,5,1)
  Corresponds to 9.4E-03 kg/ha per year
- Lead [water, ground-]: 1.23094e-8 kg; source Freiermuth R. 2006; lognormal variance with pedigree 0.358938, pedigree (2,2,4,5,1)
- Lead [water, surface water]: 1.04684e-7 kg; source Freiermuth R. 2006; lognormal variance with pedigree 0.358938, pedigree (2,2,4,5,1)
  Corresponds to 2.7E-03 kg/ha per year
- Copper [soil, agricultural]: 0.000507813 kg; source Freiermuth R. 2006; lognormal variance with pedigree 0.177866, pedigree (2,2,4,5,1)
  Fungicide, corresponds to 13 kg/ha per year
- Mercury [water, ground-]: 1.10531e-12 kg; source Freiermuth R. 2006; lognormal variance with pedigree 0.358938, pedigree (2,2,4,5,1)
  Corresponds to 2.8E-08 kg/ha per year
- Cyprodinil [soil, agricultural]: 0.000193906 kg; lognormal variance with pedigree 0.0467216, pedigree (2,2,4,5,1)
  Fungicide, corresponds to 5 kg/ha per year
- Mercury [water, surface water]: 1.78551e-12 kg; lognormal variance with pedigree 0.358938, pedigree (2,2,4,5,1)
  Corresponds to 4.6E-08 kg/ha per year
- Lead [soil, agricultural]: 3.88836e-7 kg; source Freiermuth R. 2006; lognormal variance with pedigree 0.177866, pedigree (2,2,4,5,1)
  Corresponds to 0.01 kg/ha per year
- Nickel, ion [water, surface water]: 2.49801e-7 kg; source Freiermuth R. 2006; lognormal variance with pedigree 0.358938, pedigree (2,2,4,5,1)
  Corresponds to 6.4E-03 kg/ha per year
- Mercury [soil, agricultural]: 2.01227e-12 kg; source Freiermuth R. 2006; lognormal variance with pedigree 0.177866, pedigree (2,2,4,5,1)
  Corresponds to 5.2E-08 kg/ha per year
- Phosphate [water, ground-]: 1.8723e-5 kg; source Prasuhn V.  2006; lognormal variance with pedigree 0.177866, pedigree (2,2,4,5,1)
  Corresponds to 0.5 kg/ha per year
- Nickel [soil, agricultural]: 5.15e-7 kg; source Freiermuth R. 2006; lognormal variance with pedigree 0.177866, pedigree (2,2,4,5,1)
  Corresponds to 1.3E-02 kg/ha per year
- Phosphate [water, surface water]: 7.2707e-5 kg; source Prasuhn V.  2006; lognormal variance with pedigree 0.177866, pedigree (2,2,4,5,1)
  Corresponds to 1.9 kg/ha per year
- Pirimicarb [soil, agricultural]: 2.31563e-5 kg; lognormal variance with pedigree 0.0467216, pedigree (2,2,4,5,1)
  Insecticide, corresponds to 0.6 kg/ha per year
- Phosphorus [water, surface water]: 1.8041e-5 kg; source Prasuhn V.  2006; lognormal variance with pedigree 0.177866, pedigree (2,2,4,5,1)
  Corresponds to 0.5 kg/ha per year
- Zinc [soil, agricultural]: 3.15602e-6 kg; source Freiermuth R. 2006; lognormal variance with pedigree 0.177866, pedigree (2,2,4,5,1)
  Corresponds to 0.1 kg/ha per year
- Zinc, ion [water, ground-]: 1.07906e-6 kg; source Freiermuth R. 2006; lognormal variance with pedigree 0.358938, pedigree (2,2,4,5,1)
  Corresponds to 2.8E-02 kg/ha per year
- Fludioxonil [soil, agricultural]: 1.44727e-5 kg
  Fungicide, corresponds to 0.4 kg/ha per year
- Ammonia [air, non-urban air or from high stacks]: 0.000276023 kg; source EEA 2013; lognormal variance with pedigree 0.0467216, pedigree (2,2,4,5,1)
  Corresponds to 7.07 kg/ha per year
- Zinc, ion [water, surface water]: 4.38164e-7 kg; source Freiermuth R. 2006; lognormal variance with pedigree 0.358938, pedigree (2,2,4,5,1)
  Corresponds to 1.1E-02 kg/ha per year
- Dinitrogen monoxide [air, non-urban air or from high stacks]: 0.000182176 kg; lognormal variance with pedigree 0.177866, pedigree (2,2,4,5,1)
  Corresponds to 4.66 kg/ha per year
- Cadmium [soil, agricultural]: 1.61668e-7 kg; source Freiermuth R. 2006; lognormal variance with pedigree 0.177866, pedigree (2,2,4,5,1)
  Corresponds to 4.1E-03 kg/ha per year
- Nitrogen oxides [air, non-urban air or from high stacks]: 3.82566e-5 kg; source EEA 2013; lognormal variance with pedigree 0.177866, pedigree (2,2,4,5,1)
  Corresponds to 0.98 kg/ha per year
- Chromium [soil, agricultural]: 5.3793e-6 kg; source Freiermuth R. 2006; lognormal variance with pedigree 0.177866, pedigree (2,2,4,5,1)
  Corresponds to 0.1 kg/ha per year
- Cadmium, ion [water, ground-]: 2.9909e-9 kg; source Freiermuth R. 2006; lognormal variance with pedigree 0.358938, pedigree (2,2,4,5,1)
  Corresponds to 7.7E-05 kg/ha per year
- Cadmium, ion [water, surface water]: 3.83402e-9 kg; source Freiermuth R. 2006; lognormal variance with pedigree 0.358938, pedigree (2,2,4,5,1)
  Corresponds to 9.8E-05 kg/ha per year

## Sampling procedure
Data were collected by contacting 3 nurseries in Switzerland. The sampling was carried out at Agroscope by Patrik Mouron and Franziska Heller.
Direct field emissions are calculated according to SALCA (Swiss Agricultural Life Cycle Assessment). Details can be taken from: T. Nemecek, R. F. Knuchel, M. Alig, G. Gaillard, 2010. The advantages of generic LCA tools for agriculture: example SALCAcrop and SALCAfarm). Proceeding of the 7th Int. conference on life cycle assessment in the agri-food sector, Bari, Italy, 22-24 September 2010, pp. 433-438

## Extrapolations
The amount of the exchanges are copy from a regional dataset.
