# treatment of hard coal ash, municipal incineration

Dataset: EcoSpold 2, unit process
Geography: CH
Time period: 1994-01-01 to 2021-12-31
Technology level: outdated
Classification: EcoSpold01Categories: waste management/municipal incineration
Classification: ISIC rev.4 ecoinvent: 3821:Treatment and disposal of non-hazardous waste
Tags: ConvertedDataset; Treatment
Scenario: Business-as-Usual
System model: Allocation, cut-off by classification
Generated by: Gabor Doka (obsolete)
Published in: Doka G. 2007
Database: ecoinvent
isCopyrightProtected: true
accessRestrictedTo: 1

## General comment
Inventoried waste contains 100% hard coal ash small scale; .
waste composition (wet, in ppm): upper heating value 0.4712 MJ/kg; H2O n.a.; O 298030; H n.a.; C 100000; S n.a.; N n.a.; P 980; B 350; Cl n.a.; Br 97; F n.a.; I 16.4; Ag n.a.; As 92; Ba 1960; Cd 4.5; Co 49; Cr 192; Cu 146.25; Hg 0.1; Mn 693; Mo 28.5; Ni 194; Pb 376; Sb 9.5; Se 7; Sn 19.8; V 388; Zn 475; Be 19.6; Sc 39.6; Sr 1940; Ti 5880; Tl 9.5; W n.a.; Si 245000; Fe 68600; Ca 19600; Al 166600; K 19600; Mg 58800; Na 9800;
Share of carbon in waste that is biogenic 0%.
Share of iron in waste that is metallic/recyclable 0%.
Net energy produced in MSWI: 0MJ/kg waste electric energy and 0MJ/kg waste thermal energy
Allocation of energy production: no substitution or expansion. Total burden allocated to waste disposal function of MSWI.
One kg of this waste produces 1.17 kg of slag and 0 kg of residues, which are landfilled.
[This dataset was already contained in the ecoinvent database version 2. It was not individually updated during the transfer to ecoinvent version 3. Life Cycle Impact Assessment results may still have changed, as they are affected by changes in the supply chain, i.e. in other datasets. This dataset was generated following the ecoinvent quality guidelines for version 2. It may have been subject to central changes described in the ecoinvent version 3 change report (http://www.ecoinvent.org/database/ecoinvent-version-3/reports-of-changes/), and the results of the central updates were reviewed extensively. The changes added e.g. consistent water flows and other information throughout the database. The documentation of this dataset can be found in the ecoinvent reports of version 2, which are still available via the ecoinvent website. The change report linked above covers all central changes that were made during the conversion process.]

## Included activities end
waste-specific air and water emisions from incineration, auxiliary material consumption for flue gas cleaning. Short-term emissions to river water and long-term emisisons to ground water from slag compartment (from bottom slag) and residual material landfill (from solidified fly ashes and scrubber slugde). Process energy demands for MSWI.

## Geography
Specific to the technology mix encountered in Switzerland in 2000. Well applicable to modern incineration practices in Europe, North America or Japan.

## Technology
average Swiss MSWI plants in 2000 with electrostatic precipitator for fly ash (ESP), wet flue gas scrubber and 29.4% SNCR , 32.2% SCR-high dust , 24.6% SCR-low dust -DeNOx facilities and 13.8% without Denox (by burnt waste, according to Swiss average). Share of waste incinerated in plants with magnetic scrap separation from slag : 50%. Gross electric efficiency technology mix 12.997% and Gross thermal efficiency technology mix 25.57%

## Time period
Waste composition as given in literature reference, theoretical data or other source. Transfer coefficients for modern Swiss MSWI. Emission speciation based on early 90ies data.

## Reference product
- hard coal ash: -1 kg; By-product classification Waste; CPC 39: Wastes or scraps
  EcoSpold01Location=CH
  production volume 0 kg
    Outdated. Treatment of hard coal ash for CH has been substituted by "treatment of hard coal ash, municipal incineration with fly ash extraction" which models the country's technology mix for this treatment
  property price 0 EUR2005
    Waste products are assigned a price of zero as they are assumed to require further treatment.
  property carbon content 0.1
    carbon content on a dry matter basis (reserved; not for manual entry)
  properties: carbon content, fossil 0.1, water in wet mass 0 kg, carbon content, non-fossil 0, dry mass 1 kg, water content 0, wet mass 1 kg, carbon allocation 0.1 kg

## Inputs from technosphere
- heat, for reuse in municipal waste incineration only: 0.839 MJ; name E_th_prod_MSWI; lognormal variance with pedigree 0.04, pedigree (1,1,5,1,1)
  uncertainty is calculated from uncertainties in waste composition and uncertainties in energy efficiency and the uncertainty in internal energy demand
- slag landfill: 2.08e-9 unit; lognormal variance with pedigree 0.05, pedigree (1,1,5,1,1)
  uncertainty is calculated from uncertainties in waste composition and transfer coefficients in incinerator
  EcoSpold01Location=CH
- municipal waste incineration facility: 2.5e-10 unit; lognormal variance with pedigree 0.04, pedigree (1,1,5,1,1)
  EcoSpold01Location=CH
  demands per kilogram waste. uncertainty is heeded in the module
- process-specific burdens, slag landfill: 1.17 kg; lognormal variance with pedigree 0.05, pedigree (1,1,5,1,1)
  uncertainty is calculated from uncertainties in waste composition and transfer coefficients in incinerator;activityLink introduced to establish a direct link to the corresponding regional supply of this product
  EcoSpold01Location=CH
- electricity, for reuse in municipal waste incineration only: 0.144 kWh; name E_el_prod_MSWI; lognormal variance with pedigree 0.48, pedigree (1,1,5,1,1)
  (same comment as for heat, for reuse in municipal waste incineration only)
- process-specific burdens, municipal waste incineration: 1 kg; lognormal variance with pedigree 0.04, pedigree (1,1,5,1,1)
  demands per kilogram waste. uncertainty is heeded in the module;activityLink introduced to establish a direct link to the corresponding regional supply of this product
  EcoSpold01Location=CH

## Emissions to nature
- Magnesium [water, ground-, long-term]: 0.0586 kg; lognormal variance with pedigree 0.21, pedigree (1,1,5,1,1)
  Long-term emissions from landfilling of incineration residues. uncertainty is calculated from uncertainties in waste composition and transfer coefficients in incinerator and landfills.
- Thallium [water, ground-, long-term]: 9.49e-6 kg; lognormal variance with pedigree 1.31, pedigree (1,1,5,1,1)
  (same comment as for Magnesium)
- Potassium, ion [water, surface water]: 0.00237 kg; lognormal variance with pedigree 0.43, pedigree (1,1,5,1,1)
  uncertainty is calculated from uncertainties in waste composition and transfer coefficients in incinerator and landfills
- Silicon [water, ground-, long-term]: 0.0021 kg; lognormal variance with pedigree 5.75, pedigree (1,1,5,1,1)
  (same comment as for Magnesium)
- Sodium, ion [water, ground-, long-term]: 0.0086 kg; lognormal variance with pedigree 0.41, pedigree (1,1,5,1,1)
  (same comment as for Magnesium)
- Iodide [water, ground-, long-term]: 1.48e-12 kg; lognormal variance with pedigree 1.27, pedigree (1,1,5,1,1)
  (same comment as for Magnesium)
- Chromium VI [water, ground-, long-term]: 1.26e-6 kg; lognormal variance with pedigree 4.23, pedigree (1,1,5,1,1)
  (same comment as for Magnesium)
- Strontium [water, ground-, long-term]: 0.00194 kg; lognormal variance with pedigree 0.61, pedigree (1,1,5,1,1)
  (same comment as for Magnesium)
- Nickel, ion [water, ground-, long-term]: 0.000194 kg; lognormal variance with pedigree 0.91, pedigree (1,1,5,1,1)
  (same comment as for Magnesium)
- Iron, ion [water, ground-, long-term]: 0.0357 kg; lognormal variance with pedigree 0.3, pedigree (1,1,5,1,1)
  (same comment as for Magnesium)
- Cobalt [water, surface water]: 6.82e-9 kg; lognormal variance with pedigree 2, pedigree (1,1,5,1,1)
  (same comment as for Potassium, ion)
- Potassium, ion [water, ground-, long-term]: 0.0172 kg; lognormal variance with pedigree 0.33, pedigree (1,1,5,1,1)
  (same comment as for Magnesium)
- Copper, ion [water, surface water]: 5.08e-9 kg; lognormal variance with pedigree 2.05, pedigree (1,1,5,1,1)
  (same comment as for Potassium, ion)
- Aluminium [water, ground-, long-term]: 0.136 kg; lognormal variance with pedigree 0.13, pedigree (1,1,5,1,1)
  (same comment as for Magnesium)
- Methane, fossil [air, urban air close to ground]: 6.38e-6 kg; lognormal variance with pedigree 0.091225, pedigree (2,3,5,2,1)
  Confidential data from 5 plants in Switzerland and Germany
  Uncertainty: & basic uncertainty of 1.5; confidential data from 5 plants in Switzerland and Germany
- Arsenic, ion [water, ground-, long-term]: 9.19e-5 kg; lognormal variance with pedigree 1.01, pedigree (1,1,5,1,1)
  (same comment as for Magnesium)
- Iron, ion [water, surface water]: 5.74e-7 kg; lognormal variance with pedigree 1.48, pedigree (1,1,5,1,1)
  (same comment as for Potassium, ion)
- Phosphate [water, surface water]: 6.62e-8 kg; lognormal variance with pedigree 1.86, pedigree (1,1,5,1,1)
  (same comment as for Potassium, ion)
- Calcium, ion [water, ground-, long-term]: 0.0195 kg; lognormal variance with pedigree 0.33, pedigree (1,1,5,1,1)
  (same comment as for Magnesium)
- Zinc, ion [water, surface water]: 1.41e-8 kg; lognormal variance with pedigree 1.91, pedigree (1,1,5,1,1)
  (same comment as for Potassium, ion)
- Silicon [water, surface water]: 9.04e-6 kg; lognormal variance with pedigree 1.18, pedigree (1,1,5,1,1)
  (same comment as for Potassium, ion)
- Titanium, ion [water, surface water]: 2.84e-8 kg; lognormal variance with pedigree 1.83, pedigree (1,1,5,1,1)
  (same comment as for Potassium, ion)
- Cobalt [water, ground-, long-term]: 4.9e-5 kg; lognormal variance with pedigree 1.1, pedigree (1,1,5,1,1)
  (same comment as for Magnesium)
- COD, Chemical Oxygen Demand [water, ground-, long-term]: 0.252 kg; lognormal variance with pedigree 0.16, pedigree (1,1,5,1,1)
  (same comment as for Magnesium)
- Molybdenum [water, ground-, long-term]: 2.72e-5 kg; lognormal variance with pedigree 1.17, pedigree (1,1,5,1,1)
  (same comment as for Magnesium)
- Lead [water, ground-, long-term]: 0.000376 kg; lognormal variance with pedigree 0.83, pedigree (1,1,5,1,1)
  (same comment as for Magnesium)
- Titanium, ion [water, ground-, long-term]: 0.00176 kg; lognormal variance with pedigree 0.84, pedigree (1,1,5,1,1)
  (same comment as for Magnesium)
- Barium [water, ground-, long-term]: 0.00196 kg; lognormal variance with pedigree 0.61, pedigree (1,1,5,1,1)
  (same comment as for Magnesium)
- Vanadium, ion [water, surface water]: 1.72e-7 kg; lognormal variance with pedigree 1.58, pedigree (1,1,5,1,1)
  (same comment as for Potassium, ion)
- Mercury [water, ground-, long-term]: 9.74e-8 kg; lognormal variance with pedigree 1.9, pedigree (1,1,5,1,1)
  (same comment as for Magnesium)
- Scandium [water, ground-, long-term]: 3.72e-5 kg; lognormal variance with pedigree 1.13, pedigree (1,1,5,1,1)
  (same comment as for Magnesium)
- Chromium VI [water, surface water]: 5.49e-9 kg; lognormal variance with pedigree 2.04, pedigree (1,1,5,1,1)
  (same comment as for Potassium, ion)
- Mercury [water, surface water]: 2.62e-9 kg; lognormal variance with pedigree 2.16, pedigree (1,1,5,1,1)
  (same comment as for Potassium, ion)
- Beryllium [water, ground-, long-term]: 1.96e-5 kg; lognormal variance with pedigree 1.22, pedigree (1,1,5,1,1)
  (same comment as for Magnesium)
- Manganese [water, ground-, long-term]: 0.000693 kg; lognormal variance with pedigree 0.75, pedigree (1,1,5,1,1)
  (same comment as for Magnesium)
- Sodium, ion [water, surface water]: 0.0012 kg; lognormal variance with pedigree 0.51, pedigree (1,1,5,1,1)
  (same comment as for Potassium, ion)
- Tin, ion [water, ground-, long-term]: 1.97e-5 kg; lognormal variance with pedigree 1.22, pedigree (1,1,5,1,1)
  (same comment as for Magnesium)
- Nickel, ion [water, surface water]: 1.22e-7 kg; lognormal variance with pedigree 1.62, pedigree (1,1,5,1,1)
  (same comment as for Potassium, ion)
- Calcium, ion [water, surface water]: 8.55e-5 kg; lognormal variance with pedigree 0.79, pedigree (1,1,5,1,1)
  (same comment as for Potassium, ion)
- Tin, ion [water, surface water]: 3.17e-10 kg; lognormal variance with pedigree 2.41, pedigree (1,1,5,1,1)
  (same comment as for Potassium, ion)
- Beryllium [water, surface water]: 1.23e-8 kg; lognormal variance with pedigree 1.94, pedigree (1,1,5,1,1)
  (same comment as for Potassium, ion)
- Aluminium [water, surface water]: 2.19e-6 kg; lognormal variance with pedigree 1.34, pedigree (1,1,5,1,1)
  (same comment as for Potassium, ion)
- Strontium [water, surface water]: 1.22e-6 kg; lognormal variance with pedigree 1.32, pedigree (1,1,5,1,1)
  (same comment as for Potassium, ion)
- Antimony [water, ground-, long-term]: 1.37e-6 kg; lognormal variance with pedigree 2.25, pedigree (1,1,5,1,1)
  (same comment as for Magnesium)
- Cadmium, ion [water, surface water]: 2.32e-9 kg; lognormal variance with pedigree 2.15, pedigree (1,1,5,1,1)
  (same comment as for Potassium, ion)
- Antimony [water, surface water]: 6.41e-9 kg; lognormal variance with pedigree 2.02, pedigree (1,1,5,1,1)
  (same comment as for Potassium, ion)
- Iodide [water, surface water]: 1.64e-5 kg; lognormal variance with pedigree 1.24, pedigree (1,1,5,1,1)
  (same comment as for Potassium, ion)
- Barium [water, surface water]: 3e-7 kg; lognormal variance with pedigree 1.51, pedigree (1,1,5,1,1)
  (same comment as for Potassium, ion)
- Bromine [water, ground-, long-term]: 8.73e-12 kg; lognormal variance with pedigree 1.03, pedigree (1,1,5,1,1)
  (same comment as for Magnesium)
- BOD5, Biological Oxygen Demand [water, ground-, long-term]: 0.0825 kg; lognormal variance with pedigree 0.16, pedigree (1,1,5,1,1)
  (same comment as for Magnesium)
- Phosphate [water, ground-, long-term]: 3.96e-5 kg; lognormal variance with pedigree 5.39, pedigree (1,1,5,1,1)
  (same comment as for Magnesium)
- BOD5, Biological Oxygen Demand [water, surface water]: 0.000149 kg; lognormal variance with pedigree 0.74, pedigree (1,1,5,1,1)
  (same comment as for Potassium, ion)
- Arsenic, ion [water, surface water]: 1.38e-7 kg; lognormal variance with pedigree 1.61, pedigree (1,1,5,1,1)
  (same comment as for Potassium, ion)
- Molybdenum [water, surface water]: 1.33e-6 kg; lognormal variance with pedigree 1.36, pedigree (1,1,5,1,1)
  (same comment as for Potassium, ion)
- Zinc, ion [water, ground-, long-term]: 0.000475 kg; lognormal variance with pedigree 0.8, pedigree (1,1,5,1,1)
  (same comment as for Magnesium)
- Selenium [water, surface water]: 1.11e-7 kg; lognormal variance with pedigree 1.66, pedigree (1,1,5,1,1)
  (same comment as for Potassium, ion)
- COD, Chemical Oxygen Demand [water, surface water]: 0.000454 kg; lognormal variance with pedigree 0.74, pedigree (1,1,5,1,1)
  (same comment as for Potassium, ion)
- Boron [water, ground-, long-term]: 0.000291 kg; lognormal variance with pedigree 0.84, pedigree (1,1,5,1,1)
  (same comment as for Magnesium)
- Vanadium, ion [water, ground-, long-term]: 3.79e-5 kg; lognormal variance with pedigree 2.18, pedigree (1,1,5,1,1)
  (same comment as for Magnesium)
- DOC, Dissolved Organic Carbon [water, ground-, long-term]: 0.0998 kg; lognormal variance with pedigree 0.16, pedigree (1,1,5,1,1)
  (same comment as for Magnesium)
- Thallium [water, surface water]: 5.98e-9 kg; lognormal variance with pedigree 2.03, pedigree (1,1,5,1,1)
  (same comment as for Potassium, ion)
- Cadmium, ion [water, ground-, long-term]: 4.5e-6 kg; lognormal variance with pedigree 1.41, pedigree (1,1,5,1,1)
  (same comment as for Magnesium)
- Selenium [water, ground-, long-term]: 6.72e-6 kg; lognormal variance with pedigree 1.36, pedigree (1,1,5,1,1)
  (same comment as for Magnesium)
- Manganese [water, surface water]: 3.55e-8 kg; lognormal variance with pedigree 1.79, pedigree (1,1,5,1,1)
  (same comment as for Potassium, ion)
- Boron [water, surface water]: 2.74e-6 kg; lognormal variance with pedigree 1.23, pedigree (1,1,5,1,1)
  (same comment as for Potassium, ion)
- Magnesium [water, surface water]: 0.000223 kg; lognormal variance with pedigree 0.69, pedigree (1,1,5,1,1)
  (same comment as for Potassium, ion)
- TOC, Total Organic Carbon [water, surface water]: 0.00018 kg; lognormal variance with pedigree 0.74, pedigree (1,1,5,1,1)
  (same comment as for Potassium, ion)
- Copper, ion [water, ground-, long-term]: 0.000146 kg; lognormal variance with pedigree 0.95, pedigree (1,1,5,1,1)
  (same comment as for Magnesium)
- Carbon monoxide, fossil [air, urban air close to ground]: 0.000223 kg; lognormal variance with pedigree 0.690625, pedigree (1,3,5,2,1)
  Literature data from switzerland and germany adapted to plant age distribution in switzerland
  Uncertainty: & basic uncertainty of 5; literature data from switzerland and germany adapted to plant age distribution in switzerland
- TOC, Total Organic Carbon [water, ground-, long-term]: 0.0998 kg; lognormal variance with pedigree 0.16, pedigree (1,1,5,1,1)
  (same comment as for Magnesium)
- Bromine [water, surface water]: 9.7e-5 kg; lognormal variance with pedigree 1.01, pedigree (1,1,5,1,1)
  (same comment as for Potassium, ion)
- Lead [water, surface water]: 6.86e-9 kg; lognormal variance with pedigree 2, pedigree (1,1,5,1,1)
  (same comment as for Potassium, ion)
- Scandium [water, surface water]: 2.39e-6 kg; lognormal variance with pedigree 1.29, pedigree (1,1,5,1,1)
  (same comment as for Potassium, ion)
- DOC, Dissolved Organic Carbon [water, surface water]: 0.00018 kg; lognormal variance with pedigree 0.74, pedigree (1,1,5,1,1)
  (same comment as for Potassium, ion)

## Sampling procedure
waste-specific calculation based on literature data

## Extrapolations
This dataset has been extrapolated from year 2000 to the year of the calculation (2021). The uncertainty has been adjusted accordingly.

## Review by Niels Jungbluth 2003-07-15
Passed. Calculation for standard deviation 95 of, i.e., infrastructure,
land occupation, transport services or other services can differ from
standard Pedigree approach used in this project and figures obtained by
this procedure.

## Review by Emilia Moreno Ruiz 2015-10-14
PV adjusted
