# cement production, alternative constituents 6-20%

Dataset: EcoSpold 2, unit process
Geography: CH
Time period: 2009-01-01 to 2021-12-31
Technology level: current
Classification: ISIC rev.4 ecoinvent: 2394:Manufacture of cement, lime and plaster
Synonyms: CEM II/A; Portland composite cement
Tags: combined production
Scenario: Business-as-Usual
System model: Allocation, cut-off by classification
Share of production covered: 100 %
Generated by: Frank Werner
Published in: Werner F. 2014
Database: ecoinvent
isCopyrightProtected: true
accessRestrictedTo: 1

## General comment
The dataset describes the production of cement (CEM II/A) in Switzerland and covers the representative production mix of CEM II/A-D, CEM II/A-LL and CEM II/A-S according to EN 197-1.

## Included activities start
The activity starts with the clinker in the silo to be used for cement production and with the additional ingredients of the cement at the gate of the cement plant.

## Included activities end
The activity includes also the electricy used for the grinding of the clinker, griding aids, heat for the drying of additions etc. and ends with the cement produced in the cement mill. The dataset does not include packaging and administration.

## Reference product
- cement, alternative constituents 6-20%: 1 kg; name cement; source Werner F. 2014; CPC 374: Plaster, lime and cement; By-product classification allocatable product
  value provided by cemsuisse as an average from all cement producting plants in Switzerland
  production volume 3e9 kg; name APV_cement
    Estimated 75% marketshare
  property price 0.0615 EUR2005; name cement_price_EUR2005
    2005 import and export prices (total trades (USD) divided by total weight (kg) in China, India, USA, Japan, Russia and Europe, major producers and consumers (http://www.cementchina.net/freport/showfre.asp?id=749) from UN Commodity Trade Statistics Database (http://data.un.org/Explorer.aspxDatabase [Accessed 2 July 2010]). Commodity: Cement (portland, aluminious, slag or hydraulic)
  property carbon content 0
    carbon content on a dry matter basis (reserved; not for manual entry)
  properties: dry mass 1 kg, water content 0, carbon content, non-fossil 0, carbon content, fossil 0, wet mass 1 kg, water in wet mass 0 kg, carbon allocation 0 kg
- silica fume, densified: 0 kg; name silica_fume; source Werner F. 2014; By-product classification Recyclable; CPC 374: Plaster, lime and cement
  value provided by cemsuisse as an average from all cement producting plants in Switzerland
  production volume 0 kg
    Amount relative to produced amount of reference product.
  property carbon content, fossil 0
    asumed same composition as sylicon dioxide (http://www.silicafume.org/pdf/silicafume-users-manual.pdf)
  property carbon content, non-fossil 0
    (same comment as for silica fume, densified)
  property price 0.165426 EUR2005; name silica_fume_price_EUR2005
    Estimated value. Based on price reported on the website Alibaba (https://www.alibaba.com/showroom/silica-fume-price.html, accessed 7 July 2019). Using exchange rate of 1EURO = 1.209 USD.
  property carbon content 0
    carbon content on a dry matter basis (reserved; not for manual entry)
  properties: water in wet mass 0 kg, water content 0, dry mass 1 kg, wet mass 1 kg, carbon allocation 0 kg
- blast furnace slag: 0 kg; name ggbfs; By-product classification Recyclable; CPC 39310: Slag, dross, scalings and other waste from the manufacture of iron or steel
  value provided by cemsuisse as an average from all cement producting plants in Switzerland; assuming that 50% of the slag come ungrinded and need further drying.
  production volume 0 kg
    Amount relative to produced amount of reference product.
  property price 0 EUR2005; name ggbfs_price_EUR2005
    Assumed without economic value
  property carbon content, fossil 0
    Industry value; Arcelor Mittal, chemical composition of blast furnace slag (http://www.cst.com.br/english/products/co_products/catalog_products/blast_slag/blast_slag.asp, accessed: 20121003).
  property heating value, net 0 MJ
    Non combustible products are assumed to have an LHV equal to zero (0).
  property carbon content 0
    carbon content on a dry matter basis (reserved; not for manual entry)
  properties: dry mass 1 kg, water in wet mass 0 kg, wet mass 1 kg, carbon content, non-fossil 0, water content 0, carbon allocation 0 kg

## Inputs from technosphere
All rows: source Werner F. 2014
- steel, low-alloyed: 4.04e-5 kg; name steel; = 4.04E-05*cement; lognormal variance with pedigree 0.0406, pedigree (1,1,5,1,1)
  value provided by cemsuisse as an average from all cement producting plants in Switzerland
  properties: wet mass 1 kg, dry mass 1 kg, carbon content, fossil 0.005
- clinker: 0 kg; pedigree (1,1,1,1,1)
  value provided by cemsuisse as an average from all cement producting plants in Switzerland
  properties: wet mass 1 kg, dry mass 1 kg
- ground granulated blast furnace slag: 0.0018 kg; = 0.0036*0.5*cement; lognormal variance with pedigree 0.0406, pedigree (1,1,5,1,1)
  Value provided by cemsuisse as an average from all cement producting plants in Switzerland; assuming that 50% of the slag come grinded and do not need further drying.
  properties: wet mass 1 kg, dry mass 0.99 kg, water content 0.010101
- electricity, medium voltage: 0.0313 kWh; = 0.0313*cement; lognormal variance with pedigree 0.0406, pedigree (1,1,5,1,1)
  value provided by cemsuisse as an average from all cement producting plants in Switzerland
- cement factory: 2.73e-11 unit; = 2.73E-11*cement+silica_fume*0+ ggbfs*0; lognormal variance with pedigree 0.34, pedigree (1,1,5,1,1)
  value provided by cemsuisse as an average from all cement producting plants in Switzerland
  This exchange has an activity link directly to the producing activity because the product is primarily consumed in the same geographical area where it is produced.
- gypsum, mineral: 0.0464 kg; = 0.0464*cement; lognormal variance with pedigree 0.0406, pedigree (1,1,5,1,1)
  value provided by cemsuisse as an average from all cement producting plants in Switzerland
  properties: dry mass 1 kg, wet mass 1 kg
- heat, district or industrial, other than natural gas: 0.00121 MJ; = 0.00121*cement; lognormal variance with pedigree 0.0406, pedigree (1,1,5,1,1)
  value provided by cemsuisse as an average from all cement producting plants in Switzerland
  properties: heating value, net 1 MJ
- ethylene glycol: 0.000212 kg; = 0.000212*cement; lognormal variance with pedigree 0.0406, pedigree (1,1,5,1,1)
  Ancillary product for grinding; value provided by cemsuisse as an average from all cement producting plants in Switzerland
  properties: heating value, net 23.44 MJ, carbon content, fossil 0.387097, dry mass 1 kg, wet mass 1 kg
- limestone, crushed, for mill: 0.161 kg; name limestone; = 0.161*cement; lognormal variance with pedigree 0.0406, pedigree (1,1,5,1,1)
  value provided by cemsuisse as an average from all cement producting plants in Switzerland
  properties: water content 0.00200401, dry mass 0.998 kg, carbon content, fossil 0.117492, wet mass 1 kg
- clinker: 0.788 kg; lognormal variance with pedigree 0.0406, pedigree (1,1,5,1,1)
  value provided by cemsuisse as an average from all cement producting plants in Switzerland

## Sampling procedure
Data represents the average Swiss production of the 6 cement plants that were operational in 2009 - 2010

## Review by Emilia Moreno Ruiz 2015-11-02
solving specialty production for blast furnace slag
