# furnace production, logs, 6kW

Dataset: EcoSpold 2, unit process
Geography: CH
Time period: 2010-01-01 to 2021-12-31
Technology level: modern
Classification: ISIC rev.4 ecoinvent: 2815:Manufacture of ovens, furnaces and furnace burners
Classification: EcoSpold01Categories: wood energy/heating systems
Synonyms: wood stove production; wood burning stove production
Tags: biomass power
Scenario: Business-as-Usual
System model: Allocation, cut-off by classification
Generated by: Marco Mina
Database: ecoinvent
isCopyrightProtected: true
accessRestrictedTo: 1

## General comment
This dataset represent the production and the disposal of a wood burning stove for domestic heating (small furnace for room heating).

## Included activities start
From reception of furnace components at the factory gate

## Included activities end
This activity ends with the disposal of the device in the end of its lifetime.The dataset includes the most important materials used for the fabrication of the stove and the chimney flue pipes: steel, cast iron, rock wool, lubricating oil, glass, refractory fireclay. It includes also the energy and heat for the construction and the disposal of the elements of the furnace. The dataset doesn"t include the basement in concrete for the stove installation (not necessary) and any covers (e.g. ceramic tiles or stone). Since it is used for domestic heating, transformation and land occupation are not considered.

## Geography
Could be used for Central European conditions

## Technology
Wood stove of modern technology, available on European and Swiss market, designed for an optimal combustion process. The model of reference is the stove mod.Bando from the Swiss brand Attika (without stone covering). Represent the typical stove for residential wood combustion in a domestic environment.
Source of the image: http://www.attika.ch/uebersicht_kaminoefen.php

## Time period
This stove model is commercialized since 2010 in Switzerland and is still available on the market (end 2011)

## Reference product
- furnace, logs, 6kW: 1 unit; name RP_amount_1; By-product classification allocatable product; CPC 43420: Industrial or laboratory furnaces and ovens, except non-electric bakery ovens; other industrial or laboratory […]
  production volume 5600 unit; name RP_PV_1
    Extrapolated from Holzenergie Statistik report (estimation of the wood stove produced within the country)
  property price 724 EUR2005
    UNDATA "Industrial furnace, oven, incinerator non-electric ne" (http://data.un.org/Data.aspx?q=industrial+furnace&d=ComTrade&f=_l1Code%3a84%3bcmdCode%3a841780; EU I/E average price is 6.133EUR/kg). The prices are per kg and converted to per unit by summed weight of material concumption of the process in existing ecoinvent documentation from ecoinvent v.2.2 (about 108kg). For weight of concrete, it is separately added for from price per m3 used of each unit (0.059 m3; 'furnace production, logs, hardwood storage area, 30kW')and apply EU&DK input output database 2003 (0.08 Euro2003/kg DS; density 2380 kg/m3<#concrete production, normal' in ecoinvent).
  property lifetime capacity [kWh] 1.0512e6 kWh; name lifetime_capacity_kWh; = (lifetime*8760)*capacity_MW*1000
    calculated value.
  property lifetime 20 year; name lifetime
  property capacity [MW] 0.006 MW; name capacity_MW

## By-products
- iron scrap, unsorted: 0 kg; CPC 39310: Slag, dross, scalings and other waste from the manufacture of iron or steel; By-product classification Recyclable; pedigree (1,1,1,1,1)
  Disposal of cast iron
  production volume 0 kg; = RP_PV_1 * (BP_amount_2 / RP_amount_1)
    Calculated from production volume of reference product using the relative outputs.
  property price 0.149 EUR2005
    Temporary price data. Calculated as 90% of purchasers price based on: estimated at 85% of sorted scrap
  property carbon content 0
    carbon content on a dry matter basis (reserved; not for manual entry)
  properties: carbon content, non-fossil 0, water content 0, dry mass 1 kg, wet mass 1 kg, carbon content, fossil 0, water in wet mass 0 kg, carbon allocation 0 kg

## Inputs from technosphere
- flat glass, coated: 2.5 kg; source Attika Feuer AG 2011; lognormal variance with pedigree 0.0352, pedigree (1,5,4,5,1)
  literature value - frontal glass in the stove door
  properties: dry mass 1 kg, wet mass 1 kg
- lubricating oil: 0.1 kg; source Attika Feuer AG 2011; lognormal variance with pedigree 0.0352, pedigree (1,5,4,5,1)
  estimation - lubricating oil used for lubricating different parts of the stove during the manufacturing and when is delivered. The disposal of this small quantity can be negleted (remain within the furnace)
  properties: dry mass 1 kg, carbon content, fossil 0.75, wet mass 1 kg, heating value, net 40.2 MJ
  note on carbon content, fossil: Lubricating oil is produced from diesel. C-content/dry mass of fats and oils considered 75%, from: ecoinvent v2.2 report, n 15a, pg 40
  note on heating value, net: Literature value, Source: IPCC 2006, 2006 IPCC Guidelines for National Greenhouse Gas Inventories, Prepared by the National Greenhouse Gas Inventories Programme, Eggleston H.S., Buendia L., Miwa K., Ngara T. and Tanabe K. (eds). Published: IGES, Japan
- waste mineral oil: -0.1 kg; name BP_amount_5; lognormal variance with pedigree 0.0186, pedigree (1,5,4,5,1)
  disposal of lubricatin oil
  production volume 560 kg; = RP_PV_1 * (BP_amount_5 / RP_amount_1)
    Calculated from production volume of reference product using the relative outputs.
  property price 0 EUR2005; name BP_amount_6_price_EUR2005
  properties: water content 0.111111, carbon content, fossil 0.864444, dry mass 0.9 kg, wet mass 1 kg, heating value, net 34.7 MJ
  note on carbon content, fossil: Tab A.6, ecoinvent v2.2 report 13_I. C content has been calculated after data in the tables, and then referred to 1 kg DM
  note on heating value, net: Value taken from the general comment of the treatment dataset.
- sheet rolling, steel: 35 kg; source Attika Feuer AG 2011; lognormal variance with pedigree 0.0352, pedigree (1,5,4,5,1)
  estimation
- waste glass: -2.5 kg; name BP_amount_6; lognormal variance with pedigree 0.0186, pedigree (1,5,4,5,1)
  disposal of glass
  production volume 14000 kg; = RP_PV_1* BP_amount_6
    Calculated from production volume of reference product using the relative outputs.
  property price 0 EUR2005; name BP_amount_2_price_EUR2005
  properties: heating value, net 0.05 MJ, wet mass 1 kg, dry mass 1 kg, lifetime 20 year
  note on heating value, net: Value extracted from "treatment of waste glass, open dump, very wet infiltration class (1000mm)"
- steel, low-alloyed, hot rolled: 90 kg; source Attika Feuer AG 2011; lognormal variance with pedigree 0.0352, pedigree (1,5,4,5,1)
  literature value
  properties: wet mass 1 kg, dry mass 1 kg, carbon content, fossil 0.005
  note on carbon content, fossil: Low alloyed steel composition given in Tab. 3.2 ecoinvent v2.2 report 10_partII. Steel assumed to have a C content of 0.5%
- cast iron: 30 kg; source Attika Feuer AG 2011; lognormal variance with pedigree 0.0352, pedigree (1,5,4,5,1)
  literature value
  properties: dry mass 1 kg, carbon content, fossil 0.04, wet mass 1 kg
  note on carbon content, fossil: Cast iron is made by remelting pig iron in small furnaces (e.g. cupola furnaces or electric arc furnaces) and poured into moulds to make castings. It usually contains 2% to 6% carbon (ecoinvent v2.2 report 10_partII). An average content of 4% was considered
- refractory, fireclay, packed: 4 kg; source Attika Feuer AG 2011; lognormal variance with pedigree 0.0352, pedigree (1,5,4,5,1)
  estimation - refractory fireclay internal cover for the combustion chamber
  properties: dry mass 1 kg, wet mass 1 kg
- stone wool: 9 kg; source Attika Feuer AG 2011; lognormal variance with pedigree 0.0352, pedigree (1,5,4,5,1)
  estimation - insulation for chimney flue pipes
  properties: carbon content, fossil 0.015401, wet mass 1 kg, dry mass 1 kg
  note on carbon content, fossil: The chemical composition of the glass fibres used in the rock wool production is similar to the composition of naturally cooled volcano basalt and has a composition listed in Tab. 3.1 and 3.2 in ecoinvent v2.2 report 16, part XIV. Rock wool contains: a minimum of 96% mineral fibres,between 0.5 and 3.0 weight percent of phenolic resin depending on the specific product characteristics, and about 0.2 percent mineral oil (ecoinvent v2.2 report 16, part XIV). An average composition of 1.8% phenolic resin, 0.2% mineral oil, and 98% mineral fibres has been assumed and used to calculate C content of the rock wool
- heat, central or small-scale, other than natural gas: 500 MJ; source Attika Feuer AG 2011; lognormal variance with pedigree 0.098, pedigree (1,5,4,5,1)
  estimation - data comes from a comparison between old dataset value and communication with producer (total annual heating value in factory/production)
  properties: heating value, net 1 MJ
- inert waste, for final disposal: -4 kg; name BP_amount_4; lognormal variance with pedigree 0.0186, pedigree (1,5,4,5,1)
  disposal of refractory fireclay
  production volume 22400 kg; = RP_PV_1* BP_amount_4
    Calculated from production volume of reference product using the relative outputs.
  property price 0 EUR2005; name BP_amount_4_price_EUR2005
  properties: water content 0.00502513, wet mass 1 kg, dry mass 0.995 kg, lifetime 20 year
- waste mineral wool, for final disposal: -9 kg; name BP_amount_3; lognormal variance with pedigree 0.0186, pedigree (1,5,4,5,1)
  disposal of insulation material used in the chimney flue pipes
  production volume 50400 kg; = RP_PV_1* BP_amount_3
    Calculated from production volume of reference product using the relative outputs.
  property price 0 EUR2005; name BP_amount_1_price_EUR2005
  properties: wet mass 1 kg, dry mass 1 kg, lifetime 20 year
- scrap steel: -90 kg; name BP_amount_1; lognormal variance with pedigree 0.0186, pedigree (1,5,4,5,1)
  Disposal of steel
  production volume 504000 kg; = RP_PV_1* BP_amount_1
    Calculated from production volume of reference product using the relative outputs.
  property price 0 EUR2005; name BP_amount_3_price_EUR2005
  properties: dry mass 1 kg, wet mass 1 kg, lifetime 20 year
- electricity, low voltage: 112 kWh; source Attika Feuer AG 2011; lognormal variance with pedigree 0.026, pedigree (1,5,4,5,1)
  estimation - data derives from comparison between old dataset value, energy required for steel manufacturing (similar weight device) and suggestions from producer
- iron scrap, unsorted: -30 kg; lognormal variance with pedigree 0.0186, pedigree (1,5,4,5,1)
  Disposal of cast iron
  production volume 168000 kg
  properties: price 0.149 EUR2005, dry mass 1 kg, wet mass 1 kg

## Sampling procedure
literature, furnace manual available for customers, investigation and personal communication from producer and technician

## Extrapolations
This dataset has been extrapolated from year 2011 to the year of the calculation (2021). The uncertainty has been adjusted accordingly.

## Review by Bo Weidema 2012-03-12
Passed. Documentation adequate, inputs relevant, mass balance correct, and correct handling of capacity utilisation.
