# treatment of waste polyurethane, unsanitary landfill, moist infiltration class (300mm)

Dataset: EcoSpold 2, unit process
Geography: GLO
Time period: 2006-01-01 to 2021-12-31
Technology level: current
Classification: ISIC rev.4 ecoinvent: 3821:Treatment and disposal of non-hazardous waste
Synonyms: municipal waste landfill
Scenario: Business-as-Usual
System model: Allocation, cut-off by classification
Share of production covered: 1 %
Generated by: Avraam Symeonidis
Database: ecoinvent
isCopyrightProtected: true
accessRestrictedTo: 1

## General comment
This dataset represents the activity of waste disposal of waste polyurethane in a unsanitary landfill. Recommended use of this dataset: For PU, which goes to disposal as part of managed communal waste mixture. // Waste composition (wet, in ppm): upper heating value 30.9 MJ/kg; lower heating value 30.67 MJ/kg; H2O 2000; O 178700; H 84276; C 640700; S 203.07; N 60922; P n.a.; B n.a.; Cl 24369; Br 70.934; F 14.896; I n.a.; Ag n.a.; As 1.9253; Ba 188.99; Cd 82.301; Co 32.011; Cr 41.41; Cu 321.89; Hg 0.86045; Mn 80.984; Mo n.a.; Ni 20.874; Pb 473.27; Sb 43.54; Se 2.128; Sn 26.555; V 291.99; Zn 566.54; Be 0.50667; Sc n.a.; Sr 89.68; Ti 1013.3; Tl 0.40534; W n.a.; Si n.a.; Fe 3775.4; Ca n.a.; Al 202.67; K n.a.; Mg n.a.; Na 1485; . // Share of carbon in waste that is biogenic 0%. Share of metals in waste not oxidised and bulk-recyclable (exclude very small or thin parts) Iron: 0%; Alu: 0%; Copper: 0%. Overall degradability of waste during 100 years: 1%.

## Included activities start
from final waste deposition (without transports to the site)

## Included activities end
Waste-specific short-term emissions to air via landfill gas and landfill leachate. Waste-specific long-term emissions from landfill.

## Geography
Given name of landfill location is 'infiltration class 3 moist (2018)'. Landfill site with mean annual temperature (MAT) of 8 degC, mean annual precipitation (MAP) of 900 mm/year, and net infiltration of 300 mm/year.
Climate adjustments result in an alpha t (temperature) for permafrost areas of 0.999. Total climate adjustments with alpha pt of 0.999.

## Technology
This is an inventory for an unsanitary, sub-controlled landfill for municipal solid waste. Ultimate average landfill height is 15 meters. Operation phase duration is 25 years.Percentage of landfill gas directly emitted is 100w%.
Leachate of the landfill is not treated. Based on average waste composition and climate data the end of carbonate phase is estimated to be reached 5581 years after waste deposition.

## Reference product
- waste polyurethane: -1 kg; By-product classification Waste; CPC 39270: Waste, parings and scrap of plastics; CAS 9009-54-5; pedigree (1,1,1,1,1)
  main reference product of this activity (supply of disposal service).
  Uncertainty: Uncertainty is not adjusted, as this is the refence product
  production volume 1 kg
    The amount of the annual production volume is a placeholder value. The contribution of this technology to the different local markets can be found in the markets themselves.
  property price 0 EUR2005
    Waste products are assigned a price of zero as they are assumed to require further treatment.
  property heating value, net 30.67 MJ
    Value taken from the general comment of the treatment dataset.
  property carbon content 0.64198
    carbon content on a dry matter basis (reserved; not for manual entry)
  properties: wet mass 1 kg, carbon content, fossil 0.64198, dry mass 0.998 kg, water in wet mass 0.002 kg, water content 0.002004, iron content 0.0037829, heating value, gross 30.896 MJ, mercury content 8.6217e-7, chlorine content 0.024418, fluorine content 1.4926e-5, nitrogen content 0.061044, tin content 2.6608e-5, beryllium content 5.0768e-7, bromine content 7.1076e-5, selenium content 2.1323e-6, lead content 0.00047422, zinc content 0.00056767, sulfur content 0.00020348, oxygen content 0.17906, sodium content 0.001488, cadmium content 8.2466e-5, vanadium content 0.00029258, copper content 0.00032253, cobalt content 3.2075e-5, nickel content 2.0916e-5, thallium content 4.0615e-7, strontium content 8.986e-5, hydrogen content 0.084444, chromium content 4.1493e-5, arsenic content 1.9292e-6, manganese content 8.1146e-5, titanium content 0.0010154, aluminium content 0.00020307, barium content 0.00018937, antimony content 4.3627e-5, carbon allocation 0.640696 kg

## Inputs from technosphere
- diesel, burned in building machine: 0.046738 MJ; lognormal variance with pedigree 0.088256, pedigree (1,1,4,1,1)
  for waste distribution and compaction.
  Uncertainty: Uncertainty calculated from uncertainty in base parameters.
  properties: heating value, net 1 MJ
- excavation, skid-steer loader: 0.00031708 m3; lognormal variance with pedigree 0.088256, pedigree (1,1,4,1,1)
  application of daily cover.
  Uncertainty: Uncertainty calculated from uncertainty in base parameters.

## Inputs from nature
- Occupation, dump site [natural resource, land]: 0.0023333 m2*year; lognormal variance with pedigree 0.088256, pedigree (1,1,4,1,1)
  for landfill operation phase and spontaneous renaturation.
  Uncertainty: Uncertainty calculated from uncertainty in base parameters.

## Emissions to nature
- DOC, Dissolved Organic Carbon [water, ground-, long-term]: 0.6343 kg; lognormal variance with pedigree 0.009504, pedigree (1,1,4,1,1)
  Emissions from long-term leachate (>100a) directly from MSW landfill and indirectly via incineration of treatement sludge from leachate treatement.
  Uncertainty: Uncertainty calculated depending on waste input and uncertainty of long-term transfer coefficents in landfill.
- Hydrogen fluoride [air, non-urban air or from high stacks]: 5.9307e-8 kg; lognormal variance with pedigree 0.43259, pedigree (1,1,4,1,1)
  burden from direct release or incineration of landfill biogas; or windblown leachate evaporite in arid climates.
  Uncertainty: Uncertainty calculated from unertainty of the waste composition of this waste, uncertainty in waste decomposition and short-term leaching in landfill
- Cobalt [water, ground-]: 1.0277e-7 kg; lognormal variance with pedigree 0.41234, pedigree (1,1,4,1,1)
  burden from short-term leachate to groundwater in uncontrolled landfill in moist cimate.
  Uncertainty: Uncertainty calculated from unertainty of the waste composition of this waste, uncertainty in waste decomposition and short-term leaching in landfill
- TOC, Total Organic Carbon [water, ground-, long-term]: 0.6343 kg; lognormal variance with pedigree 0.009504, pedigree (1,1,4,1,1)
  (same comment as for DOC, Dissolved Organic Carbon)
- Barium [air, non-urban air or from high stacks]: 5.4047e-10 kg; lognormal variance with pedigree 0.58328, pedigree (1,1,4,1,1)
  (same comment as for Hydrogen fluoride)
- Arsenic, ion [water, ground-]: 3.4541e-9 kg; lognormal variance with pedigree 0.52345, pedigree (1,1,4,1,1)
  (same comment as for Cobalt)
- COD, Chemical Oxygen Demand [water, ground-, long-term]: 0.69376 kg; lognormal variance with pedigree 0.009504, pedigree (1,1,4,1,1)
  (same comment as for DOC, Dissolved Organic Carbon)
- Nitrogen oxides [air, non-urban air or from high stacks]: 8.3456e-7 kg; lognormal variance with pedigree 0.20891, pedigree (1,1,4,1,1)
  burden from direct release or incineration of landfill biogas.
  Uncertainty: Uncertainty calculated from unertainty of the waste composition of this waste, uncertainty in waste decomposition and short-term leaching in landfill
- Fluoride [water, ground-]: 1.093e-8 kg; lognormal variance with pedigree 0.48507, pedigree (1,1,4,1,1)
  (same comment as for Cobalt)
- BOD5, Biological Oxygen Demand [water, ground-, long-term]: 0.16424 kg; lognormal variance with pedigree 0.009504, pedigree (1,1,4,1,1)
  (same comment as for DOC, Dissolved Organic Carbon)
- Hydrogen chloride [air, non-urban air or from high stacks]: 8.8349e-6 kg; lognormal variance with pedigree 0.27135, pedigree (1,1,4,1,1)
  (same comment as for Hydrogen fluoride)
- Bromine [water, ground-]: 1.7842e-6 kg; lognormal variance with pedigree 0.3246, pedigree (1,1,4,1,1)
  (same comment as for Cobalt)
- Methane, fossil [air, non-urban air or from high stacks]: 0.004635 kg; lognormal variance with pedigree 0.11256, pedigree (1,1,4,1,1)
  (same comment as for Nitrogen oxides)
- Nitrate [water, ground-]: 6.0975e-5 kg; lognormal variance with pedigree 0.11669, pedigree (1,1,4,1,1)
  (same comment as for Cobalt)
- Carbon dioxide, fossil [air, non-urban air or from high stacks]: 0.010035 kg; lognormal variance with pedigree 0.102428, pedigree (1,1,4,1,1)
  (same comment as for Nitrogen oxides)
- Chloride [water, ground-]: 0.00061294 kg; lognormal variance with pedigree 0.13874, pedigree (1,1,4,1,1)
  (same comment as for Cobalt)
- Sulfur dioxide [air, non-urban air or from high stacks]: 2.647e-7 kg; lognormal variance with pedigree 0.40209, pedigree (1,1,4,1,1)
  (same comment as for Nitrogen oxides)
- Nitrite [water, ground-]: 3.1557e-5 kg; lognormal variance with pedigree 0.11669, pedigree (1,1,4,1,1)
  (same comment as for Cobalt)
- Sodium, ion [water, ground-, long-term]: 0.0014236 kg; lognormal variance with pedigree 0.1596, pedigree (1,1,4,1,1)
  (same comment as for DOC, Dissolved Organic Carbon)
- Ammonium, ion [water, ground-]: 0.00057979 kg; lognormal variance with pedigree 0.11669, pedigree (1,1,4,1,1)
  (same comment as for Cobalt)
- Nitrogen, organic bound [water, ground-]: 0.00094764 kg; lognormal variance with pedigree 0.11669, pedigree (1,1,4,1,1)
  (same comment as for Cobalt)
- Iron, ion [water, ground-, long-term]: 0.0037748 kg; lognormal variance with pedigree 0.12978, pedigree (1,1,4,1,1)
  (same comment as for DOC, Dissolved Organic Carbon)
- Hydrogen sulfide [water, ground-]: 5.502e-8 kg; lognormal variance with pedigree 0.34627, pedigree (1,1,4,1,1)
  (same comment as for Cobalt)
- Aluminium [water, ground-, long-term]: 0.00020257 kg; lognormal variance with pedigree 0.22502, pedigree (1,1,4,1,1)
  (same comment as for DOC, Dissolved Organic Carbon)
- Sulfate [water, ground-]: 2.1107e-6 kg; lognormal variance with pedigree 0.34627, pedigree (1,1,4,1,1)
  (same comment as for Cobalt)
- Titanium, ion [water, ground-, long-term]: 0.0010128 kg; lognormal variance with pedigree 0.17197, pedigree (1,1,4,1,1)
  (same comment as for DOC, Dissolved Organic Carbon)
- DOC, Dissolved Organic Carbon [water, ground-]: 0.00018639 kg; lognormal variance with pedigree 0.21311, pedigree (1,1,4,1,1)
  (same comment as for Cobalt)
- Thallium [water, ground-, long-term]: 4.051e-7 kg; lognormal variance with pedigree 0.42946, pedigree (1,1,4,1,1)
  (same comment as for DOC, Dissolved Organic Carbon)
- TOC, Total Organic Carbon [water, ground-]: 0.00018639 kg; lognormal variance with pedigree 0.21311, pedigree (1,1,4,1,1)
  (same comment as for Cobalt)
- Zinc, ion [water, ground-, long-term]: 0.00056627 kg; lognormal variance with pedigree 0.19102, pedigree (1,1,4,1,1)
  (same comment as for DOC, Dissolved Organic Carbon)
- Heat, waste [water, ground-, long-term]: 30.587 MJ; lognormal variance with pedigree 0.020651, pedigree (1,1,4,1,1)
  burden from long-term decomposition of waste (>100a).
  Uncertainty: Uncertainty calculated from unertainty of the waste composition of this waste, uncertainty in waste decomposition and short-term leaching in landfill
- Beryllium [water, ground-, long-term]: 5.0637e-7 kg; lognormal variance with pedigree 0.42229, pedigree (1,1,4,1,1)
  (same comment as for DOC, Dissolved Organic Carbon)
- COD, Chemical Oxygen Demand [water, ground-]: 0.00020386 kg; lognormal variance with pedigree 0.21311, pedigree (1,1,4,1,1)
  (same comment as for Cobalt)
- Strontium [water, ground-, long-term]: 8.9628e-5 kg; lognormal variance with pedigree 0.25213, pedigree (1,1,4,1,1)
  (same comment as for DOC, Dissolved Organic Carbon)
- BOD5, Biological Oxygen Demand [water, ground-]: 4.8262e-5 kg; lognormal variance with pedigree 0.21311, pedigree (1,1,4,1,1)
  (same comment as for Cobalt)
- Vanadium, ion [water, ground-, long-term]: 9.8597e-5 kg; lognormal variance with pedigree 0.28655, pedigree (1,1,4,1,1)
  (same comment as for DOC, Dissolved Organic Carbon)
- Heat, waste [soil, industrial]: 0.20486 MJ; lognormal variance with pedigree 0.080243, pedigree (1,1,4,1,1)
  burden from short-term decomposition of waste (0-100a).
  Uncertainty: Uncertainty calculated from unertainty of the waste composition of this waste, uncertainty in waste decomposition and short-term leaching in landfill
- Selenium [water, ground-, long-term]: 6.9641e-7 kg; lognormal variance with pedigree 0.45375, pedigree (1,1,4,1,1)
  (same comment as for DOC, Dissolved Organic Carbon)
- Aluminium [air, non-urban air or from high stacks]: 2.5297e-11 kg; lognormal variance with pedigree 0.68133, pedigree (1,1,4,1,1)
  (same comment as for Hydrogen fluoride)
- Tin, ion [water, ground-, long-term]: 2.6553e-5 kg; lognormal variance with pedigree 0.29261, pedigree (1,1,4,1,1)
  (same comment as for DOC, Dissolved Organic Carbon)
- Sodium [air, non-urban air or from high stacks]: 1.5346e-8 kg; lognormal variance with pedigree 0.47344, pedigree (1,1,4,1,1)
  (same comment as for Hydrogen fluoride)
- Antimony [water, ground-, long-term]: 5.174e-6 kg; lognormal variance with pedigree 0.55968, pedigree (1,1,4,1,1)
  (same comment as for DOC, Dissolved Organic Carbon)
- Iron [air, non-urban air or from high stacks]: 1.2949e-10 kg; lognormal variance with pedigree 0.62645, pedigree (1,1,4,1,1)
  (same comment as for Hydrogen fluoride)
- Sodium, ion [water, ground-]: 6.1383e-5 kg; lognormal variance with pedigree 0.21093, pedigree (1,1,4,1,1)
  (same comment as for Cobalt)
- Lead [water, ground-, long-term]: 0.00047325 kg; lognormal variance with pedigree 0.19694, pedigree (1,1,4,1,1)
  (same comment as for DOC, Dissolved Organic Carbon)
- Thallium [air, non-urban air or from high stacks]: 5.8843e-14 kg; lognormal variance with pedigree 0.88101, pedigree (1,1,4,1,1)
  (same comment as for Hydrogen fluoride)
- Aluminium [water, ground-]: 1.0119e-7 kg; lognormal variance with pedigree 0.41088, pedigree (1,1,4,1,1)
  (same comment as for Cobalt)
- Manganese [water, ground-, long-term]: 8.0057e-5 kg; lognormal variance with pedigree 0.25553, pedigree (1,1,4,1,1)
  (same comment as for DOC, Dissolved Organic Carbon)
- Titanium [air, non-urban air or from high stacks]: 1.2649e-10 kg; lognormal variance with pedigree 0.62828, pedigree (1,1,4,1,1)
  (same comment as for Hydrogen fluoride)
- Titanium, ion [water, ground-]: 5.0594e-7 kg; lognormal variance with pedigree 0.35783, pedigree (1,1,4,1,1)
  (same comment as for Cobalt)
- Nickel, ion [water, ground-, long-term]: 2.0862e-5 kg; lognormal variance with pedigree 0.30061, pedigree (1,1,4,1,1)
  (same comment as for DOC, Dissolved Organic Carbon)
- Zinc [air, non-urban air or from high stacks]: 5.957e-11 kg; lognormal variance with pedigree 0.65273, pedigree (1,1,4,1,1)
  (same comment as for Hydrogen fluoride)
- Thallium [water, ground-]: 2.3537e-10 kg; lognormal variance with pedigree 0.61037, pedigree (1,1,4,1,1)
  (same comment as for Cobalt)
- Chromium VI [water, ground-, long-term]: 2.2465e-7 kg; lognormal variance with pedigree 1.9787, pedigree (1,1,4,1,1)
  (same comment as for DOC, Dissolved Organic Carbon)
- Beryllium [air, non-urban air or from high stacks]: 7.3554e-14 kg; lognormal variance with pedigree 0.87384, pedigree (1,1,4,1,1)
  (same comment as for Hydrogen fluoride)
- Iron, ion [water, ground-]: 5.1794e-7 kg; lognormal variance with pedigree 0.3582, pedigree (1,1,4,1,1)
  (same comment as for Cobalt)
- Mercury [water, ground-, long-term]: 8.5963e-7 kg; lognormal variance with pedigree 0.40522, pedigree (1,1,4,1,1)
  (same comment as for DOC, Dissolved Organic Carbon)
- Strontium [air, non-urban air or from high stacks]: 1.3019e-11 kg; lognormal variance with pedigree 0.70368, pedigree (1,1,4,1,1)
  (same comment as for Hydrogen fluoride)
- Strontium [water, ground-]: 5.2076e-8 kg; lognormal variance with pedigree 0.43304, pedigree (1,1,4,1,1)
  (same comment as for Cobalt)
- Copper, ion [water, ground-, long-term]: 0.00032187 kg; lognormal variance with pedigree 0.20968, pedigree (1,1,4,1,1)
  (same comment as for DOC, Dissolved Organic Carbon)
- Vanadium [air, non-urban air or from high stacks]: 7.6888e-11 kg; lognormal variance with pedigree 0.64561, pedigree (1,1,4,1,1)
  (same comment as for Hydrogen fluoride)
- Zinc, ion [water, ground-]: 2.6807e-7 kg; lognormal variance with pedigree 0.37864, pedigree (1,1,4,1,1)
  (same comment as for Cobalt)
- Barium [water, ground-, long-term]: 0.00018683 kg; lognormal variance with pedigree 0.22734, pedigree (1,1,4,1,1)
  (same comment as for DOC, Dissolved Organic Carbon)
- Tin [air, non-urban air or from high stacks]: 3.9073e-13 kg; lognormal variance with pedigree 0.81536, pedigree (1,1,4,1,1)
  (same comment as for Hydrogen fluoride)
- Beryllium [water, ground-]: 2.9421e-10 kg; lognormal variance with pedigree 0.60321, pedigree (1,1,4,1,1)
  (same comment as for Cobalt)
- Cobalt [water, ground-, long-term]: 3.1909e-5 kg; lognormal variance with pedigree 0.28641, pedigree (1,1,4,1,1)
  (same comment as for DOC, Dissolved Organic Carbon)
- Selenium [air, non-urban air or from high stacks]: 5.6035e-13 kg; lognormal variance with pedigree 0.8085, pedigree (1,1,4,1,1)
  (same comment as for Hydrogen fluoride)
- Tin, ion [water, ground-]: 1.5629e-9 kg; lognormal variance with pedigree 0.54905, pedigree (1,1,4,1,1)
  (same comment as for Cobalt)
- Arsenic, ion [water, ground-, long-term]: 1.9218e-6 kg; lognormal variance with pedigree 0.37907, pedigree (1,1,4,1,1)
  (same comment as for DOC, Dissolved Organic Carbon)
- Antimony [air, non-urban air or from high stacks]: 1.1465e-11 kg; lognormal variance with pedigree 0.70888, pedigree (1,1,4,1,1)
  (same comment as for Hydrogen fluoride)
- Vanadium, ion [water, ground-]: 3.0755e-7 kg; lognormal variance with pedigree 0.37444, pedigree (1,1,4,1,1)
  (same comment as for Cobalt)
- Cadmium, ion [water, ground-, long-term]: 8.2155e-5 kg; lognormal variance with pedigree 0.25499, pedigree (1,1,4,1,1)
  (same comment as for DOC, Dissolved Organic Carbon)
- Lead [air, non-urban air or from high stacks]: 9.2843e-12 kg; lognormal variance with pedigree 0.71086, pedigree (1,1,4,1,1)
  (same comment as for Hydrogen fluoride)
- Selenium [water, ground-]: 2.2414e-9 kg; lognormal variance with pedigree 0.53733, pedigree (1,1,4,1,1)
  (same comment as for Cobalt)
- Chloride [water, ground-, long-term]: 0.023747 kg; lognormal variance with pedigree 0.074095, pedigree (1,1,4,1,1)
  (same comment as for DOC, Dissolved Organic Carbon)
- Manganese [air, non-urban air or from high stacks]: 2.316e-10 kg; lognormal variance with pedigree 0.61146, pedigree (1,1,4,1,1)
  (same comment as for Hydrogen fluoride)
- Antimony [water, ground-]: 4.586e-8 kg; lognormal variance with pedigree 0.43771, pedigree (1,1,4,1,1)
  (same comment as for Cobalt)
- Fluoride [water, ground-, long-term]: 1.4829e-5 kg; lognormal variance with pedigree 0.31179, pedigree (1,1,4,1,1)
  (same comment as for DOC, Dissolved Organic Carbon)
- Nickel [air, non-urban air or from high stacks]: 3.0303e-12 kg; lognormal variance with pedigree 0.75216, pedigree (1,1,4,1,1)
  (same comment as for Hydrogen fluoride)
- Lead [water, ground-]: 2.7853e-8 kg; lognormal variance with pedigree 0.45338, pedigree (1,1,4,1,1)
  (same comment as for Cobalt)
- Bromine [water, ground-, long-term]: 6.9124e-5 kg; lognormal variance with pedigree 0.25995, pedigree (1,1,4,1,1)
  (same comment as for DOC, Dissolved Organic Carbon)
- Copper [air, non-urban air or from high stacks]: 4.4982e-12 kg; lognormal variance with pedigree 0.73401, pedigree (1,1,4,1,1)
  (same comment as for Hydrogen fluoride)
- Manganese [water, ground-]: 9.264e-7 kg; lognormal variance with pedigree 0.34267, pedigree (1,1,4,1,1)
  (same comment as for Cobalt)
- Nitrogen, organic bound [water, ground-, long-term]: 0.039587 kg; lognormal variance with pedigree 0.049978, pedigree (1,1,4,1,1)
  (same comment as for DOC, Dissolved Organic Carbon)
- Chromium [air, non-urban air or from high stacks]: 1.1786e-12 kg; lognormal variance with pedigree 0.78028, pedigree (1,1,4,1,1)
  (same comment as for Hydrogen fluoride)
- Nickel, ion [water, ground-]: 1.2121e-8 kg; lognormal variance with pedigree 0.48152, pedigree (1,1,4,1,1)
  (same comment as for Cobalt)
- Nitrate [water, ground-, long-term]: 0.0025472 kg; lognormal variance with pedigree 0.049978, pedigree (1,1,4,1,1)
  (same comment as for DOC, Dissolved Organic Carbon)
- Mercury [air, non-urban air or from high stacks]: 2.3549e-10 kg; lognormal variance with pedigree 0.61084, pedigree (1,1,4,1,1)
  (same comment as for Hydrogen fluoride)
- Copper, ion [water, ground-]: 1.5744e-8 kg; lognormal variance with pedigree 0.47224, pedigree (1,1,4,1,1)
  (same comment as for Cobalt)
- Nitrite [water, ground-, long-term]: 0.0013183 kg; lognormal variance with pedigree 0.049978, pedigree (1,1,4,1,1)
  (same comment as for DOC, Dissolved Organic Carbon)
- Cadmium [air, non-urban air or from high stacks]: 9.6429e-10 kg; lognormal variance with pedigree 0.56474, pedigree (1,1,4,1,1)
  (same comment as for Hydrogen fluoride)
- Mercury [water, ground-]: 5.8871e-10 kg; lognormal variance with pedigree 0.58077, pedigree (1,1,4,1,1)
  (same comment as for Cobalt)
- Sulfate [water, ground-, long-term]: 0.00056497 kg; lognormal variance with pedigree 0.22495, pedigree (1,1,4,1,1)
  (same comment as for DOC, Dissolved Organic Carbon)
- Cobalt [air, non-urban air or from high stacks]: 2.5692e-11 kg; lognormal variance with pedigree 0.68348, pedigree (1,1,4,1,1)
  (same comment as for Hydrogen fluoride)
- Barium [water, ground-]: 2.1619e-6 kg; lognormal variance with pedigree 0.31449, pedigree (1,1,4,1,1)
  (same comment as for Cobalt)
- Ammonium, ion [water, ground-, long-term]: 0.024221 kg; lognormal variance with pedigree 0.049978, pedigree (1,1,4,1,1)
  (same comment as for DOC, Dissolved Organic Carbon)
- Arsenic [air, non-urban air or from high stacks]: 4.8422e-11 kg; lognormal variance with pedigree 0.66363, pedigree (1,1,4,1,1)
  (same comment as for Hydrogen fluoride)
- Cadmium, ion [water, ground-]: 1.4464e-7 kg; lognormal variance with pedigree 0.40003, pedigree (1,1,4,1,1)
  (same comment as for Cobalt)
- Hydrogen sulfide [water, ground-, long-term]: 1.4727e-5 kg; lognormal variance with pedigree 0.22495, pedigree (1,1,4,1,1)
  (same comment as for DOC, Dissolved Organic Carbon)
- Bromine [air, non-urban air or from high stacks]: 2.5012e-8 kg; lognormal variance with pedigree 0.45721, pedigree (1,1,4,1,1)
  (same comment as for Hydrogen fluoride)
- Chromium VI [water, ground-]: 4.7146e-9 kg; lognormal variance with pedigree 0.51244, pedigree (1,1,4,1,1)
  (same comment as for Cobalt)

## Extrapolations
This dataset has been extrapolated from year 2012 to the year of the calculation (2021). The uncertainty has been adjusted accordingly.
