# hake, capture by trawler and landing whole, fresh

Dataset: EcoSpold 2, unit process
Geography: ES
Time period: 2008-01-01 to 2021-12-31
Technology level: current
Classification: ISIC rev.4 ecoinvent: 0311:Marine fishing
Scenario: Business-as-Usual
System model: Allocation, cut-off by classification
Generated by: Ian Vázquez-Rowe
Published in: Avadí, A. 2018
Database: ecoinvent
isCopyrightProtected: true
accessRestrictedTo: 1

## General comment
This activity represents capture and landing of demersal European hake (Merluccius merluccius) by the trawling fishing fleet. The life cycle inventories were produced based on a representative sample of vessels from Galicia (NW Spain) and their activity in Spanish national waters: from a sample of 24 vessels in 2008-2009, hake landings by Galician steel vessels (101 trawlers) were characterized. The activity may be used as a proxy for other mid-water trawling species, mainly pelagic, such as Atlantic horse mackerel (Trachurus trachurus) or Atlantic makerel (Scomber scombrus). The Galician coastal hake fishery, which operates in ICES Divisions VIIIc and IXa, is composed of an industrial trawling fleet, and a multi-gear small-scale fleet also targeting other pelagic and demersal species. Moreover, hake is also caught along the Cantabrian coast, mainly in the Basque country. These fisheries are included in what is named the Southern Stock for hake in Europe. Nevertheless, Galician vessels, including trawlers and long liners, also perform hake extraction in the Northern Stock. The main areas where these fleets capture hake and other species in a multispecies fishery are mainly the Porcupine Bank (ICES Division VIIc), the West Great Sole (ICES Division VIIk), the Great Sole (ICES Division VIIj) and the Little Sole (ICES Division VIIh).
Annual hake landings in year 2008 in Galician ports added up to 26,439 metric tons, whereas in 2017 this value had risen to 32,418 metric tons, although this value can be highly variable due to stock availability, recruitment or fishing bans on an annual basis in the different targeted fisheries. The Galician government does not provide disaggregated hake landings per fleet or fishing grounds.
The average beam of the sample of trawlers inventoried was 28 m. They operate in areas close to the landing port, performing one or two landings per day. Most of the fleet is constituted by pair trawlers that usually operate at ranges between 1.5 and 2.1 knots/h. On an average day they operate from 9 to 13 h, performing 1 or 2 throws. Single trawlers present slightly different operation patterns, trawling at a speed that ranges from 3.2 to 4.5 knots/h and performing 3 or 4 throws per day for around 12 h.

## Included activities start
From the vessel use (including landing) and maintenance phases, including all upstream activities.

## Included activities end
Port operations and post-landing processing activities are beyond the system boundary.

## Allocation
The system is unallocated between hake landings and the by-catch

## Geography
The Galician coastal hake fishery operates in ICES Divisions VIIIc and IXa, within the Spanish EEZ (FAO Areas 27.8 and 27.9).

## Technology
Mid-water trawling, fish conservation with ice.

## Time period
Data corresponds to the landings-weighted average of annual operation for 2008 and 2009.

## Parameters
- lifetime: 35 year; triangular min 28, mostLikely 35, max 40, pedigree (3,1,3,1,1)
  35 years lifetime for the vessels
- marine fuel use efficiency: 495.6 kg; name FUE; triangular min 280, mostLikely 495.6, max 930, pedigree (2,1,3,1,1)
  Amount of marine fuel consumed per landed unit of fish. Kilograms per tonne of landed fish.
  Uncertainty: D
- average_weight_ trawler: 118000 kg; name WeightTrawler; triangular min 63900, mostLikely 118000, max 169400, pedigree (4,2,4,2,2)
  Average weight of trawler in a given fishery.
  Uncertainty: D
- net calorific value: 42.7 MJ/kg; name net_cal_value; triangular min 41.3, mostLikely 42.7, max 43.4, pedigree (2,1,3,3,3)
  Net calorific value of marine diesel
  Uncertainty: M
- annual landings per vessel: 668985 kg; name landings_vessel_year; triangular min 400000, mostLikely 668985, max 820000, pedigree (2,1,3,1,1)
  Annual landings of vessels in an specific fleet or coherent fleet segment, geometric mean.

## Reference product
- landed hake, fresh: 1 kg; name landed; source Vázquez-Rowe, I. 2010; CPC 04241: Wild fish of Gadiformes, live, fresh or chilled; By-product classification allocatable product; pedigree (1,1,1,1,1)
  European hake (Merluccius merluccius)
  Uncertainty: U
  production volume 2.6439e7 kg; name LandVol
    Amount of hake landed in Galician ports in 2008.
  property protein content 0.166; name hake_protein
    Data for Peruvian hake
  property ash content 0.013 kg; name hake_ash
    http://frida.fooddata.dk/ShowFood.php?foodid=475
  property fat content 0.012; name landed_fat_content
    Data for Peruvian hake
  property water content 0.82; name landed_water_content
  property water in wet mass 0.1476 kg; name landed_WWM
  property dry mass 0.18 kg; name landed_DM
  property carbon content, non-fossil 0.457294; name landed_C_content_non_fossil; = (1-hake_protein-landed_fat_content-hake_ash)*0.444+hake_protein*0.535+landed_fat_content*0.774
    Calculated from C_content = polysaccharids*0.444+protein*0.535+lipids*0.774 and polysaccharids = 1-(protein+lipids+ash)
  property price 1.17 EUR2005; name landed_price_EUR2005
    Literature value. Avadí, A., & Fréon, P. (2015). A set of sustainability performance indicators for seafood: Direct human consumption products from Peruvian anchoveta fisheries and freshwater aquaculture. Ecological Indicators, 48, 518532. https://doi.org/10.1016/j.ecolind.2014.09.006
  property energy content 4.3 MJ; name landed_energy_content
    Data for Peruvian hake
  property wet mass 0.3276 kg; name landed_WM
  property carbon content 0.457294
    carbon content on a dry matter basis (reserved; not for manual entry)
  property true value 1170; name landed_true_value
    allocation property applied in "true value" allocation // value calculated from revenue
  properties: carbon allocation 0.0823129 kg

## By-products
- demersal fish, fresh: 0 kg; name bycatch; source Vázquez-Rowe, I. 2010; By-product classification allocatable product; CPC 04241: Wild fish of Gadiformes, live, fresh or chilled; pedigree (1,1,1,1,1)
  Other fish species landed, mainly small-pelagic fish, such as Atlantic mackerel, horse mackerel and blue whiting.
  Uncertainty: D
  production volume 1.22933e8 kg; = LandVol * (bycatch / landed)
    Calculated from production volume of reference product using the relative outputs.
  property energy content 3.914 MJ; name bycatch_energy_content
    Average of 15 demersal fish species, http://www.fao.org/wairdocs/tan/x5916e/x5916e01.htm
  property protein content 0.181; name hakebc_protein
    Average of 15 demersal fish species, http://www.fao.org/wairdocs/tan/x5916e/x5916e01.htm
  property carbon content, non-fossil 0.466681; name bycatch_C_content_non_fossil; = (1- hakebc_protein- bycatch_fat_content- hakebc_ash)*0.444+ hakebc_protein*0.535+ bycatch_fat_content*0.774
    (same comment as for landed hake, fresh)
  property price 0.539258 EUR2005; name bycatch_price_EUR2005
    Calculated value based on data from United Nations Commodity Trade Statistics Database (comtrade.un.org). UN comtrade category: 30242 Fish; fresh or chilled, anchovies (Engraulis spp.), excluding fillets, livers, roes, and other fish meat of heading 0304. Year 2014. Using exchange rate of 1EURO = 1.209 USD. Average of price of import into 3 main markets (EU, US and CN).
  property fat content 0.039; name bycatch_fat_content
    Average of 15 demersal fish species, http://www.fao.org/wairdocs/tan/x5916e/x5916e01.htm
  property wet mass 0.402227 kg; name bycatch_WM
  property water in wet mass 0.175385 kg; name bycatch_WWM
  property dry mass 0.226842 kg; name bycatch_DM
  property water content 0.773158; name bycatch_water_content
  property ash content 0.015 kg; name hakebc_ash
    Ash content of fish is between 1-2% of the edible portion, http://www.fao.org/wairdocs/tan/x5916e/x5916e01.htm
  property carbon content 0.466681
    carbon content on a dry matter basis (reserved; not for manual entry)
  property true value 2507.39; name bycatch_true_value
    allocation property applied in "true value" allocation // value calculated from revenue
  properties: carbon allocation 0.105863 kg

## Inputs from technosphere
- lubricating oil: 0.00388124 kg; name oil; source Vázquez-Rowe, I. 2010; lognormal variance with pedigree 0.082, pedigree (3,1,5,1,1)
  Lubricating oil used in engines and other on board machinery.
  Uncertainty: D
  properties: dry mass 1 kg, wet mass 1 kg, carbon content, fossil 0.75, heating value, net 40.2 MJ
  note on carbon content, fossil: Lubricating oil is produced from diesel. C-content/dry mass of fats and oils considered 75%, from: ecoinvent v2.2 report, n 15a, pg 40
  note on heating value, net: Literature value, Source: IPCC 2006, 2006 IPCC Guidelines for National Greenhouse Gas Inventories, Prepared by the National Greenhouse Gas Inventories Programme, Eggleston H.S., Buendia L., Miwa K., Ngara T. and Tanabe K. (eds). Published: IGES, Japan
- trawler maintenance, steel: 0.00905878 kg; = ((WeightTrawler)/(landings_vessel_year*lifetime)*5649.7); source Pierre Fréon 2014; lognormal variance with pedigree 0.0426, pedigree (3,1,5,1,1)
  Maintenance of a trawler, per 1000 kg of light ship weight (LSW) over 35 years lifetime. Regressions based on mainly primary data were created to relate the weight of each inventory item to a purse seiner"s LSW, adjusted for trawler"s gear. The list of inventory items (granularity) contribute >95% of environmental impacts, as described in the reference publication.
  Uncertainty: D
- diesel, burned in fishing vessel: 38.0392 MJ; = FUE* net_cal_value*5.6497; source Vázquez-Rowe, I. 2010; lognormal variance with pedigree 0.0426, pedigree (3,1,5,1,1)
  Combustion of diesel in marige engines.
  Uncertainty: D
- waste mineral oil: -0.00388124 kg; = (oil)*-1; source Vázquez-Rowe, I. 2010; lognormal variance with pedigree 0.082, pedigree (3,1,5,1,1)
  Amount of waste oil generated due to its use in engines and other machinery.
  Uncertainty: D
  production volume 0.018882 kg
    Production volume for waste mineral oil in hake-landng vessels is based on GDP, considering the high variability in efficiency of vessels.
  properties: dry mass 0.9 kg, carbon content, fossil 0.864444, heating value, net 34.7 MJ, water content 0.111111, wet mass 1 kg
  note on carbon content, fossil: Tab A.6, ecoinvent v2.2 report 13_I. C content has been calculated after data in the tables, and then referred to 1 kg DM
  note on heating value, net: Value taken from the general comment of the treatment dataset.
- trawler, steel: 0.00905878 kg; = ((WeightTrawler)/(landings_vessel_year*lifetime)*5649.7); source Pierre Fréon 2014; lognormal variance with pedigree 0.342, pedigree (3,1,5,1,1)
  Construction of a trawler, per 1000 kg of light ship weight (LSW). Regressions based on mainly primary data were created to relate the weight of each inventory item to a trawler"s LSW. The list of inventory items (granularity) contribute >95% of environmental impacts, as described in the reference publication.
  Uncertainty: D
  properties: lifetime capacity [h] 48000 hour, lifetime 30 year
- antifouling paint emissions: -0.000765368 kg; name antif; source Vázquez-Rowe, I. 2010; lognormal variance with pedigree 0.082, pedigree (3,1,5,1,1)
  Mass of solids from antifouling paint emitted to the ocean.
  Uncertainty: D
  production volume 63601.7 kg; = LandVol * (antif / landed)
    Calculated from production volume of reference product using the relative outputs.
  property price 0 EUR2005; name antif_price_EUR2005
  properties: carbon content, non-fossil 0.21, carbon content, fossil 0.21, dry mass 1 kg, wet mass 1 kg
- operation, reefer, freezing: 0.580675 kg*day; source Vázquez-Rowe, I. 2010; lognormal variance with pedigree 0.0426, pedigree (3,1,5,1,1)
  Data on ice consumption was reported by skippers: 323 kg per metric ton of landed European hake.
  Uncertainty: D

## Inputs from nature
- Fish, demersal, in ocean [natural resource, biotic]: 0.318161 kg; name demersals; = landed; source Vázquez-Rowe, I. 2010; lognormal variance with pedigree 0.0426, pedigree (3,1,5,1,1)
  Demersal fish in ocean, resource extracted by trawlers.
  Uncertainty: D
  property ash content 0.015 kg; name fishd_ash
  property fat content 0.039; name fishd_fat
  property protein content 0.181; name fishd_protein
- Fish, pelagic, in ocean [natural resource, biotic]: 1.71104 kg; name pelagic; = discards+bycatch; source Vázquez-Rowe, I. 2010; lognormal variance with pedigree 0.0426, pedigree (3,1,5,1,1)
  Pelagic fish in ocean, resource extracted by fisheries. It was assumed that all discarded fish were pelagic.
  Uncertainty: D
  property ash content 0.015 kg; name fishp_ash
  property fat content 0.07; name fishp_fat
  property protein content 0.179; name fishp_protein

## Emissions to nature
- Methane, chlorodifluoro-, HCFC-22 [air, non-urban air or from high stacks]: 0.00086282 kg; source Vázquez-Rowe, I. 2010; lognormal variance with pedigree 0.0487, pedigree (4,2,5,1,1)
  R22 cooling agent emissions.
- Discarded fish, pelagic, to ocean [water, ocean]: 0.231685 kg; name discards; source Vázquez-Rowe, I. 2011; lognormal variance with pedigree 0.0426, pedigree (3,1,5,1,1)
  Pelagic fish discarded at the fishery. Data reported directly by skippers.
  Uncertainty: D
  property ash content 0.015 kg; name discardsp_ash
  property protein content 0.179; name discardsp_protein
  property fat content 0.07; name discardsp_fat

## Sampling procedure
24 vessels out of 101, over two years of operations. Sample belongs to data from 11 different ports along the Galician coast, representative of regional and national operations. Spanish data.

## Extrapolations
Extrapolations can be made to other coastal trawling fleets in Southern Europe.
