# tillage, hoeing and earthing-up, potatoes

Dataset: EcoSpold 2, unit process
Geography: CA-QC
Time period: 1991-01-01 to 2021-12-31
Technology level: current
Classification: EcoSpold01Categories: agricultural means of production/work processes
Classification: ISIC rev.4 ecoinvent: 0161:Support activities for crop production
Scenario: Business-as-Usual
System model: Allocation, cut-off by classification
Generated by: Dominique Maxime
Published in: Nemecek, T. 2007
Database: ecoinvent
isCopyrightProtected: true
accessRestrictedTo: 1

## General comment
This dataset represents the service of hoeing and earthing-up 1 ha of agricultural land.
Child dataset exchanges scaled from GLO parent dataset based on diesel consumption in Quebec. Created to proxy farm machinery/fieldwork representative of the Quebec context. Data quality indicators adjusted accordingly. Other difference with the parent dataset is the production volume, which now represents the production volume in Quebec.
Diesel consumption is calculated from primary data and models from the American Society of Agricultural and Biological Engineers (ASABE) published in 2006 and might be representative of more recent technology than the GLO parent dataset.
Warning: If the parent value for diesel consumption (in the GLO parent dataset) is changed in future edition, the user must change the parameter "ecoinvent diesel consumption" accordingly in order to get the right ratio of qc/ecoinvent diesel consumption.

## Included activities start
Hoeing and earthing-up process starting from preliminary work at farm, like attaching the adequate machinery to the tractor.

## Included activities end
This activity ends with transfer back to farm and concluding work, like uncoupling the machine; The dataset includes transfer to field; field work for an area of land of 1 ha, including turning, idling and overlapping. Also taken into consideration is the amount of emissions to the air from combustion and the emission to the soil from tyre abrasion during the work process. The dataset does not include dust other than from combustion and noise.

## Geography
Child dataset air emissions related to diesel combustion are scaled from parent dataset (GLO) based on the ratio of diesel consumption in Quebec over diesel consumption of GLO. Created to proxy farm machinery/fieldwork representative of the Quebec context. Data quality indicators adjusted accordingly.

## Technology
Fuel consumption has been extrapolated to Quebec, but emissions per kg diesel were taken from the original values.

## Time period
The emissions per kg of combusted Diesel were taken from the original values but the Diesel consumption has been updated.

## Parameters
- potato harvested area world: 1.86701e7 ha; name potato_area_world
- potato harvested area quebec: 16950 ha; name potato_area_qc
- quebec cropped area: 1.87476e6 ha; name qc_crop_area; lognormal variance with pedigree 0.0006, pedigree (1,1,1,1,1)
  Land in crops, Quebec, in 2011. Source: Statistics Canada, 2013. Table 004-0002 - Census of Agriculture, total area of farms and use of farm land, CANSIM (database). (accessed: 2013-11-15) ("Land in crops" includes field crops, vegetables, fruits and nursery crops, and sod.) Statistics Canada
- qc child dataset diesel consumption: 13.4 kg/unit; name qc_diesel; lognormal variance with pedigree 0.000133, pedigree (1,2,1,2,1)
  Diesel consumption in the Québec agricultural fieldwork dataset in kg/ha diesel
- world arable land area: 1.39628e9 ha; name world_arable_area; lognormal variance with pedigree 0.0006, pedigree (1,1,1,1,1)
  Arable land area, World, in 2011. Source: FAOSTAT, 2013
- farm machinery diesel consumption ratio: 3.72222 dimensionless; name machine_diesel_ratio; = qc_diesel/ EI_diesel
  Ratio of diesel consumption for tractor and its machinery: kg diesel per ha of the Quebec machinery/kg diesel per ha of the ecoinvent"s parent machinery
- parent dataset diesel consumption: 3.6 kg/unit; name EI_diesel; lognormal variance with pedigree 0.004, pedigree (1,4,1,5,1)
  Diesel consumption in the parent agricultural fieldwork dataset in kg/ha diesel

## Reference product
- tillage, hoeing and earthing-up, potatoes: 1 ha; CPC 86119: Other support services to crop production; By-product classification allocatable product
  production volume 17413.5 ha
    Production volume down-scaled from total world production volume (value of the GLO parent dataset) through the ratio of potato-cropped area in the two regions (see mathematical relation and parameters).
  property price 14.5851 EUR2005
    Calculated based on inputs: The price of the product has been calculated as a sum of the values of the material and energy inputs for this product. This value is therefore a rough estimation. It may underestimate the real price since there are additional expenses when producing any product. These expences can include for example labour costs, treatment of waste materials and profit for the producer. Please consider carefully whether this level of data quality is acceptable for your application.

## Inputs from technosphere
- shed: 0.00639 m2; lognormal variance with pedigree 0.344, pedigree (1,4,5,5,1)
  The same amount of shed use for machinery as in the parent dataset is used as a proxy.
- diesel: 13.4 kg; lognormal variance with pedigree 0.044, pedigree (1,4,5,5,1)
  Scaling to Quebec diesel consumption
  properties: wet mass 1 kg, carbon content, fossil 0.865, dry mass 1 kg, heating value, net 42.8 MJ
  note on carbon content, fossil: C-content of diesel is 86.5% (ecoinvent v2.2 report 6_IV, Tab 3.14)
- tractor, 4-wheel, agricultural: 0.504 kg; lognormal variance with pedigree 0.044, pedigree (1,4,5,5,1)
  The same amount of tractor use as in the parent dataset is used as a proxy.
- agricultural machinery, tillage: 0.943 kg; lognormal variance with pedigree 0.044, pedigree (1,4,5,5,1)
  The same amount of machinery use as in the parent dataset is used as a proxy.

## Emissions to nature
- NMVOC, non-methane volatile organic compounds, unspecified origin [air, non-urban air or from high stacks]: 0.0472722 kg; lognormal variance with pedigree 0.084, pedigree (1,4,5,5,1)
  Emission from diesel combustion scaled from the parent emission factor based on the relative diesel consumption.
- Cadmium [air, non-urban air or from high stacks]: 1.34e-7 kg; lognormal variance with pedigree 0.7001, pedigree (1,2,5,5,3)
  (same comment as for NMVOC, non-methane volatile organic compounds, unspecified origin)
- PAH, polycyclic aromatic hydrocarbons [air, non-urban air or from high stacks]: 4.42944e-5 kg; lognormal variance with pedigree 0.3601, pedigree (1,2,5,5,3)
  (same comment as for NMVOC, non-methane volatile organic compounds, unspecified origin)
- Carbon monoxide, fossil [air, non-urban air or from high stacks]: 0.0696056 kg; lognormal variance with pedigree 0.694, pedigree (1,4,5,5,1)
  (same comment as for NMVOC, non-methane volatile organic compounds, unspecified origin)
- Chromium [air, non-urban air or from high stacks]: 6.7e-7 kg; lognormal variance with pedigree 0.7001, pedigree (1,2,5,5,3)
  (same comment as for NMVOC, non-methane volatile organic compounds, unspecified origin)
- Carbon dioxide, fossil [air, non-urban air or from high stacks]: 41.6889 kg; lognormal variance with pedigree 0.0601, pedigree (1,2,5,5,3)
  (same comment as for NMVOC, non-methane volatile organic compounds, unspecified origin)
- Nitrogen oxides [air, non-urban air or from high stacks]: 0.588111 kg; lognormal variance with pedigree 0.084, pedigree (1,4,5,5,1)
  (same comment as for NMVOC, non-methane volatile organic compounds, unspecified origin)
- Cadmium [soil, agricultural]: 2.42e-7 kg; lognormal variance with pedigree 0.084, pedigree (1,4,5,5,1)
  Emission to soil from tyre abrasion, not related to diesel combustion. The same emission factor as the parent dataset is used as a proxy.
- Nickel [air, non-urban air or from high stacks]: 9.38e-7 kg; lognormal variance with pedigree 0.7001, pedigree (1,2,5,5,3)
  (same comment as for NMVOC, non-methane volatile organic compounds, unspecified origin)
- Lead [soil, agricultural]: 1.06e-6 kg; lognormal variance with pedigree 0.084, pedigree (1,4,5,5,1)
  (same comment as for Cadmium)
- Benzene [air, non-urban air or from high stacks]: 9.78944e-5 kg; lognormal variance with pedigree 0.1001, pedigree (1,2,5,5,3)
  (same comment as for NMVOC, non-methane volatile organic compounds, unspecified origin)
- Zinc [soil, agricultural]: 0.000641 kg; lognormal variance with pedigree 0.084, pedigree (1,4,5,5,1)
  (same comment as for Cadmium)
- Zinc [air, non-urban air or from high stacks]: 1.34e-5 kg; lognormal variance with pedigree 0.7001, pedigree (1,2,5,5,3)
  (same comment as for NMVOC, non-methane volatile organic compounds, unspecified origin)
- Copper [air, non-urban air or from high stacks]: 2.28172e-5 kg; lognormal variance with pedigree 0.7001, pedigree (1,2,5,5,3)
  (same comment as for NMVOC, non-methane volatile organic compounds, unspecified origin)
- Dinitrogen monoxide [air, non-urban air or from high stacks]: 0.001608 kg; lognormal variance with pedigree 0.1001, pedigree (1,2,5,5,3)
  (same comment as for NMVOC, non-methane volatile organic compounds, unspecified origin)
- Ammonia [air, non-urban air or from high stacks]: 0.000268372 kg; lognormal variance with pedigree 0.1001, pedigree (1,2,5,5,3)
  (same comment as for NMVOC, non-methane volatile organic compounds, unspecified origin)
- Methane, fossil [air, non-urban air or from high stacks]: 0.00173083 kg; lognormal variance with pedigree 0.1001, pedigree (1,2,5,5,3)
  (same comment as for NMVOC, non-methane volatile organic compounds, unspecified origin)
- Sulfur dioxide [air, non-urban air or from high stacks]: 0.0135117 kg; lognormal variance with pedigree 0.0601, pedigree (1,2,5,5,3)
  (same comment as for NMVOC, non-methane volatile organic compounds, unspecified origin)
- Selenium [air, non-urban air or from high stacks]: 1.34e-7 kg; lognormal variance with pedigree 0.1001, pedigree (1,2,5,5,3)
  (same comment as for NMVOC, non-methane volatile organic compounds, unspecified origin)
- Particulates, < 2.5 um [air, non-urban air or from high stacks]: 0.0483889 kg; lognormal variance with pedigree 0.3601, pedigree (1,2,5,5,3)
  (same comment as for NMVOC, non-methane volatile organic compounds, unspecified origin)
- Benzo(a)pyrene [air, non-urban air or from high stacks]: 4.02e-7 kg; lognormal variance with pedigree 0.7001, pedigree (1,2,5,5,3)
  (same comment as for NMVOC, non-methane volatile organic compounds, unspecified origin)

## Sampling procedure
Data on fuel consumption and emissions of CO, HC and NOx are expert estimations based on measurements for comparable activities (hoeing). The other emissions were calculated basing on literature data and the measured fuel consumption.

## Extrapolations
This dataset has been extrapolated from year 2002 to the year of the calculation (2021). The uncertainty has been adjusted accordingly.

## Review by Thomas Nemecek 2013-12-27
The production volume needs to be updated, since the GLO production volume has changed meanwhile.
