# heat and power co-generation, natural gas, 160kW electrical, lambda=1

Dataset: EcoSpold 2, unit process
Geography: Europe without Switzerland
Time period: 2000-01-01 to 2021-12-31
Technology level: current
Classification: EcoSpold01Categories: natural gas/cogeneration
Classification: ISIC rev.4 ecoinvent: 3530:Steam and air conditioning supply
Tags: with true value
Scenario: Business-as-Usual
System model: Allocation, cut-off by classification
Generated by: [System]
Published in: Heck, T. 2007
Database: ecoinvent
isCopyrightProtected: true
accessRestrictedTo: 1

## General comment
This dataset is a copy of the Swiss dataset.
The multioutput-process 'natural gas, burned in cogen 160kWe lambda=1, allocation exergy' delivers the coproducts 'heat, at cogen 160kWe lambda=1, allocation exergy' and 'electricity, at cogen 160kWe lambda=1, allocation exergy'. The exergy allocation is the allocation scheme suggested to be used within ecoinvent (e.g. in electricity mixes).
[This dataset was already contained in the ecoinvent database version 2. It was not individually updated during the transfer to ecoinvent version 3. Life Cycle Impact Assessment results may still have changed, as they are affected by changes in the supply chain, i.e. in other datasets. This dataset was generated following the ecoinvent quality guidelines for version 2. It may have been subject to central changes described in the ecoinvent version 3 change report (http://www.ecoinvent.org/database/ecoinvent-version-3/reports-of-changes/), and the results of the central updates were reviewed extensively. The changes added e.g. consistent water flows and other information throughout the database. The documentation of this dataset can be found in the ecoinvent reports of version 2, which are still available via the ecoinvent website. The change report linked above covers all central changes that were made during the conversion process.]

## Included activities end
The module includes fuel input, infrastructure, emissions to air, and substances needed for operation.

## Geography
Could be used for central European conditions.

## Technology
Average technology available on market.

## Parameters
- scaling factor: 1.81818 dimensionless; name scaling_factor

## Reference product
- heat, central or small-scale, natural gas: 1 MJ; = 0.55 * scaling_factor; CPC 17300: Steam and hot water; By-product classification allocatable product
  Amount was scaled to 1.
  EcoSpold01Location=CH
  production volume 9.57e10 MJ; name apv_heat
    Estimation. This value does not reflect real conditions. The annual production volume determines the shares of supplying activities on a certain market.
    The share of heat, central or small-scale, natural gas from CHP plants was assumed to amount to 5%; the share from pure heat plants was assumed to amount to 95%. The annual production volumes of all supplying datasets reflect these shares on the market, but are not realistic production volumes.
    See talk pages for further discussion of the modelling of the heat markets.
  property true value relation 0.169678; name true_value_relation
    property to calculate "true value" from
  property Corresponding fuel use 1.6565 MJ; name fuel_use; = 35.532*0.0256410256410256/0.55
    Lower heating value of the fuel input related to the heat/electricity output
  property exergy 0.169678 MJ; name exergy
    allocation factor for electricity (=1) vs. heat, where heat is calculated as the termodynamic mean temperature Tm = (Tfeed-Treturn)/ln(Tfeed/Treturn), relative to the application temperature (Tu, typically = 293 K), i.e. (Tm-Tu)/Tm
  property price 0.01 EUR2005
    Temporary price data. Calculated as 90% of purchasers price based on: Average European district heat price from Ecoheatcool and Euroheat 2005-2006, Ecoheat Work package 1: The European heat market. Final report. http://www.solarthermalworld.org/files/Ecoheatcool%20WP1%20Web.pdf?download
  property true value 0.00616226
    allocation property applied in "true value" allocation // value calculated from true value relation
  properties: EcoSpold01Allocation_undefined_6 23, EcoSpold01Allocation_undefined_11 23, EcoSpold01Allocation_undefined_8 23, EcoSpold01Allocation_undefined_12 23, EcoSpold01Allocation_undefined_3 0, EcoSpold01Allocation_undefined_18 100, EcoSpold01Allocation_undefined_5 23, EcoSpold01Allocation_undefined_2 23, EcoSpold01Allocation_undefined_16 23, EcoSpold01Allocation_undefined_14 23, EcoSpold01Allocation_undefined_4 100, EcoSpold01Allocation_undefined_15 23, heating value, net 1 MJ, EcoSpold01Allocation_undefined_1 23, EcoSpold01Allocation_undefined_9 23, EcoSpold01Allocation_undefined_7 23, EcoSpold01Allocation_undefined_13 23, EcoSpold01Allocation_undefined_10 23

## By-products
- electricity, low voltage: 0 kWh; name electricity; CPC 17100: Electrical energy; By-product classification allocatable product
  EcoSpold01Location=CH
  Amount was scaled to the amount of reference product.
  production volume 1.54686e10 kWh; = apv_heat*electricity
    Calculated value
  property exergy 3.6 MJ; name electricity_exergy
    (same comment as for heat, central or small-scale, natural gas)
  property price 0.107 EUR2005; name electricity_price_EUR2005
    Temporary price data. Calculated as 90% of purchasers price based on: IEA Key world energy statistics 2004 (www.iea.org/textbase/nppdf/free/2004/keyworld2004.pdf)
  property true value relation 3.6; name electricity_true_value_relation
    property to calculate "true value" from
  property true value 0.0211328; name electricity_true_value
    (same comment as for heat, central or small-scale, natural gas)
  properties: EcoSpold01Allocation_undefined_13 77, EcoSpold01Allocation_undefined_16 77, EcoSpold01Allocation_undefined_12 77, EcoSpold01Allocation_undefined_14 77, EcoSpold01Allocation_undefined_4 0, EcoSpold01Allocation_undefined_3 100, EcoSpold01Allocation_undefined_6 77, EcoSpold01Allocation_undefined_8 77, EcoSpold01Allocation_undefined_15 77, EcoSpold01Allocation_undefined_11 77, EcoSpold01Allocation_undefined_7 77, EcoSpold01Allocation_undefined_5 77, EcoSpold01Allocation_undefined_9 77, EcoSpold01Allocation_undefined_10 77, EcoSpold01Allocation_undefined_17 100, EcoSpold01Allocation_undefined_2 77, EcoSpold01Allocation_undefined_1 77

## Inputs from technosphere
- heat and power co-generation unit, 160kW electrical, components for heat only: 2.0524e-9 unit; = 5E-09 * scaling_factor; lognormal variance with pedigree 0.04, pedigree (1,1,5,1,1)
  EcoSpold01Location=RER
  Amount was scaled to the amount of reference product.
- waste mineral oil: -1.23144e-5 kg; name waste_min_oil; = (3E-05 * scaling_factor)*-1; lognormal variance with pedigree 0.16, pedigree (1,1,5,1,1)
  rough estimate
  Amount was scaled to the amount of reference product.
  EcoSpold01Location=CH
  production volume 5.22e6 kg; = apv_heat*waste_min_oil
    Calculated value
  property price 0 EUR2005; name waste_min_oil_price_EUR2005
  properties: heating value, net 34.7 MJ, water content 0.111111, carbon content, fossil 0.864444, wet mass 1 kg, dry mass 0.9 kg
  note on heating value, net: Value taken from the general comment of the treatment dataset.
  note on carbon content, fossil: Tab A.6, ecoinvent v2.2 report 13_I. C content has been calculated after data in the tables, and then referred to 1 kg DM
- heat and power co-generation unit, 160kW electrical, components for electricity only: 2.0524e-9 unit; = 5E-09 * scaling_factor; lognormal variance with pedigree 0.04, pedigree (1,1,5,1,1)
  EcoSpold01Location=RER
  Amount was scaled to the amount of reference product.
- lubricating oil: 1.23144e-5 kg; = 3E-05 * scaling_factor; lognormal variance with pedigree 0.05, pedigree (1,1,5,1,1)
  vender information
  Amount was scaled to the amount of reference product.
  EcoSpold01Location=RER
  properties: wet mass 1 kg, carbon content, fossil 0.75, dry mass 1 kg, heating value, net 40.2 MJ
  note on carbon content, fossil: Lubricating oil is produced from diesel. C-content/dry mass of fats and oils considered 75%, from: ecoinvent v2.2 report, n 15a, pg 40
  note on heating value, net: Literature value, Source: IPCC 2006, 2006 IPCC Guidelines for National Greenhouse Gas Inventories, Prepared by the National Greenhouse Gas Inventories Programme, Eggleston H.S., Buendia L., Miwa K., Ngara T. and Tanabe K. (eds). Published: IGES, Japan
- natural gas, low pressure: 0.0105252 m3; = 0.0256410256410256 * scaling_factor; lognormal variance with pedigree 0.04, pedigree (1,1,5,1,1)
  EcoSpold01Location=CH
  Amount was scaled to the amount of reference product.
  properties: wet mass 1 kg, dry mass 1 kg, heating value, gross 39 MJ, carbon content, fossil 0.695187, heating value, net 39 MJ
  note on carbon content, fossil: C content considered the same as in high pressure (consumption mix)
  note on heating value, net: Literature value, Source: United Nations Statistics Division (2018) International Recommendations for Energy Statistics (IRES). Available at: http://unstats.un.org/unsd/statcom/doc11/BG-IRES.pdf.
- heat and power co-generation unit, 160kW electrical, common components for heat+electricity: 2.0524e-9 unit; = 5E-09 * scaling_factor; lognormal variance with pedigree 0.04, pedigree (1,1,5,1,1)
  EcoSpold01Location=RER
  Amount was scaled to the amount of reference product.

## Emissions to nature
- Methane, fossil [air, urban air close to ground]: 9.44106e-6 kg; = 2.3E-05 * scaling_factor; lognormal variance with pedigree 0.34, pedigree (1,1,5,1,1)
  estimate based on different references
  Amount was scaled to the amount of reference product.
- Platinum [air, urban air close to ground]: 2.87337e-12 kg; = 7E-12 * scaling_factor; lognormal variance with pedigree 1.37, pedigree (1,1,5,1,1)
  (Artelt et al. 2000)
  Amount was scaled to the amount of reference product.
- NMVOC, non-methane volatile organic compounds, unspecified origin [air, urban air close to ground]: 8.20962e-7 kg; = 2E-06 * scaling_factor; lognormal variance with pedigree 0.34, pedigree (1,1,5,1,1)
  (same comment as for Methane, fossil)
- Sulfur dioxide [air, urban air close to ground]: 2.25765e-7 kg; = 5.5E-07 * scaling_factor; lognormal variance with pedigree 0.04, pedigree (1,1,5,1,1)
  composition of natural gas
  Amount was scaled to the amount of reference product.
- Carbon monoxide, fossil [air, urban air close to ground]: 1.97031e-5 kg; = 4.8E-05 * scaling_factor; lognormal variance with pedigree 0.16, pedigree (1,1,5,1,1)
  (same comment as for Methane, fossil)
- Nitrogen oxides [air, urban air close to ground]: 6.15721e-6 kg; = 1.5E-05 * scaling_factor; lognormal variance with pedigree 0.16, pedigree (1,1,5,1,1)
  (same comment as for Methane, fossil)
- Particulates, < 2.5 um [air, urban air close to ground]: 6.15721e-8 kg; = 1.5E-07 * scaling_factor; lognormal variance with pedigree 0.16, pedigree (1,1,5,1,1)
  (same comment as for Methane, fossil)
- Carbon dioxide, fossil [air, urban air close to ground]: 0.0229869 kg; = 0.056 * scaling_factor; lognormal variance with pedigree 0.04, pedigree (1,1,5,1,1)
  composition of natural gas
  Amount was scaled to the amount of reference product.
- Dinitrogen monoxide [air, urban air close to ground]: 1.0262e-6 kg; = 2.5E-06 * scaling_factor; lognormal variance with pedigree 0.34, pedigree (1,1,5,1,1)
  rough estimate
  Amount was scaled to the amount of reference product.

## Sampling procedure
Literature. Manufacturer information.

## Extrapolations
Copy of the Swiss dataset.
