# treatment of used reefer, intermodal shipping container, 40-foot, high-cube

Dataset: EcoSpold 2, unit process
Geography: GLO
Time period: 2010-01-01 to 2021-12-31
Technology level: current
Classification: EcoSpold01Categories: transport systems/road
Classification: ISIC rev.4 ecoinvent: 3830:Materials recovery
Scenario: Business-as-Usual
System model: Allocation, cut-off by classification
Generated by: Tereza Levova
Database: ecoinvent
isCopyrightProtected: true
accessRestrictedTo: 1

## General comment
This dataset represents the treatment of used intermodal shipping container.

## Included activities start
The activity starts when the used container enters the waste treatment facility. The data on energy needed during dismantling are unknown.

## Included activities end
The activity ends by different waste materials being ready for further treatment.

## Technology
The inventory is created by looking at the material composition of the container.

## Reference product
- used reefer, intermodal shipping container, 40-foot, high-cube: -1 unit; name RP_amount_1; CPC 39990: Other wastes n.e.c.; By-product classification Waste
  production volume 45000 unit; name RP_PV_1; = 4500+40500
    Calculated value. It is assumed, that the same amount of reefers produced in a year is also treated (disposed of).
  property price 0 EUR2005; name RP_amount_1_price_EUR2005
    Waste products are assigned a price of zero as they are assumed to require further treatment.

## Inputs from technosphere
- waste polypropylene: 0 kg; name BP_amount_3
  Calculated value.
  production volume 0 kg
    Calculated from production volume of reference product using the relative outputs.
  property price 0 EUR2005; name BP_amount_3_price_EUR2005
  property dry mass 0.841 kg; name waste_PP_DM
  properties: water content 0.189061, wet mass 1 kg, carbon content, fossil 0.825208, heating value, net 32.78 MJ
  note on heating value, net: Value assumed for all polypropylene products. Source: Phyllis2, database for (treated) biomass, algae, feedstocks for biogas production and biochar, https://phyllis.nl/Biomass/View/1186, ECN.TNO
- waste rubber, unspecified: 0 kg; name BP_amount_4; pedigree (1,1,1,1,1)
  Calculated value based on the composition of the container.
  production volume 0 kg
    Calculated from production volume of reference product using the relative outputs.
  property price 0 EUR2005; name BP_amount_4_price_EUR2005
  property dry mass 1 kg; name waste_rubber_DM
  properties: carbon content, fossil 0.853, heating value, net 27.19 MJ, wet mass 1 kg
  note on heating value, net: Value taken from the general comment of the treatment dataset.
- building, hall: 0.00325744 m2; = 1/(( lifetime_building*365)/(12.192*2.438*2)); lognormal variance with pedigree 0.318, pedigree (4,5,3,1,1)
  Calculated value based on estimates.
  1m2 of hall is available every day for 50 years
  1 container occupies during the dismantling the area of its base for the period of 2 days
  property lifetime 50 year; name lifetime_building
- scrap steel: 0 kg; name BP_amount_5; pedigree (1,1,1,1,1)
  Calculated value based on the composition of the container.
  production volume 0 kg
    Calculated from production volume of reference product using the relative outputs.
  property price 0 EUR2005; name BP_amount_5_price_EUR2005
  properties: dry mass 1 kg, wet mass 1 kg
- scrap aluminium: 0 kg; name BP_amount_1
  production volume 0 kg
    Calculated from production volume of reference product using the relative outputs.
  property price 0 EUR2005; name BP_amount_1_price_EUR2005
  properties: dry mass 1 kg, wet mass 1 kg
- waste polyurethane foam: 0 kg; name BP_amount_2
  Calculated value.
  production volume 0 kg
    Calculated from production volume of reference product using the relative outputs.
  property price 0 EUR2005; name BP_amount_2_price_EUR2005
  property dry mass 0.998 kg; name waste_PE_DM
  properties: heating value, net 30.67 MJ, wet mass 1 kg, water content 0.00200401, carbon content, fossil 0.641283
- waste polypropylene: -31.2255, -2.4073, -0.994302, -0.944182, -36.0287, -0.401687, -0.18206, -252.221 kg (8 entries)
  Calculated value.
  production volume 1.45982e7 kg
  properties: water content 0.189061, wet mass 1 kg, dry mass 0.841 kg, carbon content, fossil 0.825208, heating value, net 32.78 MJ
- waste rubber, unspecified: -2.88288, -0.121023, -2.88288 kg (3 entries); lognormal variance with pedigree 0.0026, pedigree (1,1,3,1,1)
  Calculated value based on the composition of the container.
  production volume 264905 kg
  properties: carbon content, fossil 0.853, heating value, net 27.19 MJ, dry mass 1 kg, wet mass 1 kg
- scrap steel: -750.209, -0.950488, -2329.84 kg (3 entries); lognormal variance with pedigree 0.0026, pedigree (1,1,3,1,1)
  Calculated value based on the composition of the container.
  production volume 1.38645e8 kg
- scrap aluminium: -115.238, -5.40668, -242.643 kg (3 entries)
  production volume 1.63479e7 kg
- waste polyurethane foam: -0.300696, -383.354 kg (2 entries)
  Calculated value.
  production volume 1.72644e7 kg
  properties: heating value, net 30.67 MJ, dry mass 0.998 kg, wet mass 1 kg, water content 0.00200401, carbon content, fossil 0.641283

## Extrapolations
This dataset has been extrapolated from year 2014 to the year of the calculation (2021). The uncertainty has been adjusted accordingly.

## Review by Gabor Doka 2014-12-19
passed
