# cable production, ribbon cable, 20-pin, with plugs

Dataset: EcoSpold 2, unit process
Geography: GLO
Time period: 2000-01-01 to 2021-12-31
Technology level: current
Classification: EcoSpold01Categories: electronics/component
Classification: ISIC rev.4 ecoinvent: 2610:Manufacture of electronic components and boards
Tags: ConvertedDataset
Scenario: Business-as-Usual
System model: Allocation, cut-off by classification
Generated by: Martin Lehmann
Published in: Hischier R. 2007
Database: ecoinvent
isCopyrightProtected: false
accessRestrictedTo: 1

## General comment
This dataset represents the production of 1 kg of a typical 20-way ribbon cable to connect drives to the motherboard of a computer. It is based on a 20-pin ribbon cable. The total weight of 1 unit of ribbon cable (with connector) is 0.0242 kg and the length 0.24 m, whereof the plugs weigh 0.0167 kg and the 20-cores cable 0.0075 kg. These weights have been extrapolated to 1 kg of ribbon cable (factor 1/0.0242). Main data are based on weighting and calculations of a Swiss type computer cable at EMPA laboratories, supported by EPD information.
[This dataset was already contained in the ecoinvent database version 2. It was not individually updated during the transfer to ecoinvent version 3. Life Cycle Impact Assessment results may still have changed, as they are affected by changes in the supply chain, i.e. in other datasets. This dataset was generated following the ecoinvent quality guidelines for version 2. It may have been subject to central changes described in the ecoinvent version 3 change report (http://www.ecoinvent.org/database/ecoinvent-version-3/reports-of-changes/), and the results of the central updates were reviewed extensively. The changes added e.g. consistent water flows and other information throughout the database. The documentation of this dataset can be found in the ecoinvent reports of version 2, which are still available via the ecoinvent website. The change report linked above covers all central changes that were made during the conversion process.]

## Included activities start
From reception of metal and plastic materials at the factory gate.

## Included activities end
This dataset includes materials copper, brass, PVC and HDPE with their attributed manufacturing processes like wire drawing or extrusion, infrastructure, electricity for the assembly of the connector, the fuel oil, propane and water input, the disposal of plastic and rubber parts, the VOC and methanol emissions created during the processing, plus the road and rail transportation for input materials from the regional storage to the production site. The accumulated hazardous waste is also reported.

## Geography
The data describes a typical ribbon cable in the years after 2000. The kind of ribbon cable is produced by international manufacturers and available all over the world. Therefore a global dataset is justifiable.

## Technology
The manufacturing process is represented through plastic extrusion (for HDPE and PVC), tin-coating, contouring (brass), and wire drawing (copper). Cable manufacturing is a process that typically is composed of: Insulation of copper conductors or optical fibres with selected polymer(s); If specified, shielding of insulated copper conductors (based on cable design); If specified, twisting of insulated conductors into pairs or triplets or quads (based on cable design); If specified, shielding of insulated pairs, triplets, or quads (based on cable design); Cabling of insulated conductors and/or pairs, triplets, quads into groups (based on cable de-sign); If specified, shielding of group(s) of conductors/pairs/triplets (based on cable design); Cabling of together unshielded and shielded groups of conductors into the cable bundle; If specified, overall shielding of cable bundle (based on cable design); If specified, application of separation barriers around cable bundle and/or overall shield; Jacketing over cable bundle or shielded cable bundle with selected polymer; Perform outgoing QA testing (tests based on cable design).

## Parameters
- fraction, process water, to air: 0.061 dimensionless; name fraction_PW_to_air; lognormal variance with pedigree 0.092025, pedigree (4,4,3,2,4)
  Literature value (Statistics Canada, 2007 & Shaffer, K.H., 2008, Consumptive water use in the Great Lakes Basin, USGS) (Vionnet, S., Quantis Water Database - Technical Report, 2012).
- fraction, tap water, to air: 0.061 dimensionless; name fraction_TW_to_air; = fraction_PW_to_air; lognormal variance with pedigree 0.092025, pedigree (4,4,3,2,4)
  Calculated value. See comment in the other parametres present in this dataset. Tap water is considered to be always used as process water, thus process water fractions to air are applied to all tap water input flows to calculate the amount of water consumed in the processes.

## Reference product
- cable, ribbon cable, 20-pin, with plugs: 1 kg; By-product classification allocatable product; CPC 471: Electronic valves and tubes; electronic components; parts thereof
  EcoSpold01Location=GLO
  A ribbon cable is a cable with many conducting wires running parallel to each other on the same flat plane. As a result the cable is wide and flat rather than round. Its name comes from the resemblance of the cable to a piece of ribbon (which is likewise wide and flat). Generally the cable is marked with a red stripe along one edge, although rainbow coloured cables are also made, which are helpful if only one end of the cable is terminated with an IDC connector. In order to avoid damage to hardware due to ribbon cables plugged in the wrong way, the red stripe designates the first wire of the cable, indicating the correct position to plug the cable into its corresponding socket. The order of colours in a rainbow coloured cable is the same as the electronic colour code. (Brown is pin 1 or pin 11 or pin 21 etc. Red is pin 2 or pin 12 or pin 22 etc.) .
  Ribbon cables are commonly seen for internal peripherals in computers, such as hard drives, CD drives and floppy drives. On some older computer systems they is commonly used for external connections as well. The high-speed ATA cable used for ULTRA-ATA 66 and above has 0.025 inch (0.64 mm) pitch and 80 ways. The 40 pin connection is still used but with special connectors that ground every other wire in the 80 way cable. Finer pitches, as small as 0.3 mm, are found in portable electronic equipment such as laptops, however portable electronic equipment usually uses FFC (Flexible Flat Cables).
  production volume 1 kg
    Unknown
    Dummy value to be replaced by measured, estimated or calculated value
  property price 12.9942 EUR2005
    Calculated based on inputs: The price of the product has been calculated as a sum of the values of the material and energy inputs for this product. This value is therefore a rough estimation. It may underestimate the real price since there are additional expenses when producing any product. These expences can include for example labour costs, treatment of waste materials and profit for the producer. Please consider carefully whether this level of data quality is acceptable for your application.
  property carbon content, fossil 0.648653
    Calculated as the addition of C contents in the product composition. Then referred to 1 kg DM
  property carbon content 0.648653
    carbon content on a dry matter basis (reserved; not for manual entry)
  properties: water in wet mass 0 kg, carbon content, non-fossil 0, dry mass 1 kg, water content 0, wet mass 1 kg, carbon allocation 0.648653 kg

## Inputs from technosphere
- electricity, medium voltage: 0.77306 kWh; source Draka 2004; lognormal variance with pedigree 0.0527, pedigree (2,4,5,3,1)
  EcoSpold01Location=UCTE
  Estimation, based on literature.
  Further references:
  Nichigoh (2006) Environmental Product Declaration for Wire and Cable World Wide Standard Cable ECO-FLEX Series from <http://www.jia-page.or.jp/jia/epd/directory/nichigoh/nichigoh_e.pdf>.
- printed wiring board mounting facility: 2.08e-7 unit; lognormal variance with pedigree 0.3527, pedigree (2,4,5,3,1)
  EcoSpold01Location=GLO
  Proxy, infrastructure for printed wiring board is used.
- injection moulding: 0.68678 kg; lognormal variance with pedigree 0.0521, pedigree (1,4,5,3,1)
  EcoSpold01Location=RER
  Measured Value, in the Empa laboratories.
- polyvinylchloride, suspension polymerised: 0.135178 kg; lognormal variance with pedigree 0.0521, pedigree (1,4,5,3,1)
  Measured Value, in the Empa laboratories.
  EcoSpold01Location=RER
  properties: heating value, net 21.5 MJ, wet mass 1 kg, carbon content, fossil 0.387097, dry mass 1 kg
  note on carbon content, fossil: Monomer is vynyl chloride, C2H3Cl (ecoinvent v2.2 report 11_II). MW=62 g/mol
- polyethylene, high density, granulate: 0.68678 kg; lognormal variance with pedigree 0.0521, pedigree (1,4,5,3,1)
  Measured Value, in the Empa laboratories.
  EcoSpold01Location=RER
  properties: wet mass 1 kg, heating value, net 42.47 MJ, carbon content, fossil 0.857143, dry mass 1 kg
  note on carbon content, fossil: Polyethylene is formed out of a huge amount of ethylene monomers (C2H4) (ecoinvent v2.2 report 11_II). MW=28 g/mol
- extrusion, plastic pipes: 0.15496 kg; lognormal variance with pedigree 0.0521, pedigree (1,4,5,3,1)
  EcoSpold01Location=RER
  Measured Value, in the Empa laboratories.
- brass: 0 kg; pedigree (1,1,1,1,1)
  Measured Value, in the Empa laboratories.
  EcoSpold01Location=CH
  properties: wet mass 1 kg, dry mass 1 kg
- polyvinylchloride, emulsion polymerised: 0.0197822 kg; lognormal variance with pedigree 0.0521, pedigree (1,4,5,3,1)
  EcoSpold01Location=RER
  Measured Value, in the Empa laboratories.
  properties: wet mass 1 kg, carbon content, fossil 0.387097, dry mass 1 kg, heating value, net 21.5 MJ
- tap water: 20.167 kg; name tap_water_input; source Draka 2004; lognormal variance with pedigree 0.0527, pedigree (2,4,5,3,1)
  EcoSpold01Location=RER
  Literature Value.
  properties: carbon content, fossil 0.00178991, water content 2962.17, dry mass 0.000337476 kg, wet mass 1 kg
  note on carbon content, fossil: Bicarbonate content is 2.93 mol/m3. CO2 content is 0.1 mol/m3 (ecoinvent v2.2 report 8, Tab 93.1).
- waste plastic, mixture: 0 kg; source Draka 2004; pedigree (1,1,1,1,1)
  EcoSpold01Location=CH
  Literature Value.
  production volume 0 kg
    Calculated from the production volume of cable, ribbon cable, 20-pin, with plugs in proportion to the respective output amounts.
  properties: carbon content, fossil 0.747344, water content 0.180638, dry mass 0.847 kg, wet mass 1 kg, heating value, net 30.79 MJ
  note on carbon content, fossil: C content in 1 kg DM was calculated using data in Tab A.2, ecoinvent v2.2 report 13_I
  note on heating value, net: Value taken from the general comment of the treatment dataset.
- contouring, brass: 0.0033058 kg; lognormal variance with pedigree 0.0521, pedigree (1,4,5,3,1)
  Measured Value, in the Empa laboratories.
  EcoSpold01Location=RER
  properties: wet mass 0.039644 kg, dry mass 0.039644 kg
- liquefied petroleum gas: 0.00018548 kg; source Draka 2004; lognormal variance with pedigree 0.0527, pedigree (2,4,5,3,1)
  Literature Value.
  EcoSpold01Location=RER
  properties: heating value, net 45.5 MJ, wet mass 1 kg, dry mass 1 kg, carbon content, fossil 0.821863
  note on heating value, net: Indicative value. Reference: Fuels - Higher and Lower Calorific Values, available at: https://www.engineeringtoolbox.com/fuels-higher-calorific-values-d_169.html
- hazardous waste, for incineration: 0 kg; source Draka 2004; pedigree (1,1,1,1,1)
  Literature Value.
  EcoSpold01Location=CH
  production volume 0 kg
    (same comment as for waste plastic, mixture)
  properties: carbon content, fossil 0.554667, water content 0.333333, wet mass 1 kg, dry mass 0.75 kg, heating value, net 17 MJ
  note on carbon content, fossil: Tab A.6, ecoinvent v2.2 report 13_I. C content has been calculated after data in the tables, and then referred to 1 kg DM
- copper, cathode: 0.15496 kg; lognormal variance with pedigree 0.0521, pedigree (1,4,5,3,1)
  EcoSpold01Location=RER
  Measured Value, in the Empa laboratories.
  properties: wet mass 1 kg, dry mass 1 kg
- zinc coat, pieces: 0.62441 m2; lognormal variance with pedigree 0.0521, pedigree (1,4,5,3,1)
  Measured Value, in the Empa laboratories.
  EcoSpold01Location=RER
- wire drawing, copper: 0.15496 kg; lognormal variance with pedigree 0.0521, pedigree (1,4,5,3,1)
  EcoSpold01Location=RER
  Measured Value, in the Empa laboratories.
- heat, district or industrial, other than natural gas: 0.6258 MJ; source Draka 2004; lognormal variance with pedigree 0.0527, pedigree (2,4,5,3,1)
  Literature Value.
  EcoSpold01Location=RER
  properties: heating value, net 1 MJ
- brass: 1.6529e-5, 0.00328927 kg (2 entries); lognormal variance with pedigree 0.0521, pedigree (1,4,5,3,1)
  Measured Value, in the Empa laboratories.
  EcoSpold01Location=CH
- waste plastic, mixture: -0.00243226, -0.000187513, -7.74495e-5, -7.35456e-5, -0.0028064, -3.12887e-5, -1.41813e-5, -0.0196464 kg (8 entries); source Draka 2004; lognormal variance with pedigree 0.0527, pedigree (2,4,5,3,1)
  EcoSpold01Location=CH
  Literature Value.
  production volume 0.025269 kg
- hazardous waste, for incineration: -0.000986769, -2.57935e-5, -0.00205194 kg (3 entries); source Draka 2004; lognormal variance with pedigree 0.0521, pedigree (1,4,5,3,1)
  Literature Value.
  EcoSpold01Location=CH
  production volume 0.0030645 kg

## Emissions to nature
- NMVOC, non-methane volatile organic compounds, unspecified origin [air, non-urban air or from high stacks]: 9.6774e-5 kg; source Draka 2004; lognormal variance with pedigree 0.1721, pedigree (1,4,5,3,1)
  Literature Value.
- Water [air, unspecified]: 0.00123019 m3; name water_to_air_unspecified; = (tap_water_input/1000*fraction_TW_to_air); lognormal variance with pedigree 0.0807, pedigree (2,2,5,1,1)
  Calculated value based on literature values and expert opinion. See comments in the parametres' comment field.
  property fraction, origin: fresh water 1; name fraction_origin_fresh_water
  property fraction, origin: salt water 0; name fraction_origin_salt_water
  property fraction, origin: unspecified 0; name fraction_origin_unspecified
- Water [water, unspecified]: 0.0189368 m3; name water_to_water_unspecified; = (tap_water_input/1000)*(1-fraction_TW_to_air); lognormal variance with pedigree 0.0807, pedigree (2,2,5,1,1)
  (same comment as for Water)
  property fraction, origin: fresh water 1; name fraction_origin_fresh_water_Ww
  property fraction, origin: salt water 0; name fraction_origin_salt_water_Ww
  property fraction, origin: unspecified 0; name fraction_origin_unspecified_Ww
  property carbon content, fossil 0; name C_content_fossil
  property carbon content, non-fossil 0; name C_content_non_fossil
  property wet mass 1000 kg; name WM
  property water in wet mass 1000 kg; name WWM
  property dry mass 0 kg; name DM
- Methanol [air, non-urban air or from high stacks]: 0.00012903 kg; source Draka 2004; lognormal variance with pedigree 0.1721, pedigree (1,4,5,3,1)
  Literature Value.

## Sampling procedure
Weighing and measuring of materials. Literature for electricity consumption (assembly), emissions and waste.

## Extrapolations
This dataset has been extrapolated from year 2006 to the year of the calculation (2021). The uncertainty has been adjusted accordingly.

## Review by Rolf Frischknecht 2007-11-07
passed

## Review by Roland Hischier 2011-09-22
Transfer of documentation done.
