# metaldehyde production

Dataset: EcoSpold 2, unit process
Geography: RER
Time period: 2000-01-01 to 2021-12-31
Technology level: current
Classification: EcoSpold01Categories: agricultural means of production/pesticides
Classification: ISIC rev.4 ecoinvent: 2021:Manufacture of pesticides and other agrochemical products
Synonyms: Meta-Snail pellets; Gastrotox 3.6; Limatic; Clartex blue; Mioplant snail granules; Limatak; Antilumaca-Esca; Evitoxal; T-Rex; Super Limaclor; Antilimaces Méoc; Gesal snail granules; Limatox; Metarex; Duroschneck G; Glanzit snail granules; Escanex PS; Mollux-FL; Lonza Meta 80 WP; Metacid; Meta snail granular bait; Hélarion granules; Amilon; Carakol; Limax Plus; Capito snail granules; Metazon; KB Limace granular bait; Agrolimace long duration
Tags: ConvertedDataset
Scenario: Business-as-Usual
System model: Allocation, cut-off by classification
Share of production covered: 100 %
Generated by: Jürgen Sutter
Published in: Nemecek, T. 2007
Database: ecoinvent
isCopyrightProtected: true
accessRestrictedTo: 1

## General comment
This dataset represents the production of metaldehyde (1 kg of active ingredient). Raw materials are modelled with a stoichiometric calculation. Energy consumption is modelled with data from a similar process. The emissions are estimated. Infrastructure is included with a default value.
[This dataset was already contained in the ecoinvent database version 2. It was not individually updated during the transfer to ecoinvent version 3. Life Cycle Impact Assessment results may still have changed, as they are affected by changes in the supply chain, i.e. in other datasets. This dataset was generated following the ecoinvent quality guidelines for version 2. It may have been subject to central changes described in the ecoinvent version 3 change report (http://www.ecoinvent.org/database/ecoinvent-version-3/reports-of-changes/), and the results of the central updates were reviewed extensively. The changes added e.g. consistent water flows and other information throughout the database. The documentation of this dataset can be found in the ecoinvent reports of version 2, which are still available via the ecoinvent website. The change report linked above covers all central changes that were made during the conversion process.]

## Included activities start
From reception of precursor (acetaldehyde) at the factory gate.

## Included activities end
This activity ends with metaldehyde at the factory gate. The dataset includes the input materials, energy uses, infrastructure and emissions. The dataset doesn't include emulsives, additives etc.

## Geography
The inventory is modelled for Europe.

## Technology
Metaldehyde is a pesticide produced by polymerization of acetaldehyde in aqueous ethanol in the presence of HBr and alkaline-earth metal bromides:
4 C2H4O → C8H16O4

## Time period
Time of publications

## Parameters
- fraction, cooling water, cooling pond system, to air: 0.032 dimensionless; name fraction_CW_CP_to_air; lognormal variance with pedigree 0.0413, pedigree (2,3,1,3,1)
  Calculated based on literature value (Scown, C.D., 2011, Water Footprint of U.S. Transportation Fuels and supplying information of the article) (Vionnet, S., Quantis Water Database - Technical Report, 2012).
- fraction, cooling water, once-through system, to air: 0.004 dimensionless; name fraction_CW_OT_to_air; lognormal variance with pedigree 0.0413, pedigree (2,3,1,3,1)
  (same comment as for fraction, cooling water, cooling pond system, to air)
- fraction, cooling water, to air: 0.3875 dimensionless; name fraction_CW_to_air; = (0.5*fraction_CW_OT_to_air)+(0.5*fraction_CW_R_to_air); lognormal variance with pedigree 0.092025, pedigree (4,4,3,2,4)
  Calculated value based on literature value (see comments of the other parametres present in this dataset) and expert opinion. In the case when no industry/literature data are available about the type of cooling or directly fraction, cooling water, to air specific for the process a default assumption is applied. It is assumed that the once-through cooling system is used in 50% of all cases and recirculating system is used in another 50% of all cases.
- fraction, cooling water, recirculating system, to air: 0.771 dimensionless; name fraction_CW_R_to_air; lognormal variance with pedigree 0.0413, pedigree (2,3,1,3,1)
  (same comment as for fraction, cooling water, cooling pond system, to air)

## Reference product
- metaldehyde: 1 kg; CPC 3466: Insecticides, fungicides, herbicides and disinfectants; By-product classification allocatable product; CAS 108-62-3
  EcoSpold01Location=RER
  Metaldehyde is a white or colourless crystalline solid with a mild characteristic odor and a powdery appearance. It is the cyclic tetramer of acetaldehyd. It is moderately soluble in water, fairly soluble in toluene, and readily soluble in methanol It may be formulated with or without calcium arsenate and is also available in a mixed formulation with thiram. It is flammable and burns with a nonsmoking flame. It is dangerous when exposed to heat or flame and can react with oxidizing materials. Thermal decomposition of metaldehyde may release toxic oxides of carbon. Mixtures of metaldehyde dust and air may explode. It is compatible with other substances that are in neutral media. Metaldehyde is noncorrosive.
  The molluscicidal activity of metaldehyde has been exploited in South Africa since 1934 and was discovered independently in France in 1936. Ingestion of metaldehyde causes irreversible permeability of the gut walls of gastropods and leads to their death. However, under favorable weather conditions (low temperature, high relative humidity), gastropods often survive the paralysis produced on contact with the compound and the increased slime production caused by irritation. Metaldehyde is also effective in the vapor phase and kills gastropod eggs. Different species are affected to differing degrees.
  production volume 1.32237 kg
    This is a placeholder value that does not reflect real-world production volumes. This dataset does not currently require a real-world production volume to work in the database framework, and no actual data were collected yet. This has no negative effect on the results of the ecoinvent database. The placeholder value of this activity was scaled according to the nominal GDP of 2005 (source: United Nations, http://data.un.org/Glossary.aspx?q=GDP+%28current+US%24%29, accessed 20130726) to reflect an appropriate share of the global production volume, which is also a placeholder value.
  property price 1.10895 EUR2005
    Calculated based on inputs: The price of the product has been calculated as a sum of the values of the material and energy inputs for this product. This value is therefore a rough estimation. It may underestimate the real price since there are additional expenses when producing any product. These expences can include for example labour costs, treatment of waste materials and profit for the producer. Please consider carefully whether this level of data quality is acceptable for your application.
  property carbon content 0.545455
    carbon content on a dry matter basis (reserved; not for manual entry)
  properties: water content 0, carbon content, fossil 0.545455, water in wet mass 0 kg, carbon content, non-fossil 0, wet mass 1 kg, dry mass 1 kg, carbon allocation 0.545455 kg

## Inputs from technosphere
- electricity, medium voltage: 0.363557 kWh; source Gendorf 2000; lognormal variance with pedigree 0.044, pedigree (4,5,4,1,1)
  Estimation, assuming a default value, originated from calculation of avarage consumption of electricity and heat per kg of product (3.2 MJ kg-1), and a resulting amount of electricity of 0,333 kW for every reaction step per kg reaction product, considering that the demand is made up of a mix that inlcudes 38% electricity. Additionally, reaction steps are approximated with energy consumption data, assuming that inventory flows can be estimated using process data for basic operation steps, available for specific organic chemicals.
  Further references:
  Kim S., Overcash M.: Energy in chemical manufacturing processes: gate-to-gate information for life cycle assessment. In: Journal of Chemical Technology & Biotechnology vol. 78, no. 9: 995-1005(11). 2003
  EcoSpold01Location=UCTE
  Uncertainty: Estimation
- heat, district or industrial, other than natural gas: 0.883397 MJ; source Gendorf 2000; lognormal variance with pedigree 0.044, pedigree (4,5,4,1,1)
  Estimation, assuming a default value, originated from calculation of avarage consumption of electricity and heat per kg of product (3.2 MJ kg-1), and a resulting amount of heat of 2 MJ for every reaction step per kg reaction product, considering that the demand is made up of a mix that inlcudes 12% steam from external energy sources. Additionally, reaction steps are approximated with energy consumption data, assuming that inventory flows can be estimated using process data for basic operation steps, available for specific organic chemicals.
  Further references:
  Kim S., Overcash M.: Energy in chemical manufacturing processes: gate-to-gate information for life cycle assessment. In: Journal of Chemical Technology & Biotechnology vol. 78, no. 9: 995-1005(11). 2003
  Uncertainty: Estimation
  properties: heating value, net 1 MJ
- chemical factory, organics: 4.1649e-10 unit; lognormal variance with pedigree 0.448, pedigree (4,5,5,5,5)
  Estimation, based on a production capacity of 50,000 t per year and a plant life time of 50 years, therefore an amount of 4X10-10 units per kg of produced chemical is aded to the unit process of the respective chemical. The amount is accounted for each production step. This might be an overestimation in some multistep syntheses.
  EcoSpold01Location=RER
  Uncertainty: Estimation
- heat, district or industrial, natural gas: 1.5827 MJ; source Gendorf 2000; lognormal variance with pedigree 0.044, pedigree (4,5,4,1,1)
  Estimation, assuming a default value, originated from calculation of avarage consumption of electricity and heat per kg of product (3.2 MJ kg-1), and a resulting amount of heat of 2 MJ for every reaction step per kg reaction product, considering that the demand is made up of a mix that includes 50% natural gas. Additionally, reaction steps are approximated with energy consumption data, assuming that inventory flows can be estimated using process data for basic operation steps, available for specific organic chemicals.
  Further references:
  Kim S., Overcash M.: Energy in chemical manufacturing processes: gate-to-gate information for life cycle assessment. In: Journal of Chemical Technology & Biotechnology vol. 78, no. 9: 995-1005(11). 2003
  Uncertainty: Estimation
  properties: heating value, net 1 MJ
- acetaldehyde: 1.0204 kg; lognormal variance with pedigree 0.044, pedigree (4,5,4,1,1)
  Stoichiometric calculation, assuming an efficiency of 95% per reaction step.
  EcoSpold01Location=RER
  Uncertainty: Stoechiometric calculation
  properties: wet mass 1 kg, heating value, net 27.53 MJ, carbon content, fossil 0.545296, dry mass 1 kg

## Inputs from nature
- Water, cooling, unspecified natural origin [natural resource, in water]: 0.02499 m3; name water_cooling_UNO_input; source Gendorf 2000; lognormal variance with pedigree 0.044, pedigree (4,5,4,1,1)
  Estimation (24 kg cooling water per kg produced chemical per step).
  Uncertainty: Estimation

## Emissions to nature
- Water [air, unspecified]: 0.00968362 m3; name water_to_air_unspecified; = (water_cooling_UNO_input*fraction_CW_to_air); lognormal variance with pedigree 0.0487, pedigree (2,2,4,1,1)
  Calculated value based on literature values and expert opinion. See comments in the parametres' comment field.
  property fraction, origin: salt water 0; name fraction_origin_salt_water
  property fraction, origin: fresh water 0; name fraction_origin_fresh_water
  property fraction, origin: unspecified 1; name fraction_origin_unspecified
- Carbon dioxide, fossil [air, urban air close to ground]: 0.033061 kg; lognormal variance with pedigree 0.1786, pedigree (4,5,5,5,5)
  Estimation, based on the assumption that 0.2% of volatile input materials is emitted to air occurring from the purge vent, the destillation vent and fugitive emission sources. Remaining gases like CH4 or CO are oxidated to CO2. The carbon contained in the removed carbon compounds from wastewater treatment was accounted as CO2 emissions to air (assuming a removal efficiency of 90%).
  Uncertainty: Estimation
- Water [water, unspecified]: 0.0153064 m3; name water_to_water_unspecified; = water_cooling_UNO_input*(1-fraction_CW_to_air); lognormal variance with pedigree 0.0487, pedigree (2,2,4,1,1)
  (same comment as for Water)
  property carbon content, non-fossil 0; name C_content_non_fossil
  property carbon content, fossil 0; name C_content_fossil
  property fraction, origin: salt water 0; name fraction_origin_salt_water_Ww
  property fraction, origin: fresh water 0; name fraction_origin_fresh_water_Ww
  property fraction, origin: unspecified 1; name fraction_origin_unspecified_Ww
  property dry mass 0 kg; name DM
  property water in wet mass 1000 kg; name WWM
  property wet mass 1000 kg; name WM
- Acetaldehyde [water, surface water]: 0.0036735 kg; lognormal variance with pedigree 0.448, pedigree (4,5,5,5,5)
  Estimation, assuming that the remaining amount of unreacted input materials leave the production process with the wastewater, wich is further treated in an internal wastewater plant.
  Uncertainty: Estimation
- Acetaldehyde [air, urban air close to ground]: 0.0020408 kg; lognormal variance with pedigree 0.188, pedigree (4,5,5,5,5)
  Estimation, based on the assumption that 0.2% of volatile input materials is emitted to air occurring from the purge vent, the destillation vent and fugitive emission sources.
  Uncertainty: Estimation

## Sampling procedure
Literature data

## Extrapolations
This dataset has been extrapolated from year 2010 to the year of the calculation (2021). The uncertainty has been adjusted accordingly.

## Review by Thomas Nemecek 2010-03-11
Passed.
none

## Review by Roland Hischier 2011-11-18
Transfer of documentation done.
