# tomato production, fresh grade, in unheated greenhouse

Dataset: EcoSpold 2, unit process
Geography: ES
Time period: 2006-01-01 to 2021-12-31
Technology level: current
Classification: ISIC rev.4 ecoinvent: 0113:Growing of vegetables and melons, roots and tubers
Tags: WFLDB
Scenario: Business-as-Usual
System model: Allocation, cut-off by classification
Generated by: Violaine Magaud
Published in: Nemecek T. 2015
Database: ecoinvent
isCopyrightProtected: true
accessRestrictedTo: 1

## General comment
This dataset represents the production of 1 kg of loose classic tomato for fresh consumption. The reference flow is the average yield per ha and year, from 2006 - 2009: yield (165 t/ha) obtained under irrigated conditions (total amount of water 4748 m3/ha). The data are representative of loose classic tomatoes for fresh consumption, produced in Spain (Almeria) for the export market. Mineral NPK fertiliser input is 798-506-1562 kg/ha. No organic fertilisers are applied. Total active ingredients (a.i.) applied as pesticides amount to 32.3 kg a.i./ha.
The dataset was modelled within the project 'World Food LCA database (WFLDB)'. The aim of this project was to provide inventories of a broad variety of agricultural products and processes and to cover for each product at least 50% of the global export market. The export share of fresh grade tomatoes produced in Spain amounts to 10.4 % of the global export (tonnage exported in 2010). The production system regarded in this dataset aimed at representing fresh grade tomatoes produced in Spain for the export market.
PEF-Quality: data quality rating (DQR) = 2.0 (i.e. very good quality). This dataset refers to an average situation; for specific situations exchanges might differ substantially due to site specific parameters

## Included activities start
This activity starts with soil cultivation after the harvest of the previous crop.

## Included activities end
This activity ends with harvest and transport to the farm gate. Storage is not included.
The dataset includes all activities during a cycle, i.e. all machine operations, corresponding infrastructure, fuel use and sheds. Machine operations include: soil cultivation, fertilisation, pesticide application, harvesting, and on-farm transport. Further, direct field emissions and land use change are included. Irrigation is included, as well as greenhouses infrastructures and energy consumption when relevant. The inputs of seedlings, fertilisers and pesticides as well as packaging of fertilisers and pesticides are considered. Heavy metal uptake by the crop is considered.

## Technology
Conventional production

## Time period
Time period referring to the data source: 2006-2009. Based on expert opinion data is considered to be valid at least up to 2012.

## Parameters
- heavyMetalUptakeSwitch: 1 dimensionless
- LUC_crop_specific: 1 dimensionless
  This parameter allows to switch between a 'crop specific' and a 'country specific' approach when calculating the LUC of a crop. By default, the chosen approach is 'crop specific', so the value of the parameter is 1. If you want to apply a 'country specific' approach, turn the parameter to 0.

## Reference product
- tomato, fresh grade: 1 kg; name RP_amount_1; CPC 01234: Tomatoes; By-product classification allocatable product
  Yield = 165000.0 kg/haOutput of tomato, fresh grade, produced for direct human consumption.
  production volume 4.25532e9 kg; name RP_PV_1
    Source: FAOSTAT. Average, 2009-2012. Assumption: all NL fresh grade tomatoes are produced in heated greenhouses, all ES fresh grade tomatoes in non heated greenhouses and all MX fresh grade tomatoes on open field
  property carbon content, non-fossil 0.383276
    calculation: C-content of components according to ecoinvent report No. 15a. Source of composition: Souci, S.W., Fachmann, W., Kraut, H. (Hg.: Bundesminsiterium fur Ernahrung, Landwirtschaft und Forsten, Bonn) 'Die Zusammensetzung der Lebensmittel - Nahrwerttabellen', medpharm Scientific Publishers Stuttgart, CRC Press; 2000.
  property price 1.09 EUR2005
    Calculated from the trade statistics for the year 2005 published by the UN (COMTRADE database, accessed 20151105) as an average of 5 biggest importers of tomato in the world; USA, DE, UK, FR and NL. Comtrade cathegory: 702: Tomatoes, fresh or chilled.
  property carbon content 0.383276
    carbon content on a dry matter basis (reserved; not for manual entry)
  properties: dry mass 0.514933 kg, water in wet mass 0.485067 kg, carbon content, fossil 0, wet mass 1 kg, water content 0.942, carbon allocation 0.197361 kg

## Inputs from technosphere
- pesticide, unspecified: 0.000195758 kg; source Torellas M. 2012; lognormal variance with pedigree 0.0138498, pedigree (2,2,4,1,1)
  Literature value or expert estimation (Torellas et al. 2012).
  Corresponds to 28.5 kg/ha
  properties: dry mass 1 kg, carbon content, fossil 0.486978, wet mass 1 kg
- ammonia, anhydrous, liquid: 0.000588527 kg; source Torellas M. 2012; lognormal variance with pedigree 0.124177, pedigree (2,1,4,1,1)
  Calculated based on literature values or expert estimation: The total amount of nutrient (Torellas et al. 2012) multiplied by the country-share of fertiliser type (IFA 2014). See supporting documentation 'WFLDB-Documentation.pdf' chapter 'Fertiliser application' for L3 and L4 data (https://ecoquery.ecoinvent.org/File/Reports).
  Corresponds to 97.1 kg/ha
  properties: dry mass 1 kg, wet mass 1 kg
- ammonium nitrate: 0.000811738 kg; source Torellas M. 2012; lognormal variance with pedigree 0.124177, pedigree (2,1,4,1,1)
  The exchange has been updated from 'ammonium nitrate, as N' into 'ammonium nitrate' and therefore its amount has been scaled (multiplied) from 0.0003 kg by 2.8573 kg of 'ammonium nitrate' per kg of 'ammonium nitrate, as N'. Original comment of the exchange is: Calculated based on literature values or expert estimation: The total amount of nutrient (Torellas et al. 2012) multiplied by the country-share of fertiliser type (IFA 2014). See supporting documentation 'WFLDB-Documentation.pdf' chapter 'Fertiliser application' for L3 and L4 data (https://ecoquery.ecoinvent.org/File/Reports).
  Corresponds to 46.9 kg/ha
  properties: dry mass 1 kg, wet mass 1 kg
- triple superphosphate: 0.000185744 kg
  The exchange has been updated from 'triple superphosphate' into 'triple superphosphate' and therefore its amount has been scaled (multiplied) from 0.0001 kg by 2.1739 kg of 'triple superphosphate' per kg of 'triple superphosphate'. Original comment of the exchange is: Calculated based on literature values or expert estimation: The total amount of nutrient (Torellas et al. 2012) multiplied by the country-share of fertiliser type (IFA 2014). See supporting documentation 'WFLDB-Documentation.pdf' chapter 'Fertiliser application' for L3 and L4 data (https://ecoquery.ecoinvent.org/File/Reports).
  Corresponds to 90.2 kg/ha
  properties: dry mass 1 kg, wet mass 1 kg, phosphorus content 0.200754
  note on phosphorus content: Phosphorus content (on a dry matter basis) of triple superphosphate is calculated from the molecular formula of the nutrient present in the substance.
- inorganic phosphorus fertiliser, as P2O5: 0, 0, 0, 6.88485e-5, 0.000546558, 0.00106418, 0.00106418 kg (7 entries)
  Calculated based on literature values or expert estimation: The total amount of nutrient (Torellas et al. 2012) multiplied by the country-share of fertiliser type (IFA 2014). See supporting documentation 'WFLDB-Documentation.pdf' chapter 'Fertiliser application' for L3 and L4 data (https://ecoquery.ecoinvent.org/File/Reports).
  Corresponds to 90.2 kg/ha
  properties: dry mass 1 kg, wet mass 1 kg
- ammonium sulfate: 0.000298624 kg; source Torellas M. 2012; lognormal variance with pedigree 0.124177, pedigree (2,1,4,1,1)
  Calculated based on literature values or expert estimation: The total amount of nutrient (Torellas et al. 2012) multiplied by the country-share of fertiliser type (IFA 2014). See supporting documentation 'WFLDB-Documentation.pdf' chapter 'Fertiliser application' for L3 and L4 data (https://ecoquery.ecoinvent.org/File/Reports).
  Corresponds to 49.3 kg/ha
  properties: wet mass 1 kg, dry mass 1 kg
- potassium sulfate: 0.000968271 kg; source Torellas M. 2012; lognormal variance with pedigree 0.124177, pedigree (2,1,4,1,1)
  The exchange has been updated from 'potassium sulfate, as K2O' into 'potassium sulfate' and therefore its amount has been scaled (multiplied) from 0.0005 kg by 1.85 kg of 'potassium sulfate' per kg of 'potassium sulfate, as K2O'. Original comment of the exchange is: Calculated based on literature values or expert estimation: The total amount of nutrient (Torellas et al. 2012) multiplied by the country-share of fertiliser type (IFA 2014). See supporting documentation 'WFLDB-Documentation.pdf' chapter 'Fertiliser application' for L3 and L4 data (https://ecoquery.ecoinvent.org/File/Reports).
  Corresponds to 86.4 kg/ha
  properties: wet mass 1 kg, dry mass 1 kg
- packaging, for pesticides: 0.0766602 kg; lognormal variance with pedigree 0.0592, pedigree (4,3,4,5,4)
  Total amount of active substance/s of pesticides needed for the production of tomato, fresh grade is calculated to be circa 3.83E-02 kg. Pesticide/s used in this dataset is/are: 'expanded perlite', 'pesticide, unspecified'. The total amount of active substance/s is doubled in order to account for the packaging of the dilluted product of pesticide/s that is/are applied. Therefore, 7.67E-02 kg of packaging for pesticides is justified with this exchange.
  properties: dry mass 1 kg, carbon content, fossil 0.85714, price 0.0642 EUR2005, heating value, net 25.97 MJ, wet mass 1 kg
- urea: 0.00177533 kg; source Torellas M. 2012; lognormal variance with pedigree 0.165577, pedigree (3,1,4,1,4)
  The exchange has been updated from 'urea, as N' into 'urea' and therefore its amount has been scaled (multiplied) from 0.0008 kg by 2.1438 kg of 'urea' per kg of 'urea, as N'. Original comment of the exchange is: Calculated based on literature values or expert estimation: The total amount of nutrient (Torellas et al. 2012) multiplied by the country-share of fertiliser type (IFA 2014). See supporting documentation 'WFLDB-Documentation.pdf' chapter 'Fertiliser application' for L3 and L4 data (https://ecoquery.ecoinvent.org/File/Reports).
  Corresponds to 137.0 kg/ha
  properties: dry mass 1 kg, wet mass 1 kg, carbon content, fossil 0.2
- phosphate rock, beneficiated: 0.000215152 kg; source Torellas M. 2012; lognormal variance with pedigree 0.124177, pedigree (2,1,4,1,1)
  The exchange has been updated from 'phosphate rock, as P2O5, beneficiated, dry' into 'phosphate rock, beneficiated' and therefore its amount has been scaled (multiplied) from 0.0001 kg by 3.125 kg of 'phosphate rock, beneficiated' per kg of 'phosphate rock, as P2O5, beneficiated, dry'. Original comment of the exchange is: Calculated based on literature values or expert estimation: The total amount of nutrient (Torellas et al. 2012) multiplied by the country-share of fertiliser type (IFA 2014). See supporting documentation 'WFLDB-Documentation.pdf' chapter 'Fertiliser application' for L3 and L4 data (https://ecoquery.ecoinvent.org/File/Reports).
  Corresponds to 11.4 kg/ha
  properties: dry mass 1 kg, wet mass 1 kg
- transport, freight, lorry, unspecified: 0.00180188 metric ton*km
  This represent the transport of fertilizers that are directly linked to their supplying activities, to better represent the fertilizer mix of the activity. Transport distance based on US BTS Commodity Flow Surveys 1993, 1997, 2002, 2007, US Dep. Of Transportation, Bureau of Transportation Statistics. Of the total road transport, 6% is assumed to be by delivery van for goods with a large share of retail sale, and 3% for goods that are mainly sold via wholesale.
- transport, freight train: 0.0033441 metric ton*km
  This represent the transport of fertilizers that are directly linked to their supplying activities, to better represent the fertilizer mix of the activity. Transport distance based on US BTS Commodity Flow Surveys 1993, 1997, 2002, 2007, US Dep. Of Transportation, Bureau of Transportation Statistics.
- potassium chloride: 0.00435038 kg; source Torellas M. 2012; lognormal variance with pedigree 0.124177, pedigree (2,1,4,1,1)
  The exchange has been updated from 'potassium chloride, as K2O' into 'potassium chloride' and therefore its amount has been scaled (multiplied) from 0.0027 kg by 1.5829 kg of 'potassium chloride' per kg of 'potassium chloride, as K2O'. Original comment of the exchange is: Calculated based on literature values or expert estimation: The total amount of nutrient (Torellas et al. 2012) multiplied by the country-share of fertiliser type (IFA 2014). See supporting documentation 'WFLDB-Documentation.pdf' chapter 'Fertiliser application' for L3 and L4 data (https://ecoquery.ecoinvent.org/File/Reports).
  properties: wet mass 1 kg, dry mass 1 kg
- transport, freight, inland waterways, barge: 0.000565439 metric ton*km
  (same comment as for transport, freight train)
- inorganic nitrogen fertiliser, as N: 0 kg; source Torellas M. 2012; pedigree (1,1,1,1,1)
  Calculated based on literature values or expert estimation: The total amount of nutrient (Torellas et al. 2012) multiplied by the country-share of fertiliser type (IFA 2014). See supporting documentation 'WFLDB-Documentation.pdf' chapter 'Fertiliser application' for L3 and L4 data (https://ecoquery.ecoinvent.org/File/Reports).
  Corresponds to 25.1 kg/ha
  properties: dry mass 1 kg, wet mass 1 kg
- waste glass: -0.0190672 kg; name BP_amount_1
  End-of-life treatment of perlite (glass used as proxy). Based on Torellas et al. (2012), 50% is landfilled and 50% is recycled
  production volume 8.11369e7 kg; = RP_PV_1* BP_amount_1/ RP_amount_1
    Calculated from reference product production volume, reference product amount and byproduct amount.
  property price 0 EUR2005; name BP_amount_1_price_EUR2005
  properties: dry mass 1 kg, heating value, net 0.05 MJ, wet mass 1 kg
  note on heating value, net: Value extracted from "treatment of waste glass, open dump, very wet infiltration class (1000mm)"
- waste polyethylene: -0.000195899 kg; name BP_amount_2
  End-of-life treatment of bed plastic and substrate bags (PE used as proxy). Based on Torellas et al. (2012), 50% is landfilled and 50% is recycled
  production volume 833613 kg; = RP_PV_1* BP_amount_2/ RP_amount_1
    (same comment as for waste glass)
  property price 0 EUR2005; name BP_amount_2_price_EUR2005
  properties: dry mass 0.996 kg, carbon content, fossil 0.825301, wet mass 1 kg, water content 0.00401606, heating value, net 42.47 MJ
  note on heating value, net: Value taken from the general comment of the treatment dataset.
- inorganic potassium fertiliser, as K2O: 0 kg; source Torellas M. 2012; pedigree (1,1,1,1,1)
  Calculated based on literature values or expert estimation: The total amount of nutrient (Torellas et al. 2012) multiplied by the country-share of fertiliser type (IFA 2014). See supporting documentation 'WFLDB-Documentation.pdf' chapter 'Fertiliser application' for L3 and L4 data (https://ecoquery.ecoinvent.org/File/Reports).
  Corresponds to 1020.0 kg/ha
  properties: dry mass 1 kg, wet mass 1 kg
- waste polystyrene: -0.000773131 kg; name BP_amount_3
  End-of-life treatment of substrate bed (PS). Based on Torellas et al. (2012), 50% is landfilled and 50% is recycled
  production volume 3.28992e6 kg; = RP_PV_1* BP_amount_3/ RP_amount_1
    (same comment as for waste glass)
  property price 0 EUR2005; name BP_amount_3_price_EUR2005
  properties: heating value, net 38.67 MJ, carbon content, fossil 0.922579, dry mass 0.998 kg, water content 0.00200401, wet mass 1 kg
- inorganic nitrogen fertiliser, as N: 0, 0, 0, 0.000152188, 0.0002556, 0.0002556 kg (6 entries)
  (same comment as for inorganic nitrogen fertiliser, as N)
- packaging, for fertilisers: 0.0349477 kg; lognormal variance with pedigree 0.0592, pedigree (4,3,4,5,4)
  Total amount of active substance/s of fertilisers needed for the production of 'tomato, fresh grade' is calculated to be circa 1.75E-02 kg. Fertiliser/s used in this dataset is/are: 'ammonia, liquid', 'ammonium nitrate, as N', 'ammonium sulfate, as N', 'nitrogen fertiliser, as N', 'nitrogen fertiliser, as N', 'nitrogen fertiliser, as N', 'nitrogen fertiliser, as N', 'nitrogen fertiliser, as N', 'nitrogen fertiliser, as N', 'phosphate fertiliser, as P2O5', 'phosphate fertiliser, as P2O5', 'phosphate fertiliser, as P2O5', 'phosphate fertiliser, as P2O5', 'phosphate fertiliser, as P2O5', 'phosphate fertiliser, as P2O5', 'phosphate rock, as P2O5, beneficiated, dry', 'potassium chloride, as K2O', 'potassium fertiliser, as K2O', 'potassium sulfate, as K2O', 'urea, as N'. The total amount of active substance/s is doubled in order to account for the packaging of the dilluted product of fertiliser/s that is/are applied. Therefore, 3.49E-02 kg of packaging for fertilisers is justified with this exchange.
  properties: heating value, net 25.01 MJ, dry mass 1 kg, carbon content, fossil 0.825301, price 0.0642 EUR2005, wet mass 1 kg
  note on carbon content, fossil: Considering a chemical formula (C2H4)n for polyethylene, carbon content-fossil is calculated to be 0.856286 kg of Carbon per kg of dry mass.
- electricity, low voltage: 0.00030303 kWh; source Torellas M. 2012; lognormal variance with pedigree 0.124177, pedigree (2,1,4,1,1)
  Literature value or expert estimation (Torellas et al. 2012).
- urea ammonium nitrate mix: 0.0027604 kg
  The exchange has been updated from 'inorganic nitrogen fertiliser, as N' into 'urea ammonium nitrate' and therefore its amount has been scaled (multiplied) from 0.0008 kg by 3.3333 kg of 'urea ammonium nitrate' per kg of 'inorganic nitrogen fertiliser, as N'. Original comment of the exchange is: Calculated based on literature values or expert estimation: The total amount of nutrient (Torellas et al. 2012) multiplied by the country-share of fertiliser type (IFA 2014). See supporting documentation 'WFLDB-Documentation.pdf' chapter 'Fertiliser application' for L3 and L4 data (https://ecoquery.ecoinvent.org/File/Reports).
  Corresponds to 25.1 kg/ha
  properties: nitrogen content 0.401231, oxygen content 0.749063, hydrogen content 0.095042, wet mass 1 kg, water content 0.333333, carbon content, fossil 0.0879977, dry mass 0.75 kg
  note on nitrogen content: Nitrogen content (on a dry matter basis) of urea ammonium nitrate mix is calculated from the molecular formula of the substance (CH6N4O4).
  note on oxygen content: Oxygen content (on a dry matter basis) of urea ammonium nitrate mix is calculated from the molecular formula of the substance (CH6N4O4).
  note on hydrogen content: Hydrogen content (on a dry matter basis) of urea ammonium nitrate mix is calculated from the molecular formula of the substance (CH6N4O4).
  note on carbon content, fossil: Carbon content, fossil is calculated based on the chemical formula of the substance.
- single superphosphate: 0.000802973 kg
  The exchange has been updated from 'single superphosphate' into 'single superphosphate' and therefore its amount has been scaled (multiplied) from 0.0002 kg by 4.7619 kg of 'single superphosphate' per kg of 'single superphosphate'. Original comment of the exchange is: Calculated based on literature values or expert estimation: The total amount of nutrient (Torellas et al. 2012) multiplied by the country-share of fertiliser type (IFA 2014). See supporting documentation 'WFLDB-Documentation.pdf' chapter 'Fertiliser application' for L3 and L4 data (https://ecoquery.ecoinvent.org/File/Reports).
  Corresponds to 90.2 kg/ha
  properties: dry mass 1 kg, wet mass 1 kg, phosphorus content 0.0916484
- application of plant protection product, by field sprayer: 1.21212e-5 ha; lognormal variance with pedigree 0.164664, pedigree (2,2,4,1,4)
  Expert estimation. Considered 2 applications per crop cycle, one crop cycle per year
- calcium ammonium nitrate: 0.00352525 kg
  The exchange has been updated from 'calcium ammonium nitrate' into 'calcium ammonium nitrate' and therefore its amount has been scaled (multiplied) from 0.001 kg by 3.7037 kg of 'calcium ammonium nitrate' per kg of 'calcium ammonium nitrate'. Original comment of the exchange is: Calculated based on literature values or expert estimation: The total amount of nutrient (Torellas et al. 2012) multiplied by the country-share of fertiliser type (IFA 2014). See supporting documentation 'WFLDB-Documentation.pdf' chapter 'Fertiliser application' for L3 and L4 data (https://ecoquery.ecoinvent.org/File/Reports).
  Corresponds to 25.1 kg/ha
  properties: calcium content 0.333646, nitrogen content 0.233209, wet mass 1 kg, hydrogen content 0.0335628, dry mass 1 kg, oxygen content 0.399581
  note on calcium content: Calcium content (on a dry matter basis) of calcium ammonium nitrate is calculated from the molecular formula of the substance (CH4CaN2O6).
  note on nitrogen content: Nitrogen content (on a dry matter basis) of calcium ammonium nitrate is calculated from the molecular formula of the substance (CH4CaN2O6).
  note on hydrogen content: Hydrogen content (on a dry matter basis) of calcium ammonium nitrate is calculated from the molecular formula of the substance (CH4CaN2O6).
  note on oxygen content: Oxygen content (on a dry matter basis) of calcium ammonium nitrate is calculated from the molecular formula of the substance (CH4CaN2O6).
- greenhouse, plastic walls and roof: 0.0606061 m2*year; source Torellas M. 2012; lognormal variance with pedigree 0.124177, pedigree (2,1,4,1,1)
  Calculated value: 1 ha divided by the yield in kg/ha. Note: greenhouse dataset stands for 1 m2 used over 1 year
  properties: lifetime 25 year, Surface 7 m2
- planting: 6.06061e-6 ha; lognormal variance with pedigree 0.164177, pedigree (2,1,4,1,4)
  Expert estimation: energy consumption has been estimated as similar to planting in open field
- irrigation: 0.0287758 m3; source Torellas M. 2012; lognormal variance with pedigree 0.124177, pedigree (2,1,4,1,1)
  Literature value: total amount of water used for irrigation (Torellas et al. 2012). See supporting documentation 'WFLDB-Documentation.pdf' chapter 'Water use for irrigation' (https://ecoquery.ecoinvent.org/File/Reports).
  properties: dry mass 0.11 kg, wet mass 1000 kg, water content 9089.91
- transport, tractor and trailer, agricultural: 0.00106612 metric ton*km; lognormal variance with pedigree 0.162439, pedigree (4,1,4,1,1)
  On-farm transport: Yield (in tonnes) multiplied by the average distance from field to farm. The distance was obtained by extrapolation (modified MEXALCA approach). See supporting documentation 'WFLDB-Documentation.pdf' chapter 'Machinery processes' (https://ecoquery.ecoinvent.org/File/Reports).
- tomato seedling, for planting: 0.169697 unit; source Martínez-Blanco J. 2011; lognormal variance with pedigree 0.124177, pedigree (2,1,4,1,1)
  Literature value or expert estimation (Martínez-Blanco et al. 2011). 2.5 plants per m2 is considered.
  properties: dry mass 0.578035 kg, wet mass 1 kg, carbon content, non-fossil 0.439481, water content 0.73
  note on carbon content, non-fossil: calculation: C-content of components according to ecoinvent report No. 15a. Source of composition: https://ndb.nal.usda.gov/ndb/search/. Unspecific seedling used as proxy.
- expanded perlite: 0.0381343 kg; source Torellas M. 2012
  Literature value or expert estimation (Torellas et al. 2012). Substrate: 18'876.5 kg/ha, Perlite lifespan: 3 years.
  properties: wet mass 1 kg, dry mass 1 kg
- polystyrene, expandable: 0.00154444 kg; source Torellas M. 2012
  Literature value or expert estimation (Torellas et al. 2012). Substrate bed: 764.5 kg/ha, PS lifespan: 3 years.
  properties: heating value, net 38.67 MJ, wet mass 1 kg, carbon content, fossil 0.923077, dry mass 1 kg
- packaging film, low density polyethylene: 0.00195495 kg; source Torellas M. 2012
  Literature value or expert estimation (Torellas et al. 2012). Bed plastic: 694.7 kg/ha, LDPE lifespan: 3 years.
  properties: heating value, net 42.47 MJ, carbon content, fossil 0.857143, dry mass 1 kg, wet mass 1 kg
- inorganic nitrogen fertiliser, as N: 0.00049757 kg; source Torellas M. 2012; lognormal variance with pedigree 0.124177, pedigree (2,1,4,1,1)
  (same comment as for inorganic nitrogen fertiliser, as N)
- inorganic potassium fertiliser, as K2O: 0.00619515 kg; source Torellas M. 2012; lognormal variance with pedigree 0.124177, pedigree (2,1,4,1,1)
  (same comment as for inorganic potassium fertiliser, as K2O)

## Inputs from nature
- Carbon dioxide, in air [natural resource, in air]: 0.100527 kg; lognormal variance with pedigree 0.0138498, pedigree (2,2,4,1,1)
  CO2 uptake by biomass
- Energy, gross calorific value, in biomass [natural resource, biotic]: 0.903636 MJ; lognormal variance with pedigree 0.0138498, pedigree (2,2,4,1,1)
- Transformation, to arable land, unspecified use [natural resource, land]: 0.0606061 m2; lognormal variance with pedigree 0.0442144, pedigree (2,1,4,1,1)
  Land transformation: 1 ha divided by yield
- Transformation, from arable land, unspecified use [natural resource, land]: 0.0606061 m2; lognormal variance with pedigree 0.0442144, pedigree (2,1,4,1,1)
  Land transformation: 1 ha divided by yield
- Occupation, annual crop [natural resource, land]: 0.0607697 m2*year; lognormal variance with pedigree 0.0200616, pedigree (2,1,4,1,1)
  Related to the duration from harvest date of previous crop to harvest date of main crop.

## Emissions to nature
- Ammonia [air, non-urban air or from high stacks]: 0.000494715 kg; source EEA 2013; lognormal variance with pedigree 0.0447216, pedigree (2,2,4,1,1)
  Calculated value - EMEP/EEA (2013). See 'WFLDB-Guidelines.pdf', available at https://ecoquery.ecoinvent.org/File/Reports.
- Lead [soil, agricultural]: 3.41471e-7 kg; = 3.71105235487e-07 + ( - 2.9634196e-08)*heavyMetalUptakeSwitch; source Freiermuth R.  2006
  Comment on mathematicalRelation:
  -2.9634196e-08 from Crop, default, heavy metals uptake model
  Heavy metal uptake can be excluded by setting the parameter heavyMetalUptakeSwitch to zero.
- Carbon dioxide, fossil [air, non-urban air or from high stacks]: 0.00195018 kg; lognormal variance with pedigree 0.0552498, pedigree (3,2,4,1,4)
  Calculated value - CO2 emissions from urea and lime. See 'WFLDB-Guidelines.pdf', available at https://ecoquery.ecoinvent.org/File/Reports.
- Copper [soil, agricultural]: 2.05176e-7 kg; = 5.68330262172e-07 + ( - 3.6315412e-07)*heavyMetalUptakeSwitch; source Freiermuth R.  2006
  Comment on mathematicalRelation:
  5.68330262172e-07 from Calculated value - Freiermuth (2006). See 'WFLDB-Guidelines.pdf', available at https://ecoquery.ecoinvent.org/File/Reports.
  Heavy metal uptake can be excluded by setting the parameter heavyMetalUptakeSwitch to zero.
- Nickel [soil, agricultural]: 4.02113e-7 kg; = 4.5935702069e-07 + ( - 5.724408e-08)*heavyMetalUptakeSwitch; source Freiermuth R.  2006
  Comment on mathematicalRelation:
  4.5935702069e-07 from Calculated value - Freiermuth (2006). See 'WFLDB-Guidelines.pdf', available at https://ecoquery.ecoinvent.org/File/Reports.
  -5.724408e-08 from Crop, default, heavy metals uptake model
  Heavy metal uptake can be excluded by setting the parameter heavyMetalUptakeSwitch to zero.
- Zinc [soil, agricultural]: 2.05486e-6 kg; = 3.80972196768e-06 + ( - 1.7548604e-06)*heavyMetalUptakeSwitch; source Freiermuth R.  2006
  Comment on mathematicalRelation:
  -1.7548604e-06 from Crop, default, heavy metals uptake model
  Heavy metal uptake can be excluded by setting the parameter heavyMetalUptakeSwitch to zero.
- Fungicides, unspecified [soil, agricultural]: 0.000172727 kg; lognormal variance with pedigree 0.0447216, pedigree (2,2,4,1,1)
  Calculated value - 100% emission in soil. See 'WFLDB-Guidelines.pdf', available at https://ecoquery.ecoinvent.org/File/Reports.
- Nitrogen oxides [air, non-urban air or from high stacks]: 0.000190691 kg; source EEA 2013; lognormal variance with pedigree 0.124664, pedigree (2,2,4,1,1)
  Calculated value - EEA/EMEP (2013). See 'WFLDB-Guidelines.pdf', available at https://ecoquery.ecoinvent.org/File/Reports.
- Dinitrogen monoxide [air, non-urban air or from high stacks]: 8.78398e-5 kg; source IPCC 2006; lognormal variance with pedigree 0.124664, pedigree (2,2,4,1,1)
  Calculated value - IPCC (2006). See 'WFLDB-Guidelines.pdf', available at https://ecoquery.ecoinvent.org/File/Reports.
- Water [air, non-urban air or from high stacks]: 0.0258788 m3; lognormal variance with pedigree 0.124177, pedigree (2,1,4,1,1)
  Calculated value - Emission calculated from water balance. See 'WFLDB-Guidelines.pdf', available at https://ecoquery.ecoinvent.org/File/Reports.
- Phosphate [water, surface water]: 7.38182e-6 kg; source Prasuhn V.  2006; lognormal variance with pedigree 0.185266, pedigree (3,2,4,1,3)
  Calculated value - Prasuhn (2006). See 'WFLDB-Guidelines.pdf', available at https://ecoquery.ecoinvent.org/File/Reports.
- Nitrate [water, ground-]: 0.00217576 kg
  Calculated value - Torellas et al. (2012): Water emissions of NO3: 359 kg/ha (The irrigation system is an open- loop drip system, without recirculation of drainage water). See 'WFLDB-Guidelines.pdf', available at https://ecoquery.ecoinvent.org/File/Reports.
- Phosphate [water, ground-]: 1.30364e-6 kg; source Prasuhn V.  2006; lognormal variance with pedigree 0.175866, pedigree (2,2,4,1,1)
  (same comment as for Phosphate)
- Cadmium, ion [water, ground-]: 2.97394e-10 kg; source Freiermuth R.  2006; lognormal variance with pedigree 0.356938, pedigree (2,2,4,1,1)
  Calculated value - Freiermuth (2006). See 'WFLDB-Guidelines.pdf', available at https://ecoquery.ecoinvent.org/File/Reports.
- Chromium, ion [water, ground-]: 1.27897e-7 kg; source Freiermuth R.  2006; lognormal variance with pedigree 0.356938, pedigree (2,2,4,1,1)
  (same comment as for Cadmium, ion)
- Copper, ion [water, ground-]: 2.13515e-8 kg; source Freiermuth R.  2006; lognormal variance with pedigree 0.356938, pedigree (2,2,4,1,1)
  (same comment as for Cadmium, ion)
- Lead [water, ground-]: 2.79818e-9 kg; source Freiermuth R.  2006; lognormal variance with pedigree 0.356938, pedigree (2,2,4,1,1)
  (same comment as for Cadmium, ion)
- Mercury [soil, agricultural]: 2.05328e-9 kg; = 4.27575209825e-09 + ( - 2.2224688e-09)*heavyMetalUptakeSwitch; source Freiermuth R.  2006
  Comment on mathematicalRelation:
  4.27575209825e-09 from Calculated value - Freiermuth (2006). See 'WFLDB-Guidelines.pdf', available at https://ecoquery.ecoinvent.org/File/Reports.
  -2.2224688e-09 from Crop, default, heavy metals uptake model
  Heavy metal uptake can be excluded by setting the parameter heavyMetalUptakeSwitch to zero.
- Mercury [water, ground-]: 7.37818e-12 kg; source Freiermuth R.  2006; lognormal variance with pedigree 0.356938, pedigree (2,2,4,1,1)
  (same comment as for Cadmium, ion)
- Zinc, ion [water, ground-]: 1.76315e-7 kg; source Freiermuth R.  2006; lognormal variance with pedigree 0.356938, pedigree (2,2,4,1,1)
  (same comment as for Cadmium, ion)
- Water [water, surface water]: 0.00230206 m3; lognormal variance with pedigree 0.124177, pedigree (2,1,4,1,1)
  (same comment as for Water)
- Water [water, ground-]: 0.000575515 m3; lognormal variance with pedigree 0.124177, pedigree (2,1,4,1,1)
  (same comment as for Water)
- Insecticides, unspecified [soil, agricultural]: 2.30303e-5 kg; lognormal variance with pedigree 0.0447216, pedigree (2,2,4,1,1)
  (same comment as for Fungicides, unspecified)
- Cadmium [soil, agricultural]: 1.89162e-7 kg; = 1.94726469911e-07 + ( - 5.564392e-09)*heavyMetalUptakeSwitch; source Freiermuth R.  2006
  Comment on mathematicalRelation:
  1.94726469911e-07 from Calculated value - Freiermuth (2006). See 'WFLDB-Guidelines.pdf', available at https://ecoquery.ecoinvent.org/File/Reports.
  -5.564392e-09 from Crop, default, heavy metals uptake model
  Heavy metal uptake can be excluded by setting the parameter heavyMetalUptakeSwitch to zero.
- Chromium [soil, agricultural]: 2.85983e-6 kg; = 2.8896969164e-06 + ( - 2.9866e-08)*heavyMetalUptakeSwitch; source Freiermuth R.  2006
  Comment on mathematicalRelation:
  2.8896969164e-06 from Calculated value - Freiermuth (2006). See 'WFLDB-Guidelines.pdf', available at https://ecoquery.ecoinvent.org/File/Reports.
  -2.9866e-08 from Crop, default, heavy metals uptake model
  Heavy metal uptake can be excluded by setting the parameter heavyMetalUptakeSwitch to zero.

## Sampling procedure
WFLDB Methodological Guidelines for the Life Cycle Inventory of Agricultural Products in the latest version, available at: https://ecoquery.ecoinvent.org/File/Reports. Data sources: Data were categorised from level 0 (L0) to level (L4) as follows: L0 = estimate, proxy; L1 = statistical data (e.g. FAOSTAT); L2 = L1 adapted to crop and country; L3 = literature data or L1 resp. L2 data approved by experts; medium detailing (i.e. kg of total N-fertiliser); L4 = L3 data of high detailing (i.e. portion N-fertiliser types).In this dataset data were obtained for yield: L3; Fertilisers: L4; Pesticides: L1; Machinery: L0; Irrigation: L2. For information regarding the calculation of individual exchanges see supporting documentation WFLDB-Documentation.pdf

## Extrapolations
This dataset has been extrapolated from year 2012 to the year of the calculation (2021). The uncertainty has been adjusted accordingly.

## Review by Assumpció ANTON 2016-06-09
Be aware that the use of statistics in input calculations could provide some specific inputs not common for specific crops, this should be corrected if better information is available and better reflexed in DQR . Currently, I would dissent for some of good marks provided, being a revision of criteria applied advisable.

Pesticides will need to be amended periodically checking for update of pesticides' ban.
