# uranium fuel element production, enriched 4%, for light water reactor

Dataset: EcoSpold 2, unit process
Geography: RoW
Time period: 1980-01-01 to 2021-12-31
Technology level: current
Classification: EcoSpold01Categories: nuclear power/production
Classification: ISIC rev.4 ecoinvent: 2011:Manufacture of basic chemicals
Tags: ConvertedDataset
Scenario: Business-as-Usual
System model: Allocation, cut-off by classification
Generated by: Roberto Dones
Published in: Dones, R. 2007
Database: ecoinvent
isCopyrightProtected: true
accessRestrictedTo: 1

## General comment
Modeled is the operation of a plant fabricating UO2 fuel for light water nuclear reactors (PWR and BWR), with no MOX (mixed oxides), no RepU (reprocessed fuel), and no HEU (highly enriched uranium from warheads) fuel elements. Hence the radioactive emissions (and spectrum) as well as the radioactive solid waste may have been somewhat underestimated. Data for the operation of a nuclear fuel fabrication facility are relatively old but emissions to water are complete for a US plant. Radioactive emissions to air and water have been taken or derived from two commercial German facilities: both (one operational, the other closed) exhibit emissions per unit of product fuel much lower than data published in the 1980s. An average value of the two plants is used. Zirconium for cladding is modelled as chromium, for lack of complete information on its metallurgical process; the uncertainty value reflects only the amount. This module is linked with one enrichment module with specific characteristics for the mix or enrichment processes and electricity supply mix; hence, before using the cumulated results of this module the conditions for enrichment should be verified.
[This dataset was already contained in the ecoinvent database version 2. It was not individually updated during the transfer to ecoinvent version 3. Life Cycle Impact Assessment results may still have changed, as they are affected by changes in the supply chain, i.e. in other datasets. This dataset was generated following the ecoinvent quality guidelines for version 2. It may have been subject to central changes described in the ecoinvent version 3 change report (http://www.ecoinvent.org/database/ecoinvent-version-3/reports-of-changes/), and the results of the central updates were reviewed extensively. The changes added e.g. consistent water flows and other information throughout the database. The documentation of this dataset can be found in the ecoinvent reports of version 2, which are still available via the ecoinvent website. The change report linked above covers all central changes that were made during the conversion process.]

## Included activities end
The module includes: input of enriched uranium given in terms of separative work units per kg enriched uranium; electricity and light fuel oil used for operation; zirconium requirements for the cladding; water use and wastewater treatment; cement assumed to be used for conditioning of contaminated scrap from decommissioning; transport requirements of operation materials, industrial wastes, and contaminated waste from decommissioning. Radioactive and non-radioactive emissions to air and to water from the operation are also included. The infrastructure requirements are accounted for, though construction and operation data partially refer to different plants rather than to one single unit.

## Geography
North American and European conditions

## Technology
Information regards facilities operating in the 1980s, with few more recent data.

## Parameters
- fraction, cooling water, cooling pond system, to air: 0.032 dimensionless; name fraction_CW_CP_to_air; lognormal variance with pedigree 0.0413, pedigree (2,3,1,3,1)
  Calculated based on literature value (Scown, C.D., 2011, Water Footprint of U.S. Transportation Fuels and supplying information of the article) (Vionnet, S., Quantis Water Database - Technical Report, 2012).
- fraction, cooling water, to air: 0.3875 dimensionless; name fraction_CW_to_air; = (0.5*fraction_CW_OT_to_air)+(0.5*fraction_CW_R_to_air); lognormal variance with pedigree 0.092025, pedigree (4,4,3,2,4)
  Calculated value based on literature value (see comments of the other parametres present in this dataset) and expert opinion. In the case when no industry/literature data are available about the type of cooling or directly fraction, cooling water, to air specific for the process a default assumption is applied. It is assumed that the once-through cooling system is used in 50% of all cases and recirculating system is used in another 50% of all cases.
- fraction, cooling water, recirculating system, to air: 0.771 dimensionless; name fraction_CW_R_to_air; lognormal variance with pedigree 0.0413, pedigree (2,3,1,3,1)
  (same comment as for fraction, cooling water, cooling pond system, to air)
- fraction, water, decarbonised, to air: 0.3875 dimensionless; name fraction_WDC_to_air; lognormal variance with pedigree 0.092025, pedigree (4,4,3,2,4)
- fraction, cooling water, once-through system, to air: 0.004 dimensionless; name fraction_CW_OT_to_air; lognormal variance with pedigree 0.0413, pedigree (2,3,1,3,1)
  (same comment as for fraction, cooling water, cooling pond system, to air)

## Reference product
- uranium, enriched 4%, in fuel element for light water reactor: 1 kg; By-product classification allocatable product; CPC 33620: Uranium enriched in U235 and its compounds; plutonium and its compounds; alloys, dispersions, ceramic products[…]
  EcoSpold01Location=UCTE
  production volume 1.38168e6 kg
    5.72 SWU per kg 3% enriched U. Total capacity: 54 million SWU (http://www.wise-uranium.org/efac.html#ENR). The total production is here assumed to be split evenly over the 5 grades 3.0%, 3.8%, 3.9%, 4.2% and 4.0%
  property price 586 EUR2005
    UN Data. Commodity: Uranium (enriched 235), plutonium compounds, alloys. Average import price (trade/quantity) Germany-France.
  property carbon content 0
    carbon content on a dry matter basis (reserved; not for manual entry)
  properties: water in wet mass 0 kg, water content 0, carbon content, fossil 0, carbon content, non-fossil 0, wet mass 1 kg, dry mass 1 kg, carbon allocation 0 kg

## Inputs from technosphere
- low level radioactive waste: -0.000333 m3; lognormal variance with pedigree 0.342, pedigree (1,1,5,5,1)
  EcoSpold01Location=CH
  own assumption
  production volume 460.099 m3
    Calculated from the production volume of uranium, enriched 4%, in fuel element for light water reactor in proportion to the respective output amounts.
  properties: dry mass 2500 kg, wet mass 2500 kg
- water, decarbonised: 0 kg; name water_decarbonised_input; pedigree (1,1,1,1,1)
  EcoSpold01Location=RER
  old reference
  properties: wet mass 1 kg
- electricity, medium voltage: 0 kWh; pedigree (1,1,1,1,1)
  EcoSpold01Location=UCTE
  old reference & own assumption
- uranium, enriched 4.0%, per separative work unit: 5.72 unit; lognormal variance with pedigree 0.042, pedigree (1,1,5,5,1)
  EcoSpold01Location=UCTE
  calculated
  properties: wet mass 1 kg, dry mass 1 kg
- wastewater, unpolluted: -0.135 m3; lognormal variance with pedigree 0.162, pedigree (1,1,5,5,1)
  EcoSpold01Location=CH
  old reference
  production volume 186527 m3
    (same comment as for low level radioactive waste)
  properties: water content 2962.17, carbon content, fossil 0.00178991, wet mass 1000 kg, dry mass 0.337476 kg, carbon content, non-fossil 0.00178991
  note on carbon content, fossil: Assumed to be like in tap water. Bicarbonate content is 2.93 mol/m3. CO2 content is 0.1 mol/m3 (ecoinvent v2.2 report 8, Tab 93.1).
- chromium: 0.6 kg; lognormal variance with pedigree 0.042, pedigree (1,1,5,5,1)
  estimation on number, not on module substituting Zr
  EcoSpold01Location=RER
  properties: dry mass 1 kg, wet mass 1 kg
- nuclear fuel factory: 3.7e-8 unit; lognormal variance with pedigree 0.082, pedigree (1,1,5,5,1)
  own estimation
  EcoSpold01Location=GLO
- heat, district or industrial, other than natural gas: 0 MJ; pedigree (1,1,1,1,1)
  old reference & own assumption
  EcoSpold01Location=CH
  properties: heating value, net 1 MJ
- cement, unspecified: 0 kg; pedigree (1,1,1,1,1)
  own assumption
  EcoSpold01Location=CH
  properties: dry mass 1 kg, wet mass 1 kg
- inert waste, for final disposal: -0.8 kg; lognormal variance with pedigree 0.042, pedigree (1,1,5,5,1)
  own assumption
  EcoSpold01Location=CH
  production volume 1.10534e6 kg
    (same comment as for low level radioactive waste)
  properties: wet mass 1 kg, dry mass 0.995 kg, water content 0.00502513
- water, decarbonised: 5.4675, 14.2264, 57.3784, 0.512753, 7.30662, 17.0201, 106.763, 0.698427, 90.6271 kg (9 entries); lognormal variance with pedigree 0.162, pedigree (1,1,5,5,1)
  EcoSpold01Location=RER
  old reference
- electricity, medium voltage: 0.0155032, 0.409836, 0.0593468, 0.0154792, 0.149644, 0.529752, 0.0530168, 0.0369687, 0.0232123, 0.0130357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 kWh (21 entries); lognormal variance with pedigree 0.162, pedigree (1,1,5,5,1)
  EcoSpold01Location=UCTE
  old reference & own assumption
- heat, district or industrial, other than natural gas: 0.0123225, 30.3877 MJ (2 entries); lognormal variance with pedigree 0.162, pedigree (1,1,5,5,1)
  old reference & own assumption
  EcoSpold01Location=CH
- cement, unspecified: 0.000228247, 1.67175e-5, 4.76504e-5, 0.00107763, 3.17178e-5, 0.000348355, 4.21471e-5, 0.00470754 kg (8 entries); lognormal variance with pedigree 0.162, pedigree (1,1,5,5,1)
  own assumption
  EcoSpold01Location=CH

## Emissions to nature
- Nitrogen [water, surface water]: 0.0703 kg; lognormal variance with pedigree 0.162, pedigree (1,1,5,5,1)
  old reference
- Chloride [water, surface water]: 0.00703 kg; lognormal variance with pedigree 0.162, pedigree (1,1,5,5,1)
  old reference
- Nitrogen oxides [air, non-urban air or from high stacks]: 0.03 kg; lognormal variance with pedigree 0.162, pedigree (1,1,5,5,1)
  old reference
- Sodium, ion [water, surface water]: 0.00894 kg; lognormal variance with pedigree 0.162, pedigree (1,1,5,5,1)
  old reference
- Ammonium, ion [water, surface water]: 0.0581 kg; lognormal variance with pedigree 0.162, pedigree (1,1,5,5,1)
  old reference
- Manganese [water, surface water]: 1.02e-5 kg; lognormal variance with pedigree 0.162, pedigree (1,1,5,5,1)
  old reference
- VOC, volatile organic compounds, unspecified origin [water, surface water]: 0.0894 kg; lognormal variance with pedigree 0.162, pedigree (1,1,5,5,1)
  old reference
- DOC, Dissolved Organic Carbon [water, surface water]: 0.00614815 kg; lognormal variance with pedigree 0.162, pedigree (1,1,5,5,1)
  Calculated as equal to TOC.
- NMVOC, non-methane volatile organic compounds, unspecified origin [air, non-urban air or from high stacks]: 0.0033 kg; lognormal variance with pedigree 0.162, pedigree (1,1,5,5,1)
  old reference
- Silver, ion [water, surface water]: 2.17e-5 kg; lognormal variance with pedigree 0.162, pedigree (1,1,5,5,1)
  old reference
- Iron, ion [water, surface water]: 0.000153 kg; lognormal variance with pedigree 0.162, pedigree (1,1,5,5,1)
  old reference
- Calcium, ion [water, surface water]: 0.083 kg; lognormal variance with pedigree 0.162, pedigree (1,1,5,5,1)
  old reference
- Sulfate [water, surface water]: 0.0121 kg; lognormal variance with pedigree 0.162, pedigree (1,1,5,5,1)
  old reference
- Phosphorus [water, surface water]: 0.000217 kg; lognormal variance with pedigree 0.162, pedigree (1,1,5,5,1)
  old reference
- TOC, Total Organic Carbon [water, surface water]: 0.00614815 kg; lognormal variance with pedigree 0.162, pedigree (1,1,5,5,1)
  Calculated by default as TOC (gC) = COD/2.7 (COD measured in g O2). Should more correctly be calculated from the carbon content of the specified emissions to water.
- Uranium alpha [water, surface water]: 0.8 kBq; lognormal variance with pedigree 0.342, pedigree (1,1,5,5,1)
  few recent data, or too old data
- Sulfite [water, surface water]: 0.000185 kg; lognormal variance with pedigree 0.162, pedigree (1,1,5,5,1)
  old reference
- Molybdenum [water, surface water]: 2.75e-5 kg; lognormal variance with pedigree 0.162, pedigree (1,1,5,5,1)
  old reference
- BOD5, Biological Oxygen Demand [water, surface water]: 0.00313 kg; lognormal variance with pedigree 0.162, pedigree (1,1,5,5,1)
  old reference
- Magnesium [water, surface water]: 0.000402 kg; lognormal variance with pedigree 0.162, pedigree (1,1,5,5,1)
  old reference
- Water [air, unspecified]: 0.11625 m3; name water_to_air_unspecified; lognormal variance with pedigree 0.0827, pedigree (2,2,5,5,1)
  Calculated value based on literature values and expert opinion. See comments in the parametres' comment field.
  property fraction, origin: fresh water 1; name fraction_origin_fresh_water
  property fraction, origin: salt water 0; name fraction_origin_salt_water
  property fraction, origin: unspecified 0; name fraction_origin_unspecified
- Nickel, ion [water, surface water]: 0.000147 kg; lognormal variance with pedigree 0.162, pedigree (1,1,5,5,1)
  old reference
- Water [water, unspecified]: 0.04875 m3; name water_to_water_unspecified; = (water_decarbonised_input/1000)*(1-fraction_WDC_to_air)-0.135; lognormal variance with pedigree 0.0827, pedigree (2,2,5,5,1)
  (same comment as for Water)
  property fraction, origin: salt water 0; name fraction_origin_salt_water_Ww
  property fraction, origin: unspecified 0; name fraction_origin_unspecified_Ww
  property fraction, origin: fresh water 1; name fraction_origin_fresh_water_Ww
  property carbon content, fossil 0; name C_content_fossil
  property dry mass 0 kg; name DM
  property water in wet mass 1000 kg; name WWM
  property wet mass 1000 kg; name WM
  property carbon content, non-fossil 0; name C_content_non_fossil
- Oils, unspecified [water, surface water]: 0.00128 kg; lognormal variance with pedigree 0.162, pedigree (1,1,5,5,1)
  old reference
- Suspended solids, unspecified [water, surface water]: 0.0023 kg; lognormal variance with pedigree 0.162, pedigree (1,1,5,5,1)
  old reference
- Fluoride [water, surface water]: 0.0358 kg; lognormal variance with pedigree 0.162, pedigree (1,1,5,5,1)
  old reference
- Boron [water, surface water]: 6.39e-5 kg; lognormal variance with pedigree 0.162, pedigree (1,1,5,5,1)
  old reference
- COD, Chemical Oxygen Demand [water, surface water]: 0.0166 kg; lognormal variance with pedigree 0.162, pedigree (1,1,5,5,1)
  old reference
- Uranium alpha [air, non-urban air or from high stacks]: 0.0001 kBq; lognormal variance with pedigree 0.342, pedigree (1,1,5,5,1)
  few recent data, or too old data

## Sampling procedure
Literature

## Extrapolations
none This dataset has been copied from an original dataset covering the geography UCTE without Germany. The uncertainty has been adjusted accordingly.

## Review by Hans-Jörg Althaus 2007-10-26
Passed
