# sawlog and veneer log, azobe, debarked, measured as solid wood, import from CM

Dataset: EcoSpold 2, unit process
Geography: RER
Time period: 2000-01-01 to 2021-12-31
Technology level: current
Classification: ISIC rev.4 ecoinvent: 0220:Logging
Synonyms: Ekki; Lophira alata; Bongassi
Tags: ConvertedDataset
Scenario: Business-as-Usual
System model: Allocation, cut-off by classification
Generated by: Frank Werner (obsolete)
Published in: Althaus H.J. 2007
Database: ecoinvent
isCopyrightProtected: true
accessRestrictedTo: 1

## General comment
This dataset represents the import of debarked azobe logs to European port.The imported Azobe trees are produced by (close to) sustainable forest management in Central Africa. The activity covers the transport to Europe.

## Included activities start
The activity starts with the product delivered at the forest road.

## Included activities end
This activity ends with imported Azobe wood at European harbour.

## Reference product
- sawlog and veneer log, azobe, debarked, measured as solid wood: 1 m3; source ICL/SHR Timber Research 2002; By-product classification allocatable product; CPC 031: Wood in the rough
  Reference product. The reference product being imported is azobe legs that are harvested from (close to) sustainable forest management in Central Africa. Data based on given reference.
  production volume 7825.7 m3; = 30609.27857*(21908724538088.93/85693321610361.34)
    Estimated. The european production volume is extrapolated from the global production volume using the nominal GDP of 2018 (source: United Nations, http://data.un.org/Glossary.aspx?q=GDP+%28current+US%24%29, accessed 20200807).
    Gross domestic product (GDP) at current prices is GDP at prices of the current reporting period. Also known as nominal GDP.
  property heating value, net 14232 MJ
    LHV is calculated based on the Carbon content of the product. More details can be found on the respective documentation.The property is based on a value of 10.95MJ/kg
  property carbon content, non-fossil 0.494
    C content of dry mass is 0.494 kgC/kg dry wood (ecoinvent v2.2 report 21).
  property price 174.94 EUR2005
    Reference: FAOSTAT (accessed 20140112). The price is calculated by using data on total world import quantity (m3) and import value (1000 USD), year 2005. 15174881 m3 of Ind Rwd Wir (NC) Tropica was imported in the world in 2005. The import value was 3209966000 USD. The calculated price is thus (3209966000/15174881*0.8)=174.936586454945 Euro.
  property carbon content 0.494
    carbon content on a dry matter basis (reserved; not for manual entry)
  properties: wet mass 1300 kg, water in wet mass 300 kg, water content 0.3, dry mass 1000 kg, carbon content, fossil 0, carbon allocation 494 kg

## Inputs from technosphere
- transport, freight, sea, bulk carrier for dry goods: 9100 metric ton*km; source Althaus H.J. 2007; lognormal variance with pedigree 0.1641, pedigree (3,4,5,3,1)
  Literature Value, ecoinvent report no. 21, Figure 5.3
- transport, freight, lorry, unspecified: 283 metric ton*km; source Althaus H.J. 2007; lognormal variance with pedigree 0.166, pedigree (3,4,5,5,1)
  Literature Value, ecoinvent report no. 21, Figure 5.3
- sawlog and veneer log, azobe, debarked, measured as solid wood: 1 m3; lognormal variance with pedigree 0.0541, pedigree (3,4,5,3,1)
  Literature Value.
  properties: wet mass 1300 kg, dry mass 1000 kg, water content 0.3, heating value, net 14232 MJ, carbon content, non-fossil 0.494

## Sampling procedure
literature

## Extrapolations
This dataset has been extrapolated from year 2005 to the year of the calculation (2021). The uncertainty has been adjusted accordingly.
