# batter wheat mix production

Dataset: EcoSpold 2, unit process
Geography: RER
Time period: 2011-01-01 to 2021-12-31
Technology level: current
Classification: ISIC rev.4 ecoinvent: 1061:Manufacture of grain mill products
Scenario: Business-as-Usual
System model: Allocation, cut-off by classification
Generated by: Ian Vázquez-Rowe
Published in: Vázquez-Rowe, I. 2013
Database: ecoinvent
isCopyrightProtected: true
accessRestrictedTo: 1

## General comment
This activity represents the production of wheat mix for batter to produce fish sticks, also named fish fingers. The wheat is then grinded at a milling plant in to produce wheat flour. The flour is then freighted by truck to an ingredient and food additiove processing plant. The composition of the final wheat mix produced is: a) 80% wheat flour arriving from the mill i; b) less than 10% wheat starch ; c) less than 10% salt; d) less than 5% sunflower oil; e) pH regulators ; and f) less than 1% vitamins A and C. Kraft paper is used for packaging.

## Included activities start
Provision of raw materials, transport to mill and activities at the mill, including use of energy.

## Included activities end
The transport from the mill to the fish stick processing factory are not included.

## Geography
The wheat processing factory is located in NW Spain, but is representative of the state of the art in Europe.The system modelled consists of the production of wheat in the Ukraine, which is then sent to the port of Santander (Spain) by marine freight. The wheat is then grinded at a milling plant in Palencia, in Castile and Leon) to produce wheat flour. The flour is then freighted by truck to an ingredient and food additiove processing plant in the province of Pontevedra (Galicia, Spain). The composition of the final wheat mix produced is: a) 80% wheat flour arriving from the mill in Palencia (Spain); b) less than 10% wheat starch arriving from The Netherlands; c) less than 10% salt arriving from Alicante (Spain); d) less than 5% sunflower oil from Jaén (Spain); e) pH regulators from France; and f) less than 1% vitamins A and C arriving from China or Switzerland.

## Technology
The technology corresponds with the current available techniques for processing wheat.

## Time period
Data are from 2011 and were reported by the company per 1 metric ton of final product.

## Reference product
- wheat flour mix: 1 kg; By-product classification allocatable product
  production volume 0.2892 kg; name ProdVol
    Assuming the GDP of Europe at a global level
  property carbon content, non-fossil 0.475
    Biogenic carbon content of vegetation and vegetation processed products on a dry mass basis (47.5% DM) derived from FAOSTAT.
    Reference: http://www.fao.org/forestry/17111/en
  property carbon content, fossil 0
    Carbon content fossil is considered zero in all agricultural products and by-products.
  property price 0.457911 EUR2005
    Calculated based on inputs: The price of the product has been calculated as a sum of the values of the material and energy inputs for this product. This value is therefore a rough estimation. It may underestimate the real price since there are additional expenses when producing any product. These expences can include for example labour costs, treatment of waste materials and profit for the producer. Please consider carefully whether this level of data quality is acceptable for your application.
  property carbon content 0.475
    carbon content on a dry matter basis (reserved; not for manual entry)
  properties: water in wet mass 0.13 kg, water content 0.149425, wet mass 1 kg, dry mass 0.87 kg, carbon allocation 0.41325 kg

## Inputs from technosphere
All rows: source Vázquez-Rowe, I. 2013
- wastewater from vegetable oil refinery: -1.20428e-5 m3; name wastewater; lognormal variance with pedigree 0.0406, pedigree (1,1,5,1,1)
  Wastewater generated at the processing plant and sent to an industrial wastewater treatment plant shared by several companies.
  Uncertainty: Data reported directly by the processing plant for activities in 2011.
  production volume 0.2892 m3
    Assuming the European GDP as a fraction of worlwide GDP.
  property price 0 EUR2005; name wastewater_price_EUR2005
  properties: dry mass 0.871801 kg, wet mass 1000 kg, carbon content, non-fossil 0.993118, water content 1146.05
- sodium chloride, powder: 0.0499554 kg; lognormal variance with pedigree 0.041825, pedigree (2,1,5,2,2)
  Additive used in the production of the wheat flour mix.
  Uncertainty: Data reported directly by the processing plant for activities in 2011.
  properties: wet mass 1 kg, dry mass 1 kg
- electricity, medium voltage: 0.0958965 kWh; lognormal variance with pedigree 0.0406, pedigree (1,1,5,1,1)
  Electricity used at the processing plant.
  Uncertainty: Data reported directly by the processing plant for activities in 2011.
- maize starch: 0.0700268 kg; lognormal variance with pedigree 0.041825, pedigree (2,1,5,2,2)
  It is assumed that maize starch is used in this process, although the proceesing plant actually uses wheat starch.
  Uncertainty: Data reported directly by the processing plant for activities in 2011.
  properties: wet mass 1 kg, water content 0.162791, carbon content, non-fossil 0.46, dry mass 0.86 kg, heating value, net 11.64 MJ
  note on carbon content, non-fossil: C-content of starch is considered 46% on dry mass basis (from "Evolutionary and Biochemical Aspects", A.D. Kay and T. Vrede (in Global Ecology, 2010, Elsevier B.V., S.E. Jørgensen Ed.)).
- wheat flour: 0.800178 kg; lognormal variance with pedigree 0.0418, pedigree (2,1,5,1,2)
  Main raw material used in the production of the wheat flour mix.
  Uncertainty: Data reported directly by the processing plant for activities in 2011.
  properties: digestable energy content 15.12 MJ/kg, wet mass 1 kg, dry mass 0.87 kg, water content 0.149425, carbon content, non-fossil 0.475
  note on digestable energy content: Weighted average based on breakdown of different wheat products produced for human consumption in South Africa and properties of each product (i.e. cake flour, self-raising flour, white bread flour, brown bread flour, industrial flour, whole wheat meal, and semolina). Breakdown calculated from the production figures from the SAGIS monthly production tables, retrieved online and properties for US consumer products also retrieved online (USDA, 2017). Reference(s): SAGIS (2017) Wheaten Products Manufactured per Month since July 2015, South African Grain Information Service. Available at: www.sagis.org.za. (Accessed Sept 2017); USDA (2017) USDA National Nutrient Database, United States Department of Agriculture Agricultural Research Service, Available at: https://ndb.nal.usda.gov/ndb/search/list. (Accessed October 2017).
  note on carbon content, non-fossil: Biogenic carbon content of vegetation and vegetation processed products on a dry mass basis (47.5% DM) derived from FAOSTAT. Reference: http://www.fao.org/forestry/17111/en
- heat, central or small-scale, natural gas: 0.000400981 MJ; lognormal variance with pedigree 0.0406, pedigree (1,1,5,1,1)
  Heat from natural gas used at the processing plant.
  Uncertainty: Data reported directly by the processing plant for activities in 2011.
  properties: heating value, net 1 MJ
- vegetable oil, refined: 0.104371 kg; lognormal variance with pedigree 0.0412, pedigree (1,1,5,1,2)
  Amount of sunflower oil used in the production of the wheat mix.
  Uncertainty: Data reported directly by the processing plant for activities in 2011.
  properties: heating value, net 38.4 MJ, carbon content, non-fossil 0.768, dry mass 1 kg, wet mass 1 kg
  note on heating value, net: Values is approximated from HHV from "vegetable oil, crude". Source: Radovanovic,M.; Zivanovic,T.; Stojiljkovic,D.; Jovanovic,V.; Jerinic,N.; Knezevic,S. et.al. Utilization of sunflower husk as a fuel for industrial boilers - 20 years experience. Proc. 5th Eur. Conf. on Industrial Furnaces&Boilers 2000,vol.2,p.221-233. Available at: https://phyllis.nl/Biomass/View/2152
- tap water: 0.168153 kg; lognormal variance with pedigree 0.0406, pedigree (1,1,5,1,1)
  Tap water directly in the processing plant
  Uncertainty: Data reported directly by the processing plant for activities in 2011.
  properties: dry mass 0.000337476 kg, carbon content, fossil 0.00178991, wet mass 1 kg, water content 2962.17
  note on carbon content, fossil: Bicarbonate content is 2.93 mol/m3. CO2 content is 0.1 mol/m3 (ecoinvent v2.2 report 8, Tab 93.1).

## Emissions to nature
- Water [air, unspecified]: 0.156111 m3; source Vázquez-Rowe, I. 2013; lognormal variance with pedigree 0.0486, pedigree (4,1,5,1,1)
  Evaporated water at plant
  Uncertainty: Data reported directly by the processing plant for activities in 2011.

## Sampling procedure
No sampling was undergone. The data were directly provided by company technical staff.

## Extrapolations
This dataset has been extrapolated from year 2011 to the year of the calculation (2021). The uncertainty has been adjusted accordingly.
