# cable production, data cable in infrastructure

Dataset: EcoSpold 2, unit process
Geography: GLO
Time period: 2005-01-01 to 2021-12-31
Technology level: current
Classification: ISIC rev.4 ecoinvent: 2610:Manufacture of electronic components and boards
Classification: EcoSpold01Categories: electronics/component
Tags: ConvertedDataset
Scenario: Business-as-Usual
System model: Allocation, cut-off by classification
Generated by: Roland Hischier
Published in: Hischier R. 2007
Database: ecoinvent
isCopyrightProtected: true
accessRestrictedTo: 1

## General comment
This dataset represents 1 meter of a mixture (50:50) of metallic and metal-free glasfibre cable for the transfer of data with a meter-weight of 0.03 resp. 0.079 kg/m. Material data are taken from datasheet of a producer of such cables. Infrastructure and production efforts are based on own assumptions and have thus, accordingly higher uncertainties.
[This dataset was already contained in the ecoinvent database version 2. It was not individually updated during the transfer to ecoinvent version 3. Life Cycle Impact Assessment results may still have changed, as they are affected by changes in the supply chain, i.e. in other datasets. This dataset was generated following the ecoinvent quality guidelines for version 2. It may have been subject to central changes described in the ecoinvent version 3 change report (http://www.ecoinvent.org/database/ecoinvent-version-3/reports-of-changes/), and the results of the central updates were reviewed extensively. The changes added e.g. consistent water flows and other information throughout the database. The documentation of this dataset can be found in the ecoinvent reports of version 2, which are still available via the ecoinvent website. The change report linked above covers all central changes that were made during the conversion process.]

## Included activities start
From reception of metals and non-metal parts at the factory gate.

## Included activities end
This module includes material, an estimation of the production efforts (energy, process chemicals, …) and of the infrastructure for the production of an unweighted average of metallic and metal-free data cable, used in structured permis cabling. No information about emissions (air, water) and waste are included.

## Geography
Data from one Swiss producer, used as representative for the global situation.

## Technology
Mix of two types of cable. Data from one producer of such cables.

## Reference product
- cable, data cable in infrastructure: 1 m; source Dätwyler 2006; CPC 471: Electronic valves and tubes; electronic components; parts thereof; By-product classification allocatable product
  Unweighted average of metallic and metal-free data cable, used in structured permis cabling.
  Further references:
  Dätwyler (2006b) Product fact sheet: uninet 7080 4P/2x4P F8, Online-Version under: <http://www.daetwyler-cables.com/d/index_lan.htm>.
  EcoSpold01Location=GLO
  production volume 1 m
    Dummy value to be replaced by measured, estimated or calculated value
  property price 0.105745 EUR2005
    Calculated based on inputs: The price of the product has been calculated as a sum of the values of the material and energy inputs for this product. This value is therefore a rough estimation. It may underestimate the real price since there are additional expenses when producing any product. These expences can include for example labour costs, treatment of waste materials and profit for the producer. Please consider carefully whether this level of data quality is acceptable for your application.
  property carbon content, fossil 0.371067
    Calculated as the addition of C contents in the product composition. Then referred to 1 kg DM
  property carbon content 0.371067
    carbon content on a dry matter basis (reserved; not for manual entry)
  properties: water content 0, carbon content, non-fossil 0, wet mass 0.079 kg, dry mass 0.079 kg, water in wet mass 0 kg, carbon allocation 0.0293143 kg

## Inputs from technosphere
- glass fibre: 0.01975 kg; lognormal variance with pedigree 0.1207, pedigree (1,3,5,3,4)
  Estimation, based on the assumption that glass fibres represent 50% of the total weight.
  EcoSpold01Location=RER
  Uncertainty: data from composition of one such cable
  properties: dry mass 1 kg, wet mass 1 kg
- rolling mill: 1.7695e-12 unit; lognormal variance with pedigree 0.5761, pedigree (4,5,5,3,5)
  Proxy. Due to a lack of more specific information, the infrastructure established for rolling of steel, was used.
  EcoSpold01Location=RER
  Uncertainty: rough estimation of infrastructure
- extrusion, plastic pipes: 0.0342 kg; lognormal variance with pedigree 0.1207, pedigree (1,3,5,3,4)
  Proxy. Due to a lack of more specific information about energy consumption, for the HDPE amount this dataset was used.
  EcoSpold01Location=RER
  Uncertainty: data from composition of one such cable
- wire drawing, copper: 0.01555 kg; lognormal variance with pedigree 0.1207, pedigree (1,3,5,3,4)
  Proxy. Due to a lack of specific information about energy consumption, for the copper amount this dataset was used.
  EcoSpold01Location=RER
  Uncertainty: data from composition of one such cable
- polyethylene, high density, granulate: 0.0342 kg; lognormal variance with pedigree 0.1207, pedigree (1,3,5,3,4)
  Proxy, for non-metal and non-glass fibres parts HDPE was used.
  EcoSpold01Location=RER
  Uncertainty: data from composition of one such cable
  properties: carbon content, fossil 0.857143, wet mass 1 kg, heating value, net 42.47 MJ, dry mass 1 kg
  note on carbon content, fossil: Polyethylene is formed out of a huge amount of ethylene monomers (C2H4) (ecoinvent v2.2 report 11_II). MW=28 g/mol
- copper, cathode: 0.01555 kg; source Dätwyler 2006; lognormal variance with pedigree 0.1207, pedigree (1,3,5,3,4)
  EcoSpold01Location=RER
  Literature Value.
  Uncertainty: data from composition of one such cable
  properties: dry mass 1 kg, wet mass 1 kg

## Sampling procedure
Literature & own estimations

## Extrapolations
This dataset has been extrapolated from year 2005 to the year of the calculation (2021). The uncertainty has been adjusted accordingly.

## Review by Rolf Frischknecht 2007-09-14
passed.

## Review by Roland Hischier 2011-09-20
Transfer of documentation done.
