# chlor-alkali electrolysis, mercury cell

Dataset: EcoSpold 2, unit process
Geography: RoW
Time period: 2000-01-01 to 2021-12-31
Technology level: old
Classification: ISIC rev.4 ecoinvent: 2011:Manufacture of basic chemicals
Synonyms: Cloro; Chlor; Chlore; Bertholite; Molecular chlorine
Scenario: Business-as-Usual
System model: Allocation, cut-off by classification
Generated by: Roland Hischier
Published in: Althaus H.-J. 2007
Database: ecoinvent
isCopyrightProtected: true
accessRestrictedTo: 1

## General comment
This dataset represents the production of chlorine and sodium hydroxide (NaOH) by means of chlor-alkali electrolysis using a mercury cell. The chlor-alkali process is the main technology for the production of chlorine and sodium hydroxide. In this process, chlorine and sodium hydroxide are produced by electrolysis of a salt solution using either a mercury cell, diaphragm cell or membrane cell.
Chlorine is largely used in the synthesis of chlorinated organic compounds. PVC and isocyanates are the main drivers of chlor-alkali production in the EU-27 and EFTA countries (Euro Chlor 2013). These products are used in a wide range of applications, such as construction materials, plastics, clothing and pesticides.
Sodium hydroxide is a white odorless pellet or solid that is very soluble. Sodium hydroxide is used for the synthesis of other chemicals, and is used in the metal industry, the pulp and paper sector, the textile industry and in other various sectors.
This dataset is mainly based on a document concerning the best available techniques in the chlor-alkali manufacturing industry (European Commission 2001).
References:
Althaus H.-J., Chudacoff M., Hischier R., Jungbluth N., Osses M. and Primas A. (2007) Life Cycle Inventories of Chemicals. Final report ecoinvent data v2.0 No. 8. Swiss Centre for Life Cycle Inventories, Dübendorf, CH.
European Commission (2001) Integrated Pollution Prevention and Control (IPPC) - Reference Document on Best Available Techniques in the Chlor-Alkali Manufacturing Industry. Institute for Prospective Technological Studies, Sevilla.
Euro Chlor (2013) An Eco-profile and Environmental Product Declaration of the European Chlor-Alkali Industry, Chlorine (The chlor-alkali process).

## Included activities start
The activity starts when the raw materials enter the process.

## Included activities end
This activity ends with the production of gaseous chlorine and sodium hydroxide. Besides the electrolysis process in a mercury cell, the following process steps are included in this process: brine production, brine purification, brine resaturation as well as the final handling of the electrolysis products, without the chlorine liquefaction.

## Geography
European average values. The inventory is assumed to be representative of the global production.

## Technology
The mercury cell process comprises an electrolysis cell and a decomposer. Purified and saturated brine (25-28 wt.-% NaCl in water) is fed to the electrolysis cell on top of a film of mercury (Hg) flowing down the inclined base of the cell. The base of the cell is connected to the negative pole of a direct current supply forming the cathode of the cell. Anodes consisting of titanium coated with oxides of ruthenium and titanium are placed in the brine without touching the mercury film. At the anodes, chlorine gas is formed which is collected and directed to further processing. Due to a high overpotential of hydrogen at the mercury electrode, no gaseous hydrogen is formed; instead, sodium is produced and dissolved in the mercury as an amalgam (mercury alloy). The liquid amalgam is removed from the electrolytic cell and fed to a decomposer, where it reacts with demineralised water in the presence of a graphite-based catalyst to form sodium hydroxide solution and hydrogen. The sodium-free mercury is recirculated back into the cell. Cooling of hydrogen is essential to remove any water and mercury. The sodium hydroxide solution is very pure, almost free from chloride contamination and has usually a concentration of 50 %. Further treatment comprises cooling and removal of catalyst and mercury traces by centrifuges or filters. Advantages of the mercury cell process are the high quality of chlorine and the high concentration and purity of sodium hydroxide solution produced. The consumption of electric energy for electrolysis is, however, higher than for the other techniques and a high purity of the feed brine is required. Inherently, the use of mercury gives rise to environmental releases of mercury.
References:
Euro Chlor (2013) An Eco-profile and Environmental Product Declaration of the European Chlor-Alkali Industry, Chlorine (The chlor-alkali process).

## Parameters
- fraction, process water, to air: 0.205 dimensionless; name fraction_PW_to_air; lognormal variance with pedigree 0.092025, pedigree (4,4,3,2,4)
  Literature value (Statistics Canada, 2007 & Shaffer, K.H., 2008, Consumptive water use in the Great Lakes Basin, USGS) (Vionnet, S., Quantis Water Database - Technical Report, 2012).
- fraction, cooling water, recirculating system, to air: 0.771 dimensionless; name fraction_CW_R_to_air; lognormal variance with pedigree 0.0413, pedigree (2,3,1,3,1)
  Calculated based on literature value (Scown, C.D., 2011, Water Footprint of U.S. Transportation Fuels and supplying information of the article) (Vionnet, S., Quantis Water Database - Technical Report, 2012).
- fraction, cooling water, to air: 0.3875 dimensionless; name fraction_CW_to_air; = (0.5*fraction_CW_OT_to_air)+(0.5*fraction_CW_R_to_air); lognormal variance with pedigree 0.092025, pedigree (4,4,3,2,4)
  Calculated value based on literature value (see comments of the other parametres present in this dataset) and expert opinion. In the case when no industry/literature data are available about the type of cooling or directly fraction, cooling water, to air specific for the process a default assumption is applied. It is assumed that the once-through cooling system is used in 50% of all cases and recirculating system is used in another 50% of all cases.
- fraction, cooling water, once-through system, to air: 0.004 dimensionless; name fraction_CW_OT_to_air; lognormal variance with pedigree 0.0413, pedigree (2,3,1,3,1)
  (same comment as for fraction, cooling water, recirculating system, to air)
- fraction, cooling water, cooling pond system, to air: 0.032 dimensionless; name fraction_CW_CP_to_air; lognormal variance with pedigree 0.0413, pedigree (2,3,1,3,1)
  (same comment as for fraction, cooling water, recirculating system, to air)

## Reference product
- sodium hydroxide, without water, in 50% solution state: 1 kg; name BP_sodium_hydroxide_without_water_in_50; CPC 34231: Chemical elements n.e.c.; inorganic acids except phosphoric, nitric and sulphonitric; inorganic oxygen compoun[…]; By-product classification allocatable product; CAS 1310-73-2
  production volume 4.859e8 kg; = RP_PV*BP_sodium_hydroxide_without_water_in_50/ABS(RP)
    Calculated from the production volume of chlorine, gaseous in proportion to the respective output amounts.
  property heating value, net 3.03 MJ
    LHV is calculated based on the elemental composition of the substance. Based on the CAS number of the substance (001310-73-2), the chemical formula of the substance is found to be: NaOH, (PubChem 2020).
    Reference: Kim, S., Chen, J., Cheng, T., Gindulyte, A., He, J., He, S., Li, Q., Shoemaker, B. A., Thiessen, P. A., Yu, B., Zaslavsky, L., Zhang, J., & Bolton, E. E. (2019). PubChem 2019 update: improved access to chemical data. Nucleic acids research, 47(D1), D1102–D1109. https://doi.org/10.1093/nar/gky1033
  property price 0.191 EUR2005
    Temporary price data. Calculated as 90% of purchasers price based on: 2004 prices for World Import/Export data (US$ and tonnes) from UN Commodity Trade Statistics Database (http://data.un.org/Explorer.aspxDatabase [Accessed 2 July 2010]). Commodity: Sodium hydroxide (caustic soda) solid.
  property carbon content 0
    carbon content on a dry matter basis (reserved; not for manual entry)
  property true value 0.21583; name BP_sodium_hydroxide_without_true_value_0
    allocation property applied in "true value" allocation // value calculated from revenue
  properties: wet mass 1 kg, water in wet mass 0 kg, dry mass 1 kg, water content 0, carbon content, non-fossil 0, carbon content, fossil 0, carbon allocation 0 kg
- chlorine, gaseous: 0 kg; name RP; CPC 34231: Chemical elements n.e.c.; inorganic acids except phosphoric, nitric and sulphonitric; inorganic oxygen compoun[…]; By-product classification allocatable product; CAS 7782-50-5
  Chlorine is largely used in the synthesis of chlorinated organic compounds. PVC and isocyanates are the main drivers of chlor-alkali production in the EU-27 and EFTA countries (Euro Chlor 2013). These products are used in a wide range of applications, such as construction materials, plastics, clothing and pesticides.
  References:
  Euro Chlor (2013) An Eco-profile and Environmental Product Declaration of the European Chlor-Alkali Industry, Chlorine (The chlor-alkali process).
  production volume 4.3e8 kg; name RP_PV
    Approximate global production volume for chlorine by membrane cell technology in 2014 calculated as follows: total global production in 2006 was estimated to be 58 million metric tonnes (The Chlorine Institue, 2014), of which 74% by membrane cell technology, 17% by diaphragm cell technology and 4% by mercury cell technology in 2014 (IHS, 2014). No more recent statistic on global production volumes were available. In the past chlorine production volumes were at rather stable levels. Therefore, it is assumed that overall production volumes remained at constant level since 2006. Literature indicates that the share of mercury cell technology continues to decrease rapidly in the future, with a complete phase out expected around 2020. Note that this production volume is hence only valid for the year 2014. For the use of this dataset in chlorine supply chains later than 2014 it is recommended to adjust the production volume accordingly.
    Reference(s): The Chlorine Institute. 2014. Stewardship. Chlorine Manufacture. Accessed online at https://www.chlorineinstitute.org/stewardship/chlorine/chlorine-manufacture/, 9th of October 2017.
    IHS. 2014. Chemical Economics Handbook, Chlorine/Sodium Hydroxide (Chlor-Alkali). Accessed online at https://www.ihs.com/products/chlorine-sodium-chemical-economics-handbook.html, 9th of October 2017.
  property price 0.141 EUR2005
    Global average price for gaseous chlorine derived from the global average price of liquid chlorine by substracting the cost of inputs (0.07 KWh of electricity, medium voltage) needed for the liquefaction (0.007EUR/kg of liquid chlorine at an electricity price of 0.1EUR/kWh). The price for liquid chlorine (0.148 EUR/kg) was calculated as weighted average of the European (238Eur/tonne), US (223EUR/tonne) and the Chinese (84EUR/tonne) (Tecnon OrbiCHem, 2016) price according to the region's market shares (Europe 15%, US 20%, China 45%) scaled to 100% (ruschlor.ru, 2014).
    Reference(s):
    Tecnon OrbiCHem. 2016. Chem-Netfacts, Chemical insight an foresight - on a single page, Chlorine, 1 April 2016, document requested at http://www.orbichem.com/Chem-Netfacts.aspx?P_ID=208, 6 October 2017;
    ruschlor.ru. 2014. International Outlook for the Future of the Chinese Chlor-Alkali Industry retrieved from http://ruschlor.ru/english/images/stories/Pekin%20/Otchet_Engl/_.doc, 6 October 2017
  property carbon content 0
    carbon content on a dry matter basis (reserved; not for manual entry)
  property true value 0.141; name RP_true_value
    allocation property applied in "true value" allocation // value calculated from revenue
  properties: water in wet mass 0 kg, carbon content, fossil 0, carbon content, non-fossil 0, dry mass 1 kg, water content 0, wet mass 1 kg, carbon allocation 0 kg

## By-products
- hydrogen, liquid: 0 kg; name BP_hydrogen_liquid; CPC 34210: Hydrogen, nitrogen, oxygen, carbon dioxide and rare gases; inorganic oxygen compounds of non-metals n.e.c.; By-product classification allocatable product; CAS 1333-74-0
  production volume 1.204e7 kg; = RP_PV*BP_hydrogen_liquid/ABS(RP)
    (same comment as for sodium hydroxide, without water, in 50% solution state)
  property price 2.68 EUR2005
    Calculated value based on data from United Nations Commodity Trade Statistics Database (comtrade.un.org). UN comtrade category: 280410 Hydrogen. Year 2005. Using exchange rate of 1EURO = 1.209 USD. Average of price of import into 5 main markets (EU, US, JP, IN and CN). Cross reference; Literature (http://www.ttcorp.com/pdf/marketReport.pdf). The price of hydrogen, liquid is 5-10 USD/kg.
  property heating value, net 120.21 MJ
    LHV is calculated based on the elemental composition of the substance. Based on the CAS number of the substance (001333-74-0), the chemical formula of the substance is found to be: H2, (PubChem 2020).
    Reference: Kim, S., Chen, J., Cheng, T., Gindulyte, A., He, J., He, S., Li, Q., Shoemaker, B. A., Thiessen, P. A., Yu, B., Zaslavsky, L., Zhang, J., & Bolton, E. E. (2019). PubChem 2019 update: improved access to chemical data. Nucleic acids research, 47(D1), D1102–D1109. https://doi.org/10.1093/nar/gky1033
  property carbon content 0
    carbon content on a dry matter basis (reserved; not for manual entry)
  property true value 0.07504; name BP_hydrogen_liquid_true_value
    allocation property applied in "true value" allocation // value calculated from revenue
  properties: dry mass 1 kg, carbon content, fossil 0, water content 0, wet mass 1 kg, carbon content, non-fossil 0, water in wet mass 0 kg, carbon allocation 0 kg

## Inputs from technosphere
- spent activated carbon with mercury: -0.000128256 kg; name BP_spent_activated_carbon_with_mercury; lognormal variance with pedigree 0.0526, pedigree (1,3,5,5,1)
  EC IPPC study 2002
  Uncertainty: E
  production volume 124700 kg; = RP_PV*BP_spent_activated_carbon_with_mercury/ABS(RP)
    (same comment as for sodium hydroxide, without water, in 50% solution state)
  property price 0 EUR2005; name BP_spent_activated_carbon__price_EUR2005
  properties: wet mass 1 kg, dry mass 1 kg, carbon content, fossil 0.6, heating value, net 18.18 MJ
  note on carbon content, fossil: The spent carbon contains 0.1 to 50 w% (sic) mercury (ecoinvent v2.2 report 13_I, pg 56). Activated coal was considered to be charcoal, and to have a C content of 0.8 (Tab 15.1, ecoinvent v2.2 report 9-part 15). Na average Hg content of 25% was assumed.
- soda ash, light, crystalline, heptahydrate: 0.00508602 kg; lognormal variance with pedigree 0.0526, pedigree (1,3,5,5,1)
  EC IPPC study 2002
  Uncertainty: E
  properties: heating value, net 3.43 MJ, dry mass 1 kg, carbon content, fossil 0.0517241, wet mass 1 kg
- barite: 0.00154792 kg; lognormal variance with pedigree 0.0526, pedigree (1,3,5,5,1)
  EC IPPC study 2002
  Uncertainty: E
  properties: dry mass 1 kg, wet mass 1 kg
- sodium chloride, powder: 0.77396 kg; lognormal variance with pedigree 0.0526, pedigree (1,3,5,5,1)
  EC IPPC study 2002
  Uncertainty: E
  properties: wet mass 1 kg, dry mass 1 kg
- calcium chloride: 0.00787228 kg; lognormal variance with pedigree 0.0526, pedigree (1,3,5,5,1)
  EC IPPC study 2002
  Uncertainty: E
  properties: dry mass 1 kg, wet mass 1 kg
- sodium hydroxide, without water, in 50% solution state: 0.00265358 kg; lognormal variance with pedigree 0.0526, pedigree (1,3,5,5,1)
  EC IPPC study 2002
  Uncertainty: E
  properties: dry mass 1 kg, wet mass 1 kg, heating value, net 3.03 MJ
- carbon tetrachloride: 4.42263e-6 kg; lognormal variance with pedigree 0.0526, pedigree (1,3,5,5,1)
  EC IPPC study 2002
  Uncertainty: E
  properties: carbon content, fossil 0.0789474, dry mass 1 kg, heating value, net 2.37 MJ, wet mass 1 kg
- sulfite: 4.42263e-5 kg; lognormal variance with pedigree 0.0526, pedigree (1,3,5,5,1)
  EC IPPC study 2002
  Uncertainty: E
  properties: dry mass 1 kg, wet mass 1 kg
- electricity, medium voltage: 0 kWh; pedigree (1,1,1,1,1)
  EC IPPC study 2002
  Uncertainty: E
- sulfuric acid: 0.0038123 kg; lognormal variance with pedigree 0.0526, pedigree (1,3,5,5,1)
  Data from survey in literature (Ayres 1997)
  Uncertainty: D
  properties: dry mass 1 kg, wet mass 1 kg
- chemical factory, organics: 1.76905e-10 unit; lognormal variance with pedigree 0.3498, pedigree (2,3,5,4,3)
  Calculated based on literature data published by the industry. For this activity, no information was readily available concerning infrastructure and land-use. Therefore, the infrastructure is estimated based on data from two chemical factories, the BASF site of Ludwigshafen and the chemical factory in Gendorf (which are both located in Germany), which produce a wide range of chemical substances. Based on this data, the following assumptions are made: the built area amounts to about 4.2 ha, the plant has an average output of 50'000 t/a and a lifespan of fifty years. The estimated infrastructure amount is therefore 4.00 E-10 units per kg of produced chemical.
  References:
  Althaus H.-J., Chudacoff M., Hischier R., Jungbluth N., Osses M. and Primas A. (2007) Life Cycle Inventories of Chemicals. ecoinvent report No. 8, v2.0. EMPA Dübendorf, Swiss Centre for Life Cycle Inventories, Dübendorf, CH.
  Gendorf (2000) Umwelterklärung 2000, Werk Gendorf. Werk Gendorf, Burgkirchen.
- hydrochloric acid, without water, in 30% solution state: 0.0110566 kg; lognormal variance with pedigree 0.0526, pedigree (1,3,5,5,1)
  EC IPPC study 2002
  Uncertainty: E
  properties: dry mass 1 kg, wet mass 1 kg, heating value, net 3.32 MJ
- sludge, NaCl electrolysis Hg: -0.00676662 kg; name BP_sludge_NaCl_electrolysis_Hg; lognormal variance with pedigree 0.0526, pedigree (1,3,5,5,1)
  EC IPPC study 2002
  Uncertainty: E
  production volume 6.579e6 kg; = RP_PV*BP_sludge_NaCl_electrolysis_Hg/ABS(RP)
    (same comment as for sodium hydroxide, without water, in 50% solution state)
  property price 0 EUR2005; name BP_sludge_NaCl_electrolysi_price_EUR2005
  properties: dry mass 1 kg, wet mass 1 kg
- mercury: 2.98527e-6 kg; lognormal variance with pedigree 0.0526, pedigree (1,3,5,5,1)
  EC IPPC study 2002
  Uncertainty: E
  properties: dry mass 1 kg, wet mass 1 kg
- electricity, medium voltage: 0.0198463, 0.00380567, 0.0638892, 0.929212, 0.130973, 0.426729 kWh (6 entries); lognormal variance with pedigree 0.0526, pedigree (1,3,5,5,1)
  EC IPPC study 2002
  Uncertainty: E

## Inputs from nature
- Water, cooling, unspecified natural origin [natural resource, in water]: 0.0442263 m3; name water_cooling_UNO_input; lognormal variance with pedigree 0.1306, pedigree (2,5,5,5,4)
  estimate based on literature source
  Uncertainty: e
- Water, unspecified natural origin [natural resource, in water]: 0.000840299 m3; name water_UNO_input; lognormal variance with pedigree 0.0526, pedigree (1,3,5,5,1)
  EC IPPC study 2002
  Uncertainty: E

## Emissions to nature
- DOC, Dissolved Organic Carbon [water, unspecified]: 4.84716e-8 kg; lognormal variance with pedigree 0.218, pedigree (4,5,5,5,5)
  Calculated value. The BOD, COD, TOC and BOD5 are calculated based on the amount and type of emissions released to water in the same activity.
- Chlorine [air, urban air close to ground]: 3.5381e-6 kg; lognormal variance with pedigree 0.1026, pedigree (1,3,5,5,1)
  EC IPPC study 2002
  Uncertainty: E
- Carbon dioxide, fossil [air, urban air close to ground]: 0.00137101 kg; lognormal variance with pedigree 0.0526, pedigree (1,3,5,5,1)
  EC IPPC study 2002
  Uncertainty: E
- Water [water, unspecified]: 0.0277566 m3; = water_cooling_UNO_input*(1-fraction_CW_to_air)+water_UNO_input*(1-fraction_PW_to_air); lognormal variance with pedigree 0.0827, pedigree (2,2,5,5,1)
  Calculated as a fraction of the input of water. For more details, refer to the mathematical relation and the parameters.
  property carbon content, fossil 0; name C_content_fossil
  property fraction, origin: fresh water 0; name fraction_origin_fresh_water_Ww
  property dry mass 0 kg; name DM
  property carbon content, non-fossil 0; name C_content_non_fossil
  property wet mass 1000 kg; name WM
  property fraction, origin: unspecified 1; name fraction_origin_unspecified_Ww
  property fraction, origin: salt water 0; name fraction_origin_salt_water_Ww
  property water in wet mass 1000 kg; name WWM
- Hydrogen [air, urban air close to ground]: 0.000243244 kg; lognormal variance with pedigree 0.1026, pedigree (1,3,5,5,1)
  EC IPPC study 2002
  Uncertainty: E
- Chlorate [water, surface water]: 0.000928752 kg; lognormal variance with pedigree 0.1026, pedigree (1,3,5,5,1)
  EC IPPC study 2002
  Uncertainty: E
- BOD5, Biological Oxygen Demand [water, unspecified]: 1.39598e-7 kg; lognormal variance with pedigree 0.218, pedigree (4,5,5,5,5)
  (same comment as for DOC, Dissolved Organic Carbon)
- Mercury [air, urban air close to ground]: 5.08602e-7 kg; lognormal variance with pedigree 0.1026, pedigree (1,3,5,5,1)
  EC IPPC study 2002
  Uncertainty: E
- TOC, Total Organic Carbon [water, unspecified]: 4.84716e-8 kg; lognormal variance with pedigree 0.218, pedigree (4,5,5,5,5)
  (same comment as for DOC, Dissolved Organic Carbon)
- Mercury [water, surface water]: 1.45947e-7 kg; lognormal variance with pedigree 0.1026, pedigree (1,3,5,5,1)
  EC IPPC study 2002
  Uncertainty: E
- COD, Chemical Oxygen Demand [water, unspecified]: 1.39598e-7 kg; lognormal variance with pedigree 0.218, pedigree (4,5,5,5,5)
  (same comment as for DOC, Dissolved Organic Carbon)
- Methane, tetrachloro-, R-10 [air, urban air close to ground]: 9.95091e-7 kg; lognormal variance with pedigree 0.1826, pedigree (1,3,5,5,1)
  EC IPPC study 2002
  Uncertainty: E
- Sulfate [water, surface water]: 0.00349388 kg; lognormal variance with pedigree 0.1026, pedigree (1,3,5,5,1)
  EC IPPC study 2002
  Uncertainty: E
- Chloride [water, surface water]: 0.00663394 kg; lognormal variance with pedigree 0.1026, pedigree (1,3,5,5,1)
  EC IPPC study 2002
  Uncertainty: E
- Water [air, unspecified]: 0.0173099 m3; = (water_cooling_UNO_input*fraction_CW_to_air)+(water_UNO_input*fraction_PW_to_air); lognormal variance with pedigree 0.0827, pedigree (2,2,5,5,1)
  (same comment as for Water)
  property fraction, origin: unspecified 1; name fraction_origin_unspecified
  property fraction, origin: salt water 0; name fraction_origin_salt_water
  property fraction, origin: fresh water 0; name fraction_origin_fresh_water
- Chlorinated solvents, unspecified [water, surface water]: 2.65358e-7 kg; lognormal variance with pedigree 0.3626, pedigree (1,3,5,5,1)
  EC IPPC study 2002
  Uncertainty: E
- Bromate [water, surface water]: 0.000121622 kg; lognormal variance with pedigree 0.1026, pedigree (1,3,5,5,1)
  EC IPPC study 2002
  Uncertainty: E

## Sampling procedure
Average values from the ranges indicated in the 'Reference Document on Best Available Techniques in the Chlor-Alkali Manufacturing Industry' published by the European Commission, IPPC (2001).

## Extrapolations
This dataset has been copied from an original dataset covering the geography RER. The uncertainty has been adjusted accordingly.

## Review by Gregor Wernet 2017-08-04
This dataset was additionally reviewed in a separate review process by Eric Johnson of Atlantic Consulting as well as Emilia Moreno Ruiz and Gregor Wernet of ecoinvent.
