# coriander production

Dataset: EcoSpold 2, unit process
Geography: RoW
Time period: 2015-01-01 to 2021-12-31
Technology level: current
Classification: ISIC rev.4 ecoinvent: 0119:Growing of other non-perennial crops
Scenario: Business-as-Usual
System model: Allocation, cut-off by classification
Generated by: Sanjeevan Bajaj
Database: ecoinvent
isCopyrightProtected: true
accessRestrictedTo: 1

## General comment
This dataset represents the production of 1 kg of fresh Coriander during October, 2015-January, 2016 at a farm located in village-Pakbara and District of Moradabad, of UP. In this area, fields are irrigated with ground water using electric pump for surface irrigation. The farm has a yield of 10,500 kg fresh matter per ha for this crop cycle. Sowing date for the crop is 17-October, 2015 and harvesting date is 02-January, 2016. Mineral NP fertilizer input is 102.9-69 kg/ha. Only pesticide used has active ingredient as Dichlorovos 570g/ha. Machinery is used only for soil cultivation with fuel consumption of 12.48 kg/ha using plough and rotary cultivator for soil tillage.

## Included activities start
This activity starts about week after the harvest of the previous crop. The soil is prepared for cultivation in October and sowing of seeds started about two weeks after soil preparation. Thereafter the crop is mature for harvesting in about 2.5 months.

## Included activities end
The activity ends with the harvesting of the Coriander plant

## Technology
Cultivation of Coriander follows conventional production standards

## Time period
Soil cultivating date for the main crop: 03-October, 2015; Harvesting date main crop: 02-January, 2016. The soil cultivation, sowing and harvesting dates are taken as the middle date of the week or fortnight told to the data collector by the farmer. Total time from date of sowing to date of harvesting comes to 77 days. The data is collected for one crop cycle. The cycle of one year is considered for entry in ecoeditor.

## Parameters
- LUC_crop_specific: 1 dimensionless
  This parameter allows to switch between a "crop specific" and a "country specific" approach when calculating the LUC of a crop. By default, the chosen approach is "crop specific", so the value of the parameter is 1. If you want to apply a "country specific" approach, turn the parameter to 0.

## Reference product
- coriander: 1 kg; By-product classification allocatable product; CPC 01654: Anise, badian, coriander, cumin, caraway, fennel and juniper berries, raw
  production volume 1.502e7 kg; = 600000*1000
    http://www.worldspicecongress.com/index.php/Site/PreviousWsc/year/2012 The global production of coriander seed is estimated to be around 5-6 lakh tons. However, official estimates are rarely available for this crop in most producing countries. Additionally, coriander is widely grown in home gardens on a small scale, which is never included in official statistics
  property carbon content, non-fossil 0.475
    biogenic carbon content on a dry matter basis.
    Reference: http://www.fao.org/forestry/17111/en
  property price 0.866328 EUR2005
    Literature value. Price from FAOSTAT data Producer Prices - Annual (retrieved from: http://www.fao.org/faostat/en/#data/PP, accessed 15Feb2018). Data from 2005.
  property carbon content 0.475
    carbon content on a dry matter basis (reserved; not for manual entry)
  properties: water content 11.837, dry mass 0.0779 kg, water in wet mass 0.9221 kg, carbon content, fossil 0, wet mass 1 kg, carbon allocation 0.0370025 kg

## Inputs from technosphere
- linseed seed, at farm: 0.00428571 kg; lognormal variance with pedigree 0.006, pedigree (3,3,2,5,2)
  The data was collected for a hectare area through interview
  properties: wet mass 1 kg, carbon content, non-fossil 1, dry mass 1 kg
- inorganic nitrogen fertiliser, as N: 0 kg; pedigree (1,1,1,1,1)
  The data was collected for a hectare area through interview
  properties: wet mass 1 kg, dry mass 1 kg
- packaging, for pesticides: 0.000108571 kg; lognormal variance with pedigree 0.0514, pedigree (4,3,2,5,4)
  Total amount of active substance/s of pesticides needed for the production of coriander is calculated to be circa 5.43E-05 kg. Pesticide/s used in this dataset is/are: 'organophosphorus-compound, unspecified'. The total amount of active substance/s is doubled in order to account for the packaging of the dilluted product of pesticide/s that is/are applied. Therefore, 1.09E-04 kg of packaging for pesticides is justified with this exchange.
  properties: wet mass 1 kg, price 0.0642 EUR2005, heating value, net 25.97 MJ, carbon content, fossil 0.85714, dry mass 1 kg
- tillage, ploughing: 3.05112e-5 ha; lognormal variance with pedigree 0.006, pedigree (3,3,2,5,2)
  The data was collected for a hectare area through interview
- packaging, for fertilisers: 0.0327429 kg; lognormal variance with pedigree 0.0514, pedigree (4,3,2,5,4)
  Total amount of active substance/s of fertilisers needed for the production of 'coriander' is calculated to be circa 1.64E-02 kg. Fertiliser/s used in this dataset is/are: 'nitrogen fertiliser, as N', 'phosphate fertiliser, as P2O5', 'urea, as N'. The total amount of active substance/s is doubled in order to account for the packaging of the dilluted product of fertiliser/s that is/are applied. Therefore, 3.27E-02 kg of packaging for fertilisers is justified with this exchange.
  properties: dry mass 1 kg, price 0.0642 EUR2005, heating value, net 25.01 MJ, wet mass 1 kg, carbon content, fossil 0.825301
  note on carbon content, fossil: Considering a chemical formula (C2H4)n for polyethylene, carbon content-fossil is calculated to be 0.856286 kg of Carbon per kg of dry mass.
- irrigation: 0 m3; pedigree (1,1,1,1,1)
  The data was collected for a hectare area through interview
  properties: dry mass 0.11 kg, wet mass 1000 kg, water content 9089.91
- urea: 0 kg; pedigree (1,1,1,1,1)
  The exchange has been updated from 'urea, as N' into 'urea' and therefore its amount has been scaled (multiplied) from 0.0073 kg by 2.1438 kg of 'urea' per kg of 'urea, as N'. Original comment of the exchange is: The data was collected for a hectare area through interview
  properties: wet mass 1 kg, dry mass 1 kg, carbon content, fossil 0.2
- tillage, rotary cultivator: 2.78176e-5 ha; lognormal variance with pedigree 0.006, pedigree (3,3,2,5,2)
  The data was collected for a hectare area through interview
- inorganic phosphorus fertiliser, as P2O5: 0 kg; pedigree (1,1,1,1,1)
  The data was collected for a hectare area through interview
  properties: dry mass 1 kg, wet mass 1 kg
- organophosphorus-compound, unspecified: 5.42857e-5 kg; lognormal variance with pedigree 0.006, pedigree (3,3,2,5,2)
  The data was collected for a hectare area through interview
  properties: wet mass 1 kg, dry mass 1 kg, carbon content, fossil 0.260898
- inorganic nitrogen fertiliser, as N: 1.334e-5, 1.91744e-5, 1.71375e-5, 6.02012e-5, 3.59529e-5, 4.45629e-7, 2.66827e-6, 0.000338085, 6.31858e-6, 9.49025e-7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 kg (29 entries); lognormal variance with pedigree 0.006, pedigree (3,3,2,5,2)
  The data was collected for a hectare area through interview
- irrigation: 0.00280213, 0.000118942, 4.75768e-6, 0.0250492, 0.00041049, 2.05262e-5, 0.00116553, 0.000189711, 0.000925299, 0.000316246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 m3 (16 entries); lognormal variance with pedigree 0.006, pedigree (3,3,2,5,2)
  The data was collected for a hectare area through interview
- urea: 0.0116744, 0.00214344, 0.00172904 kg (3 entries); lognormal variance with pedigree 0.006, pedigree (3,3,2,5,2)
  (same comment as for urea)
- inorganic phosphorus fertiliser, as P2O5: 5.02089e-5, 6.51417e-5, 5.21612e-5, 0.00040842, 8.60587e-5, 3.54594e-6, 9.34693e-6, 0.000964192, 1.73791e-5, 1.89648e-6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 kg (29 entries); lognormal variance with pedigree 0.006, pedigree (3,3,2,5,2)
  The data was collected for a hectare area through interview

## Inputs from nature
- Transformation, to annual crop, irrigated [natural resource, land]: 0.952381 m2; lognormal variance with pedigree 0.0134, pedigree (3,3,2,5,2)
  Calculated Value. This value has been calculated by using the ecoinvent LCI calculation tool for crop production.
- Transformation, from annual crop, irrigated [natural resource, land]: 0.952381 m2; lognormal variance with pedigree 0.0134, pedigree (3,3,2,5,2)
  (same comment as for Transformation, to annual crop, irrigated)
- Energy, gross calorific value, in biomass [natural resource, biotic]: 16.6835 MJ; lognormal variance with pedigree 0.006, pedigree (3,3,2,5,2)
  The data was collected for a hectare area through interview
- Occupation, annual crop, irrigated [natural resource, land]: 0.238095 m2*year; lognormal variance with pedigree 0.0074, pedigree (3,3,2,5,2)
  (same comment as for Transformation, to annual crop, irrigated)
- Carbon dioxide, in air [natural resource, in air]: 1.44829 kg; lognormal variance with pedigree 0.006, pedigree (3,3,2,5,2)
  (same comment as for Transformation, to annual crop, irrigated)

## Emissions to nature
- Mercury [soil, agricultural]: -3.35537e-8 kg
  (same comment as for Transformation, to annual crop, irrigated)
- Copper, ion [water, surface water]: 1.40233e-6 kg; lognormal variance with pedigree 0.1088, pedigree (4,5,2,5,2)
  (same comment as for Transformation, to annual crop, irrigated)
- Nickel [soil, agricultural]: -1.13182e-6 kg
  (same comment as for Transformation, to annual crop, irrigated)
- Cadmium [soil, agricultural]: 2.17438e-7 kg; lognormal variance with pedigree 0.0588, pedigree (4,5,2,5,2)
  (same comment as for Transformation, to annual crop, irrigated)
- Chromium, ion [water, surface water]: 1.00189e-6 kg; lognormal variance with pedigree 0.1088, pedigree (4,5,2,5,2)
  (same comment as for Transformation, to annual crop, irrigated)
- Chromium [soil, agricultural]: 1.84505e-6 kg; lognormal variance with pedigree 0.0588, pedigree (4,5,2,5,2)
  (same comment as for Transformation, to annual crop, irrigated)
- Chromium, ion [water, ground-]: 4.93833e-7 kg; lognormal variance with pedigree 0.1088, pedigree (4,5,2,5,2)
  (same comment as for Transformation, to annual crop, irrigated)
- Water [air, non-urban air or from high stacks]: 0.0708171 m3; lognormal variance with pedigree 0.0194, pedigree (4,5,2,5,2)
  (same comment as for Transformation, to annual crop, irrigated)
- Cadmium, ion [water, ground-]: 1.13467e-9 kg; lognormal variance with pedigree 0.1088, pedigree (4,5,2,5,2)
  (same comment as for Transformation, to annual crop, irrigated)
- Dinitrogen monoxide [air, non-urban air or from high stacks]: 0.000244676 kg; lognormal variance with pedigree 0.0488, pedigree (4,5,2,5,2)
  (same comment as for Transformation, to annual crop, irrigated)
- Cadmium, ion [water, surface water]: 1.10982e-8 kg; lognormal variance with pedigree 0.1088, pedigree (4,5,2,5,2)
  (same comment as for Transformation, to annual crop, irrigated)
- Nitrogen oxides [air, non-urban air or from high stacks]: 0.000601016 kg; lognormal variance with pedigree 0.0588, pedigree (4,5,2,5,2)
  (same comment as for Transformation, to annual crop, irrigated)
- Phosphorus [water, surface water]: 7.79294e-5 kg; lognormal variance with pedigree 0.0588, pedigree (4,5,2,5,2)
  (same comment as for Transformation, to annual crop, irrigated)
- Water [water, ground-]: 0.0541543 m3; lognormal variance with pedigree 0.0194, pedigree (4,5,2,5,2)
  (same comment as for Transformation, to annual crop, irrigated)
- Phosphate [water, surface water]: 1.49796e-5 kg; lognormal variance with pedigree 0.0588, pedigree (4,5,2,5,2)
  (same comment as for Transformation, to annual crop, irrigated)
- Ammonia [air, non-urban air or from high stacks]: 0.00168726 kg; lognormal variance with pedigree 0.0268, pedigree (4,5,2,5,2)
  (same comment as for Transformation, to annual crop, irrigated)
- Phosphate [water, ground-]: 5.11031e-6 kg; lognormal variance with pedigree 0.0588, pedigree (4,5,2,5,2)
  (same comment as for Transformation, to annual crop, irrigated)
- Carbon dioxide, fossil [air, non-urban air or from high stacks]: 0.011393 kg; lognormal variance with pedigree 0.0194, pedigree (4,5,2,5,2)
  (same comment as for Transformation, to annual crop, irrigated)
- Nitrate [water, ground-]: 0.0142752 kg; lognormal variance with pedigree 0.0588, pedigree (4,5,2,5,2)
  (same comment as for Transformation, to annual crop, irrigated)
- Zinc, ion [water, ground-]: 5.79294e-7 kg; lognormal variance with pedigree 0.1088, pedigree (4,5,2,5,2)
  (same comment as for Transformation, to annual crop, irrigated)
- Lead [soil, agricultural]: -7.64822e-7 kg
  (same comment as for Transformation, to annual crop, irrigated)
- Water [water, surface water]: 0.0138857 m3; lognormal variance with pedigree 0.0194, pedigree (4,5,2,5,2)
  (same comment as for Transformation, to annual crop, irrigated)
- Zinc, ion [water, surface water]: 1.96027e-6 kg; lognormal variance with pedigree 0.1088, pedigree (4,5,2,5,2)
  (same comment as for Transformation, to annual crop, irrigated)
- Mercury [water, ground-]: 2.66051e-11 kg; lognormal variance with pedigree 0.1088, pedigree (4,5,2,5,2)
  (same comment as for Transformation, to annual crop, irrigated)
- Nickel, ion [water, surface water]: 7.99532e-7 kg; lognormal variance with pedigree 0.1088, pedigree (4,5,2,5,2)
  (same comment as for Transformation, to annual crop, irrigated)
- Copper, ion [water, ground-]: 8.08452e-8 kg; lognormal variance with pedigree 0.1088, pedigree (4,5,2,5,2)
  (same comment as for Transformation, to annual crop, irrigated)
- Lead [water, ground-]: 6.3618e-9 kg; lognormal variance with pedigree 0.1088, pedigree (4,5,2,5,2)
  (same comment as for Transformation, to annual crop, irrigated)
- Dichlorvos [soil, agricultural]: 5.42857e-5 kg; lognormal variance with pedigree 0.0384, pedigree (3,3,2,5,2)
  The data was collected for a hectare area through interview
- Mercury [water, surface water]: 2.51029e-9 kg; lognormal variance with pedigree 0.1088, pedigree (4,5,2,5,2)
  (same comment as for Transformation, to annual crop, irrigated)
- Zinc [soil, agricultural]: -2.75216e-5 kg
  (same comment as for Transformation, to annual crop, irrigated)
- Lead [water, surface water]: 4.20572e-7 kg; lognormal variance with pedigree 0.1088, pedigree (4,5,2,5,2)
  (same comment as for Transformation, to annual crop, irrigated)
- Copper [soil, agricultural]: -6.67974e-6 kg
  (same comment as for Transformation, to annual crop, irrigated)

## Sampling procedure
The farmer was identified and contacted by agriculture science faculty familiar with the local farmers in the region. Data was collected directly from the farmer through semi-structured interview using a questionnaire based on the input requirements of the ecoinvent LCI calculation tool for crop production. The farmer does not maintain any written records and has provided the data from recent memory. In this region, typically farmers are unable to provide exact name of active ingredient in the pesticide they use and the same was noted from details given on the pesticide packet. Individual farmer is not able to calculate fuel consumption for his own farm alone and this information has been collected from farming community of the area.

## Extrapolations
Ecoinvent LCI calculation tool for crop production was used to calculate field emissions from the cultivation process. Number of wet days have been taken for neighboring region (New Delhi) and rainfall data is Normal rainfall for Western Uttar Pradesh where the farm is located.
