# treatment of waste cement-fibre slab, dismantled, municipal incineration with fly ash extraction

Dataset: EcoSpold 2, unit process
Geography: CH
Time period: 2006-01-01 to 2021-12-31
Technology level: current
Classification: ISIC rev.4 ecoinvent: 3821:Treatment and disposal of non-hazardous waste
Synonyms: municipal waste incineration
Scenario: Business-as-Usual
System model: Allocation, cut-off by classification
Share of production covered: 1.8 %
Generated by: Gabor Doka
Published in: Doka G. 2015
Database: ecoinvent
isCopyrightProtected: true
accessRestrictedTo: 1

## General comment
This dataset represents the activity of waste disposal of waste cement-fibre slab, dismantled in a municipal solid waste incinerator (MSWI) // Recommended use of this dataset: For disposal of bulk or small parts of cement-fibre slabs (waste building product) // Inventoried waste contains 36% natural wood; 64% cement hydrated; . // Waste composition (wet, in ppm): upper heating value 5.531 MJ/kg; lower heating value 5.036 MJ/kg; H2O 66489; O 564550; H 60725; C 144530; S 3205.8; N 355.31; P 187.68; B 0.75986; Cl 119.14; Br n.a.; F 7.5983; I n.a.; Ag n.a.; As 2.3252; Ba n.a.; Cd 0.46058; Co 1.1548; Cr 13.924; Cu 3.9646; Hg 0.12607; Mn 140.57; Mo 0.29887; Ni 10.737; Pb 28.83; Sb 0.056384; Se n.a.; Sn 0.85073; V 14.805; Zn 57.951; Be n.a.; Sc n.a.; Sr n.a.; Ti n.a.; Tl 0.12324; W n.a.; Si 24593; Fe 6434.8; Ca 117210; Al 8583.5; K 23.548; Mg 71.121; Na 2638.9; // Share of carbon in waste that is biogenic 100%. // Share of metals in waste not oxidised and bulk-recyclable (exclude very small or thin parts) Iron: 0%; Alu: 0%; Copper: 0%. // Recovery of metal scrap from bottom ash to recycling: 0g iron scrap, 0g aluminium scrap, 0g copper scrap. From this waste, the FLUWA process in the technology mix recovers 0.0000385kg (DM) of a hydroxide sludge to be recycled in zinc furnaces. // Ultimately one kg of this waste produces 0.4293 kg of bottom ash (can include some washed ash) and 0.0004548 kg of residues, which are landfilled (technology mix). Additional solidification of residues with 0.0001819 kg of cement.Net energy production: 0.65MJ/kg electric energy and 1.44MJ/kg thermal energy. //

## Included activities start
waste incineration from waste reception gate and delivery into waste bunker at incinerator plant site (without transports to the incinerator)

## Included activities end
Waste-specific short-term emissions to water from leachate. Long-term emissions from landfill to ground water.

## Geography
Specific to the technology mix encountered in Switzerland in 2012.

## Technology
average Swiss MSWI plants in 2010 (grate incinerators) with electrostatic precipitator for fly ash (ESP), wet flue gas scrubber and 25% SNCR , 42.77% SCR-high dust , 32.68% SCR-low dust -DeNOx facilities and 0% without Denox (weighted according to mass of burnt waste, representing Swiss average). Efficiency of iron scrap separation from slag : 58%. Efficiency of non-ferrous scrap separation from slag : 31%. The technology mix for this dataset includes a filter ash treatment (FLUWA) of a share of 46.22%. Gross electric efficiency technology mix 15.84% and Gross thermal efficiency technology mix 28.51%

## Time period
Waste composition as given in literature reference, theoretical data or other source. Transfer coefficients for modern MSWI.

## Reference product
- waste cement-fibre slab, dismantled: -1 kg; name RP_amount_1; By-product classification Waste; CPC 39: Wastes or scraps
  Main reference product of this activity (supply of disposal service).
  production volume 8.1754e6 kg; name RP_PV_1
    based on corresponding global production volume of MSW fraction in conventional MSWI (wo fly ash extraction) and scaled down to annual Swiss incinerated MSW mass of 3.02 mio. tonnes.
  property price 0 EUR2005; name RP_amount_1_price_EUR2005
    Waste products are assigned a price of zero as they are assumed to require further treatment.
  property carbon content 0.15482
    carbon content on a dry matter basis (reserved; not for manual entry)
  properties: antimony content 6.04e-8, fluorine content 8.1395e-6, manganese content 0.00015058, cobalt content 1.237e-6, lead content 3.0883e-5, nickel content 1.1501e-5, calcium content 0.12555, zinc content 6.2078e-5, copper content 4.247e-6, molybdenum content 3.2016e-7, vanadium content 1.5859e-5, iron content 0.0068931, potassium content 2.5226e-5, aluminium content 0.0091948, water in wet mass 0.066489 kg, magnesium content 7.6186e-5, thallium content 1.3202e-7, silicon content 0.026345, wet mass 1 kg, water content 0.071224, dry mass 0.93351 kg, carbon content, non-fossil 0.15482, sodium content 0.0028268, boron content 8.1398e-7, chlorine content 0.00012763, oxygen content 0.60476, cadmium content 4.9339e-7, chromium content 1.4915e-5, hydrogen content 0.065051, tin content 9.1133e-7, nitrogen content 0.00038062, mercury content 1.3505e-7, phosphorus content 0.00020105, arsenic content 2.4908e-6, sulfur content 0.0034341, carbon allocation 0.144526 kg

## By-products
- metalliferous hydroxide sludge: 0 kg; By-product classification Recyclable; CPC 1429: Other non-ferrous metal ores and concentrates (other than uranium or thorium ores and concentrates); pedigree (1,1,1,1,1)
  Metalliferous hydroxide sludge from filter ash leaching (FLUWA).
  Uncertainty: uncertainty is calculated from uncertainties in waste composition and transfer coefficients to filter ash in incinerator and the uncertainty of the transfer coefficients of the FLUWA process.
  production volume 0 kg
    calculated in proportion to reference product waste input to incinerator
  property price 0.0042 EUR2005
    World market value of manure, deflated with barley world market price and consumer price index, based on [http://www.gov.pe.ca/photos/original/af_NM_manconv.pdf].
  property heating value, net 0 MJ
    Non combustible products are assumed to have an LHV equal to zero (0).
  property carbon content 0.19549
    carbon content on a dry matter basis (reserved; not for manual entry)
  properties: water in wet mass 0.75 kg, sodium content 0.001082, fluorine content 0.0028825, sulfur content 0.072262, cobalt content 2.004e-5, chlorine content 0.074698, boron content 0.00032999, oxygen content 0.57821, arsenic content 3.6613e-5, phosphorus content 0.020024, copper content 1.6135e-5, cadmium content 0.00063958, zinc content 0.029402, chromium content 2.9517e-5, molybdenum content 0.00047633, aluminium content 4.0906e-6, lead content 0.0047099, calcium content 0.01236, nickel content 4.8434e-6, manganese content 0.00050821, potassium content 0.0038953, dry mass 0.25 kg, mercury content 5.4547e-6, iron content 1.5989e-5, magnesium content 0.0029054, wet mass 1 kg, water content 3, carbon content, non-fossil 0.19549, carbon allocation 0.0488725 kg
- heat, for reuse in municipal waste incineration only: 0 MJ; name E_th_prod_MSWI; By-product classification allocatable product; CPC 17300: Steam and hot water; pedigree (1,1,1,1,1)
  Net useful heat generated from this waste and used in internal MSWI plant energy redistribution.
  Uncertainty: uncertainty is calculated from uncertainties in waste composition and uncertainties in energy efficiency and the uncertainty in internal energy demand
  production volume 1.1738e7 MJ
    calculated in proportion to reference product waste input to incinerator
  property true value relation 0.1842; name E_th_prod_MSWI_true_value_relation
    property to calculate "true value" from
  property price 0.0106 EUR2005; name E_th_prod_MSWI_price_EUR2005
    Average European district heat price from Ecoheatcool and Euroheat 2005-2006, Ecoheat Work package 1: The European heat market. Final report. 10.6 EUR/GJ i s the price of district heat. http://www.solarthermalworld.org/files/Ecoheatcool%20WP1%20Web.pdf?download
  property exergy 0.1842 MJ; name E_th_prod_MSWI_exergy
    This exergy property is based on the exergy content of the product.
- electricity, for reuse in municipal waste incineration only: 0 kWh; name E_el_prod_MSWI; CPC 17100: Electrical energy; By-product classification allocatable product; pedigree (1,1,1,1,1)
  Net electricity generated from this waste and used in internal MSWI plant energy redistribution.
  Uncertainty: uncertainty is calculated from uncertainties in waste composition and uncertainties in energy efficiency and the uncertainty in internal energy demand
  production volume 1.4805e6 kWh
    calculated in proportion to reference product waste input to incinerator
  property true value relation 3.6; name E_el_prod_MSWI_true_value_relation
    property to calculate "true value" from
  property price 0.1 EUR2005; name E_el_prod_MSWI_price_EUR2005
    Estimated to be the same price as in case of electricity, medium voltage.
  property exergy 3.6 MJ; name E_el_prod_MSWI_exergy
    This exergy property is based on the exergy content of the product.

## Inputs from technosphere
- chemical, inorganic: 5.568e-6 kg; lognormal variance with pedigree 0.14294, pedigree (1,1,4,1,1)
  Auxilliary inputs for the wastewater treatment stage of the incinerator plant. Proxy for Polyelectrolyte.
  Uncertainty: uncertainty calculated from uncertainty in average Polyelectrolyte input, of transfer coefficients in the incinerator, and the uncertainty of the waste composition of this waste
  properties: carbon content, fossil 0.003, dry mass 1 kg, wet mass 1 kg
- waste cement, hydrated: -0.0004548 kg; lognormal variance with pedigree 0.034977, pedigree (1,1,4,1,1)
  Hydrated cement output for solidification of landfilled residual material.
  Uncertainty: Uncertainty calculated from uncertainty of the waste composition of this waste and transfer coefficients in the incinerator and of the solidification recipe.
  production volume 3718.1 kg
    calculated in proportion to reference product waste input to incinerator
  properties: dry mass 1 kg, wet mass 1 kg
- cationic resin: 5.8342e-7 kg; lognormal variance with pedigree 1.8413, pedigree (1,1,4,1,1)
  Auxilliary input for mercury removal in filter ash treatment (FLUWA).
  Uncertainty: uncertainty calculated from uncertainty in of transfer coefficients in the incinerator, and the uncertainty of the waste composition of this waste
  properties: carbon content, fossil 0.521606, water content 1, dry mass 0.5 kg, wet mass 1 kg, heating value, net 6.68 MJ
- water, decarbonised: 0.066008 kg; lognormal variance with pedigree 0.54147, pedigree (1,1,4,1,1)
  Incinerator process water used in flue gas scrubber stage.
  Uncertainty: uncertainty calculated from uncertainty in average water input, and the uncertainty of the waste composition of this waste
  properties: wet mass 1 kg
- ammonia, anhydrous, liquid: 3.8734e-5 kg; lognormal variance with pedigree 1.5084, pedigree (1,1,4,1,1)
  Input to DeNOx stage (100% NH3).
  Uncertainty: uncertainty calculated from uncertainty in average DeNOx input, uncertainty in the share of thermal NOx, uncertainty of nitrogen content in average municipal waste and the uncertainty in nitrogen content in *this* waste.
  properties: wet mass 1 kg, dry mass 1 kg
- spent activated carbon with mercury: -6.1413e-7 kg; name BP_amount_1; lognormal variance with pedigree 1.8413, pedigree (1,1,4,1,1)
  Spent ion exchanger charged with mercury, from FLUWA filter ash treatment, approximated here with Spent activated carbon with mercury, deposited undergound in a polyethylene Big Bag.
  Uncertainty: uncertainty calculated from uncertainty in of transfer coefficients in the incinerator, and the uncertainty of the waste composition of this waste.
  production volume 5.02076 kg; = ABS(RP_PV_1 * (BP_amount_1 / RP_amount_1))
    Calculated from production volume of reference product using the relative outputs.
  property price 0 EUR2005; name BP_amount_1_price_EUR2005
  properties: dry mass 1 kg, wet mass 1 kg, carbon content, fossil 0.6, heating value, net 18.18 MJ
- sodium hydroxide, without water, in 50% solution state: 3.5056e-5 kg; lognormal variance with pedigree 0.3043, pedigree (1,1,4,1,1)
  Auxilliary inputs for the flue gas treatment stage of the incinerator plant, and partially in the filter ash treatment (FLUWA).
  Uncertainty: uncertainty calculated from uncertainty in average NaOH input, of transfer coefficients in the incinerator, and the uncertainty of the waste composition of this waste
  properties: dry mass 1 kg, wet mass 1 kg, heating value, net 3.03 MJ
- heat, district or industrial, natural gas: 0.0072432 MJ; lognormal variance with pedigree 1.5084, pedigree (1,1,4,1,1)
  Input to DeNOx stage, to heat up flue gas in low-dust SCR.
  Uncertainty: uncertainty calculated from uncertainty in average DeNOx input, uncertainty in the share of thermal NOx, uncertainty of nitrogen content in average municipal waste and the uncertainty in nitrogen content in *this* waste.
  properties: heating value, net 1 MJ
- iron (III) chloride, without water, in 40% solution state: 4.238e-7 kg; lognormal variance with pedigree 0.54147, pedigree (1,1,4,1,1)
  Auxilliary inputs for the wastewater treatment stage of the incinerator plant.
  Uncertainty: uncertainty calculated from uncertainty in average FeCl3 input, of transfer coefficients in the incinerator, and the uncertainty of the waste composition of this waste
  properties: dry mass 1 kg, wet mass 1 kg
- residual material landfill: 1.8891e-12 unit; lognormal variance with pedigree 0.025893, pedigree (1,1,4,1,1)
  Landfill infrastructure required for landfilling of incineration residues.
  Uncertainty: uncertainty is calculated from uncertainties in waste composition and transfer coefficients in incinerator
- process-specific burdens, slag landfill: 0.42925 kg; lognormal variance with pedigree 0.03093, pedigree (1,1,4,1,1)
  Mass-specific expenditures required for landfilling of bottom ash.;activityLink introduced to establish a direct link to the corresponding regional supply of this product
  Uncertainty: uncertainty is calculated from uncertainties in waste composition and transfer coefficients in incinerator
- quicklime, milled, packed: 5.2153e-5 kg; lognormal variance with pedigree 1.0809, pedigree (1,1,4,1,1)
  Auxilliary inputs for the flue gas treatment stage of the incinerator plant.
  Uncertainty: uncertainty calculated from uncertainty in average CaO input, of transfer coefficients in the incinerator, and the uncertainty of the waste composition of this waste
  properties: water content 0.010101, wet mass 1 kg, dry mass 0.99 kg
- transport, freight, lorry, unspecified: 0.017196 metric ton*km; lognormal variance with pedigree 0.030863, pedigree (1,1,4,1,1)
  Transport services to transport incineration residues to landfills and filter ash to external treatments (FLUWA).
  Uncertainty: uncertainty calculated from uncertainty of the waste composition of this waste, uncertainty of transfer coefficients and the uncertainty in generic transportation distances
- municipal waste incineration facility: 2.5e-10 unit
  Demands per kilogram waste.
- hydrochloric acid, without water, in 30% solution state: 1.0957e-5 kg; lognormal variance with pedigree 0.02207, pedigree (1,1,4,1,1)
  Auxilliary inputs for the wastewater treatment stage of the incinerator plant.
  Uncertainty: uncertainty calculated from uncertainty in average HCl input, of transfer coefficients in the incinerator, and the uncertainty of the waste composition of this waste
  properties: wet mass 1 kg, dry mass 1 kg, heating value, net 3.32 MJ
- titanium dioxide: 2.4268e-6 kg; lognormal variance with pedigree 1.9342, pedigree (1,1,4,1,1)
  Input to DeNOx stage (TiO2 catalyst carrier)
  Uncertainty: uncertainty calculated from uncertainty in average DeNOx input, uncertainty in the share of thermal NOx, uncertainty of nitrogen content in average municipal waste and the uncertainty in nitrogen content in *this* waste.
  properties: wet mass 1 kg, dry mass 1 kg
- cement, unspecified: 0.00018192 kg; lognormal variance with pedigree 0.034977, pedigree (1,1,4,1,1)
  Cement required for solidification of landfilled residual material.
  Uncertainty: Uncertainty calculated from uncertainty of the waste composition of this waste, of transfer coefficients in the incinerator and of the solidification recipe.
  properties: wet mass 1 kg, dry mass 1 kg
- process-specific burdens, residual material landfill: 0.00090675 kg; lognormal variance with pedigree 0.025893, pedigree (1,1,4,1,1)
  Mass-specific expenditures required for landfilling of incineration residues.;activityLink introduced to establish a direct link to the corresponding regional supply of this product
  Uncertainty: uncertainty is calculated from uncertainties in waste composition and transfer coefficients in incinerator
- slag landfill: 7.6312e-10 unit; lognormal variance with pedigree 0.03093, pedigree (1,1,4,1,1)
  Landfill infrastructure required for landfilling of bottom ash.
  Uncertainty: uncertainty is calculated from uncertainties in waste composition and transfer coefficients in incinerator
- chromium oxide, flakes: 4.9526e-8 kg; lognormal variance with pedigree 1.9342, pedigree (1,1,4,1,1)
  Input to DeNOx stage. Active component in SCR catalyst (vanadium pentoxide, V2O5), here approximated with the available chromium trioxide.
  Uncertainty: uncertainty calculated from uncertainty in average DeNOx input, uncertainty in the share of thermal NOx, uncertainty of nitrogen content in average municipal waste and the uncertainty in nitrogen content in *this* waste.
  properties: wet mass 1 kg, dry mass 1 kg
- chemical, organic: 1.0351e-6 kg; lognormal variance with pedigree 1.8271, pedigree (1,1,4,1,1)
  Auxilliary inputs for the wastewater treatment stage of the incinerator plant. Proxy for (pure) Trisodium-trimercapto-s-triazine (CAS 17766-26-6), used as 15% diluted solution, aka TMT15.
  Uncertainty: uncertainty calculated from uncertainty in average TMT15 input, of transfer coefficients in the incinerator, and the uncertainty of the waste composition of this waste
  properties: heating value, net 19.03 MJ, carbon content, fossil 0.628, dry mass 1 kg, wet mass 1 kg
- hydrogen peroxide, without water, in 50% solution state: 2.4162e-5 kg; lognormal variance with pedigree 0.0232, pedigree (1,1,4,1,1)
  Auxilliary oxidising agent for filter ash treatment (FLUWA).
  Uncertainty: uncertainty calculated from uncertainty in of transfer coefficients in the incinerator, and the uncertainty of the waste composition of this waste
  properties: heating value, net 7.13 MJ, dry mass 1 kg, wet mass 1 kg
- metalliferous hydroxide sludge: -0.00015381 kg; lognormal variance with pedigree 0.029123, pedigree (1,1,4,1,1)
  (same comment as for metalliferous hydroxide sludge)
  production volume 1257.5 kg
  properties: sulfur content 0.072262, price 0.0042 EUR2005, chlorine content 0.074698, oxygen content 0.57821, phosphorus content 0.020024, zinc content 0.029402, lead content 0.0047099, calcium content 0.01236, dry mass 0.25 kg, wet mass 1 kg, water content 3, carbon content, non-fossil 0.19549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

## Emissions to nature
- Nitrate [water, surface water]: 4.565e-6 kg; lognormal variance with pedigree 0.55152, pedigree (1,1,4,1,1)
  Emissions to water from waste composition and transfer coefficients in incinerator and landfills.
  Uncertainty: uncertainty is calculated from uncertainties in waste composition and transfer coefficients in incinerator and landfills
- Thallium [water, ground-, long-term]: 1.232e-7 kg; lognormal variance with pedigree 1.8453, pedigree (1,1,4,1,1)
  Long-term emissions from landfilling of incineration residues.
  Uncertainty: uncertainty is calculated from uncertainties in waste composition and transfer coefficients in incinerator and landfills.
- Cobalt [water, ground-, long-term]: 1.1508e-6 kg; lognormal variance with pedigree 1.5574, pedigree (1,1,4,1,1)
  (same comment as for Thallium)
- Phosphate [water, surface water]: 6.8434e-8 kg; lognormal variance with pedigree 0.66489, pedigree (1,1,4,1,1)
  (same comment as for Nitrate)
- Heat, waste [water, surface water]: 0.9712 MJ; lognormal variance with pedigree 0.21244, pedigree (1,1,4,1,1)
  Waste heat generated from heating value of this waste plus any electricity required to process it.
  Uncertainty: uncertainty is calculated from uncertainties in waste composition and uncertainties in energy efficiency and the uncertainty in internal energy demand
- Boron [water, surface water]: 7.8704e-9 kg; lognormal variance with pedigree 1.5744, pedigree (1,1,4,1,1)
  (same comment as for Nitrate)
- Iron, ion [water, ground-, long-term]: 0.0033473 kg; lognormal variance with pedigree 0.53551, pedigree (1,1,4,1,1)
  (same comment as for Thallium)
- Benzo(a)pyrene [air, urban air close to ground]: 1.0877e-12 kg; lognormal variance with pedigree 0.50009, pedigree (1,1,4,1,1)
  Incomplete combustion product emitted to air.
  Uncertainty: uncertainty calculated from uncertainty in average operation emissions, and the uncertainty of the flue gas volume from this waste.
- Chloride [water, surface water]: 0.0001012 kg; lognormal variance with pedigree 0.41716, pedigree (1,1,4,1,1)
  (same comment as for Nitrate)
- Fluoride [water, surface water]: 2.2115e-6 kg; lognormal variance with pedigree 0.89561, pedigree (1,1,4,1,1)
  (same comment as for Nitrate)
- Vanadium, ion [water, ground-, long-term]: 1.4556e-6 kg; lognormal variance with pedigree 2.5728, pedigree (1,1,4,1,1)
  (same comment as for Thallium)
- Lead [water, ground-, long-term]: 2.5861e-5 kg; lognormal variance with pedigree 1.3808, pedigree (1,1,4,1,1)
  (same comment as for Thallium)
- Calcium, ion [water, ground-, long-term]: 0.1167 kg; lognormal variance with pedigree 0.11544, pedigree (1,1,4,1,1)
  (same comment as for Thallium)
- Arsenic, ion [water, surface water]: 6.1697e-8 kg; lognormal variance with pedigree 1.256, pedigree (1,1,4,1,1)
  (same comment as for Nitrate)
- Particulates, < 2.5 um [air, urban air close to ground]: 5.8356e-6 kg; lognormal variance with pedigree 0.50009, pedigree (1,1,4,1,1)
  (same comment as for Benzo(a)pyrene)
- Toluene [air, urban air close to ground]: 9.7756e-8 kg; lognormal variance with pedigree 0.13397, pedigree (1,1,4,1,1)
  (same comment as for Benzo(a)pyrene)
- Cadmium, ion [water, surface water]: 2.1266e-10 kg; lognormal variance with pedigree 2.3797, pedigree (1,1,4,1,1)
  (same comment as for Nitrate)
- Carbon monoxide, non-fossil [air, urban air close to ground]: 8.3087e-5 kg; lognormal variance with pedigree 0.92367, pedigree (1,1,4,1,1)
  (same comment as for Benzo(a)pyrene)
- Cobalt [water, surface water]: 1.6169e-10 kg; lognormal variance with pedigree 2.4568, pedigree (1,1,4,1,1)
  (same comment as for Nitrate)
- Carbon dioxide, non-fossil [air, urban air close to ground]: 0.52662 kg; lognormal variance with pedigree 0.098072, pedigree (1,1,4,1,1)
  Emission to air from waste composition and transfer coefficients.
  Uncertainty: uncertainty is calculated from uncertainties in waste composition and transfer coefficients in incinerator
- Chromium VI [water, surface water]: 4.3093e-9 kg; lognormal variance with pedigree 1.1617, pedigree (1,1,4,1,1)
  (same comment as for Nitrate)
- Methane, non-fossil [air, urban air close to ground]: 7.3317e-7 kg; lognormal variance with pedigree 0.13397, pedigree (1,1,4,1,1)
  (same comment as for Benzo(a)pyrene)
- Copper, ion [water, surface water]: 2.1511e-10 kg; lognormal variance with pedigree 1.9659, pedigree (1,1,4,1,1)
  (same comment as for Nitrate)
- Sulfur dioxide [air, urban air close to ground]: 4.8052e-7 kg; lognormal variance with pedigree 0.55175, pedigree (1,1,4,1,1)
  (same comment as for Carbon dioxide, non-fossil)
- Mercury [water, surface water]: 8.9949e-10 kg; lognormal variance with pedigree 2.0339, pedigree (1,1,4,1,1)
  (same comment as for Nitrate)
- Nitrogen oxides [air, urban air close to ground]: 1.4421e-5 kg; lognormal variance with pedigree 1.5757, pedigree (1,1,4,1,1)
  Sum of fuel-Nox and thermal-NOx emitted to air after DeNOx stage.
  Uncertainty: uncertainty calculated from uncertainty in average N-emissions and uncertainty in the share of thermal NOx and the uncertainty in nitrogen content in *this* waste.
- Manganese [water, surface water]: 8.5518e-9 kg; lognormal variance with pedigree 1.7704, pedigree (1,1,4,1,1)
  (same comment as for Nitrate)
- Ammonia [air, urban air close to ground]: 4.5541e-8 kg; lognormal variance with pedigree 1.5757, pedigree (1,1,4,1,1)
  Nitrogen species emitted to air after DeNOx stage.
  Uncertainty: uncertainty calculated from uncertainty in average N-emissions and uncertainty in the share of thermal NOx and the uncertainty in nitrogen content in *this* waste.
- Copper, ion [water, ground-, long-term]: 3.8781e-6 kg; lognormal variance with pedigree 1.3929, pedigree (1,1,4,1,1)
  (same comment as for Thallium)
- Molybdenum [water, surface water]: 4.9731e-8 kg; lognormal variance with pedigree 1.1535, pedigree (1,1,4,1,1)
  (same comment as for Nitrate)
- Dinitrogen monoxide [air, urban air close to ground]: 5.2994e-6 kg; lognormal variance with pedigree 1.5757, pedigree (1,1,4,1,1)
  (same comment as for Ammonia)
- Magnesium [water, ground-, long-term]: 6.6238e-5 kg; lognormal variance with pedigree 0.99974, pedigree (1,1,4,1,1)
  (same comment as for Thallium)
- Nickel, ion [water, surface water]: 6.77e-9 kg; lognormal variance with pedigree 1.9771, pedigree (1,1,4,1,1)
  (same comment as for Nitrate)
- Particulates, > 2.5 um, and < 10um [air, urban air close to ground]: 2.9325e-8 kg; lognormal variance with pedigree 0.25676, pedigree (1,1,4,1,1)
  (same comment as for Benzo(a)pyrene)
- Cyanide [air, urban air close to ground]: 1.1385e-6 kg; lognormal variance with pedigree 1.5757, pedigree (1,1,4,1,1)
  (same comment as for Ammonia)
- Benzene, hexachloro- [air, urban air close to ground]: 1.022e-10 kg; lognormal variance with pedigree 0.13397, pedigree (1,1,4,1,1)
  (same comment as for Benzo(a)pyrene)
- Lead [water, surface water]: 1.0263e-9 kg; lognormal variance with pedigree 1.5408, pedigree (1,1,4,1,1)
  (same comment as for Nitrate)
- Phosphorus [air, urban air close to ground]: 3.9865e-8 kg; lognormal variance with pedigree 0.91365, pedigree (1,1,4,1,1)
  (same comment as for Carbon dioxide, non-fossil)
- Antimony [water, surface water]: 5.3172e-11 kg; lognormal variance with pedigree 2.4439, pedigree (1,1,4,1,1)
  (same comment as for Nitrate)
- Hydrogen chloride [air, urban air close to ground]: 6.7989e-8 kg; lognormal variance with pedigree 0.97002, pedigree (1,1,4,1,1)
  (same comment as for Carbon dioxide, non-fossil)
- Tin, ion [water, surface water]: 1.3628e-11 kg; lognormal variance with pedigree 2.7951, pedigree (1,1,4,1,1)
  (same comment as for Nitrate)
- Hydrogen fluoride [air, urban air close to ground]: 5.1263e-8 kg; lognormal variance with pedigree 1.3233, pedigree (1,1,4,1,1)
  (same comment as for Carbon dioxide, non-fossil)
- Molybdenum [water, ground-, long-term]: 2.3043e-7 kg; lognormal variance with pedigree 1.732, pedigree (1,1,4,1,1)
  (same comment as for Thallium)
- Vanadium, ion [water, surface water]: 6.5955e-9 kg; lognormal variance with pedigree 1.9794, pedigree (1,1,4,1,1)
  (same comment as for Nitrate)
- Mercury [water, ground-, long-term]: 3.4841e-8 kg; lognormal variance with pedigree 1.757, pedigree (1,1,4,1,1)
  (same comment as for Thallium)
- Arsenic [air, urban air close to ground]: 1.1904e-9 kg; lognormal variance with pedigree 1.4912, pedigree (1,1,4,1,1)
  (same comment as for Carbon dioxide, non-fossil)
- Zinc, ion [water, surface water]: 1.926e-9 kg; lognormal variance with pedigree 1.965, pedigree (1,1,4,1,1)
  (same comment as for Nitrate)
- Cadmium [air, urban air close to ground]: 3.6793e-11 kg; lognormal variance with pedigree 1.7127, pedigree (1,1,4,1,1)
  (same comment as for Carbon dioxide, non-fossil)
- Tin, ion [water, ground-, long-term]: 8.46e-7 kg; lognormal variance with pedigree 1.5983, pedigree (1,1,4,1,1)
  (same comment as for Thallium)
- Thallium [water, surface water]: 7.7663e-11 kg; lognormal variance with pedigree 2.558, pedigree (1,1,4,1,1)
  (same comment as for Nitrate)
- Cobalt [air, urban air close to ground]: 5.6812e-11 kg; lognormal variance with pedigree 1.5989, pedigree (1,1,4,1,1)
  (same comment as for Carbon dioxide, non-fossil)
- Manganese [water, ground-, long-term]: 0.0001366 kg; lognormal variance with pedigree 0.92448, pedigree (1,1,4,1,1)
  (same comment as for Thallium)
- Silicon [water, surface water]: 9.4957e-7 kg; lognormal variance with pedigree 1.314, pedigree (1,1,4,1,1)
  (same comment as for Nitrate)
- Copper [air, urban air close to ground]: 1.3678e-10 kg; lognormal variance with pedigree 1.4407, pedigree (1,1,4,1,1)
  (same comment as for Carbon dioxide, non-fossil)
- Sodium, ion [water, ground-, long-term]: 0.0023157 kg; lognormal variance with pedigree 0.54113, pedigree (1,1,4,1,1)
  (same comment as for Thallium)
- Iron, ion [water, surface water]: 5.3936e-8 kg; lognormal variance with pedigree 1.7101, pedigree (1,1,4,1,1)
  (same comment as for Nitrate)
- Dioxins, measured as 2,3,7,8-tetrachlorodibenzo-p-dioxin [air, urban air close to ground]: 9.7749e-14 kg; lognormal variance with pedigree 0.50009, pedigree (1,1,4,1,1)
  (same comment as for Benzo(a)pyrene)
- Chromium [air, urban air close to ground]: 2.0679e-10 kg; lognormal variance with pedigree 1.2808, pedigree (1,1,4,1,1)
  (same comment as for Carbon dioxide, non-fossil)
- Heat, waste [air, urban air close to ground]: 4.0539 MJ; lognormal variance with pedigree 0.21244, pedigree (1,1,4,1,1)
  (same comment as for Heat, waste)
- Calcium, ion [water, surface water]: 0.00051207 kg; lognormal variance with pedigree 0.57994, pedigree (1,1,4,1,1)
  (same comment as for Nitrate)
- Mercury [air, urban air close to ground]: 3.2639e-9 kg; lognormal variance with pedigree 1.8463, pedigree (1,1,4,1,1)
  (same comment as for Carbon dioxide, non-fossil)
- Aluminium [water, surface water]: 1.1569e-7 kg; lognormal variance with pedigree 1.5873, pedigree (1,1,4,1,1)
  (same comment as for Nitrate)
- Molybdenum [air, urban air close to ground]: 3.9325e-10 kg; lognormal variance with pedigree 1.748, pedigree (1,1,4,1,1)
  (same comment as for Carbon dioxide, non-fossil)
- Potassium, ion [water, surface water]: 6.3855e-6 kg; lognormal variance with pedigree 0.48838, pedigree (1,1,4,1,1)
  (same comment as for Nitrate)
- Manganese [air, urban air close to ground]: 3.652e-9 kg; lognormal variance with pedigree 0.96512, pedigree (1,1,4,1,1)
  (same comment as for Carbon dioxide, non-fossil)
- Magnesium [water, surface water]: 5.3848e-7 kg; lognormal variance with pedigree 0.83581, pedigree (1,1,4,1,1)
  (same comment as for Nitrate)
- Nickel [air, urban air close to ground]: 2.5136e-10 kg; lognormal variance with pedigree 1.31, pedigree (1,1,4,1,1)
  (same comment as for Carbon dioxide, non-fossil)
- Sodium, ion [water, surface water]: 0.00032309 kg; lognormal variance with pedigree 0.64011, pedigree (1,1,4,1,1)
  (same comment as for Nitrate)
- Zinc [air, urban air close to ground]: 4.2967e-9 kg; lognormal variance with pedigree 1.0755, pedigree (1,1,4,1,1)
  (same comment as for Carbon dioxide, non-fossil)
- Chromium, ion [water, surface water]: 3.0745e-11 kg; lognormal variance with pedigree 0.82833, pedigree (1,1,4,1,1)
  (same comment as for Nitrate)
- Lead [air, urban air close to ground]: 8.2652e-10 kg; lognormal variance with pedigree 1.1783, pedigree (1,1,4,1,1)
  (same comment as for Carbon dioxide, non-fossil)
- Nickel, ion [water, ground-, long-term]: 1.0727e-5 kg; lognormal variance with pedigree 1.266, pedigree (1,1,4,1,1)
  (same comment as for Thallium)
- TOC, Total Organic Carbon [water, ground-, long-term]: 0.0004238 kg; lognormal variance with pedigree 0.082198, pedigree (1,1,4,1,1)
  (same comment as for Thallium)
- Zinc, ion [water, ground-, long-term]: 5.4417e-5 kg; lognormal variance with pedigree 1.0395, pedigree (1,1,4,1,1)
  (same comment as for Thallium)
- Iron [air, urban air close to ground]: 9.9865e-12 kg; lognormal variance with pedigree 0.56554, pedigree (1,1,4,1,1)
  (same comment as for Carbon dioxide, non-fossil)
- Aluminium [water, ground-, long-term]: 0.0070131 kg; lognormal variance with pedigree 0.40381, pedigree (1,1,4,1,1)
  (same comment as for Thallium)
- NMVOC, non-methane volatile organic compounds, unspecified origin [air, urban air close to ground]: 2.2244e-6 kg; lognormal variance with pedigree 0.13397, pedigree (1,1,4,1,1)
  (same comment as for Benzo(a)pyrene)
- COD, Chemical Oxygen Demand [water, ground-, long-term]: 0.001071 kg; lognormal variance with pedigree 0.082198, pedigree (1,1,4,1,1)
  (same comment as for Thallium)
- Benzene, pentachloro- [air, urban air close to ground]: 2.5824e-10 kg; lognormal variance with pedigree 0.13397, pedigree (1,1,4,1,1)
  (same comment as for Benzo(a)pyrene)
- Calcium [air, urban air close to ground]: 3.7083e-7 kg; lognormal variance with pedigree 0.17783, pedigree (1,1,4,1,1)
  (same comment as for Carbon dioxide, non-fossil)
- Water [air, urban air close to ground]: 0.000207139 m3; lognormal variance with pedigree 2.1003, pedigree (1,1,4,1,1)
  Water vapour from waste humidity, hydrogen oxidation and part of the process water.
  Uncertainty: Uncertainty calculated from uncertainty in waste composition, process water input and the uncertainty of fraction to air.
- BOD5, Biological Oxygen Demand [water, ground-, long-term]: 0.00035033 kg; lognormal variance with pedigree 0.082198, pedigree (1,1,4,1,1)
  (same comment as for Thallium)
- Aluminium [air, urban air close to ground]: 1.8586e-12 kg; lognormal variance with pedigree 0.55141, pedigree (1,1,4,1,1)
  (same comment as for Carbon dioxide, non-fossil)
- Sulfate [water, ground-, long-term]: 0.0087251 kg; lognormal variance with pedigree 0.51429, pedigree (1,1,4,1,1)
  (same comment as for Thallium)
- Potassium [air, urban air close to ground]: 1.1634e-7 kg; lognormal variance with pedigree 1.171, pedigree (1,1,4,1,1)
  (same comment as for Carbon dioxide, non-fossil)
- DOC, Dissolved Organic Carbon [water, ground-, long-term]: 0.0004238 kg; lognormal variance with pedigree 0.082198, pedigree (1,1,4,1,1)
  (same comment as for Thallium)
- Magnesium [air, urban air close to ground]: 7.5016e-8 kg; lognormal variance with pedigree 1.0387, pedigree (1,1,4,1,1)
  (same comment as for Carbon dioxide, non-fossil)
- Chromium VI [water, ground-, long-term]: 1.0308e-7 kg; lognormal variance with pedigree 4.5012, pedigree (1,1,4,1,1)
  (same comment as for Thallium)
- Nitrate [water, ground-, long-term]: 1.2744e-5 kg; lognormal variance with pedigree 0.8094, pedigree (1,1,4,1,1)
  (same comment as for Thallium)
- TOC, Total Organic Carbon [water, surface water]: 4.7923e-5 kg; lognormal variance with pedigree 0.086397, pedigree (1,1,4,1,1)
  (same comment as for Nitrate)
- Phosphate [water, ground-, long-term]: 9.5333e-6 kg; lognormal variance with pedigree 5.5058, pedigree (1,1,4,1,1)
  (same comment as for Thallium)
- Sodium [air, urban air close to ground]: 4.1591e-8 kg; lognormal variance with pedigree 0.58683, pedigree (1,1,4,1,1)
  (same comment as for Carbon dioxide, non-fossil)
- Boron [water, ground-, long-term]: 6.2749e-7 kg; lognormal variance with pedigree 1.5168, pedigree (1,1,4,1,1)
  (same comment as for Thallium)
- BOD5, Biological Oxygen Demand [water, surface water]: 0.00010752 kg; lognormal variance with pedigree 0.089317, pedigree (1,1,4,1,1)
  (same comment as for Nitrate)
- Antimony [water, ground-, long-term]: 8.187e-9 kg; lognormal variance with pedigree 2.8623, pedigree (1,1,4,1,1)
  (same comment as for Thallium)
- Chloride [water, ground-, long-term]: 1.5008e-5 kg; lognormal variance with pedigree 0.92836, pedigree (1,1,4,1,1)
  (same comment as for Thallium)
- Silicon [water, ground-, long-term]: 0.00022912 kg; lognormal variance with pedigree 5.9292, pedigree (1,1,4,1,1)
  (same comment as for Thallium)
- COD, Chemical Oxygen Demand [water, surface water]: 0.00010987 kg; lognormal variance with pedigree 0.085997, pedigree (1,1,4,1,1)
  (same comment as for Nitrate)
- Potassium, ion [water, ground-, long-term]: 1.6897e-5 kg; lognormal variance with pedigree 0.81068, pedigree (1,1,4,1,1)
  (same comment as for Thallium)
- Fluoride [water, ground-, long-term]: 5.0694e-6 kg; lognormal variance with pedigree 0.85506, pedigree (1,1,4,1,1)
  (same comment as for Thallium)
- Phenol, pentachloro- [air, urban air close to ground]: 2.1286e-11 kg; lognormal variance with pedigree 0.13397, pedigree (1,1,4,1,1)
  (same comment as for Benzo(a)pyrene)
- DOC, Dissolved Organic Carbon [water, surface water]: 4.7923e-5 kg; lognormal variance with pedigree 0.086397, pedigree (1,1,4,1,1)
  (same comment as for Nitrate)
- Water [water, surface water]: 0 m3
  Process water released to surface water.
- Arsenic, ion [water, ground-, long-term]: 2.2626e-6 kg; lognormal variance with pedigree 1.4676, pedigree (1,1,4,1,1)
  (same comment as for Thallium)
- Sulfate [water, surface water]: 0.00088315 kg; lognormal variance with pedigree 0.63456, pedigree (1,1,4,1,1)
  (same comment as for Nitrate)
- Benzene [air, urban air close to ground]: 4.8878e-8 kg; lognormal variance with pedigree 0.13397, pedigree (1,1,4,1,1)
  (same comment as for Benzo(a)pyrene)
- Cadmium, ion [water, ground-, long-term]: 3.9977e-7 kg; lognormal variance with pedigree 1.747, pedigree (1,1,4,1,1)
  (same comment as for Thallium)

## Extrapolations
This dataset has been extrapolated from year 2012 to the year of the calculation (2021). The uncertainty has been adjusted accordingly.
