# treatment of waste polyethylene, sanitary landfill

Dataset: EcoSpold 2, unit process
Geography: CH
Time period: 1994-01-01 to 2021-12-31
Technology level: current
Classification: ISIC rev.4 ecoinvent: 3821:Treatment and disposal of non-hazardous waste
Classification: EcoSpold01Categories: waste management/sanitary landfill
Synonyms: PE
Tags: Treatment; ConvertedDataset
Scenario: Business-as-Usual
System model: Allocation, cut-off by classification
Generated by: Gabor Doka (obsolete)
Published in: Doka G. 2007
Database: ecoinvent
isCopyrightProtected: true
accessRestrictedTo: 1

## General comment
Inventoried waste contains 100% PE; .
waste composition (wet, in ppm): upper heating value 42.82 MJ/kg; lower heating value 42.47 MJ/kg; H2O 4000; O 38435; H 122490; C 822050; S 426.9; N 1297.2; P n.a.; B n.a.; Cl 1461.5; Br 9.5896; F 14.384; I n.a.; Ag n.a.; As 1.822; Ba 239.74; Cd 33.946; Co 1.6782; Cr 12.466; Cu 41.367; Hg 0.047948; Mn 30.047; Mo n.a.; Ni 0.95896; Pb 22.596; Sb 10.069; Se 2.0138; Sn 3.814; V 2205.6; Zn 342.01; Be 0.47948; Sc n.a.; Sr 84.868; Ti 958.96; Tl 0.38358; W n.a.; Si n.a.; Fe 1534.3; Ca 2589.2; Al 191.79; K n.a.; Mg 95.896; Na 1405.4;
Share of carbon in waste that is biogenic 0%.
Overall degradability of waste during 100 years: 1%.
[This dataset was already contained in the ecoinvent database version 2. It was not individually updated during the transfer to ecoinvent version 3. Life Cycle Impact Assessment results may still have changed, as they are affected by changes in the supply chain, i.e. in other datasets. This dataset was generated following the ecoinvent quality guidelines for version 2. It may have been subject to central changes described in the ecoinvent version 3 change report (http://www.ecoinvent.org/database/ecoinvent-version-3/reports-of-changes/), and the results of the central updates were reviewed extensively. The changes added e.g. consistent water flows and other information throughout the database. The documentation of this dataset can be found in the ecoinvent reports of version 2, which are still available via the ecoinvent website. The change report linked above covers all central changes that were made during the conversion process.]

## Included activities end
Waste-specific short-term emissions to air via landfill gas incineration and landfill leachate. Burdens from treatment of short-term leachate (0-100a) in wastewater treatment plant (including WWTP sludge disposal in municipal incinerator). Long-term emissions from landfill to groundwater (after base lining failure).

## Geography
Technology encountered in Switzerland in 2000. Landfill includes base seal, leachate collection system, treatment of leachate in municipal wastewater treatment plant.

## Technology
Swiss municipal sanitary landfill for biogenic or untreated municipal waste ('reactive organic landfill'). Landfill gas and leachate collection system. Recultivation and monitoring for 150 years after closure.

## Reference product
- waste polyethylene: -1 kg; By-product classification Waste; CPC 39270: Waste, parings and scrap of plastics; CAS 9002-88-4
  production volume 0 kg
    estimated proportion; source: ecoinvent v2; value to be replaced by value to be calculated from the demand for this treatment activity
  property price 0 EUR2005
    Waste products are assigned a price of zero as they are assumed to require further treatment.
  property carbon content, fossil 0.825301
    C content in 1 kg DM was calculated using data in Tab A.1, ecoinvent v2.2 report 13_I
  property heating value, net 42.47 MJ
    Value taken from the general comment of the treatment dataset.
  property carbon content 0.825301
    carbon content on a dry matter basis (reserved; not for manual entry)
  properties: wet mass 1 kg, dry mass 0.996 kg, carbon content, non-fossil 0, water content 0.00401606, water in wet mass 0.004 kg, carbon allocation 0.822 kg

## Inputs from technosphere
- heat, for reuse in municipal waste incineration only: 0.000124 MJ; name E_th_prod_MSWI; lognormal variance with pedigree 0.71, pedigree (1,1,5,1,1)
  burden from incineration of sludge from wastewater treatment of the short-term leachate (0-100a). uncertainty is calculated from uncertainties in waste composition and transfer coefficients in incinerator and uncertainty of waste decomposition and short-term leaching in sanitary landfill
- iron (III) chloride, without water, in 40% solution state: 3.07e-8 kg; lognormal variance with pedigree 0.87, pedigree (1,1,5,1,1)
  (same comment as for heat, for reuse in municipal waste incineration only)
  properties: wet mass 1 kg, dry mass 1 kg
- electricity, for reuse in municipal waste incineration only: 2.13e-5 kWh; name E_el_prod_MSWI; lognormal variance with pedigree 1.11, pedigree (1,1,5,1,1)
  (same comment as for heat, for reuse in municipal waste incineration only)
- waste plastic, mixture: -3.88e-5 kg; lognormal variance with pedigree 0.2106, pedigree (5,5,5,5,5)
  burden from wastewater treatment of the short-term leachate (0-100a). Uncertainty calculated from unertainty of the waste composition of this waste, uncertainty in waste decomposition and short-term leaching in sanitary landfill
  production volume 0 kg
    Calculated from the production volume of waste polyethylene, 0.4% water in proportion to the respective output amounts.
  properties: heating value, net 30.79 MJ, carbon content, fossil 0.747344, wet mass 1 kg, dry mass 0.847 kg, water content 0.180638
  note on heating value, net: Value taken from the general comment of the treatment dataset.
  note on carbon content, fossil: C content in 1 kg DM was calculated using data in Tab A.2, ecoinvent v2.2 report 13_I
- wastewater treatment facility, capacity 5E9l/year: 1.42e-11 unit; lognormal variance with pedigree 0.2106, pedigree (5,5,5,5,5)
  (same comment as for waste plastic, mixture)
- waste graphical paper: -3.88e-5 kg; lognormal variance with pedigree 0.2106, pedigree (5,5,5,5,5)
  (same comment as for waste plastic, mixture)
  production volume 0 kg
    (same comment as for waste plastic, mixture)
  properties: heating value, net 14.12 MJ, carbon content, non-fossil 0.454955, water content 0.126126, dry mass 0.888 kg, wet mass 1 kg
- chemical, organic: 9.14e-8 kg; lognormal variance with pedigree 1.75, pedigree (1,1,5,1,1)
  (same comment as for heat, for reuse in municipal waste incineration only)
  properties: heating value, net 19.03 MJ, wet mass 1 kg, dry mass 1 kg, carbon content, fossil 0.628
  note on carbon content, fossil: This dataset is an unweighted average of 20 organic substances (listed in Tab 88.1, ecoinvent v2.2 report 8, part II), being part of the top100 chemicals included in this database. The C-content has also been calculated as an unweighted average of the C content of the substances composing this dataset.
- sewer grid, 5E9l/year, 110 km: 5.45e-10 km; lognormal variance with pedigree 0.2106, pedigree (5,5,5,5,5)
  (same comment as for waste plastic, mixture)
- hydrochloric acid, without water, in 30% solution state: 1.06e-10 kg; lognormal variance with pedigree 0.83, pedigree (1,1,5,1,1)
  (same comment as for heat, for reuse in municipal waste incineration only)
  properties: wet mass 1 kg, dry mass 1 kg, heating value, net 3.32 MJ
- process-specific burdens, residual material landfill: 1.03e-6 kg; lognormal variance with pedigree 0.43, pedigree (1,1,5,1,1)
  burden from incineration of sludge from wastewater treatment of the short-term leachate (0-100a). uncertainty is calculated from uncertainties in waste composition and transfer coefficients in incinerator and uncertainty of waste decomposition and short-term leaching in sanitary landfill;activityLink introduced to establish a direct link to the corresponding regional supply of this product
- process-specific burdens, sanitary landfill: 1 kg; lognormal variance with pedigree 0.04, pedigree (1,1,5,1,1)
  demands per kilogram waste. uncertainty is heeded in the module;activityLink introduced to establish a direct link to the corresponding regional supply of this product
- waste cement, hydrated: -1.03e-6 kg; lognormal variance with pedigree 0.43, pedigree (1,1,5,1,1)
  (same comment as for heat, for reuse in municipal waste incineration only)
  production volume 0 kg
    (same comment as for waste plastic, mixture)
  properties: wet mass 1 kg, dry mass 1 kg
- chromium oxide, flakes: 2.66e-11 kg; lognormal variance with pedigree 1.11, pedigree (5,5,5,5,5)
  burden from incineration of sludge from wastewater treatment of the short-term leachate (0-100a). Proxy for vanadium pentoxide V2O5 in SCR catalyst, uncertainty calculated from uncertainty in average DeNOx input, uncertainty in the share of thermal NOx, uncertainty of nitrogen content in average municipal waste and the unertainty in nitrogen content in *this* waste and uncertainty of waste decomposition and short-term leaching in sanitary landfill
  properties: dry mass 1 kg, wet mass 1 kg
- chemical, inorganic: 1.76e-10 kg; lognormal variance with pedigree 0.83, pedigree (1,1,5,1,1)
  (same comment as for heat, for reuse in municipal waste incineration only)
  properties: dry mass 1 kg, wet mass 1 kg, carbon content, fossil 0.003
  note on carbon content, fossil: This dataset is an unweighted average of 20 inorganic substances (listed in Tab 88.1, ecoinvent v2.2 report 8, part II), being part of the top100 chemicals included in this database. The C-content has also been calculated as an unweighted average of the C content of the substances composing this dataset.
- heat, district or industrial, natural gas: 5.382e-5 MJ; lognormal variance with pedigree 0.22, pedigree (5,5,5,5,5)
  (same comment as for heat, for reuse in municipal waste incineration only)
  properties: heating value, net 1 MJ
- ammonia, anhydrous, liquid: 4.56e-8 kg; lognormal variance with pedigree 0.74, pedigree (1,1,5,1,1)
  (same comment as for heat, for reuse in municipal waste incineration only)
  properties: dry mass 1 kg, wet mass 1 kg
- slag landfill: 1.08e-14 unit; lognormal variance with pedigree 0.54, pedigree (1,1,5,1,1)
  (same comment as for heat, for reuse in municipal waste incineration only)
- residual material landfill: 2.15e-15 unit; lognormal variance with pedigree 0.43, pedigree (1,1,5,1,1)
  (same comment as for heat, for reuse in municipal waste incineration only)
- heat, central or small-scale, other than natural gas: 3.619e-5 MJ; lognormal variance with pedigree 0.22, pedigree (5,5,5,5,5)
  (same comment as for waste plastic, mixture)
  properties: heating value, net 1 MJ
- process-specific burdens, slag landfill: 6.09e-6 kg; lognormal variance with pedigree 0.54, pedigree (1,1,5,1,1)
  (same comment as for process-specific burdens, residual material landfill)
- cement, unspecified: 4.13e-7 kg; lognormal variance with pedigree 0.43, pedigree (1,1,5,1,1)
  (same comment as for heat, for reuse in municipal waste incineration only)
  properties: wet mass 1 kg, dry mass 1 kg
- electricity, low voltage: 0.000367 kWh; lognormal variance with pedigree 0.56, pedigree (5,5,5,5,5)
  (same comment as for waste plastic, mixture)
- sanitary landfill facility: 5.56e-10 unit; lognormal variance with pedigree 0.04, pedigree (1,1,5,1,1)
  demands per kilogram waste. uncertainty is heeded in the module
  This exchange has an activity link directly to the producing activity because the product is primarily consumed in the same geographical area where it is produced.
- municipal waste incineration facility: 3.7e-14 unit; lognormal variance with pedigree 0.71, pedigree (1,1,5,1,1)
  Burden from incineration of sludge from wastewater treatment of the short-term leachate (0-100a).
  Burden from incineration of sludge from wastewater treatment of the short-term leachate (0-100a).
- quicklime, milled, packed: 4.11e-10 kg; lognormal variance with pedigree 0.66, pedigree (1,1,5,1,1)
  (same comment as for heat, for reuse in municipal waste incineration only)
  properties: water content 0.010101, wet mass 1 kg, dry mass 0.99 kg
- sodium hydroxide, without water, in 50% solution state: 2.26e-9 kg; lognormal variance with pedigree 0.66, pedigree (1,1,5,1,1)
  (same comment as for heat, for reuse in municipal waste incineration only)
  properties: wet mass 1 kg, dry mass 1 kg, heating value, net 3.03 MJ
- process-specific burdens, municipal waste incineration: 0.000148 kg; lognormal variance with pedigree 0.71, pedigree (1,1,5,1,1)
  Burden from incineration of sludge from wastewater treatment of the short-term leachate (0-100a).
  Burden from incineration of sludge from wastewater treatment of the short-term leachate (0-100a).;activityLink introduced to establish a direct link to the corresponding regional supply of this product
- titanium dioxide: 1.3e-9 kg; lognormal variance with pedigree 1, pedigree (1,1,5,1,1)
  (same comment as for heat, for reuse in municipal waste incineration only)
  properties: wet mass 1 kg, dry mass 1 kg

## Emissions to nature
- Beryllium [water, ground-, long-term]: 4.79e-7 kg; lognormal variance with pedigree 1.7, pedigree (1,1,5,1,1)
  Emissions from long-term leachate (>100a) directly from MSW landfill and indirectly via incineration of treatement sludge from leachate treatement. Uncertainty calculated depending on waste input and uncertainty of long-term transfer coefficents in landfill.
- TOC, Total Organic Carbon [water, surface water]: 3.82e-5 kg; lognormal variance with pedigree 0.86, pedigree (1,1,5,1,1)
  Emissions from short-term leachate treatment and incineration of resulting sludge. Uncertainty calculated depending on waste input and uncertainty of transfer coefficents in landfill, wastewater treatment and incineration model.
- Tin [air, non-urban air or from high stacks]: 5.62e-14 kg; lognormal variance with pedigree 3.52, pedigree (1,1,5,1,1)
  burden from direct release or incineration of landfill biogas. Uncertainty calculated from unertainty of the waste composition of this waste, uncertainty in waste decomposition and short-term leaching in sanitary landfill
- Chromium, ion [water, surface water]: 2.23e-12 kg; lognormal variance with pedigree 2.25, pedigree (1,1,5,1,1)
  (same comment as for TOC, Total Organic Carbon)
- Nitrite [water, ground-, long-term]: 2.81e-5 kg; lognormal variance with pedigree 0.66, pedigree (1,1,5,1,1)
  (same comment as for Beryllium)
- Cadmium [air, urban air close to ground]: 1.63e-12 kg; lognormal variance with pedigree 1.78, pedigree (1,1,5,1,1)
  (same comment as for TOC, Total Organic Carbon)
- Nickel, ion [water, surface water]: 3.38e-10 kg; lognormal variance with pedigree 2.34, pedigree (1,1,5,1,1)
  (same comment as for TOC, Total Organic Carbon)
- Hydrogen sulfide [water, ground-, long-term]: 3.1e-5 kg; lognormal variance with pedigree 0.81, pedigree (1,1,5,1,1)
  (same comment as for Beryllium)
- NMVOC, non-methane volatile organic compounds, unspecified origin [air, urban air close to ground]: 6.11e-9 kg; lognormal variance with pedigree 1.03, pedigree (1,1,5,1,1)
  (same comment as for TOC, Total Organic Carbon)
- Cobalt [air, urban air close to ground]: 0 kg; pedigree (1,1,1,1,1)
  (same comment as for TOC, Total Organic Carbon)
- Arsenic, ion [water, ground-, long-term]: 1.82e-6 kg; lognormal variance with pedigree 1.53, pedigree (1,1,5,1,1)
  (same comment as for Beryllium)
- Calcium [air, non-urban air or from high stacks]: 8.43e-10 kg; lognormal variance with pedigree 2.28, pedigree (1,1,5,1,1)
  (same comment as for Tin)
- Hydrogen fluoride [air, non-urban air or from high stacks]: 5.73e-8 kg; lognormal variance with pedigree 1.74, pedigree (1,1,5,1,1)
  (same comment as for Tin)
- Nitrate [water, surface water]: 5.72e-5 kg; lognormal variance with pedigree 0.61, pedigree (1,1,5,1,1)
  (same comment as for TOC, Total Organic Carbon)
- Mercury [air, non-urban air or from high stacks]: 1.31e-11 kg; lognormal variance with pedigree 2.79, pedigree (1,1,5,1,1)
  (same comment as for Tin)
- Strontium [air, urban air close to ground]: 2.43e-12 kg; lognormal variance with pedigree 1.8, pedigree (1,1,5,1,1)
  (same comment as for TOC, Total Organic Carbon)
- Tin, ion [water, ground-, long-term]: 3.81e-6 kg; lognormal variance with pedigree 1.43, pedigree (1,1,5,1,1)
  (same comment as for Beryllium)
- Beryllium [air, urban air close to ground]: 1.37e-13 kg; lognormal variance with pedigree 2.46, pedigree (1,1,5,1,1)
  (same comment as for TOC, Total Organic Carbon)
- Zinc, ion [water, ground-, long-term]: 0.000282 kg; lognormal variance with pedigree 0.85, pedigree (1,1,5,1,1)
  (same comment as for Beryllium)
- Vanadium [air, non-urban air or from high stacks]: 5.81e-10 kg; lognormal variance with pedigree 2.33, pedigree (1,1,5,1,1)
  (same comment as for Tin)
- Mercury [water, surface water]: 1.04e-11 kg; lognormal variance with pedigree 2.66, pedigree (1,1,5,1,1)
  (same comment as for TOC, Total Organic Carbon)
- TOC, Total Organic Carbon [water, ground-, long-term]: 0.209 kg; lognormal variance with pedigree 0.51, pedigree (1,1,5,1,1)
  (same comment as for Beryllium)
- Manganese [water, ground-, long-term]: 2.92e-5 kg; lognormal variance with pedigree 1.15, pedigree (1,1,5,1,1)
  (same comment as for Beryllium)
- Bromine [water, ground-, long-term]: 9.34e-6 kg; lognormal variance with pedigree 1.31, pedigree (1,1,5,1,1)
  (same comment as for Beryllium)
- Titanium, ion [water, ground-, long-term]: 0.000959 kg; lognormal variance with pedigree 0.7, pedigree (1,1,5,1,1)
  (same comment as for Beryllium)
- Iron, ion [water, surface water]: 1.07e-7 kg; lognormal variance with pedigree 1.55, pedigree (1,1,5,1,1)
  (same comment as for TOC, Total Organic Carbon)
- Manganese [air, non-urban air or from high stacks]: 8.6e-11 kg; lognormal variance with pedigree 2.58, pedigree (1,1,5,1,1)
  (same comment as for Tin)
- Carbon dioxide, fossil [air, urban air close to ground]: 0.000687 kg; lognormal variance with pedigree 0.86, pedigree (1,1,5,1,1)
  (same comment as for TOC, Total Organic Carbon)
- Nickel, ion [water, ground-, long-term]: 9.59e-7 kg; lognormal variance with pedigree 1.61, pedigree (1,1,5,1,1)
  (same comment as for Beryllium)
- Aluminium [air, urban air close to ground]: 1.41e-10 kg; lognormal variance with pedigree 1.69, pedigree (1,1,5,1,1)
  (same comment as for TOC, Total Organic Carbon)
- Thallium [air, non-urban air or from high stacks]: 5.58e-14 kg; lognormal variance with pedigree 3.54, pedigree (1,1,5,1,1)
  (same comment as for Tin)
- COD, Chemical Oxygen Demand [water, surface water]: 0.000151 kg; lognormal variance with pedigree 0.86, pedigree (1,1,5,1,1)
  (same comment as for TOC, Total Organic Carbon)
- Titanium, ion [water, surface water]: 2.43e-7 kg; lognormal variance with pedigree 1.44, pedigree (1,1,5,1,1)
  (same comment as for TOC, Total Organic Carbon)
- BOD5, Biological Oxygen Demand [water, ground-, long-term]: 0.054 kg; lognormal variance with pedigree 0.51, pedigree (1,1,5,1,1)
  (same comment as for Beryllium)
- Copper [air, non-urban air or from high stacks]: 5.79e-13 kg; lognormal variance with pedigree 3.22, pedigree (1,1,5,1,1)
  (same comment as for Tin)
- Nitrogen [water, surface water]: 4.25e-7 kg; lognormal variance with pedigree 0.62, pedigree (1,1,5,1,1)
  (same comment as for TOC, Total Organic Carbon)
- Sulfate [water, surface water]: 4.86e-6 kg; lognormal variance with pedigree 1.29, pedigree (1,1,5,1,1)
  Emissions from short-term leachate treatment. Uncertainty calculated depending on waste input and uncertainty of transfer coefficents in landfill and wastewater treatment.
- Vanadium, ion [water, ground-, long-term]: 0.000642 kg; lognormal variance with pedigree 0.98, pedigree (1,1,5,1,1)
  (same comment as for Beryllium)
- Methane, fossil [air, non-urban air or from high stacks]: 0.00316 kg; lognormal variance with pedigree 0.45, pedigree (1,1,5,1,1)
  (same comment as for Tin)
- Antimony [air, urban air close to ground]: 5.23e-13 kg; lognormal variance with pedigree 2.6, pedigree (1,1,5,1,1)
  (same comment as for TOC, Total Organic Carbon)
- Selenium [air, non-urban air or from high stacks]: 5.31e-13 kg; lognormal variance with pedigree 3.25, pedigree (1,1,5,1,1)
  (same comment as for Tin)
- Dinitrogen monoxide [air, urban air close to ground]: 7.97e-8 kg; lognormal variance with pedigree 0.58, pedigree (1,1,5,1,1)
  (same comment as for TOC, Total Organic Carbon)
- Mercury [air, urban air close to ground]: 0 kg; pedigree (1,1,1,1,1)
  (same comment as for TOC, Total Organic Carbon)
- Selenium [air, urban air close to ground]: 0 kg; pedigree (1,1,1,1,1)
  (same comment as for TOC, Total Organic Carbon)
- Lead [water, ground-, long-term]: 2.26e-5 kg; lognormal variance with pedigree 1.2, pedigree (1,1,5,1,1)
  (same comment as for Beryllium)
- Mercury [water, ground-, long-term]: 4.79e-8 kg; lognormal variance with pedigree 1.96, pedigree (1,1,5,1,1)
  (same comment as for Beryllium)
- Lead [water, surface water]: 1.46e-10 kg; lognormal variance with pedigree 2.23, pedigree (1,1,5,1,1)
  (same comment as for TOC, Total Organic Carbon)
- Sulfur dioxide [air, non-urban air or from high stacks]: 5.57e-7 kg; lognormal variance with pedigree 1.52, pedigree (1,1,5,1,1)
  (same comment as for Tin)
- Barium [water, surface water]: 1.65e-7 kg; lognormal variance with pedigree 1.26, pedigree (1,1,5,1,1)
  (same comment as for TOC, Total Organic Carbon)
- Thallium [water, ground-, long-term]: 3.83e-7 kg; lognormal variance with pedigree 1.73, pedigree (1,1,5,1,1)
  (same comment as for Beryllium)
- Selenium [water, surface water]: 1.42e-9 kg; lognormal variance with pedigree 2.17, pedigree (1,1,5,1,1)
  (same comment as for TOC, Total Organic Carbon)
- Calcium, ion [water, ground-, long-term]: 0.00259 kg; lognormal variance with pedigree 0.58, pedigree (1,1,5,1,1)
  (same comment as for Beryllium)
- Vanadium, ion [water, surface water]: 1.18e-6 kg; lognormal variance with pedigree 1.24, pedigree (1,1,5,1,1)
  (same comment as for TOC, Total Organic Carbon)
- Bromine [water, surface water]: 2.41e-7 kg; lognormal variance with pedigree 1.57, pedigree (1,1,5,1,1)
  (same comment as for Sulfate)
- Barium [air, urban air close to ground]: 2.58e-9 kg; lognormal variance with pedigree 1.27, pedigree (1,1,5,1,1)
  (same comment as for TOC, Total Organic Carbon)
- Magnesium [water, ground-, long-term]: 9.54e-5 kg; lognormal variance with pedigree 1.01, pedigree (1,1,5,1,1)
  (same comment as for Beryllium)
- Magnesium [water, surface water]: 5.34e-7 kg; lognormal variance with pedigree 1.43, pedigree (1,1,5,1,1)
  (same comment as for TOC, Total Organic Carbon)
- Cobalt [air, non-urban air or from high stacks]: 1.35e-12 kg; lognormal variance with pedigree 3.13, pedigree (1,1,5,1,1)
  (same comment as for Tin)
- Strontium [air, non-urban air or from high stacks]: 1.23e-11 kg; lognormal variance with pedigree 2.83, pedigree (1,1,5,1,1)
  (same comment as for Tin)
- Tin, ion [water, surface water]: 9.4e-11 kg; lognormal variance with pedigree 2.46, pedigree (1,1,5,1,1)
  (same comment as for TOC, Total Organic Carbon)
- Tin [air, urban air close to ground]: 1.73e-13 kg; lognormal variance with pedigree 2.5, pedigree (1,1,5,1,1)
  (same comment as for TOC, Total Organic Carbon)
- Sodium [air, non-urban air or from high stacks]: 1.45e-8 kg; lognormal variance with pedigree 1.91, pedigree (1,1,5,1,1)
  (same comment as for Tin)
- Ammonia [air, urban air close to ground]: 2.89e-8 kg; lognormal variance with pedigree 0.65, pedigree (1,1,5,1,1)
  (same comment as for TOC, Total Organic Carbon)
- Nickel [air, non-urban air or from high stacks]: 1.39e-13 kg; lognormal variance with pedigree 3.42, pedigree (1,1,5,1,1)
  (same comment as for Tin)
- Selenium [water, ground-, long-term]: 5.68e-7 kg; lognormal variance with pedigree 1.92, pedigree (1,1,5,1,1)
  (same comment as for Beryllium)
- Hydrogen chloride [air, non-urban air or from high stacks]: 5.31e-7 kg; lognormal variance with pedigree 1.43, pedigree (1,1,5,1,1)
  (same comment as for Tin)
- Chromium [air, non-urban air or from high stacks]: 3.55e-13 kg; lognormal variance with pedigree 3.29, pedigree (1,1,5,1,1)
  (same comment as for Tin)
- Iron, ion [water, ground-, long-term]: 0.000108 kg; lognormal variance with pedigree 2.41, pedigree (1,1,5,1,1)
  (same comment as for Beryllium)
- Fluoride [water, ground-, long-term]: 1.43e-5 kg; lognormal variance with pedigree 1.26, pedigree (1,1,5,1,1)
  (same comment as for Beryllium)
- Thallium [water, surface water]: 1.13e-10 kg; lognormal variance with pedigree 2.46, pedigree (1,1,5,1,1)
  (same comment as for TOC, Total Organic Carbon)
- Beryllium [water, surface water]: 1.42e-10 kg; lognormal variance with pedigree 2.43, pedigree (1,1,5,1,1)
  (same comment as for TOC, Total Organic Carbon)
- Nitrogen, organic bound [water, ground-, long-term]: 0.000843 kg; lognormal variance with pedigree 0.66, pedigree (1,1,5,1,1)
  (same comment as for Beryllium)
- Manganese [air, urban air close to ground]: 0 kg; pedigree (1,1,1,1,1)
  (same comment as for TOC, Total Organic Carbon)
- Strontium [water, ground-, long-term]: 8.48e-5 kg; lognormal variance with pedigree 1.02, pedigree (1,1,5,1,1)
  (same comment as for Beryllium)
- Cyanide [air, urban air close to ground]: 8.13e-10 kg; lognormal variance with pedigree 0.76, pedigree (1,1,5,1,1)
  (same comment as for TOC, Total Organic Carbon)
- Ammonium, ion [water, surface water]: 1.57e-5 kg; lognormal variance with pedigree 0.68, pedigree (1,1,5,1,1)
  (same comment as for TOC, Total Organic Carbon)
- Nitrogen oxides [air, non-urban air or from high stacks]: 8.36e-9 kg; lognormal variance with pedigree 1.3, pedigree (1,1,5,1,1)
  (same comment as for Tin)
- Chromium VI [water, surface water]: 7.44e-10 kg; lognormal variance with pedigree 2.22, pedigree (1,1,5,1,1)
  (same comment as for TOC, Total Organic Carbon)
- Cadmium, ion [water, surface water]: 3.03e-8 kg; lognormal variance with pedigree 1.72, pedigree (1,1,5,1,1)
  (same comment as for TOC, Total Organic Carbon)
- Nickel [air, urban air close to ground]: 0 kg; pedigree (1,1,1,1,1)
  (same comment as for TOC, Total Organic Carbon)
- Carbon dioxide, fossil [air, non-urban air or from high stacks]: 0.0206 kg; lognormal variance with pedigree 0.41, pedigree (1,1,5,1,1)
  (same comment as for Tin)
- Titanium [air, urban air close to ground]: 2.36e-10 kg; lognormal variance with pedigree 1.49, pedigree (1,1,5,1,1)
  (same comment as for TOC, Total Organic Carbon)
- Copper, ion [water, surface water]: 5.25e-10 kg; lognormal variance with pedigree 2.17, pedigree (1,1,5,1,1)
  (same comment as for TOC, Total Organic Carbon)
- Copper, ion [water, ground-, long-term]: 4.14e-5 kg; lognormal variance with pedigree 1.12, pedigree (1,1,5,1,1)
  (same comment as for Beryllium)
- Lead [air, non-urban air or from high stacks]: 4.44e-13 kg; lognormal variance with pedigree 3.26, pedigree (1,1,5,1,1)
  (same comment as for Tin)
- Strontium [water, surface water]: 2.51e-8 kg; lognormal variance with pedigree 1.75, pedigree (1,1,5,1,1)
  (same comment as for TOC, Total Organic Carbon)
- Nitrite [water, surface water]: 3.3e-7 kg; lognormal variance with pedigree 0.93, pedigree (1,1,5,1,1)
  (same comment as for TOC, Total Organic Carbon)
- Sodium, ion [water, ground-, long-term]: 0.00135 kg; lognormal variance with pedigree 0.65, pedigree (1,1,5,1,1)
  (same comment as for Beryllium)
- Chromium [air, urban air close to ground]: 0 kg; pedigree (1,1,1,1,1)
  (same comment as for TOC, Total Organic Carbon)
- Thallium [air, urban air close to ground]: 1.1e-13 kg; lognormal variance with pedigree 2.5, pedigree (1,1,5,1,1)
  (same comment as for TOC, Total Organic Carbon)
- Aluminium [water, ground-, long-term]: 0.000192 kg; lognormal variance with pedigree 0.91, pedigree (1,1,5,1,1)
  (same comment as for Beryllium)
- Arsenic, ion [water, surface water]: 2.88e-9 kg; lognormal variance with pedigree 2.11, pedigree (1,1,5,1,1)
  (same comment as for TOC, Total Organic Carbon)
- Magnesium [air, urban air close to ground]: 7.99e-11 kg; lognormal variance with pedigree 1.47, pedigree (1,1,5,1,1)
  (same comment as for TOC, Total Organic Carbon)
- Sulfate [water, ground-, long-term]: 0.00119 kg; lognormal variance with pedigree 0.81, pedigree (1,1,5,1,1)
  (same comment as for Beryllium)
- Aluminium [water, surface water]: 5.76e-9 kg; lognormal variance with pedigree 1.66, pedigree (1,1,5,1,1)
  (same comment as for TOC, Total Organic Carbon)
- Antimony [water, ground-, long-term]: 1.01e-6 kg; lognormal variance with pedigree 2.62, pedigree (1,1,5,1,1)
  (same comment as for Beryllium)
- Nitrate [water, ground-, long-term]: 5.43e-5 kg; lognormal variance with pedigree 0.66, pedigree (1,1,5,1,1)
  (same comment as for Beryllium)
- Cadmium, ion [water, ground-, long-term]: 3.39e-5 kg; lognormal variance with pedigree 1.15, pedigree (1,1,5,1,1)
  (same comment as for Beryllium)
- DOC, Dissolved Organic Carbon [water, surface water]: 3.67e-5 kg; lognormal variance with pedigree 0.86, pedigree (1,1,5,1,1)
  (same comment as for TOC, Total Organic Carbon)
- Cadmium [air, non-urban air or from high stacks]: 3.98e-10 kg; lognormal variance with pedigree 2.39, pedigree (1,1,5,1,1)
  (same comment as for Tin)
- Antimony [air, non-urban air or from high stacks]: 2.65e-12 kg; lognormal variance with pedigree 3.04, pedigree (1,1,5,1,1)
  (same comment as for Tin)
- Zinc [air, urban air close to ground]: 1.83e-12 kg; lognormal variance with pedigree 1.65, pedigree (1,1,5,1,1)
  (same comment as for TOC, Total Organic Carbon)
- Cobalt [water, surface water]: 2.74e-9 kg; lognormal variance with pedigree 2.05, pedigree (1,1,5,1,1)
  (same comment as for TOC, Total Organic Carbon)
- Calcium [air, urban air close to ground]: 5.51e-10 kg; lognormal variance with pedigree 1.23, pedigree (1,1,5,1,1)
  (same comment as for TOC, Total Organic Carbon)
- Cobalt [water, ground-, long-term]: 1.68e-6 kg; lognormal variance with pedigree 1.54, pedigree (1,1,5,1,1)
  (same comment as for Beryllium)
- Arsenic [air, urban air close to ground]: 9.21e-13 kg; lognormal variance with pedigree 2.15, pedigree (1,1,5,1,1)
  (same comment as for TOC, Total Organic Carbon)
- Arsenic [air, non-urban air or from high stacks]: 4.59e-11 kg; lognormal variance with pedigree 2.67, pedigree (1,1,5,1,1)
  (same comment as for Tin)
- Copper [air, urban air close to ground]: 1.11e-14 kg; lognormal variance with pedigree 2.25, pedigree (1,1,5,1,1)
  (same comment as for TOC, Total Organic Carbon)
- Zinc [air, non-urban air or from high stacks]: 3.6e-11 kg; lognormal variance with pedigree 2.69, pedigree (1,1,5,1,1)
  (same comment as for Tin)
- Lead [air, urban air close to ground]: 4.4e-14 kg; lognormal variance with pedigree 2.28, pedigree (1,1,5,1,1)
  (same comment as for TOC, Total Organic Carbon)
- Barium [water, ground-, long-term]: 0.000239 kg; lognormal variance with pedigree 0.87, pedigree (1,1,5,1,1)
  (same comment as for Beryllium)
- Nitrogen oxides [air, urban air close to ground]: 2.83e-7 kg; lognormal variance with pedigree 0.64, pedigree (1,1,5,1,1)
  (same comment as for TOC, Total Organic Carbon)
- Fluoride [water, surface water]: 1.06e-8 kg; lognormal variance with pedigree 1.95, pedigree (1,1,5,1,1)
  (same comment as for Sulfate)
- Magnesium [air, non-urban air or from high stacks]: 1.48e-10 kg; lognormal variance with pedigree 2.51, pedigree (1,1,5,1,1)
  (same comment as for Tin)
- Carbon monoxide, fossil [air, urban air close to ground]: 4.43e-7 kg; lognormal variance with pedigree 0.92, pedigree (1,1,5,1,1)
  (same comment as for TOC, Total Organic Carbon)
- Iron [air, urban air close to ground]: 3.47e-12 kg; lognormal variance with pedigree 1.61, pedigree (1,1,5,1,1)
  (same comment as for TOC, Total Organic Carbon)
- Bromine [air, non-urban air or from high stacks]: 3.39e-9 kg; lognormal variance with pedigree 2.1, pedigree (1,1,5,1,1)
  (same comment as for Tin)
- Titanium [air, non-urban air or from high stacks]: 1.2e-10 kg; lognormal variance with pedigree 2.52, pedigree (1,1,5,1,1)
  (same comment as for Tin)
- Ammonium, ion [water, ground-, long-term]: 0.000516 kg; lognormal variance with pedigree 0.66, pedigree (1,1,5,1,1)
  (same comment as for Beryllium)
- Sodium, ion [water, surface water]: 5.82e-5 kg; lognormal variance with pedigree 0.86, pedigree (1,1,5,1,1)
  (same comment as for Sulfate)
- Carbon monoxide, fossil [air, non-urban air or from high stacks]: 1.17e-6 kg; lognormal variance with pedigree 1.06, pedigree (1,1,5,1,1)
  (same comment as for Tin)
- Vanadium [air, urban air close to ground]: 1.15e-10 kg; lognormal variance with pedigree 1.29, pedigree (1,1,5,1,1)
  (same comment as for TOC, Total Organic Carbon)
- Manganese [water, surface water]: 1.75e-7 kg; lognormal variance with pedigree 1.51, pedigree (1,1,5,1,1)
  (same comment as for TOC, Total Organic Carbon)
- Beryllium [air, non-urban air or from high stacks]: 6.97e-14 kg; lognormal variance with pedigree 3.51, pedigree (1,1,5,1,1)
  (same comment as for Tin)
- Methane, fossil [air, urban air close to ground]: 1.35e-6 kg; lognormal variance with pedigree 0.91, pedigree (1,1,5,1,1)
  (same comment as for TOC, Total Organic Carbon)
- Zinc, ion [water, surface water]: 5.01e-8 kg; lognormal variance with pedigree 1.59, pedigree (1,1,5,1,1)
  (same comment as for TOC, Total Organic Carbon)
- Barium [air, non-urban air or from high stacks]: 6.86e-10 kg; lognormal variance with pedigree 2.31, pedigree (1,1,5,1,1)
  (same comment as for Tin)
- BOD5, Biological Oxygen Demand [water, surface water]: 4.75e-5 kg; lognormal variance with pedigree 0.86, pedigree (1,1,5,1,1)
  (same comment as for TOC, Total Organic Carbon)
- Antimony [water, surface water]: 7.2e-9 kg; lognormal variance with pedigree 1.95, pedigree (1,1,5,1,1)
  (same comment as for TOC, Total Organic Carbon)
- Chromium VI [water, ground-, long-term]: 5.65e-8 kg; lognormal variance with pedigree 8.56, pedigree (1,1,5,1,1)
  (same comment as for Beryllium)
- NMVOC, non-methane volatile organic compounds, unspecified origin [air, non-urban air or from high stacks]: 2.21e-8 kg; lognormal variance with pedigree 0.45, pedigree (1,1,5,1,1)
  (same comment as for Tin)
- Particulates, < 2.5 um [air, non-urban air or from high stacks]: 3.92e-7 kg; lognormal variance with pedigree 0.71, pedigree (1,1,5,1,1)
  (same comment as for Tin)
- Calcium, ion [water, surface water]: 3.04e-6 kg; lognormal variance with pedigree 1.19, pedigree (1,1,5,1,1)
  (same comment as for TOC, Total Organic Carbon)
- Iron [air, non-urban air or from high stacks]: 5.27e-11 kg; lognormal variance with pedigree 2.63, pedigree (1,1,5,1,1)
  (same comment as for Tin)
- DOC, Dissolved Organic Carbon [water, ground-, long-term]: 0.209 kg; lognormal variance with pedigree 0.51, pedigree (1,1,5,1,1)
  (same comment as for Beryllium)
- Aluminium [air, non-urban air or from high stacks]: 2.4e-11 kg; lognormal variance with pedigree 2.74, pedigree (1,1,5,1,1)
  (same comment as for Tin)
- Chloride [water, surface water]: 3.68e-5 kg; lognormal variance with pedigree 0.91, pedigree (1,1,5,1,1)
  (same comment as for Sulfate)
- COD, Chemical Oxygen Demand [water, ground-, long-term]: 0.228 kg; lognormal variance with pedigree 0.51, pedigree (1,1,5,1,1)
  (same comment as for Beryllium)
- Chloride [water, ground-, long-term]: 0.00142 kg; lognormal variance with pedigree 0.65, pedigree (1,1,5,1,1)
  (same comment as for Beryllium)

## Sampling procedure
Landfill model based on observed leachate concentrations in literature. Extrapolated to 60'000 years heeding chemical characteristics. Initial waste composition from various literature sources.

## Extrapolations
This dataset has been extrapolated from year 2000 to the year of the calculation (2021). The uncertainty has been adjusted accordingly.

## Review by Niels Jungbluth 2003-07-21
Passed. Calculation for standard deviation 95 of, i.e., infrastructure,
land occupation, transport services or other services can differ from
standard Pedigree approach used in this project and figures obtained by
this procedure.
