# television production

Dataset: EcoSpold 2, unit process
Geography: GLO
Time period: 2008-01-01 to 2021-12-31
Technology level: current
Classification: ISIC rev.4 ecoinvent: 2640:Manufacture of consumer electronics
Synonyms: television device; LCD TV; TV set
Scenario: Business-as-Usual
System model: Allocation, cut-off by classification
Generated by: Viachaslau Filimonau
Published in: Dodbiba, G. 2008
Database: ecoinvent
isCopyrightProtected: true
accessRestrictedTo: 1

## General comment
This activity represents the production and disposal of an average colour LCD television device which is 25 inches diagonally and 30 kg in mass. It has the envisaged lifetime of 10 years and is manufactured in Japan / China. The figures on material inputs from technosphere are taken from Dodbiba et al. 2008. The figure on electricity required to manufacture a TV is taken from Feng and Ma 2009. Lastly, the figure on the annual production volume is taken from Samsung Global Newsroom 2017.

## Included activities start
The activity starts with the reception of materials at the factory

## Included activities end
The activity includes the processes of material and energy use in manufacturing an average television. The inventory additionally accounts for disposal of all materials. Packaging is not included.

## Geography
Geography GLO was chosen because the dataset aims to represent the production of an average television. The literature sources used refer to manufacturing in China and Japan.

## Time period
Data for production are from 2008-2009 but represent the current technology.

## Reference product
- television: 1 unit; name RP_amount_1; CPC 88744: Consumer electronics manufacturing services; By-product classification allocatable product
  production volume 2e8 unit; name RP_PV
    Figure from Samsung Global Newsroom 2017
  property price 175 EUR2005; name RP_amount_1_price_EUR2005
    Estimated value. The price is taken from MediaWorld, a shop for electronics, website (retrieved from https://www.mediaworld.it/mw/tv-led-e-lcd/samsung-t28e316-t2-hevc, accessed 13Feb2018). According to a 2012 articles on The Economist (Television-making Cracking up Flat screens are everywhere, but no one earns money making them. 21st Jsn 2012. Retrieved from: http://www.economist.com/node/21543215, accessed 13 Feb 2018) the profit margin on LCD TV are close to zero or none. We therefore assume that the production price equals consumer price.
  property lifetime capacity [h] 60000 hour
    Estimated from the online source www.flatpanelshd.com (article from Larsen, R. 2016. LG: OLED TV lifespan is now 100,000 hours. Retrieved from: https://www.flatpanelshd.com/news.php?id=1465304750&subaction=showfull, accessed 6March2018). According to the source the backlight of an LCD TV lasts between 60000-70000 hours, but other parts of a set last less time. We here assume 60000 hours lifetime. This would mean 16.44 hours per day for 10 years. Lifetime of 10 years is estimated based on Dodbiba et al. 2008. Source: 2008, Dodbiba, G., Takahashi, K., Sadaki, J., Fujita, T., The recycling of plastic wastes from discarded TV sets: comparing energy recovery with mechanical recycling in the context of life cycle assessment, Journal of Cleaner Production, 16, 458-470, 0 - Undefined
  property weight 30 kg; name weight
    As proposed by Dodbiba et al. 2008. Source: 2008, Dodbiba, G., Takahashi, K., Sadaki, J., Fujita, T., The recycling of plastic wastes from discarded TV sets: comparing energy recovery with mechanical recycling in the context of life cycle assessment, Journal of Cleaner Production, 16, 458-470, 0 - Undefined
  property lifetime 10 year
    (same comment as for television)

## Inputs from technosphere
- polyvinylchloride, suspension polymerised: 1.05 kg; name PVC; lognormal variance with pedigree 0.0113, pedigree (1,4,4,3,2)
  Based on Dodbiba et al. 2008.
  properties: heating value, net 21.5 MJ, carbon content, fossil 0.387097, wet mass 1 kg, dry mass 1 kg
- polyethylene, low density, granulate: 0.3 kg; name PE; lognormal variance with pedigree 0.0113, pedigree (1,4,4,3,2)
  Based on Dodbiba et al. 2008.
  properties: dry mass 1 kg, wet mass 1 kg, carbon content, fossil 0.857143, heating value, net 42.47 MJ
- scrap copper: 0 kg; name w_copper; pedigree (1,1,1,1,1)
  Based on Dodbiba et al. 2008. The amount is set equal to the input amount for the respective material.
  production volume 0 kg
    Calculated from production volume of reference product using the relative outputs.
  property price 0 EUR2005; name w_copper_price_EUR2005
  properties: dry mass 1 kg, wet mass 1 kg
- flat glass, uncoated: 0 kg; name flat_glass; pedigree (1,1,1,1,1)
  Based on Dodbiba et al. 2008.
  properties: wet mass 1 kg, dry mass 1 kg
- waste polyethylene: 0 kg; name w_polyethylene; pedigree (1,1,1,1,1)
  (same comment as for scrap copper)
  production volume 0 kg
    Calculated from production volume of reference product using the relative outputs.
  property price 0 EUR2005; name w_polyethylene_price_EUR2005
  properties: wet mass 1 kg, water content 0.00401606, carbon content, fossil 0.825301, dry mass 0.996 kg, heating value, net 42.47 MJ
  note on carbon content, fossil: C content in 1 kg DM was calculated using data in Tab A.1, ecoinvent v2.2 report 13_I
  note on heating value, net: Value taken from the general comment of the treatment dataset.
- copper, cathode: 2.4 kg; name copper; lognormal variance with pedigree 0.0113, pedigree (1,4,4,3,2)
  Based on Dodbiba et al. 2008.
  properties: dry mass 1 kg, wet mass 1 kg
- electricity, high voltage: 19.494 kWh; lognormal variance with pedigree 0.0113, pedigree (1,4,4,3,2)
  Normalized for reference product (1 TV set) based on the estimate from Feng and Ma 2009 with subsequent convertion of MJ into kWh. Convertion formulae used 1 kWh = 3.6 MJ
- scrap aluminium: 0 kg; name w_alu; pedigree (1,1,1,1,1)
  (same comment as for scrap copper)
  production volume 0 kg
    Calculated from production volume of reference product using the relative outputs.
  property price 0 EUR2005; name w_alu_price_EUR2005
  properties: dry mass 30 kg, carbon content, fossil 3.9138, wet mass 30 kg
- waste glass: 0 kg; name w_glass; pedigree (1,1,1,1,1)
  (same comment as for scrap copper)
  production volume 0 kg
    Calculated from production volume of reference product using the relative outputs.
  property price 0 EUR2005; name w_glass_price_EUR2005
  properties: wet mass 1 kg, heating value, net 0.05 MJ, dry mass 1 kg
  note on heating value, net: Value extracted from "treatment of waste glass, open dump, very wet infiltration class (1000mm)"
- waste electric and electronic equipment: -4.95 kg; name w_elec; = (electronic_comp)*-1; lognormal variance with pedigree 0.0113, pedigree (1,4,4,3,2)
  Based on Dodbiba et al. 2008. The amount is set equal to the input amount for the respective material. Used here in place of 'circuit board' and 'other materials' as presented in the original literature source.
  production volume 9.9e8 kg; = RP_PV * (w_elec / RP_amount_1)
    Calculated from production volume of reference product using the relative outputs.
  property price 0 EUR2005; name w_elec_price_EUR2005
  properties: dry mass 1 kg, wet mass 1 kg, carbon content, non-fossil 0.000485011, carbon content, fossil 0.0877555
- flat glass factory: 1.80723e-8 unit; = 1/55333333; lognormal variance with pedigree 0.3107, pedigree (1,4,4,3,2)
  Used here in place of infrastructure based on the amount of the largest contributor to the final product mass (glass). This is an estimated value. According to the general comment of the dataset 'Flat glass factory construction, GLO' [accessed 20.01.2018], the life time of the equipment is assumed to be 20 years and the annual production is 83000 t/a. Thus, the estimated lifetime output of the factory is 83000 x 20 = 1660000. As the television mass is 30 kg, then the number of televisions produced during the lifetime of the factory is 1660000 / 0.03 = 55333333 units. The calculation of the infrastructure is therefore 1/life time capacity = 1/55333333 unit.
- waste polyvinylchloride: 0 kg; name w_polyvinyl; pedigree (1,1,1,1,1)
  (same comment as for scrap copper)
  production volume 0 kg
    Calculated from production volume of reference product using the relative outputs.
  property price 0 EUR2005; name w_polyvinyl_price_EUR2005
  properties: wet mass 1 kg, carbon content, fossil 0.440882, dry mass 1 kg, heating value, net 21.51 MJ
- scrap steel: 0 kg; name w_steel; pedigree (1,1,1,1,1)
  (same comment as for scrap copper)
  production volume 0 kg
    Calculated from production volume of reference product using the relative outputs.
  property price 0 EUR2005; name w_steel_price_EUR2005
  properties: wet mass 1 kg, dry mass 1 kg
- electronic component, passive, unspecified: 4.95 kg; name electronic_comp; lognormal variance with pedigree 0.0113, pedigree (1,4,4,3,2)
  Based on Dodbiba et al. 2008. Used here in place of 'circut board' and 'other materials' as presented in the original literature source. These are assumed to be various electronic components.
  properties: carbon content, non-fossil 0.0045566, carbon content, fossil 0.317311, wet mass 1 kg, dry mass 1 kg
- polystyrene, general purpose: 1.8 kg; name PS; lognormal variance with pedigree 0.0113, pedigree (1,4,4,3,2)
  Based on Dodbiba et al. 2008.
  properties: heating value, net 38.67 MJ, dry mass 1 kg, carbon content, fossil 0.923077, wet mass 1 kg
- aluminium, cast alloy: 0.6 kg; name aluminium; lognormal variance with pedigree 0.0113, pedigree (1,4,4,3,2)
  Based on Dodbiba et al. 2008.
  properties: dry mass 1 kg, wet mass 1 kg
- steel, low-alloyed: 3.6 kg; name steel; lognormal variance with pedigree 0.0113, pedigree (1,4,4,3,2)
  Based on Dodbiba et al. 2008.
  properties: carbon content, fossil 0.005, dry mass 1 kg, wet mass 1 kg
- waste polystyrene: 0 kg; name w_polystyrene; pedigree (1,1,1,1,1)
  (same comment as for scrap copper)
  production volume 0 kg
    Calculated from production volume of reference product using the relative outputs.
  property price 0 EUR2005; name w_polystyrene_price_EUR2005
  properties: water content 0.00200401, carbon content, fossil 0.922579, heating value, net 38.67 MJ, dry mass 0.998 kg, wet mass 1 kg
- scrap copper: -0.761299, -0.0357185, -1.60298 kg (3 entries); lognormal variance with pedigree 0.0113, pedigree (1,4,4,3,2)
  (same comment as for scrap copper)
  production volume 4.8e8 kg
- flat glass, uncoated: 2.61266, 12.6873 kg (2 entries); lognormal variance with pedigree 0.0113, pedigree (1,4,4,3,2)
  Based on Dodbiba et al. 2008.
- waste polyethylene: -0.0288764, -0.0022262, -0.000919501, -0.000873152, -0.0333183, -0.000371468, -0.000168364, -0.233247 kg (8 entries); lognormal variance with pedigree 0.0113, pedigree (1,4,4,3,2)
  (same comment as for scrap copper)
  production volume 6e7 kg
- scrap aluminium: -0.190325, -0.0089296, -0.400746 kg (3 entries); lognormal variance with pedigree 0.0113, pedigree (1,4,4,3,2)
  (same comment as for scrap copper)
  production volume 1.2e8 kg
- waste glass: -2.32911, -0.113012, -0.0105438, -0.0471798, -1.22615, -0.0160114, -0.00256386, -11.5554 kg (8 entries); lognormal variance with pedigree 0.0113, pedigree (1,4,4,3,2)
  (same comment as for scrap copper)
  production volume 3.06e9 kg
- waste polyvinylchloride: -0.101067, -0.0077917, -0.00321825, -0.00305603, -0.116614, -0.00130014, -0.000589274, -0.816363 kg (8 entries); lognormal variance with pedigree 0.0113, pedigree (1,4,4,3,2)
  (same comment as for scrap copper)
  production volume 2.1e8 kg
- scrap steel: -0.876583, -0.0011106, -2.72231 kg (3 entries); lognormal variance with pedigree 0.0113, pedigree (1,4,4,3,2)
  (same comment as for scrap copper)
  production volume 7.2e8 kg
- waste polystyrene: -0.173258, -0.0133572, -0.005517, -0.00523891, -0.19991, -0.00222881, -0.00101018, -1.39948 kg (8 entries); lognormal variance with pedigree 0.0113, pedigree (1,4,4,3,2)
  (same comment as for scrap copper)
  production volume 3.6e8 kg

## Sampling procedure
Manufacturing data are taken from Dodbiba et al. 2008 and Feng and Ma 2009. Sources: Dodbiba, G., Takahashi, K., Sadaki, J., and Fujita, T., 2008. The recycling of plastic wastes from discarded TV sets: comparing energy recovery with mechanical recycling in the context of life cycle assessment. Journal of Cleaner Production, 16, 458-470. Feng, C., and Ma, X.Q., 2009. The energy consumption and environmental impacts of a color TV set in China. Journal of Cleaner Production, 17, 13-25. Data on the annual production volume are taken from a press-release of Samsung, a major TV set manufacturer. Source: Samsung Global Newsroom, 2017. This is QLED TV, part 2: winning the top 5%. Available from: https://news.samsung.com/global/this-is-qled-tv-part-2-winning-the-top-5 (Accessed 20 January 2018).

## Extrapolations
This dataset has been extrapolated from year 2017 to the year of the calculation (2021). The uncertainty has been adjusted accordingly.
