# transport, passenger car, small size, petrol, EURO 3

Dataset: EcoSpold 2, unit process
Geography: RER
Time period: 2012-01-01 to 2021-12-31
Technology level: current
Classification: ISIC rev.4 ecoinvent: 4922:Other passenger land transport
Tags: internal combustion engine
Scenario: Business-as-Usual
System model: Allocation, cut-off by classification
Generated by: Andrew Simons
Database: ecoinvent
isCopyrightProtected: true
accessRestrictedTo: 1

## General comment
This dataset represents the service of transport in a passenger car for a journey length of 1vkm and is valid for Europe. Fuel consumption and emissions are for average vehicle use and not representative of a specific driving cycle. The dataset is parametrized with respect to vehicle size, fuel consumption and vehicle lifetime.
Datasets for three different passenger car categories are available in ecoinvent in view of size: small, medium and large.
The category “small” includes passenger cars with engine size up to 1.4 liters. The average weight of this category is estimated to be 1200 kg.
The category “medium” includes passenger cars with engine size between 1.4 and 2.0 liters. The average weight of this category is estimated to be 1600 kg.
The category “large” includes passenger cars with engine size larger than 2.0 liters. The average weight of this category is estimated to be 2000 kg.
The passenger car size influences the amount of both exhaust and non-exhaust emissions. The exhaust emissions caused by the burning of fuel are divided into two groups: fuel dependent emissions (dependent on fuel type and quantity) and Euro class dependent emissions which reflect the emission standards which the vehicle complies with. Three classes of Euro engine type are considered: Euro 3, Euro 4 and Euro 5. The higher the class (e.g. Euro 5), the lower the emissions and viceversa. The Euro engine regulation is set by the European Commission “in order to limit as much as possible the negative impact of road vehicles on the environment and health” (European Commission 2012). This dataset considers a small petrol passenger car of Euro 3 class. Also included within the direct exchanges to the environment are the fuel evaporation emissions from the fuel tank, relevant to petrol vehicles only.

Non-exhaust emissions are those resulting from tyre, brake and road wear. These emissions are considered as by-products.

Reference: European Commission - Mobility and transport. (n.d.). Euro 5 and Euro 6 standards: reduction of pollutant emissions from light. Retrieved May 31, 2012, from http://ec.europa.eu/transport/index_en.htm: http://ec.europa.eu/transport/urban/vehicles/doc/legislation_guide_other.pdf

## Included activities start
From combustion of fuel in the engine. The dataset takes as input the infrastructure of the car and road network, the materials and efforts needed for maintenance of these and the fuel consumed in the vehicle for the journey.

## Included activities end
The activity ends with the transport over 1vkm and the emissions of exhaust and non-exhaust emissions into air, water and soil.

The dataset includes the construction, operation, maintenance and disposal of the vehicle and road infrastructure. Operation of the vehicle includes all the direct emissions produced by fuel combustion and evaporation as well as from tyre, brake and road wear.

The dataset doesn't specifically model cold start emissions. These are assumed to be included in the data for average driving which was used.

## Technology
Transport in a passenger car with internal combustion engine, fueled by petrol. The size is small, with engine size up to 1.4 litres and average weight of 1200 kg.
Technology classifications are based on those used widely within the works of the European Environment Agency, particularly in the Emissions Inventory Guidebook. The Tremove model - which is also used to generate fuel consumption and emission factors for the datasets presented here - follows this classification system.

## Parameters
- annual total vkm: 2.34964e11 km; name annual_vkm; = 2.34964E+11; lognormal variance with pedigree 0.0015, pedigree (2,2,2,1,1)
  Based on Tremove (2009)
- passenger load factor: 97.2 kg; name LF_passengers; = passengers*60; lognormal variance with pedigree 0.0015, pedigree (2,2,2,1,1)
  Number of passengers multiplied by 60 kg per passenger
- fuel consumption constant: 2.9288e-5 dimensionless; name fc_constant; = 2.9288E-05
  Determined from analysing the fuel consumption for vehicles in the Tremove model (2009)
- co2 emissions per kg petrol: 3.18 kg; name co2_kg_petrol; lognormal variance with pedigree 0.0015, pedigree (2,2,2,1,1)
  Constant for all petrol vehicles
- emissions from brake friction: 4.45e-9 kg/kg vehicle; name brake_wear_emissions; lognormal variance with pedigree 0.0015, pedigree (2,2,2,1,1)
  average (small, medium and large weight class) emissions produced per kg vehicle.
  Calculation of non-exhaust emissions (tyre, brake and road wear emissions as well as petrol evaporation emissions) are based on: Ntziachristos, L., Boulter, P. (2009). EMEP/EEA air pollutant emissions inventory guidebook 2009: Road vehicle tyre and brake wear; Road surface wear. Copenhagen, European Environment Agency
  Uncertainty: B
- scaling factor: 0.967742 dimensionless; name scaling_factor; = (vehicle_weight/1240); lognormal variance with pedigree 0.0015, pedigree (2,2,2,1,1)
  The weight of a vehicle determines the non-exhaust emissions of tyre, brake and road wear, reported in kg/kg vehicle.
  The non-exhaust emissions (kg) are calculated multiplying vehicle’s non-exhaust emissions (kg/kg vehicle) by the scaled vehicle weight (kg vehicle).
  The input passenger car weighs 1240 kg. The scaling factor is given by vehicle weight/input passenger car weight. Therefore: the scaling factor is 1200/1240 for small passenger cars.
- passengers: 1.62 unit; lognormal variance with pedigree 0.0006, pedigree (1,1,1,1,1)
  Average number of passengers in passenger car 1.62
- gross vehicle weight: 1297.2 kg; name gross_vehicle_weight; = vehicle_weight+LF_passengers; lognormal variance with pedigree 0.0015, pedigree (2,2,2,1,1)
  It corresponds to the following formula:
  weight of the vehicle + ((average load * 60 kg / 1000).
  The average load is estimated to be 1.6 passengers and 60 kg is the weight of a passenger.
  Based on: TREMOVE v2.7b, ransport & Mobility Leuven, 2009
- emissions from road abrasion: 9.79e-9 kg/kg vehicle; name road_wear_emissions; lognormal variance with pedigree 0.0015, pedigree (2,2,2,1,1)
  (same comment as for emissions from brake friction)
- weight of the basis vehicle: 1240 kg/unit; name basis_vehicle_weight
  The basis vehicle is the one on which the original life cycle inventory was conducted. It is representative of a VW Golf.
- lifetime of the vehicle: 150000 km; name vehicle_lifetime_km; lognormal variance with pedigree 0.0015, pedigree (2,2,2,1,1)
  distance capacity in the assumed vehicle lifetime.
  Reference: Althaus & gauch, Vergleichende Oekobilanz individueller Mobilität: Elektromobilität versus konventionelle Mobilität mit Bio- und fossilen Treibstoffen, EMPA, Dübendorf, 2010
- fuel consumption of basis vehicle: 0.05496 dimensionless; name fc_basis_vehicle; lognormal variance with pedigree 0.0015, pedigree (2,2,2,1,1)
  Fuel consumption as derived from the source data for each vehicle type, size and emissions standard
- weight of the vehicle: 1200 kg/unit; name vehicle_weight; lognormal variance with pedigree 0.0015, pedigree (2,2,2,1,1)
  Passenger cars are divided into three classes of weight (vehicle only): small car 1200 kg; medium size car 1600kg and large car 2000kg.
- so2 emissions per kg petrol: 2e-5 kg; name so2_kg_petrol; = 2.0e-5; lognormal variance with pedigree 0.0015, pedigree (2,2,2,1,1)
  Constant for all petrol vehicles
- emissions from tyre abrasion: 5.725e-8 kg/kg vehicle; name tyre_wear_emissions; lognormal variance with pedigree 0.0015, pedigree (2,2,2,1,1)
  (same comment as for emissions from brake friction)

## Reference product
- transport, passenger car, small size, petrol, EURO 3: 1 km; CPC 64119: Other land transportation services of passengers, n.e.c.; By-product classification allocatable product
  production volume 2.34964e11 km; name transport_RP_PV; = annual_vkm
    Based on Tremove model (2009)
  property price 0.136448 EUR2005
    Calculated based on inputs: The price of the product has been calculated as a sum of the values of the material and energy inputs for this product. This value is therefore a rough estimation. It may underestimate the real price since there are additional expenses when producing any product. These expences can include for example labour costs, treatment of waste materials and profit for the producer. Please consider carefully whether this level of data quality is acceptable for your application.

## Inputs from technosphere
- road wear emissions, passenger car: -1.26996e-5 kg; name road_emissions; = (road_wear_emissions*gross_vehicle_weight)*-1; source Ntziachristos, L. 2009; lognormal variance with pedigree 0.0413, pedigree (2,2,5,1,1)
  Quantity of emissions based on values from Ntziachristos, L., Boulter, P. (2009) EMEP/EEA air pollutant emissions inventory guidebook 2009: Road vehicle tyre and brake wear; Road surface wear. Copenhagen, European Environment Agency. Quantities given in the source assumed to represent medium sized vehicles. Quantities for small and large vehicles taken from the bounds of the ranges given.
  production volume 2.98395e6 kg; = road_emissions*transport_RP_PV
    Calculated from production volume of reference product using the relative outputs.
  property price 0 EUR2005; name road_emissions_price_EUR2005
- road maintenance: 0.000265427 m*year; lognormal variance with pedigree 0.0413, pedigree (2,2,5,1,1)
  This input indicates the unit of road per vkm used during the transport activity. The road input is composed by two demand factors: - Road infrastructure and disposal (RI&D), which varies according to the gross vehicle weight. - Road operations & maintenance (RO&M), which does not vary according to the gross vehicle weight.
- passenger car maintenance: 6.45161e-6 unit; = (1/vehicle_lifetime_km)*scaling_factor; source Spielmann M. 2007; lognormal variance with pedigree 0.0413, pedigree (2,2,5,1,1)
  The dataset is for a medium size passenger car. In order to make the demand appropriate to the particular vehicle in question a scaling factor is applied which is the product of the vehicle weight devided by the weight of the medium size vehicle.
- passenger car, petrol/natural gas: 0.008 kg; name passenger_car; = (1/vehicle_lifetime_km)*vehicle_weight; source Spielmann M. 2007; lognormal variance with pedigree 0.0092, pedigree (2,1,4,1,1)
  The dataset is calculated from the LCI of VW Golf. The infrastructure demand is scaled according to the weight of the specific vehicle in question.
  Uncertainty: P
- petrol, low-sulfur: 0 kg; name petrol_use; source TREMOVE 2007; pedigree (1,1,1,1,1)
  Calculation, based on data from TREMOVE (2007)
  Fuel consumption is influenced by vehicle weight. Fuel input exchanges (petrol low-sulphur, diesel low-sulphur and natural gas) are scaled according to the specific vehicle weight inserted by the ecoinvent user. Calculation of the fuel consumption uses a fuel specific constant. This corresponds to:
  ((specific gross vehicle weight - basis vehicle weight) * constant + basis vehicle fuel consumption
  property carbon content, fossil 0.865; name C_content_fossil
  property dry mass 1 kg; name DM
  property carbon content, non-fossil 0; name C_content_non_fossil
  property water in wet mass 0 kg; name WWM
  property water content 0; name water_content
  property wet mass 1 kg; name WM
  properties: heating value, net 42.5 MJ
  note on heating value, net: Based on literature, page 611, Report 17: Jungbluth, N., Chudacoff, M., Dauriat, A., Dinkel, F., Doka, G., Faist Emmenegger, M., Gnansounou, E., Kljun, N., Schleiss, K., Spielmann, M., Stettler, C., Sutter, J. 2007: Life Cycle Inventories of Bioenergy. ecoinvent report No. 17, Swiss Centre for Life Cycle Inventories, Dübendorf, CH.
- brake wear emissions, passenger car: -5.77254e-6 kg; name brake_emissions; = (brake_wear_emissions*gross_vehicle_weight)*-1; source Ntziachristos, L. 2009; lognormal variance with pedigree 0.0413, pedigree (2,2,5,1,1)
  (same comment as for road wear emissions, passenger car)
  production volume 1.35634e6 kg; = brake_emissions*transport_RP_PV
    Calculated from production volume of reference product using the relative outputs.
  property price 0 EUR2005; name brake_emissions_price_EUR2005
- tyre wear emissions, passenger car: -7.42647e-5 kg; name tyre_emissions; = (tyre_wear_emissions*gross_vehicle_weight)*-1; source Ntziachristos, L. 2009; lognormal variance with pedigree 0.0413, pedigree (2,2,5,1,1)
  (same comment as for road wear emissions, passenger car)
  production volume 1.74495e7 kg; = tyre_emissions*transport_RP_PV
    Calculated from production volume of reference product using the relative outputs.
  property price 0 EUR2005; name tyre_emissions_price_EUR2005
- road: 0.000696596 m*year; name road_use; = 5.37E-07*gross_vehicle_weight; source Spielmann M. 2007; lognormal variance with pedigree 0.0413, pedigree (2,2,5,1,1)
  This input indicates the unit of road per vkm used during the transport activity.
  The road input is composed by two demand factors:
  - Road infrastructure and disposal (RI&D), which varies according to the gross vehicle weight.
  - Road operations & maintenance (RO&M), which does not vary according to the gross vehicle weight.
- petrol, low-sulfur: 0.0567256, 0.00108118 kg (2 entries); source TREMOVE 2007; lognormal variance with pedigree 0.0413, pedigree (2,2,5,1,1)
  (same comment as for petrol, low-sulfur)
  properties: carbon content, fossil 0.865, dry mass 1 kg, heating value, net 42.5 MJ, wet mass 1 kg

## Emissions to nature
All rows: lognormal variance with pedigree 0.0413, pedigree (2,2,5,1,1)
- Formaldehyde [air, urban air close to ground]: 3.773e-7 kg; source Ntziachristos, L. 2009
  Emissions dependent on engine Euro class (Euro 3, Euro 4 and Euro 5).
- Pentane [air, urban air close to ground]: 8.645e-6 kg; source Ntziachristos, L. 2009
  emissions dependent on engine Euro class (Euro 3, Euro 4 and Euro 5). Includes petrol evaporation.
- 1-Pentene [air, urban air close to ground]: 2.441e-8 kg; source Ntziachristos, L. 2009
  Emissions dependent on engine Euro class (Euro 3, Euro 4 and Euro 5).
- m-Xylene [air, urban air close to ground]: 3.168e-6 kg; source Ntziachristos, L. 2009
  (same comment as for Pentane)
- Butane [air, urban air close to ground]: 7.363e-6 kg; source Ntziachristos, L. 2009
  (same comment as for Pentane)
- Propylene oxide [air, urban air close to ground]: 8.478e-7 kg; source Ntziachristos, L. 2009
  Emissions dependent on engine Euro class (Euro 3, Euro 4 and Euro 5).
- Mercury [air, urban air close to ground]: 4.04648e-12 kg; = 7.00000E-11*petrol_use; source Ntziachristos, L. 2009
  7.00000E-11 is the emission value of mercury per kg of petrol used
- Chromium IV [air, urban air close to ground]: 5.78068e-12 kg; = 1.00000E-10*petrol_use; source Ntziachristos, L. 2009
  1.00000E-10 is the emission value of chromium IV per kg of petrol used
- Methyl ethyl ketone [air, urban air close to ground]: 1.11e-8 kg; source Ntziachristos, L. 2009
  Emissions dependent on engine Euro class (Euro 3, Euro 4 and Euro 5).
- Ethane [air, urban air close to ground]: 1.025e-6 kg; source Ntziachristos, L. 2009
  (same comment as for Pentane)
- PAH, polycyclic aromatic hydrocarbons [air, urban air close to ground]: 2.01168e-9 kg; = 3.48000E-08*petrol_use; source Ntziachristos, L. 2009
  3.48000E-08 is the emission value of PAH per kg of petrol used
- Nitrogen oxides [air, urban air close to ground]: 7.161e-5 kg; source TREMOVE 2007
  Emissions dependent on engine Euro class (Euro 3, Euro 4 and Euro 5).
- Benzaldehyde [air, urban air close to ground]: 4.883e-8 kg; source Ntziachristos, L. 2009
  Emissions dependent on engine Euro class (Euro 3, Euro 4 and Euro 5).
- Lead [air, urban air close to ground]: 8.67102e-11 kg; = 1.50000E-09*petrol_use; source Ntziachristos, L. 2009
  1.50000E-09 is the emission value of lead per kg of petrol used
- Carbon monoxide, fossil [air, urban air close to ground]: 0.001216 kg; source TREMOVE 2007
  Emissions dependent on engine Euro class (Euro 3, Euro 4 and Euro 5).
- Copper [air, urban air close to ground]: 9.82715e-8 kg; = 1.70000E-06*petrol_use; source Ntziachristos, L. 2009
  1.70000E-06 is the emission value of copper per kg of petrol used
- Cadmium [air, urban air close to ground]: 5.78068e-10 kg; = 1.00000E-08*petrol_use; source Ntziachristos, L. 2009
  1.00000E-08 is the emission value of cadmium per kg of petrol used
- Ammonia [air, urban air close to ground]: 1.7342e-6 kg; = 3.00000E-05* petrol_use; source Ntziachristos, L. 2009
  3.00000E-05 is the emission value of ammonia per kg of petrol used
- Methane [air, urban air close to ground]: 2.848e-5 kg; source Ntziachristos, L. 2009
  Emissions dependent on engine Euro class (Euro 3, Euro 4 and Euro 5).
- Styrene [air, urban air close to ground]: 2.242e-7 kg; source Ntziachristos, L. 2009
  Emissions dependent on engine Euro class (Euro 3, Euro 4 and Euro 5).
- Chromium [air, urban air close to ground]: 2.89034e-9 kg; = 5.00000E-08*petrol_use; source Ntziachristos, L. 2009
  5.00000E-08 is the emission value of chromium per kg of petrol used
- Acetone [air, urban air close to ground]: 1.354e-7 kg; source Ntziachristos, L. 2009
  Emissions dependent on engine Euro class (Euro 3, Euro 4 and Euro 5).
- Selenium [air, urban air close to ground]: 5.78068e-10 kg; = 1.00000E-08*petrol_use; source Ntziachristos, L. 2009
  1.00000E-08 is the emission value of selenium per kg of petrol used
- Carbon dioxide, fossil [air, urban air close to ground]: 0.183826 kg; = co2_kg_petrol*petrol_use; source TREMOVE 2007
  Calculated based on the amount of petrol used and the emission of CO2 per kg of petrol.
- Particulates, < 2.5 um [air, urban air close to ground]: 1.011e-6 kg; source TREMOVE 2007
  Emissions dependent on engine Euro class (Euro 3, Euro 4 and Euro 5).
- Toluene [air, urban air close to ground]: 7.331e-6 kg; source Ntziachristos, L. 2009
  (same comment as for Pentane)
- Acrolein [air, urban air close to ground]: 4.217e-8 kg; source Ntziachristos, L. 2009
  Emissions dependent on engine Euro class (Euro 3, Euro 4 and Euro 5).
- Hexane [air, urban air close to ground]: 3.573e-7 kg; source Ntziachristos, L. 2009
  Emissions dependent on engine Euro class (Euro 3, Euro 4 and Euro 5).
- Propene [air, urban air close to ground]: 1.481e-7 kg; source Mellios, G. 2009
  petrol evaporation emissions
- NMVOC, non-methane volatile organic compounds, unspecified origin [air, urban air close to ground]: 6.646e-5 kg; source TREMOVE 2007
  (same comment as for Pentane)
- o-Xylene [air, urban air close to ground]: 7.373e-7 kg; source Ntziachristos, L. 2009
  (same comment as for Pentane)
- Propane [air, urban air close to ground]: 5.593e-6 kg; source Ntziachristos, L. 2009
  (same comment as for Pentane)
- Dinitrogen monoxide [air, urban air close to ground]: 7.51488e-6 kg; = 1.30000E-04*petrol_use; source Ntziachristos, L. 2009
  1.30000E-04 is the emission value of dinitrogen monoxide per kg of petrol used
- Acetaldehyde [air, urban air close to ground]: 1.665e-7 kg; source Ntziachristos, L. 2009
  Emissions dependent on engine Euro class (Euro 3, Euro 4 and Euro 5).
- Heptane [air, urban air close to ground]: 1.642e-7 kg; source Ntziachristos, L. 2009
  Emissions dependent on engine Euro class (Euro 3, Euro 4 and Euro 5).
- Cyclohexane (for all cycloalkanes) [air, urban air close to ground]: 2.53e-7 kg; source Ntziachristos, L. 2009
  Emissions dependent on engine Euro class (Euro 3, Euro 4 and Euro 5).
- 2-Methyl pentane [air, urban air close to ground]: 7.417e-6 kg; source Mellios, G. 2009
  petrol evaporation emissions
- Ethylene oxide [air, urban air close to ground]: 1.62e-6 kg; source Ntziachristos, L. 2009
  Emissions dependent on engine Euro class (Euro 3, Euro 4 and Euro 5).
- Sulfur dioxide [air, urban air close to ground]: 1.15614e-6 kg; = so2_kg_petrol*petrol_use; source TREMOVE 2007
  1.99998E-05 is the emission value of sulphur dioxide per kg of petrol used
- Ethene [air, urban air close to ground]: 2.645e-8 kg; source Mellios, G. 2009
  petrol evaporation emissions
- Benzene [air, urban air close to ground]: 3.704e-6 kg; source Ntziachristos, L. 2009
  (same comment as for Pentane)
- Zinc [air, urban air close to ground]: 5.78068e-8 kg; = 1.00000E-06*petrol_use; source Ntziachristos, L. 2009
  1.00000E-06 is the emission value of zinc per kg of petrol used
- Nickel [air, urban air close to ground]: 4.04648e-9 kg; = 7.00000E-08* petrol_use; source Ntziachristos, L. 2009
  7.00000E-08 is the emission value of nickel per kg of petrol used

## Sampling procedure
Literature

## Extrapolations
This dataset has been extrapolated from year 2012 to the year of the calculation (2021). The uncertainty has been adjusted accordingly.
