# liquid packaging board container production

Dataset: EcoSpold 2, unit process
Geography: RER
Time period: 1993-01-01 to 2021-12-31
Technology level: current
Classification: EcoSpold01Categories: paper & cardboard/cardboard & corrugated board
Classification: ISIC rev.4 ecoinvent: 1702:Manufacture of corrugated paper and paperboard and of containers of paper a
Tags: ConvertedDataset
Scenario: Business-as-Usual
System model: Allocation, cut-off by classification
Generated by: Roland Hischier
Published in: Hischier R. 2007
Database: ecoinvent
isCopyrightProtected: true
accessRestrictedTo: 1

## General comment
This activity describes the actual production of 1 Kg of liquid packaging board (LPB) container. LPB container are used for food packaging. They are made of LPB board which is coated with plastic resins and often laminated for product protection and extended shelf life. It is assumed that the average composition of an LPB container is 74% board - 5% aluminium - 21% plastics (Plinke et al., 2000). This dataset only describes the actual production of the LPB container for food packaging. It does not include the production of the board itself which is documented in a separate dataset (liquid packaging board production).

Principal sources therefore are the former Swiss Life Cycle inventories of packaging materials (Habersatter et al. (1998)) from BUWAL as well as information from the envrionmental report of a global player (Tetra Pak (2001)).

Habersatter K., Fecker I., Dall'Acqua S., Fawer M., Fallscheer F., Förster R., Maillefer C., Ménard M., Reusser L., Som C., Stahel U. and Zimmermann P. (1998) Ökoinventare für Verpackungen. BUWAL Schriftenreihe Umwelt Nr. 250. 2nd Edition. BUWAL, Bern

Plinke E., Schonert M., Meckel H., Detzel A., Giegrich J., Fehrenbach H., Ostermayer A., Schorb A., Heinisch J., Luxenhofer K. and Schmitz S. (2000) Ökobilanz für Getränkeverpackungen II - Materialsammlung. Texte 38/2000. Umweltbundesamt, Berlin (Germany)

Tetra Pak (2001) Corporate Environmental Progress Report 2000. Tetra Pak, Lund (Sweden) as pdf-File under: http://www.tetrapack.com/docs/env_rep_2000.zip

## Included activities start
This activity starts with the reception of liquid packaging board.

## Included activities end
This module includes the production of LPB containers for food packaging. It contains the steps of laminating, cutting, folding and printing. Besides the raw materials (LPB, aluminium and PE) inks and glues are considered as well as the energy consumption.

## Geography
Data from the former Swiss packaging study and from several CER used as European average data.

## Technology
Average of present used technology

## Parameters
- fraction, process water, to air: 0.15 dimensionless; name fraction_PW_to_air; lognormal variance with pedigree 0.092025, pedigree (4,4,3,2,4)
  Literature value. In case when no industry/process specific data are available, default evaporation fraction value is used. This value is 15% and is based on literature (Statistics Canada, 2007 & Shaffer, K.H., 2008, Consumptive water use in the Great Lakes Basin, USGS & Shiklomanov, 2003, World Water Resources at the Beginning of the 21st Century) and has been approved by an expert.

## Reference product
- liquid packaging board container: 1 kg; CPC 32153: Cartons, boxes, cases, record sleeves and other packing containers (except bags) of paper, paperboard, cellulo[…]; By-product classification allocatable product
  EcoSpold01Location=RER
  production volume 2.36317e9 kg; = (7.20E+09*0.95)/0.74*(21908724538088.93/85693321610361.34)
    The global production volume has been estimated with the global production volume of liquid packaging board (7.2 *10 ^9 Kg. In 2016). The LPB container PV has been estimated based on an LPB content of 74 % and an assumed loss during production of 5 %. The European production volume has been scaled based on the global and European GDP of 2018 (retrieved from https://unstats.un.org/unsd/snaama/Basic
    filtered for GDP. At current price- US Dollar)
    Reference:
    Smithers: Six key trends in the liquid paperboard market; https://www.smithers.com/resources/2017/dec/six-key-trends-in-the-liquid-paperboard-market, accessed 25 May 2020
    Plinke E., Schonert M., Meckel H., Detzel A., Giegrich J., Fehrenbach H., Ostermayer A., Schorb A., Heinisch J., Luxenhofer K. and Schmitz S. (2000) Ökobilanz für Getränkeverpackungen II - Materialsammlung. Texte 38/2000. Umweltbundesamt, Berlin (Germany)
  property heating value, net 13.87 MJ
    LHV is calculated based on the Carbon content of the product. More details can be found on the respective documentation.
  property carbon content, non-fossil 0.290652
    C content was calculated as an addition of C content in the raw materials.
  property price 2.687 EUR2005
    Calculated value based on data from United Nations Commodity Trade Statistics Database (comtrade.un.org). UN comtrade category: 392310 Boxes, cases, crates etc. of plastic. Year 2005. Using exchange rate of 1EURO = 1.209 USD. Average of price of import into 4 main markets (EU, JP, IN and CN).
  property carbon content, fossil 0.198403
    C content was calculated as an addition of C content in the raw materials.
  property carbon content 0.489055
    carbon content on a dry matter basis (reserved; not for manual entry)
  properties: water in wet mass 0.055 kg, wet mass 1 kg, dry mass 0.945 kg, water content 0.0582011, carbon allocation 0.462157 kg

## Inputs from technosphere
- polyethylene, high density, granulate: 0.226 kg; lognormal variance with pedigree 0.0407, pedigree (1,3,5,3,1)
  Average of several europrean producer
  EcoSpold01Location=RER
  Uncertainty: average of several europrean producer
  properties: carbon content, fossil 0.857143, dry mass 1 kg, wet mass 1 kg, heating value, net 42.47 MJ
  note on carbon content, fossil: Polyethylene is formed out of a huge amount of ethylene monomers (C2H4) (ecoinvent v2.2 report 11_II). MW=28 g/mol
- aluminium, wrought alloy: 0.036516 kg; lognormal variance with pedigree 0.0407, pedigree (1,3,5,3,1)
  (same comment as for polyethylene, high density, granulate)
  properties: dry mass 1 kg, wet mass 1 kg
- solvent, organic: 0.0022 kg; lognormal variance with pedigree 0.1287, pedigree (4,3,5,3,4)
  Estimated based on input for cartonboard box
  EcoSpold01Location=GLO
  Uncertainty: estimated based on input for cartonboard box
  properties: heating value, net 19.11 MJ, wet mass 1 kg, dry mass 1 kg, carbon content, fossil 0.63072
  note on carbon content, fossil: Mixture of 15 of the most often used solvents (list in ecoinvent v2.2 report 11-III, pg 293). C content was calculated as an unweighted average of C content of the different solvents
- printing ink, offset, without solvent, in 47.5% solution state: 0.0045 kg; lognormal variance with pedigree 0.0407, pedigree (1,3,5,3,1)
  (same comment as for polyethylene, high density, granulate)
  properties: heating value, net 20.51 MJ, wet mass 1 kg, dry mass 1 kg, carbon content, fossil 0.455266, carbon content, non-fossil 0.221773
  note on carbon content, fossil: C content was calculated as an addition of C content in the raw materials.
- liquid packaging board: 0.795 kg; lognormal variance with pedigree 0.0407, pedigree (1,3,5,3,1)
  (same comment as for polyethylene, high density, granulate)
  properties: wet mass 1 kg, heating value, net 10.92 MJ, dry mass 0.945 kg, water content 0.0582011, carbon content, non-fossil 0.3861, carbon content, fossil 3.6e-5
  note on carbon content, non-fossil: Biogenic C content was calculated after biogenic C contents of chemicals used in the production of board (Tab 11.30 ecoinvent v2.2 report 11_III, part 11). The cellulose content in 1 kg of paper (on a wet mas basis) was estimated as (1-chemical content), C content of cellulose was considered 0.44 kgC/kg dry mass (ecoinvent v2.2 report, n 15a, pg 40)
  note on carbon content, fossil: Fossil C content was calculated after fossil C contents of chemicals used in the production of board (Tab 11.30 ecoinvent v2.2 report 11_III, part 11)
- packaging box factory: 1.43e-9 unit; lognormal variance with pedigree 0.448, pedigree (4,5,5,5,5)
  EcoSpold01Location=RER
  Own assumption
  Uncertainty: own assumption
- aluminium, cast alloy: 0.017184 kg; lognormal variance with pedigree 0.0407, pedigree (1,3,5,3,1)
  EcoSpold01Location=RER
  Average of several europrean producer
  Uncertainty: average of several europrean producer
  properties: wet mass 1 kg, dry mass 1 kg
- electricity, medium voltage: 0.0004 kWh; lognormal variance with pedigree 0.0407, pedigree (1,3,5,3,1)
  Average of several europrean producer
  EcoSpold01Location=UCTE
  Uncertainty: average of several europrean producer
- heat, district or industrial, natural gas: 0.477 MJ; lognormal variance with pedigree 0.0413, pedigree (1,3,5,3,1)
  Heat input as reported by Hischier 2007. Activity Link set to the respective heat supplying activity.
  EcoSpold01Location=RER
  Uncertainty: average of several europrean producer
  properties: heating value, net 1 MJ
- heat, district or industrial, other than natural gas: 0.165 MJ; lognormal variance with pedigree 0.0413, pedigree (1,3,5,3,1)
  (same comment as for heat, district or industrial, natural gas)
  properties: heating value, net 1 MJ

## Inputs from nature
- Water, unspecified natural origin [natural resource, in water]: 0.000571 m3; name water_UNO_input; lognormal variance with pedigree 0.0407, pedigree (1,3,5,3,1)
  Average of several europrean producer
  Uncertainty: average of several europrean producer

## Emissions to nature
- Water [water, unspecified]: 0.00048535 m3; name water_to_water_unspecified; = water_UNO_input*(1-fraction_PW_to_air); lognormal variance with pedigree 0.0807, pedigree (2,2,5,1,1)
  Calculated value based on literature values and expert opinion. See comments in the parametres' comment field.
  property dry mass 0 kg; name DM
  property carbon content, non-fossil 0; name C_content_non_fossil
  property fraction, origin: salt water 0; name fraction_origin_salt_water_Ww
  property water in wet mass 1000 kg; name WWM
  property fraction, origin: fresh water 0; name fraction_origin_fresh_water_Ww
  property carbon content, fossil 0; name C_content_fossil
  property wet mass 1000 kg; name WM
  property fraction, origin: unspecified 1; name fraction_origin_unspecified_Ww
- Methane, bromotrifluoro-, Halon 1301 [air, urban air close to ground]: 4.85e-7 kg; lognormal variance with pedigree 0.0807, pedigree (1,3,5,3,1)
  Average of several europrean producer
  Uncertainty: average of several europrean producer
- Methane, trichlorofluoro-, CFC-11 [air, urban air close to ground]: 4.85e-7 kg; lognormal variance with pedigree 0.0807, pedigree (1,3,5,3,1)
  Average of several europrean producer
  Uncertainty: average of several europrean producer
- NMVOC, non-methane volatile organic compounds, unspecified origin [air, urban air close to ground]: 0.00104 kg; lognormal variance with pedigree 0.0807, pedigree (1,3,5,3,1)
  Average of several europrean producer
  Uncertainty: average of several europrean producer
- Water [air, unspecified]: 8.565e-5 m3; name water_to_air_unspecified; = (water_UNO_input*fraction_PW_to_air); lognormal variance with pedigree 0.0807, pedigree (2,2,5,1,1)
  (same comment as for Water)
  property fraction, origin: fresh water 0; name fraction_origin_fresh_water
  property fraction, origin: unspecified 1; name fraction_origin_unspecified
  property fraction, origin: salt water 0; name fraction_origin_salt_water

## Sampling procedure
Based on literature (see Published Source)

## Extrapolations
This dataset has been extrapolated from year 2000 to the year of the calculation (2021). The uncertainty has been adjusted accordingly.

## Review by Hans-Jörg Althaus 2003-08-29
Passed
