# treatment of waste graphical paper, sanitary landfill

Dataset: EcoSpold 2, unit process
Geography: RoW
Time period: 1994-01-01 to 2021-12-31
Technology level: current
Classification: ISIC rev.4 ecoinvent: 3821:Treatment and disposal of non-hazardous waste
Classification: EcoSpold01Categories: waste management/sanitary landfill
Tags: Treatment
Scenario: Business-as-Usual
System model: Allocation, cut-off by classification
Generated by: Gabor Doka (obsolete)
Database: ecoinvent
isCopyrightProtected: true
accessRestrictedTo: 1

## General comment
Proxy dataset for landfilling of waste graphical paper, generated as a copy of a previous dataset for 'average paper' by Gabor Doka, with only adjustment of the uncertainty DQI. Upper heating value of waste: 16.61 MJ/kg; lower heating value of waste: 14.12 MJ/kg; Waste composition (wet, in ppm): H2O 110830; O 378670; H 53852; C 404000; S 1406.7; N 3756.6; P 112.95; B 17.19; Cl 1837.5; Br n.a.; F 19.468; I n.a.; Ag 0.047733; As 2.0485; Ba 114.24; Cd 1.6629; Co 0.7359; Cr 14.461; Cu 60.893; Hg 0.13902; Mn 40.221; Mo 4.2976; Ni 9.4431; Pb 80.374; Sb 0.70911; Se 2.5786; Sn n.a.; V n.a.; Zn 124.8; Be 0.97413; Sc n.a.; Sr 58.276; Ti 171.9; Tl 1.719; W n.a.; Si 21255; Fe 1188.4; Ca 3438.1; Al 12391; K 1327.5; Mg 4297.6; Na 918.83;
Share of carbon in waste that is biogenic 100%.
Overall degradability of waste during 100 years: 27%.
This is a dataset copied from a dataset from ecoSpold v1 / ecoinvent database version 2. It may not in all aspects fulfill the requirements of the ecoinvent data quality guideline for version 3.

## Included activities end
Waste-specific short-term emissions to air via landfill gas incineration and landfill leachate. Burdens from treatment of short-term leachate (0-100a) in wastewater treatment plant (including WWTP sludge disposal in municipal incinerator). Long-term emissions from landfill to groundwater (after base lining failure).

## Geography
Technology encountered in Switzerland in 2000. Landfill includes base seal, leachate collection system, treatment of leachate in municipal wastewater treatment plant.

## Technology
Swiss municipal sanitary landfill for biogenic or untreated municipal waste ('reactive organic landfill'). Landfill gas and leachate collection system. Recultivation and monitoring for 150 years after closure.

## Reference product
- waste graphical paper: -1 kg; name RP_amount_1; By-product classification Waste; CPC 39990: Other wastes n.e.c.
  production volume 6.59979e10 kg; name RP_PV_1; = 1.5E11*0.44
    Calculated based on literature value and estimates. The total production of graphical paper in the world in 2007 is 1.5E11kg (http://www.statista.com/statistics/167107/production-volume-of-paper-by-type/, accessed 20130313).
    Based on data from Europe the treatment technology shares are assumed to be as follows;
    28.7% of waste graphical paper is recycled
    27.3% of waste graphical paper is incinerated
    44.0% of waste graphical paper is landfilled
  property price 0 EUR2005; name RP_amount_1_price_EUR2005
  properties: wet mass 1 kg, water content 0.126126, carbon content, non-fossil 0.454955, dry mass 0.888 kg, carbon content, fossil 0, water in wet mass 0.112 kg, heating value, net 14.12 MJ, carbon content 0.454955, carbon allocation 0.404 kg

## Inputs from technosphere
- cement, unspecified: 0 kg; pedigree (1,1,1,1,1)
  burden from incineration of sludge from wastewater treatment of the short-term leachate (0-100a). uncertainty is calculated from uncertainties in waste composition and transfer coefficients in incinerator and uncertainty of waste decomposition and short-term leaching in sanitary landfill
  properties: dry mass 1 kg, wet mass 1 kg
- chemical, organic: 1.26e-7 kg; lognormal variance with pedigree 1.712, pedigree (1,1,5,5,4)
  (same comment as for cement, unspecified)
  properties: wet mass 1 kg, dry mass 1 kg, carbon content, fossil 0.628, heating value, net 19.03 MJ
  note on carbon content, fossil: This dataset is an unweighted average of 20 organic substances (listed in Tab 88.1, ecoinvent v2.2 report 8, part II), being part of the top100 chemicals included in this database. The C-content has also been calculated as an unweighted average of the C content of the substances composing this dataset.
- sodium hydroxide, without water, in 50% solution state: 1.8e-7 kg; lognormal variance with pedigree 0.402, pedigree (1,1,5,5,4)
  (same comment as for cement, unspecified)
  properties: heating value, net 3.03 MJ, wet mass 1 kg, dry mass 1 kg
- iron sulfate: 8.09e-6 kg; lognormal variance with pedigree 1.44, pedigree (5,5,5,5,5)
  burden from wastewater treatment of the short-term leachate (0-100a). Uncertainty calculated from unertainty of the waste composition of this waste, uncertainty in waste decomposition and short-term leaching in sanitary landfill
  properties: dry mass 1 kg, wet mass 1 kg
- hydrochloric acid, without water, in 30% solution state: 6.19e-9 kg; lognormal variance with pedigree 1.102, pedigree (1,1,5,5,4)
  (same comment as for cement, unspecified)
  properties: wet mass 1 kg, heating value, net 3.32 MJ, dry mass 1 kg
- chromium oxide, flakes: 2.08e-9 kg; lognormal variance with pedigree 0.8, pedigree (5,5,5,5,5)
  burden from incineration of sludge from wastewater treatment of the short-term leachate (0-100a). Proxy for vanadium pentoxide V2O5 in SCR catalyst, uncertainty calculated from uncertainty in average DeNOx input, uncertainty in the share of thermal NOx, uncertainty of nitrogen content in average municipal waste and the unertainty in nitrogen content in *this* waste and uncertainty of waste decomposition and short-term leaching in sanitary landfill
  properties: wet mass 1 kg, dry mass 1 kg
- wastewater treatment facility, capacity 5E9l/year: 1.42e-11 unit; lognormal variance with pedigree 0.2106, pedigree (5,5,5,5,5)
  (same comment as for iron sulfate)
- process-specific burdens, sanitary landfill: 1 kg; lognormal variance with pedigree 0.042, pedigree (1,1,5,5,1)
  demands per kilogram waste. uncertainty is heeded in the module
- aluminium sulfate, powder: 2.19e-6 kg; lognormal variance with pedigree 1.44, pedigree (5,5,5,5,5)
  (same comment as for iron sulfate)
  properties: wet mass 1 kg, dry mass 1 kg
- iron (III) chloride, without water, in 40% solution state: 1.12e-5 kg; lognormal variance with pedigree 1.342, pedigree (1,1,5,5,4)
  (same comment as for cement, unspecified)
  properties: dry mass 1 kg, wet mass 1 kg
- ammonia, anhydrous, liquid: 0 kg; pedigree (1,1,1,1,1)
  (same comment as for cement, unspecified)
  properties: wet mass 1 kg, dry mass 1 kg
- municipal waste incineration facility: 8.91e-13 unit; lognormal variance with pedigree 0.242, pedigree (1,1,5,5,4)
  Burden from incineration of sludge from wastewater treatment of the short-term leachate (0-100a).
- slag landfill: 1.72e-12 unit; lognormal variance with pedigree 0.372, pedigree (1,1,5,5,4)
  (same comment as for cement, unspecified)
- sanitary landfill facility: 5.56e-10 unit; lognormal variance with pedigree 0.042, pedigree (1,1,5,5,1)
  demands per kilogram waste. uncertainty is heeded in the module
- process-specific burdens, slag landfill: 0 kg; pedigree (1,1,1,1,1)
  (same comment as for cement, unspecified)
- electricity, low voltage: 0 kWh; pedigree (1,1,1,1,1)
  (same comment as for iron sulfate)
- waste plastic, mixture: -3.88e-5 kg; name BP_amount_1
  (same comment as for iron sulfate)
  production volume 2.5608e6 kg; = ABS( BP_amount_1/ RP_amount_1* RP_PV_1)
    Calculated from the production volume of waste paper, 11.2% water in proportion to the respective output amounts.
  property price 0 EUR2005; name BP_amount_1_price_EUR2005
  properties: heating value, net 30.79 MJ, carbon content, fossil 0.747344, dry mass 0.847 kg, water content 0.180638, wet mass 1 kg
  note on heating value, net: Value taken from the general comment of the treatment dataset.
  note on carbon content, fossil: C content in 1 kg DM was calculated using data in Tab A.2, ecoinvent v2.2 report 13_I
- waste graphical paper: -3.88e-5 kg; name BP_amount_2
  (same comment as for iron sulfate)
  production volume 2.5608e6 kg; = ABS( BP_amount_2/ RP_amount_1* RP_PV_1)
    (same comment as for waste plastic, mixture)
  property price 0 EUR2005; name BP_amount_2_price_EUR2005
  properties: carbon content, non-fossil 0.454955, dry mass 0.888 kg, heating value, net 14.12 MJ, wet mass 1 kg, water content 0.126126
- waste cement, hydrated: -0.000121 kg; name BP_amount_3
  (same comment as for cement, unspecified)
  production volume 7.986e6 kg; = ABS( BP_amount_3/ RP_amount_1* RP_PV_1)
    (same comment as for waste plastic, mixture)
  property price 0 EUR2005; name BP_amount_3_price_EUR2005
  properties: dry mass 1 kg, wet mass 1 kg
- titanium dioxide: 1.02e-7 kg; lognormal variance with pedigree 0.722, pedigree (1,1,5,5,4)
  (same comment as for cement, unspecified)
  properties: wet mass 1 kg, dry mass 1 kg
- process-specific burdens, residual material landfill: 0 kg; pedigree (1,1,1,1,1)
  (same comment as for cement, unspecified)
- chemical, inorganic: 1.03e-8 kg; lognormal variance with pedigree 1.102, pedigree (1,1,5,5,4)
  (same comment as for cement, unspecified)
  properties: carbon content, fossil 0.003, wet mass 1 kg, dry mass 1 kg
  note on carbon content, fossil: This dataset is an unweighted average of 20 inorganic substances (listed in Tab 88.1, ecoinvent v2.2 report 8, part II), being part of the top100 chemicals included in this database. The C-content has also been calculated as an unweighted average of the C content of the substances composing this dataset.
- residual material landfill: 2.51e-13 unit; lognormal variance with pedigree 0.322, pedigree (1,1,5,5,4)
  (same comment as for cement, unspecified)
- sewer grid, 5E9l/year, 110 km: 5.45e-10 km; lognormal variance with pedigree 0.2106, pedigree (5,5,5,5,5)
  (same comment as for iron sulfate)
- heat, district or industrial, other than natural gas: 0 MJ; pedigree (1,1,1,1,1)
  (same comment as for cement, unspecified)
  properties: heating value, net 1 MJ
- heat, central or small-scale, other than natural gas: 0 MJ; pedigree (1,1,1,1,1)
  (same comment as for iron sulfate)
  properties: heating value, net 1 MJ
- electricity, high voltage: 0 kWh; pedigree (1,1,1,1,1)
  (same comment as for cement, unspecified)
- process-specific burdens, municipal waste incineration: 0 kg; pedigree (1,1,1,1,1)
  (same comment as for municipal waste incineration facility)
- heat, district or industrial, natural gas: 0 MJ; pedigree (1,1,1,1,1)
  (same comment as for iron sulfate)
  properties: heating value, net 1 MJ
- quicklime, milled, packed: 3.26e-8 kg; lognormal variance with pedigree 0.402, pedigree (1,1,5,5,4)
  (same comment as for cement, unspecified)
  properties: water content 0.010101, wet mass 1 kg, dry mass 0.99 kg
- cement, unspecified: 6.97431e-6, 1.45115e-6, 1.06287e-7, 3.02952e-7, 6.85135e-6, 2.01655e-7, 2.21477e-6, 2.67963e-7, 2.99296e-5 kg (9 entries); lognormal variance with pedigree 0.322, pedigree (1,1,5,5,4)
  (same comment as for cement, unspecified)
- ammonia, anhydrous, liquid: 7.46222e-7, 6.41468e-8, 9.97958e-8, 1.97731e-7, 1.93724e-7, 2.03044e-8, 9.0768e-8, 2.14731e-6 kg (8 entries); lognormal variance with pedigree 0.492, pedigree (1,1,5,5,4)
  (same comment as for cement, unspecified)
- process-specific burdens, slag landfill: 0.000274388, 0.000695612 kg (2 entries); lognormal variance with pedigree 0.372, pedigree (1,1,5,5,4)
  (same comment as for cement, unspecified)
- electricity, low voltage: 0.0001472, 2.68023e-5, 0.000605029, 0.00211383, 0.00043155, 0.00662567, 0.00107192, 0.00307799 kWh (8 entries); lognormal variance with pedigree 0.39, pedigree (5,5,5,5,5)
  (same comment as for iron sulfate)
- process-specific burdens, residual material landfill: 3.42278e-5, 8.67722e-5 kg (2 entries); lognormal variance with pedigree 0.322, pedigree (1,1,5,5,4)
  (same comment as for cement, unspecified)
- heat, district or industrial, other than natural gas: 1.21198e-6, 0.00298879 MJ (2 entries); lognormal variance with pedigree 0.242, pedigree (1,1,5,5,4)
  (same comment as for cement, unspecified)
- heat, central or small-scale, other than natural gas: 9.38602e-6, 0.000683394 MJ (2 entries); lognormal variance with pedigree 0.36, pedigree (5,5,5,5,5)
  (same comment as for iron sulfate)
- electricity, high voltage: 6.06034e-6, 1.16182e-6, 2.6761e-5, 1.96987e-5, 0.000283654, 4.4985e-5, 0.000129679 kWh (7 entries); lognormal variance with pedigree 0.442, pedigree (1,1,5,5,4)
  (same comment as for cement, unspecified)
- process-specific burdens, municipal waste incineration: 0.00100703, 0.00255297 kg (2 entries); lognormal variance with pedigree 0.242, pedigree (1,1,5,5,4)
  (same comment as for municipal waste incineration facility)
- heat, district or industrial, natural gas: 1.41075e-5, 0.000338042, 0.00091535 MJ (3 entries); lognormal variance with pedigree 0.36, pedigree (5,5,5,5,5)
  (same comment as for iron sulfate)

## Emissions to nature
- Potassium, ion [water, surface water]: 0.000262 kg; lognormal variance with pedigree 0.772, pedigree (1,1,5,5,4)
  Emissions from short-term leachate treatment. Uncertainty calculated depending on waste input and uncertainty of transfer coefficents in landfill and wastewater treatment.
- Aluminium [water, surface water]: 1e-5 kg; lognormal variance with pedigree 0.762, pedigree (1,1,5,5,4)
  Emissions from short-term leachate treatment and incineration of resulting sludge. Uncertainty calculated depending on waste input and uncertainty of transfer coefficents in landfill, wastewater treatment and incineration model.
- Boron [water, surface water]: 1e-5 kg; lognormal variance with pedigree 1.282, pedigree (1,1,5,5,4)
  (same comment as for Aluminium)
- Zinc [air, urban air close to ground]: 1.8e-11 kg; lognormal variance with pedigree 1.422, pedigree (1,1,5,5,4)
  (same comment as for Aluminium)
- Mercury [air, non-urban air or from high stacks]: 1.03e-9 kg; lognormal variance with pedigree 2.302, pedigree (1,1,5,5,4)
  burden from direct release or incineration of landfill biogas. Uncertainty calculated from unertainty of the waste composition of this waste, uncertainty in waste decomposition and short-term leaching in sanitary landfill
- Sulfate [water, surface water]: 0.000439 kg; lognormal variance with pedigree 0.792, pedigree (1,1,5,5,4)
  (same comment as for Potassium, ion)
- Barium [water, ground-, long-term]: 0.000108 kg; lognormal variance with pedigree 0.762, pedigree (1,1,5,5,4)
  Emissions from long-term leachate (>100a) directly from MSW landfill and indirectly via incineration of treatement sludge from leachate treatement. Uncertainty calculated depending on waste input and uncertainty of long-term transfer coefficents in landfill.
- Magnesium [water, ground-, long-term]: 0.00365 kg; lognormal variance with pedigree 0.542, pedigree (1,1,5,5,4)
  (same comment as for Barium)
- Potassium [air, non-urban air or from high stacks]: 6.55e-8 kg; lognormal variance with pedigree 1.752, pedigree (1,1,5,5,4)
  (same comment as for Mercury)
- Barium [air, non-urban air or from high stacks]: 8.83e-9 kg; lognormal variance with pedigree 2.012, pedigree (1,1,5,5,4)
  (same comment as for Mercury)
- Sodium, ion [water, ground-, long-term]: 9.19e-13 kg; lognormal variance with pedigree 2.672, pedigree (1,1,5,5,4)
  (same comment as for Barium)
- COD, Chemical Oxygen Demand [water, ground-, long-term]: 0.0827 kg; lognormal variance with pedigree 0.662, pedigree (1,1,5,5,4)
  (same comment as for Barium)
- Beryllium [water, surface water]: 7.76e-9 kg; lognormal variance with pedigree 1.972, pedigree (1,1,5,5,4)
  (same comment as for Aluminium)
- Molybdenum [air, urban air close to ground]: 1.21e-10 kg; lognormal variance with pedigree 1.742, pedigree (1,1,5,5,4)
  (same comment as for Aluminium)
- Carbon monoxide, non-fossil [air, non-urban air or from high stacks]: 1.55e-5 kg; lognormal variance with pedigree 0.802, pedigree (1,1,5,5,4)
  (same comment as for Mercury)
- Titanium, ion [water, surface water]: 1.18e-6 kg; lognormal variance with pedigree 1.302, pedigree (1,1,5,5,4)
  (same comment as for Aluminium)
- Cadmium [air, non-urban air or from high stacks]: 5.27e-10 kg; lognormal variance with pedigree 2.392, pedigree (1,1,5,5,4)
  (same comment as for Mercury)
- Fluoride [water, surface water]: 3.86e-7 kg; lognormal variance with pedigree 1.552, pedigree (1,1,5,5,4)
  (same comment as for Potassium, ion)
- Cyanide [air, urban air close to ground]: 6.36e-8 kg; lognormal variance with pedigree 0.502, pedigree (1,1,5,5,4)
  (same comment as for Aluminium)
- Particulates, < 2.5 um [air, non-urban air or from high stacks]: 5.2e-6 kg; lognormal variance with pedigree 0.452, pedigree (1,1,5,5,4)
  (same comment as for Mercury)
- Zinc, ion [water, surface water]: 4.94e-7 kg; lognormal variance with pedigree 1.352, pedigree (1,1,5,5,4)
  (same comment as for Aluminium)
- Strontium [air, non-urban air or from high stacks]: 2.29e-10 kg; lognormal variance with pedigree 2.502, pedigree (1,1,5,5,4)
  (same comment as for Mercury)
- Phosphate [water, ground-, long-term]: 2.43e-6 kg; lognormal variance with pedigree 7.252, pedigree (1,1,5,5,4)
  (same comment as for Barium)
- Ammonium, ion [water, ground-, long-term]: 0.000499 kg; lognormal variance with pedigree 0.592, pedigree (1,1,5,5,4)
  (same comment as for Barium)
- Nickel, ion [water, surface water]: 8.99e-8 kg; lognormal variance with pedigree 1.662, pedigree (1,1,5,5,4)
  (same comment as for Aluminium)
- Potassium, ion [water, ground-, long-term]: 0.00107 kg; lognormal variance with pedigree 0.702, pedigree (1,1,5,5,4)
  (same comment as for Barium)
- Silicon [water, surface water]: 1.73e-5 kg; lognormal variance with pedigree 0.712, pedigree (1,1,5,5,4)
  (same comment as for Aluminium)
- Selenium [air, non-urban air or from high stacks]: 1.84e-11 kg; lognormal variance with pedigree 2.832, pedigree (1,1,5,5,4)
  (same comment as for Mercury)
- Thallium [air, non-urban air or from high stacks]: 6.75e-12 kg; lognormal variance with pedigree 2.962, pedigree (1,1,5,5,4)
  (same comment as for Mercury)
- Beryllium [air, urban air close to ground]: 7.53e-12 kg; lognormal variance with pedigree 2.002, pedigree (1,1,5,5,4)
  (same comment as for Aluminium)
- Hydrogen fluoride [air, non-urban air or from high stacks]: 2.1e-6 kg; lognormal variance with pedigree 1.382, pedigree (1,1,5,5,4)
  (same comment as for Mercury)
- Mercury [air, urban air close to ground]: 4.35e-15 kg; lognormal variance with pedigree 2.252, pedigree (1,1,5,5,4)
  (same comment as for Aluminium)
- Zinc, ion [water, ground-, long-term]: 0.000102 kg; lognormal variance with pedigree 1.022, pedigree (1,1,5,5,4)
  (same comment as for Barium)
- Aluminium [air, non-urban air or from high stacks]: 4.18e-8 kg; lognormal variance with pedigree 1.822, pedigree (1,1,5,5,4)
  (same comment as for Mercury)
- Manganese [air, non-urban air or from high stacks]: 3.11e-9 kg; lognormal variance with pedigree 2.152, pedigree (1,1,5,5,4)
  (same comment as for Mercury)
- Sodium, ion [water, surface water]: 0.000919 kg; lognormal variance with pedigree 0.752, pedigree (1,1,5,5,4)
  (same comment as for Potassium, ion)
- Nitrogen, organic bound [water, ground-, long-term]: 0.000815 kg; lognormal variance with pedigree 0.592, pedigree (1,1,5,5,4)
  (same comment as for Barium)
- Cobalt [water, surface water]: 3.24e-8 kg; lognormal variance with pedigree 1.822, pedigree (1,1,5,5,4)
  (same comment as for Aluminium)
- Carbon monoxide, non-fossil [air, urban air close to ground]: 6.23e-6 kg; lognormal variance with pedigree 0.512, pedigree (1,1,5,5,4)
  (same comment as for Aluminium)
- Chromium, ion [water, surface water]: 6.99e-11 kg; lognormal variance with pedigree 1.842, pedigree (1,1,5,5,4)
  (same comment as for Aluminium)
- Thallium [water, ground-, long-term]: 1.7e-6 kg; lognormal variance with pedigree 1.572, pedigree (1,1,5,5,4)
  (same comment as for Barium)
- Beryllium [air, non-urban air or from high stacks]: 3.82e-12 kg; lognormal variance with pedigree 3.032, pedigree (1,1,5,5,4)
  (same comment as for Mercury)
- Zinc [air, non-urban air or from high stacks]: 3.55e-10 kg; lognormal variance with pedigree 2.442, pedigree (1,1,5,5,4)
  (same comment as for Mercury)
- Beryllium [water, ground-, long-term]: 9.65e-7 kg; lognormal variance with pedigree 1.642, pedigree (1,1,5,5,4)
  (same comment as for Barium)
- Fluoride [water, ground-, long-term]: 1.71e-5 kg; lognormal variance with pedigree 1.262, pedigree (1,1,5,5,4)
  (same comment as for Barium)
- Mercury [water, ground-, long-term]: 1.36e-7 kg; lognormal variance with pedigree 1.902, pedigree (1,1,5,5,4)
  (same comment as for Barium)
- Lead [air, non-urban air or from high stacks]: 4.26e-11 kg; lognormal variance with pedigree 2.712, pedigree (1,1,5,5,4)
  (same comment as for Mercury)
- Chromium [air, non-urban air or from high stacks]: 1.11e-11 kg; lognormal variance with pedigree 2.892, pedigree (1,1,5,5,4)
  (same comment as for Mercury)
- Hydrogen chloride [air, non-urban air or from high stacks]: 1.8e-5 kg; lognormal variance with pedigree 1.032, pedigree (1,1,5,5,4)
  (same comment as for Mercury)
- Nitrogen oxides [air, urban air close to ground]: 2.21e-5 kg; lognormal variance with pedigree 0.402, pedigree (1,1,5,5,4)
  (same comment as for Aluminium)
- Antimony [air, non-urban air or from high stacks]: 5.05e-12 kg; lognormal variance with pedigree 3.002, pedigree (1,1,5,5,4)
  (same comment as for Mercury)
- Aluminium [water, ground-, long-term]: 0.0123 kg; lognormal variance with pedigree 0.422, pedigree (1,1,5,5,4)
  (same comment as for Barium)
- Copper, ion [water, surface water]: 2.09e-8 kg; lognormal variance with pedigree 1.722, pedigree (1,1,5,5,4)
  (same comment as for Aluminium)
- Calcium [air, non-urban air or from high stacks]: 3.02e-8 kg; lognormal variance with pedigree 1.862, pedigree (1,1,5,5,4)
  (same comment as for Mercury)
- Phosphate [water, surface water]: 1.84e-6 kg; lognormal variance with pedigree 1.342, pedigree (1,1,5,5,4)
  (same comment as for Aluminium)
- Strontium [air, urban air close to ground]: 4.51e-11 kg; lognormal variance with pedigree 1.472, pedigree (1,1,5,5,4)
  (same comment as for Aluminium)
- Antimony [water, surface water]: 1.37e-8 kg; lognormal variance with pedigree 1.942, pedigree (1,1,5,5,4)
  (same comment as for Aluminium)
- Nickel, ion [water, ground-, long-term]: 9.35e-6 kg; lognormal variance with pedigree 1.352, pedigree (1,1,5,5,4)
  (same comment as for Barium)
- Silver [air, urban air close to ground]: 0 kg; pedigree (1,1,1,1,1)
  (same comment as for Aluminium)
- BOD5, Biological Oxygen Demand [water, surface water]: 0.000631 kg; lognormal variance with pedigree 0.502, pedigree (1,1,5,5,4)
  (same comment as for Aluminium)
- Methane, non-fossil [air, non-urban air or from high stacks]: 0.0419 kg; lognormal variance with pedigree 0.192, pedigree (1,1,5,5,4)
  (same comment as for Mercury)
- Strontium [water, ground-, long-term]: 5.78e-5 kg; lognormal variance with pedigree 1.102, pedigree (1,1,5,5,4)
  (same comment as for Barium)
- Nitrate [water, ground-, long-term]: 5.5e-5 kg; lognormal variance with pedigree 0.562, pedigree (1,1,5,5,4)
  (same comment as for Barium)
- Chromium VI [water, surface water]: 2.33e-8 kg; lognormal variance with pedigree 1.812, pedigree (1,1,5,5,4)
  (same comment as for Aluminium)
- DOC, Dissolved Organic Carbon [water, surface water]: 0.000487 kg; lognormal variance with pedigree 0.502, pedigree (1,1,5,5,4)
  (same comment as for Aluminium)
- Arsenic, ion [water, ground-, long-term]: 1.96e-6 kg; lognormal variance with pedigree 1.552, pedigree (1,1,5,5,4)
  (same comment as for Barium)
- Dinitrogen monoxide [air, urban air close to ground]: 6.23e-6 kg; lognormal variance with pedigree 0.362, pedigree (1,1,5,5,4)
  (same comment as for Aluminium)
- Cobalt [water, ground-, long-term]: 7e-7 kg; lognormal variance with pedigree 1.622, pedigree (1,1,5,5,4)
  (same comment as for Barium)
- Barium [air, urban air close to ground]: 3.32e-8 kg; lognormal variance with pedigree 1.102, pedigree (1,1,5,5,4)
  (same comment as for Aluminium)
- Selenium [water, surface water]: 4.9e-8 kg; lognormal variance with pedigree 1.772, pedigree (1,1,5,5,4)
  (same comment as for Aluminium)
- Titanium [air, urban air close to ground]: 1.14e-9 kg; lognormal variance with pedigree 1.342, pedigree (1,1,5,5,4)
  (same comment as for Aluminium)
- Magnesium [air, non-urban air or from high stacks]: 1.79e-7 kg; lognormal variance with pedigree 1.622, pedigree (1,1,5,5,4)
  (same comment as for Mercury)
- Silver, ion [water, ground-, long-term]: 4.77e-8 kg; lognormal variance with pedigree 2.002, pedigree (1,1,5,5,4)
  (same comment as for Barium)
- Molybdenum [water, ground-, long-term]: 1.7e-6 kg; lognormal variance with pedigree 1.632, pedigree (1,1,5,5,4)
  (same comment as for Barium)
- Magnesium [water, surface water]: 0.000646 kg; lognormal variance with pedigree 0.632, pedigree (1,1,5,5,4)
  (same comment as for Aluminium)
- Chromium [air, urban air close to ground]: 1.62e-15 kg; lognormal variance with pedigree 1.922, pedigree (1,1,5,5,4)
  (same comment as for Aluminium)
- Iron [air, urban air close to ground]: 2.99e-10 kg; lognormal variance with pedigree 1.092, pedigree (1,1,5,5,4)
  (same comment as for Aluminium)
- Manganese [water, ground-, long-term]: 3.24e-5 kg; lognormal variance with pedigree 0.962, pedigree (1,1,5,5,4)
  (same comment as for Barium)
- Titanium [air, non-urban air or from high stacks]: 5.8e-10 kg; lognormal variance with pedigree 2.382, pedigree (1,1,5,5,4)
  (same comment as for Mercury)
- Titanium, ion [water, ground-, long-term]: 0.00017 kg; lognormal variance with pedigree 0.972, pedigree (1,1,5,5,4)
  (same comment as for Barium)
- COD, Chemical Oxygen Demand [water, surface water]: 0.002 kg; lognormal variance with pedigree 0.502, pedigree (1,1,5,5,4)
  (same comment as for Aluminium)
- Copper [air, urban air close to ground]: 4.4e-13 kg; lognormal variance with pedigree 1.802, pedigree (1,1,5,5,4)
  (same comment as for Aluminium)
- Manganese [water, surface water]: 6.31e-6 kg; lognormal variance with pedigree 1.202, pedigree (1,1,5,5,4)
  (same comment as for Aluminium)
- Cadmium [air, urban air close to ground]: 2.16e-12 kg; lognormal variance with pedigree 1.832, pedigree (1,1,5,5,4)
  (same comment as for Aluminium)
- Barium [water, surface water]: 2.12e-6 kg; lognormal variance with pedigree 1.092, pedigree (1,1,5,5,4)
  (same comment as for Aluminium)
- Mercury [water, surface water]: 8.14e-10 kg; lognormal variance with pedigree 2.202, pedigree (1,1,5,5,4)
  (same comment as for Aluminium)
- Calcium [air, urban air close to ground]: 1.98e-8 kg; lognormal variance with pedigree 0.842, pedigree (1,1,5,5,4)
  (same comment as for Aluminium)
- Aluminium [air, urban air close to ground]: 2.46e-7 kg; lognormal variance with pedigree 0.792, pedigree (1,1,5,5,4)
  (same comment as for Aluminium)
- Sodium [air, non-urban air or from high stacks]: 2.3e-7 kg; lognormal variance with pedigree 1.582, pedigree (1,1,5,5,4)
  (same comment as for Mercury)
- Silicon [water, ground-, long-term]: 0.000425 kg; lognormal variance with pedigree 4.132, pedigree (1,1,5,5,4)
  (same comment as for Barium)
- Chloride [water, surface water]: 0.00126 kg; lognormal variance with pedigree 0.662, pedigree (1,1,5,5,4)
  (same comment as for Potassium, ion)
- Thallium [water, surface water]: 1.37e-8 kg; lognormal variance with pedigree 1.902, pedigree (1,1,5,5,4)
  (same comment as for Aluminium)
- Silver, ion [water, surface water]: 1.64e-11 kg; lognormal variance with pedigree 2.622, pedigree (1,1,5,5,4)
  (same comment as for Aluminium)
- Nitrite [water, surface water]: 2.58e-5 kg; lognormal variance with pedigree 0.572, pedigree (1,1,5,5,4)
  (same comment as for Aluminium)
- TOC, Total Organic Carbon [water, ground-, long-term]: 0.0756 kg; lognormal variance with pedigree 0.662, pedigree (1,1,5,5,4)
  (same comment as for Barium)
- Thallium [air, urban air close to ground]: 1.33e-11 kg; lognormal variance with pedigree 1.932, pedigree (1,1,5,5,4)
  (same comment as for Aluminium)
- Arsenic [air, non-urban air or from high stacks]: 1.39e-9 kg; lognormal variance with pedigree 2.262, pedigree (1,1,5,5,4)
  (same comment as for Mercury)
- Antimony [air, urban air close to ground]: 9.94e-13 kg; lognormal variance with pedigree 2.592, pedigree (1,1,5,5,4)
  (same comment as for Aluminium)
- Strontium [water, surface water]: 4.65e-7 kg; lognormal variance with pedigree 1.432, pedigree (1,1,5,5,4)
  (same comment as for Aluminium)
- Hydrogen sulfide [water, ground-, long-term]: 9.04e-5 kg; lognormal variance with pedigree 0.702, pedigree (1,1,5,5,4)
  (same comment as for Barium)
- Carbon dioxide, non-fossil [air, urban air close to ground]: 0.00912 kg; lognormal variance with pedigree 0.502, pedigree (1,1,5,5,4)
  (same comment as for Aluminium)
- Nitrate [water, surface water]: 0.00447 kg; lognormal variance with pedigree 0.372, pedigree (1,1,5,5,4)
  (same comment as for Aluminium)
- Copper, ion [water, ground-, long-term]: 6.09e-5 kg; lognormal variance with pedigree 1.112, pedigree (1,1,5,5,4)
  (same comment as for Barium)
- Boron [air, urban air close to ground]: 1.02e-6 kg; lognormal variance with pedigree 1.302, pedigree (1,1,5,5,4)
  (same comment as for Aluminium)
- Arsenic [air, urban air close to ground]: 2.8e-11 kg; lognormal variance with pedigree 1.782, pedigree (1,1,5,5,4)
  (same comment as for Aluminium)
- Ammonia [air, urban air close to ground]: 2.26e-6 kg; lognormal variance with pedigree 0.412, pedigree (1,1,5,5,4)
  (same comment as for Aluminium)
- Sulfate [water, ground-, long-term]: 0.00347 kg; lognormal variance with pedigree 0.702, pedigree (1,1,5,5,4)
  (same comment as for Barium)
- TOC, Total Organic Carbon [water, surface water]: 0.000507 kg; lognormal variance with pedigree 0.502, pedigree (1,1,5,5,4)
  (same comment as for Aluminium)
- Silicon [air, urban air close to ground]: 6.28e-7 kg; lognormal variance with pedigree 0.732, pedigree (1,1,5,5,4)
  (same comment as for Aluminium)
- Iron, ion [water, surface water]: 2.24e-6 kg; lognormal variance with pedigree 1.202, pedigree (1,1,5,5,4)
  (same comment as for Aluminium)
- Nitrogen [water, surface water]: 3.33e-5 kg; lognormal variance with pedigree 0.392, pedigree (1,1,5,5,4)
  (same comment as for Aluminium)
- Sulfur dioxide [air, non-urban air or from high stacks]: 4.96e-5 kg; lognormal variance with pedigree 0.992, pedigree (1,1,5,5,4)
  (same comment as for Mercury)
- Carbon dioxide, non-fossil [air, non-urban air or from high stacks]: 0.273 kg; lognormal variance with pedigree 0.152, pedigree (1,1,5,5,4)
  (same comment as for Mercury)
- DOC, Dissolved Organic Carbon [water, ground-, long-term]: 0.0756 kg; lognormal variance with pedigree 0.662, pedigree (1,1,5,5,4)
  (same comment as for Barium)
- Iron [air, non-urban air or from high stacks]: 1.1e-9 kg; lognormal variance with pedigree 2.292, pedigree (1,1,5,5,4)
  (same comment as for Mercury)
- NMVOC, non-methane volatile organic compounds, unspecified origin [air, urban air close to ground]: 8.11e-8 kg; lognormal variance with pedigree 0.672, pedigree (1,1,5,5,4)
  (same comment as for Aluminium)
- Silver [air, non-urban air or from high stacks]: 1.8e-14 kg; lognormal variance with pedigree 3.692, pedigree (1,1,5,5,4)
  (same comment as for Mercury)
- Magnesium [air, urban air close to ground]: 9.67e-8 kg; lognormal variance with pedigree 0.662, pedigree (1,1,5,5,4)
  (same comment as for Aluminium)
- Lead [water, ground-, long-term]: 8.03e-5 kg; lognormal variance with pedigree 1.082, pedigree (1,1,5,5,4)
  (same comment as for Barium)
- Boron [water, ground-, long-term]: 5.58e-6 kg; lognormal variance with pedigree 1.302, pedigree (1,1,5,5,4)
  (same comment as for Barium)
- Selenium [water, ground-, long-term]: 7.31e-7 kg; lognormal variance with pedigree 1.892, pedigree (1,1,5,5,4)
  (same comment as for Barium)
- Selenium [air, urban air close to ground]: 0 kg; pedigree (1,1,1,1,1)
  (same comment as for Aluminium)
- Cadmium, ion [water, ground-, long-term]: 1.58e-6 kg; lognormal variance with pedigree 1.592, pedigree (1,1,5,5,4)
  (same comment as for Barium)
- Ammonium, ion [water, surface water]: 0.00123 kg; lognormal variance with pedigree 0.422, pedigree (1,1,5,5,4)
  (same comment as for Aluminium)
- Lead [water, surface water]: 1.41e-8 kg; lognormal variance with pedigree 1.662, pedigree (1,1,5,5,4)
  (same comment as for Aluminium)
- Manganese [air, urban air close to ground]: 3.34e-14 kg; lognormal variance with pedigree 1.342, pedigree (1,1,5,5,4)
  (same comment as for Aluminium)
- Lead [air, urban air close to ground]: 4.23e-12 kg; lognormal variance with pedigree 1.722, pedigree (1,1,5,5,4)
  (same comment as for Aluminium)
- Antimony [water, ground-, long-term]: 7.55e-8 kg; lognormal variance with pedigree 2.942, pedigree (1,1,5,5,4)
  (same comment as for Barium)
- Cobalt [air, non-urban air or from high stacks]: 1.6e-11 kg; lognormal variance with pedigree 2.842, pedigree (1,1,5,5,4)
  (same comment as for Mercury)
- Silicon [air, non-urban air or from high stacks]: 7.17e-8 kg; lognormal variance with pedigree 1.762, pedigree (1,1,5,5,4)
  (same comment as for Mercury)
- Calcium, ion [water, surface water]: 0.000109 kg; lognormal variance with pedigree 0.802, pedigree (1,1,5,5,4)
  (same comment as for Aluminium)
- Nickel [air, non-urban air or from high stacks]: 3.71e-11 kg; lognormal variance with pedigree 2.742, pedigree (1,1,5,5,4)
  (same comment as for Mercury)
- Cadmium, ion [water, surface water]: 4.01e-8 kg; lognormal variance with pedigree 1.772, pedigree (1,1,5,5,4)
  (same comment as for Aluminium)
- Molybdenum [air, non-urban air or from high stacks]: 3.06e-11 kg; lognormal variance with pedigree 2.762, pedigree (1,1,5,5,4)
  (same comment as for Mercury)
- Molybdenum [water, surface water]: 7.24e-8 kg; lognormal variance with pedigree 1.702, pedigree (1,1,5,5,4)
  (same comment as for Aluminium)
- Methane, non-fossil [air, urban air close to ground]: 1.79e-5 kg; lognormal variance with pedigree 0.552, pedigree (1,1,5,5,4)
  (same comment as for Aluminium)
- Chloride [water, ground-, long-term]: 0.000571 kg; lognormal variance with pedigree 0.682, pedigree (1,1,5,5,4)
  (same comment as for Barium)
- Arsenic, ion [water, surface water]: 8.75e-8 kg; lognormal variance with pedigree 1.742, pedigree (1,1,5,5,4)
  (same comment as for Aluminium)
- Copper [air, non-urban air or from high stacks]: 2.3e-11 kg; lognormal variance with pedigree 2.802, pedigree (1,1,5,5,4)
  (same comment as for Mercury)
- Nitrogen oxides [air, non-urban air or from high stacks]: 6.54e-7 kg; lognormal variance with pedigree 0.812, pedigree (1,1,5,5,4)
  (same comment as for Mercury)
- Nitrite [water, ground-, long-term]: 2.71e-5 kg; lognormal variance with pedigree 0.592, pedigree (1,1,5,5,4)
  (same comment as for Barium)
- NMVOC, non-methane volatile organic compounds, unspecified origin [air, non-urban air or from high stacks]: 2.93e-7 kg; lognormal variance with pedigree 0.192, pedigree (1,1,5,5,4)
  (same comment as for Mercury)
- Calcium, ion [water, ground-, long-term]: 0.00333 kg; lognormal variance with pedigree 0.582, pedigree (1,1,5,5,4)
  (same comment as for Barium)
- Cobalt [air, urban air close to ground]: 0 kg; pedigree (1,1,1,1,1)
  (same comment as for Aluminium)
- BOD5, Biological Oxygen Demand [water, ground-, long-term]: 0.0196 kg; lognormal variance with pedigree 0.662, pedigree (1,1,5,5,4)
  (same comment as for Barium)
- Chromium VI [water, ground-, long-term]: 6.76e-8 kg; lognormal variance with pedigree 8.582, pedigree (1,1,5,5,4)
  (same comment as for Barium)
- Nickel [air, urban air close to ground]: 2.52e-15 kg; lognormal variance with pedigree 1.782, pedigree (1,1,5,5,4)
  (same comment as for Aluminium)
- Phosphorus [air, urban air close to ground]: 1.08e-9 kg; lognormal variance with pedigree 1.382, pedigree (1,1,5,5,4)
  (same comment as for Aluminium)
- Iron, ion [water, ground-, long-term]: 8.71e-5 kg; lognormal variance with pedigree 2.412, pedigree (1,1,5,5,4)
  (same comment as for Barium)

## Sampling procedure
Landfill model based on observed leachate concentrations in literature. Extrapolated to 60'000 years heeding chemical characteristics. Initial waste composition from various literature sources.

## Extrapolations
This dataset has been copied from an original dataset covering the geography CH. Copied directly (no extrapolation) from a dataset on 'average paper'. Uncertainty adjusted accordingly.
