# wood preservation, dipping/immersion, solvent-based preservative, outdoor use, no ground contact

Dataset: EcoSpold 2, unit process
Geography: RoW
Time period: 2012-01-01 to 2021-12-31
Technology level: current
Classification: EcoSpold01Categories: wooden materials/refinement
Classification: ISIC rev.4 ecoinvent: 1610:Sawmilling and planing of wood
Synonyms: open tank impregnation
Scenario: Business-as-Usual
System model: Allocation, cut-off by classification
Generated by: trainee ecoinvent
Database: ecoinvent
isCopyrightProtected: true
accessRestrictedTo: 1

## General comment
This dataset covers the treatment of wood in open vat impregnation. The dipping/immersion process is considered to be a surface treatment and not a deep penetration treatment. Wood preservatives do not penetrate the wood more than three milimeters. We can distinguish two main types of industrial branches applying dipping/immersion for wood preservation purposes: a) sawmilling where freshly cut wood is treated with fungicides to prevent the discoloration caused by blue stain forming fungi; this treatment aims for a short-term preservation of wood until it is further processed, and b) joinery industry and carpentry shops: "joinery applications" are industrial processes to creating wood articles that have been made to shape, for example fence panels, composites, window, doors and door frames, floors, architrave, decorative features, etc; carpentry shops fabricate wooden construction materials and treat them for long term protection against insects and fungi. Despite some small differences in the operation and infrastructure, dipping/immersion applied by the two industrial sectors can be described by a generic "dipping/immersion" emission scenario (OECD 2000, p.38ff).
Both automatic and manual dipping/immersion are batch processes. It involves submerging a pack or a single piece of wood into the dipping vat filled with a solution containing the preservative. Packs of wood are loaded on automatic equipment (e.g. hydraulic elevator) and lowered into a dipping vat. Wood remains there for a period usually between a few minutes and an hour (it is less than 30 seconds fro sawmill anti-sapstain treatments but can last for several days for other applications, e.g. for cold soaking or steeping) during which the wood absorbs the preservative through capillary forces and diffusion. Dipping baths can be heated in cold climate conditions. The treated wood is held over the dipping vat, usually for 30 minutes to an hour, in order the excess of the preservative solution to drain. Drips are usually collected and recycled into the process. Then the treated wood is removed to storage. Dipping facilities may be open or encapsulated, equipped with vapour trapping and air emission control.
Application on surface: 200 g/m2; application via pressure treatment: 12 kg/m3 to 33.4 kg/m3, depending on targeted biological agent
Characterisation of preservative: active agent: 0.75% IPBC, 0.24% Propiconazole, 0.1% Cypermethrin; concentration for application: 100% v/v
Wood is not included in the dataset.
The process does not cause any waste water; preservatives from dripping or leaching during storage are recovered and recycled. Emissions into air and into surface water from run-off water are calculated based on emission factors (EF) as determined in OECD (2000, part 1), depending on the physical properties of the main componentes of the wood preservative. It is assumed in addition that all solvents (incl. water) are evaporated during drying and fixation. For acids, alkydic resins and salts, no emissions into air are inventoried. The determination of emission factors is documented in the following table:
Sources:
Sources:
OECD (2000): Emission scenario document for wood preservatives, part 1. OECD series on emission scenario documents, number 2, Organisation for Economic Co-operation and Development, Paris.
Personal written communications of several producers and/or researchers (see source fields for each exchange)

## Included activities start
Service starting with the reception of the wood preservative at the factory gate

## Included activities end
The data set contains the treatment service of dried wood with wood preservative (primer) for use class 3 (outdoor use, no ground contact) based on organic solvents in the dipping/immersion process. It covers the necessary inputs of the wood preservative, electricity as well as some infrastructure. For the inventorying of emissions into surface water and air, see general comment. The dataset does not include wood. Also eventual waste streams (e.g. saw dust recollected from the dipping/immersion vat) are not included.

## Parameters
- scaling factor: 3.96481 dimensionless; name scaling_factor
- share of collected rainwater: 0.5 dimensionless; name share_collected_rainwater
  share of the rainwater that is colleced and lead into the sewer contrary to run-off water; default value according to OECD (2000, part 1)
- efficiency of air filter: 0.75 dimensionless; name efficiency_air_filter
  According to EPA 1999 (p. 10.8-5) 'the result of one emission test on the incinerator-controlled facility indicated a VOC control efficiency of more than 99 percent'. Other emissions control devices such as knock-out tanks followed by a ventury scrubber are indicated to have a VOC control efficiency of 75% (same source).

## Reference product
- wood preservation, dipping/immersion method, organic solvent-based, outdoor use, no ground contact: 1 kg; = 0.252219003854564 * scaling_factor; CPC 54730: Painting services; By-product classification allocatable product
  Amount was scaled to 1.
  production volume 1.26202e7 kg; name p_preservation; = 3.65E09 * 0.5 *0.08 * 0.28 /3
    Using the GLO value of 3.65E09 kg preservative derived from Vlosky (2009), the distribution on solvent-based (8%), the 50% non-pressure methods, the German data of 28% dipping/immersions and 72% flow coating and the assumption of equal distribution over the 3 use classes, we obtain: 3.65E09 kg * 0.5 (non-pressure) *0.08 (solvent) * 0.28 (dip)/3 use classes = 1.36E7kg
  property price 0.772524 EUR2005
    Calculated based on inputs: The price of the product has been calculated as a sum of the values of the material and energy inputs for this product. This value is therefore a rough estimation. It may underestimate the real price since there are additional expenses when producing any product. These expences can include for example labour costs, treatment of waste materials and profit for the producer. Please consider carefully whether this level of data quality is acceptable for your application.

## Inputs from technosphere
- waste mineral oil: -0.000194444 kg; name w_mineral_oil; = (4.90425840828318E-05 * scaling_factor)*-1; source Hubel M. 2012; lognormal variance with pedigree 0.01, pedigree (1,1,4,5,1)
  = disposal of hydraulic (lubricating) oil
  Amount was scaled to the amount of reference product.
  production volume 2453.93 kg; = p_preservation*w_mineral_oil
    calculated from production of reference product
  property price 0 EUR2005; name w_mineral_oil_price_EUR2005
  properties: carbon content, fossil 0.864444, dry mass 0.9 kg, wet mass 1 kg, water content 0.111111, heating value, net 34.7 MJ
  note on heating value, net: Value taken from the general comment of the treatment dataset.
- lubricating oil: 0.000194444 kg; name m_lubricating_oil; = 4.90425840828318E-05 * scaling_factor; source Hubel M. 2012; lognormal variance with pedigree 0.0126, pedigree (1,4,4,5,1)
  35 kg every 3 years at an annual production o 6000 m3, equalling 50 m2/m3 at 200 ml wood preservative/m2
  Amount was scaled to the amount of reference product.
  property dry mass 1 kg; name m_lubricating_oil_DM
  properties: heating value, net 40.2 MJ, carbon content, fossil 0.75
  note on heating value, net: Literature value, Source: IPCC 2006, 2006 IPCC Guidelines for National Greenhouse Gas Inventories, Prepared by the National Greenhouse Gas Inventories Programme, Eggleston H.S., Buendia L., Miwa K., Ngara T. and Tanabe K. (eds). Published: IGES, Japan
- wood preservation facility, dipping/immersion tank: 2.22222e-7 unit; = 5.60486675232365E-08 * scaling_factor; source Hubel M. 2012; lognormal variance with pedigree 0.38, pedigree (3,5,4,5,1)
  1 plant per 75 years of service life at 6000 m3/year, 50 m2/m3 and an input of 0.2 kg of wood preservative
  Amount was scaled to the amount of reference product.
- electricity, medium voltage: 0 kWh; source Künniger T. 2000; pedigree (1,1,1,1,1)
  2 minutes with 3 kW motor per 14 m3, 50 m2/m3 and 0.2 kg/m2
  Amount was scaled to the amount of reference product.
- wood preservative, organic, outdoor use, no ground contact: 1 kg; = 0.252219003854564 * scaling_factor; lognormal variance with pedigree 0.0106, pedigree (1,3,4,5,1)
  Amount was scaled to the amount of reference product.
- electricity, medium voltage: 9.00371e-6, 1.72652e-6, 2.89847e-5, 0.000421557, 5.94187e-5, 0.000193595 kWh (6 entries); source Künniger T. 2000; lognormal variance with pedigree 0.022, pedigree (1,4,4,5,1)
  (same comment as for electricity, medium voltage)

## Emissions to nature
- 2-Methyl-1-propanol [air, non-urban air or from high stacks]: 0.0202973 kg; = 0.00511935217598706 * scaling_factor; source OECD 2000; lognormal variance with pedigree 0.172, pedigree (3,5,5,5,1)
  scenario according to (OECD 2000, p. 38ff); proxy for more complex aliphatic alcohols
  Amount was scaled to the amount of reference product.
  property carbon content, fossil 0.648168; name C_content_fossil_Methyl_propanol
- 1,4-Butanediol [air, non-urban air or from high stacks]: 0.001552 kg; = 0.000391443893982284 * scaling_factor; source OECD 2000; lognormal variance with pedigree 0.172, pedigree (3,5,5,5,1)
  scenario according to (OECD 2000, p.38ff); proxy for a more complex aliphatic diol
  Amount was scaled to the amount of reference product.
  property carbon content, fossil 0.533098; name C_content_fossil_Butanediol
- Propiconazole [water, surface water]: 3.6e-5 kg; = 9.07988413876432E-06 * scaling_factor; source OECD 2000; lognormal variance with pedigree 0.352, pedigree (3,5,5,5,1)
  scenario according to (OECD 2000, p. 38ff)
  Amount was scaled to the amount of reference product.
- Propiconazole [air, non-urban air or from high stacks]: 6e-7 kg; = 1.51331402312739E-07 * scaling_factor; source OECD 2000; lognormal variance with pedigree 0.172, pedigree (3,5,5,5,1)
  (same comment as for Propiconazole)
  property carbon content, fossil 0.525977; name C_content_fossil_Propiconazole
- Carbon dioxide, fossil [air, non-urban air or from high stacks]: 2.12682 kg; = (0.84*1* C_content_fossil_NMVOC+0.001*0.001* C_content_fossil_Cypermethrin+0.0024*0.001* C_content_fossil_Propiconazole+0.0075*0.02* C_content_fossil_IPBC+(0.0313*0.97+0.0524*0.97)* C_content_fossil_Methyl_propanol+0.0064*0.97* C_content_fossil_Butanediol)*efficiency_air_filter/12*44; lognormal variance with pedigree 0.05, pedigree (5,1,4,5,1)
  assuming that all C retained in the filter is finally converted to CO2, irrespective of the filter technology
  Amount was scaled to the amount of reference product.
- Butylcarbamate, iodopropynyl [air, non-urban air or from high stacks]: 3.75e-5 kg; = 9.45821264454616E-06 * scaling_factor; source OECD 2000; lognormal variance with pedigree 0.172, pedigree (3,5,5,5,1)
  (same comment as for Propiconazole)
  property carbon content, fossil 0.341527; name C_content_fossil_IPBC
- Butylcarbamate, iodopropynyl [water, surface water]: 0.0001125 kg; = 2.83746379336385E-05 * scaling_factor; source OECD 2000; lognormal variance with pedigree 0.352, pedigree (3,5,5,5,1)
  (same comment as for Propiconazole)
- NMVOC, non-methane volatile organic compounds, unspecified origin [air, non-urban air or from high stacks]: 0.21 kg; = 0.0529659908094585 * scaling_factor; source OECD 2000; lognormal variance with pedigree 0.172, pedigree (3,5,5,5,1)
  scenario according to (OECD 2000. p. 38ff); proxy for naphta
  Amount was scaled to the amount of reference product.
  property carbon content, non-fossil 0; name C_content_non_fossil_NMVOC
  property carbon content, fossil 0.854049; name C_content_fossil_NMVOC
- 1,4-Butanediol [water, surface water]: 9.6e-5 kg; = 2.42130243700382E-05 * scaling_factor; source OECD 2000; lognormal variance with pedigree 0.352, pedigree (3,5,5,5,1)
  (same comment as for 1,4-Butanediol)
- 2-Methyl-1-propanol [water, surface water]: 0.0012555 kg; = 0.000316660959339406 * scaling_factor; source OECD 2000; lognormal variance with pedigree 0.052, pedigree (3,5,5,5,1)
  (same comment as for 2-Methyl-1-propanol)
  property carbon content, fossil 0.648168; name C_content_fossil
- Cypermethrin [air, non-urban air or from high stacks]: 2.5e-7 kg; = 6.30547509636411E-08 * scaling_factor; source OECD 2000; lognormal variance with pedigree 0.172, pedigree (3,5,5,5,1)
  (same comment as for Propiconazole)
  property carbon content, fossil 0.634734; name C_content_fossil_Cypermethrin

## Sampling procedure
Plant measurements for input of energy, water, etc. Estimates based on literature for air-borne emissions and emissions into water.

## Extrapolations
Calculated as weighted average of existing local data
