# electricity, high voltage, production mix

Dataset: EcoSpold 2, unit process, production mix
Geography: CN-JS
Time period: 2021-01-01 to 2021-12-31
Scenario: Business-as-Usual
System model: Allocation, cut-off by classification
Generated by: [System]
Database: ecoinvent
isCopyrightProtected: false
accessRestrictedTo: 1

## Reference product
- electricity, high voltage: 1 kWh; By-product classification allocatable product; CPC 17100: Electrical energy
  production volume 8.35207e11 kWh

## Inputs from technosphere
- electricity, high voltage: 0.925262 kWh
  production volume 7.72786e11 kWh
  properties: price 0.0977 EUR2005
- electricity, high voltage: 0.00138207 kWh
  production volume 1.15431e9 kWh
- electricity, high voltage: 0.00140143 kWh
  production volume 1.17049e9 kWh
- electricity, high voltage: 0.0205154 kWh
  production volume 1.71346e10 kWh
- electricity, high voltage: 0.00192583 kWh
  production volume 1.60847e9 kWh
- electricity, high voltage: 0.0368757 kWh
  production volume 3.07988e10 kWh
- electricity, high voltage: 0.000943528 kWh
  production volume 7.88041e8 kWh
- electricity, high voltage: 0.00121086 kWh
  production volume 1.01132e9 kWh
- electricity, high voltage: 0.0029544 kWh
  production volume 2.46754e9 kWh
- electricity, high voltage: 0.0030073 kWh
  production volume 2.51172e9 kWh
- electricity, high voltage: 0.00350728 kWh
  production volume 2.92931e9 kWh
- electricity, high voltage: 0.00101412 kWh
  production volume 8.47e8 kWh
  properties: price 0.0977 EUR2005, exergy 3.6 MJ
  note on exergy: This exergy property is based on the exergy content of the product.
