# magnesium-alloy production, AZ91, diecasting

Dataset: EcoSpold 2, unit process
Geography: RER
Time period: 1998-01-01 to 2021-12-31
Technology level: current
Classification: ISIC rev.4 ecoinvent: 2420:Manufacture of basic precious and other non-ferrous metals
Classification: EcoSpold01Categories: metals/extraction
Tags: ConvertedDataset
Scenario: Business-as-Usual
System model: Allocation, cut-off by classification
Generated by: Niels Jungbluth
Published in: Althaus H.-J. 2000
Database: ecoinvent
isCopyrightProtected: true
accessRestrictedTo: 1

## General comment
Large uncertainties exist for data on energy use and SF6 emissions during magnesium diecasting. This inventory describes an assumption for the average production.
[This dataset was already contained in the ecoinvent database version 2. It was not individually updated during the transfer to ecoinvent version 3. Life Cycle Impact Assessment results may still have changed, as they are affected by changes in the supply chain, i.e. in other datasets. This dataset was generated following the ecoinvent quality guidelines for version 2. It may have been subject to central changes described in the ecoinvent version 3 change report (http://www.ecoinvent.org/database/ecoinvent-version-3/reports-of-changes/), and the results of the central updates were reviewed extensively. The changes added e.g. consistent water flows and other information throughout the database. The documentation of this dataset can be found in the ecoinvent reports of version 2, which are still available via the ecoinvent website. The change report linked above covers all central changes that were made during the conversion process.]

## Included activities end
Diecasting process, no extra infrastructure.

## Geography
Data for 1 producer

## Technology
Diecasting of AZ91, no recycling

## Time period
Environmental report

## Reference product
- magnesium-alloy, AZ91, diecast: 1 kg; CPC 41601: Tungsten, molybdenum, tantalum, magnesium, cobalt, cadmium, titanium, zirconium, beryllium, gallium, hafnium, […]; By-product classification allocatable product
  EcoSpold01Location=RER
  production volume 1.32237 kg
    This is a placeholder value that does not reflect real-world production volumes. This dataset does not currently require a real-world production volume to work in the database framework, and no actual data were collected yet. This has no negative effect on the results of the ecoinvent database. The placeholder value of this activity was scaled according to the nominal GDP of 2005 (source: United Nations, http://data.un.org/Glossary.aspx?q=GDP+%28current+US%24%29, accessed 20130726) to reflect an appropriate share of the global production volume, which is also a placeholder value.
  property carbon content, fossil 0
    The magnesium alloy AZ91D (also known as M11916 or DIN GD-MgAl9Zn1) is the most common one for the production of die-castings. It contains 9.1% aluminium and small amounts of copper, zinc and manganese (ecoinvent v2.2 report 10-part VIII)
  property price 17.4091 EUR2005
    Calculated based on inputs: The price of the product has been calculated as a sum of the values of the material and energy inputs for this product. This value is therefore a rough estimation. It may underestimate the real price since there are additional expenses when producing any product. These expences can include for example labour costs, treatment of waste materials and profit for the producer. Please consider carefully whether this level of data quality is acceptable for your application.
  property carbon content, non-fossil 0
    (same comment as for magnesium-alloy, AZ91, diecast)
  property carbon content 0
    carbon content on a dry matter basis (reserved; not for manual entry)
  properties: wet mass 1 kg, dry mass 1 kg, water in wet mass 0 kg, water content 0, carbon allocation 0 kg

## Inputs from technosphere
- electricity, medium voltage: 2.22 kWh; lognormal variance with pedigree 0.08, pedigree (1,1,5,1,1)
  Literature estimation
  EcoSpold01Location=UCTE
- sulfur hexafluoride, liquid: 0.001 kg; lognormal variance with pedigree 0.0507, pedigree (2,2,5,1,1)
  EcoSpold01Location=RER
  Literature
  Uncertainty: Literature
  properties: dry mass 1 kg, wet mass 1 kg
- magnesium-alloy, AZ91: 1.67 kg; lognormal variance with pedigree 0.0507, pedigree (2,2,5,1,1)
  Literature
  EcoSpold01Location=RER
  Uncertainty: Literature
  properties: wet mass 1 kg, dry mass 1 kg

## Emissions to nature
- Sulfur hexafluoride [air, non-urban air or from high stacks]: 0.001 kg; lognormal variance with pedigree 0.1007, pedigree (2,2,5,1,1)
  Literature
  Uncertainty: Literature

## Sampling procedure
Environmental data from an important producer

## Extrapolations
This dataset has been extrapolated from year 1998 to the year of the calculation (2021). The uncertainty has been adjusted accordingly.

## Review by Mischa Classen 2003-06-13
passed
