# cable yarder with sled winch production

Dataset: EcoSpold 2, unit process
Geography: GLO
Time period: 2012-01-01 to 2021-12-31
Technology level: current
Classification: ISIC rev.4 ecoinvent: 2821:Manufacture of agricultural and forestry machinery
Synonyms: sledge yarder
Tags: Swiss Brushup completed
Scenario: Business-as-Usual
System model: Allocation, cut-off by classification
Generated by: Frank Werner
Published in: Spielmann, M. 2007
Database: ecoinvent
isCopyrightProtected: true
accessRestrictedTo: 1

## Included activities start
The activity starts with the semi-finished products and raw materials at the factory gate.

## Included activities end
The inventory accounts for the input and disposal of all materials, their (pre-) processing and the energy required for the production and maintenance of the forest machinery represented by this dataset. In addition, material for and emissions from disassembly are included.
Infrastructure for the production and maintenance of the machinery is inventoried as a rough guess from lorry production.
The dataset does not contain fuel consumption or related emissions. These issues are inventoried in the respective dataset on the operation of the machinery.

## Geography
The inventories apply to the production in Northern/Central Europe

## Parameters
- lifetime of machine, productive machine hours: 15000 hour; name total_PMH; lognormal variance with pedigree 0.1042, pedigree (3,4,2,1,1)
  Oral personal communication, P. Wiss, Präsident des Verbandes Forstunternehmer Schweiz
- weight of the vehicle: 5140 kg/unit; name vehicle_weight; = 1550+320+500+2770; lognormal variance with pedigree 0.25, pedigree (1,1,1,1,1)
  sled based winch, carriage, ancillary materials, plus cables
- maintenance factor: 0.3 dimensionless; name maintenance_factor; lognormal variance with pedigree 0.1048, pedigree (3,4,2,1,2)
  Oral personal communication, P. Wiss, Präsident des Verbandes Forstunternehmer Schweiz
- maintenance factor, cable: 2 dimensionless; name MF_cable; lognormal variance with pedigree 0.252, pedigree (3,1,1,1,1)

## Reference product
- cable yarder with sled winch: 1 unit; CPC 441: Agricultural or forestry machinery and parts thereof; By-product classification allocatable product
  production volume 5000 unit; name p_machinery
    unqualified guess, no information available
  property lifetime capacity [h] 15000 hour; = total_PMH
    Total of operation hours expected; in case of forest machinery: total of productive machine hours.
  property lifetime 8.52273 year; name lifetime; = total_PMH/8/220
    total productive machine hours divided by 8 hour/day divided by 220 working days/yera
  property price 5960.16 EUR2005
    Calculated based on inputs: The price of the product has been calculated as a sum of the values of the material and energy inputs for this product. This value is therefore a rough estimation. It may underestimate the real price since there are additional expenses when producing any product. These expences can include for example labour costs, treatment of waste materials and profit for the producer. Please consider carefully whether this level of data quality is acceptable for your application.

## By-products
- scrap lead acid battery: 0 kg; source Spielmann, M. 2007; By-product classification Recyclable; CPC 39364: Waste and scrap of lead; pedigree (1,1,1,1,1)
  production volume 0 kg; = p_machinery*w_lead
    Calculated from production volume of reference product using the relative outputs.
  property price 0 EUR2005; name w_lead_price_EUR2005
    Assumed without economic value

## Inputs from technosphere
- heat, district or industrial, natural gas: 6975.54 MJ; = (1+maintenance_factor)*5365.8; source Spielmann, M. 2007; lognormal variance with pedigree 0.235, pedigree (5,5,5,5,5)
  total heat input for production and maintenance (estimated via default factor); the amount of heat used in production is calculated proportionally to the weight of the machinery (excluding cables) and the dataset on a truck (Spielmann et al. 2007)
  properties: UVEK_link_1 2580, UVEK_relative_amount_1 1, heating value, net 1 MJ
  note on UVEK_link_1: From a principal point of view, linking to a dataset representing a technology mix would be preferable.
  note on UVEK_relative_amount_1: to be used only in special submissions in coordination with ecoinvent and the Swiss FOEN.
- scrap steel: 0 kg; name w_scrap_steel; source Spielmann, M. 2007; pedigree (1,1,1,1,1)
  used for chromium steel, for which no specific dataset is available (15.09.2012)
  production volume 0 kg
    Calculated from production volume of reference product using the relative outputs.
  property dry mass 1 kg; name w_chromium_steel_DM
  properties: wet mass 1 kg
- aluminium, cast alloy: 117 kg; name m_aluminium; = (1+maintenance_factor)*90; source Wyssen K., Wyssen Seilbahnen GmbH 2012; lognormal variance with pedigree 0.235, pedigree (5,5,5,5,5)
  total material input for production and maintenance (estimated via default factor); the amount of material used in production is calculated from reference as the sum of the material used for a truck and a harvester
  properties: UVEK_link_1 162, UVEK_relative_amount_1 1, wet mass 1 kg, dry mass 1 kg
- injection moulding: 6.5 kg; = m_PP; source Spielmann, M. 2007; lognormal variance with pedigree 0.23, pedigree (5,5,5,5,5)
  properties: UVEK_relative_amount_1 1, UVEK_link_1 2701
- road vehicle factory: 8.73e-8 unit; source Spielmann M. 2007; lognormal variance with pedigree 0.76, pedigree (5,5,5,5,5)
  no specific information available; proxy as 10% of amount for production of lorry 16 t/28 t
  properties: UVEK_relative_amount_1 1, UVEK_link_1 3829
- steel, chromium steel 18/8, hot rolled: 1.768 kg; name m_chromium_steel; = (1+maintenance_factor)*1.36; source Spielmann, M. 2007; lognormal variance with pedigree 0.235, pedigree (5,5,5,5,5)
  total material input for production and maintenance (estimated via default factor); the amount of material used in production is calculated proportionally to the weight of the machinery (excluding cables) and the dataset on a truck (Spielmann et al. 2007)
  properties: wet mass 1 kg, UVEK_relative_amount_2 1, UVEK_link_2 2662, UVEK_link_1 451, carbon content, fossil 0.0008, dry mass 1 kg, UVEK_relative_amount_1 1
  note on carbon content, fossil: Stainless steel model is the grade 304 steel (18/8 stainless, 18% chromium 8% nickel; max. 0.08% C)
- wire drawing, steel: 5548 kg; name m_cables; = (1*1000*2.02+1*1000*0.502+6*80*0.45+2*40*0.45)*MF_cable; lognormal variance with pedigree 0.235, pedigree (5,5,5,5,5)
  cables: skyline: 1 piece, lenght: 1000 m, thickness: 22 mm, weight: 2.02 kg/m; mainline: 1 pieces, lenght: 1000 m, thickness: 11 mm, weight: 0.502 kg/m; anchoring of end pole and supportive constructions: 6 cables a 80 m, thickness 10 mm; weight 0.45 kg/m and 2 cable a 40 m, thickness 10 mm and a weight of 0.45 kg. The replacement of the cables is considered via a separate maintenance factor. It is not considered that often, cables from cable cars or ski lifts are used that are worn and no longer permitted in such installations for human transport.
  properties: UVEK_link_1 4896, UVEK_relative_amount_1 1
- powder coat, steel: 17.55 m2; = (1+maintenance_factor)*13.5; source Spielmann, M. 2007; lognormal variance with pedigree 0.235, pedigree (5,5,5,5,5)
  total powder coating for production and maintenance (estimated via default factor); the amount of powder coating used in production is calculated proportionally to the weight of the machinery (excluding cables) and the dataset on a truck (Spielmann et al. 2007)
  properties: UVEK_link_1 3613, UVEK_relative_amount_1 1
- lead: 29.5 kg; name m_lead; source Spielmann, M. 2007; lognormal variance with pedigree 0.235, pedigree (5,5,5,5,5)
  for battery; 10% of data for truck
  properties: dry mass 1 kg, wet mass 1 kg, UVEK_link_1 2778, UVEK_relative_amount_1 1
- wastewater from lorry production: -0.442 m3; name w_WW; = ((1+maintenance_factor)*0.34)*-1; source Spielmann, M. 2007; lognormal variance with pedigree 0.203, pedigree (4,5,5,5,5)
  total production specific waste water from production and maintenance (estimated via default factor); the amount of waste water from production is extrapolated from reference (data for truck) via total weight of machine
  production volume 2210 m3; = p_machinery*w_WW
    Calculated from production volume of reference product using the relative outputs.
  properties: dry mass 0.337476 kg, wet mass 1000 kg, water content 2962.17, UVEK_relative_amount_1 -1, UVEK_link_1 4575
- waste bulk iron, excluding reinforcement: 0 kg; name w_bulk_iron; source Spielmann, M. 2007; pedigree (1,1,1,1,1)
  production volume 0 kg
    Calculated from production volume of reference product using the relative outputs.
  property dry mass 1 kg; name w_bulk_iron_DM
  properties: wet mass 1 kg
- steel, low-alloyed, hot rolled: 4.082 kg; name m_steel_low_alloyed; = (1+maintenance_factor)*3.14; source Spielmann, M. 2007; lognormal variance with pedigree 0.235, pedigree (5,5,5,5,5)
  (same comment as for steel, chromium steel 18/8, hot rolled)
  properties: dry mass 1 kg, UVEK_link_9 4433, UVEK_link_2 2662, UVEK_relative_amount_1 1, UVEK_relative_amount_9 517.393, UVEK_link_8 4417, UVEK_link_1 4222, carbon content, fossil 0.005, wet mass 1 kg, UVEK_relative_amount_8 117.589, UVEK_relative_amount_2 1
  note on UVEK_link_9: This link has been introduced to model transport specifically for the SAM model; to be used only in special submissions in coordination with ecoinvent and the Swiss FOEN.
  note on UVEK_relative_amount_9: scaling factor = amount of transport in corresponding KBOB dataset/amount of this input from technosphere. To be used only in special submissions in coordination with ecoinvent and the Swiss FOEN.
  note on carbon content, fossil: Low alloyed steel composition given in Tab. 3.2 ecoinvent v2.2 report 10_partII. Steel assumed to have a C content of 0.5%
- waste rubber, unspecified: 0 kg; name w_rubber; source Spielmann, M. 2007; pedigree (1,1,1,1,1)
  production volume 0 kg
    Calculated from production volume of reference product using the relative outputs.
  property dry mass 1 kg; name w_rubber_DM
  properties: wet mass 1 kg, UVEK_relative_amount_1 -1, carbon content, fossil 0.853, UVEK_link_1 1079, heating value, net 27.19 MJ
  note on heating value, net: Value taken from the general comment of the treatment dataset.
- waste polypropylene: 0 kg; name w_PP; source Spielmann, M. 2007; pedigree (1,1,1,1,1)
  input of PP correct for water content of waste flow
  production volume 0 kg
    Calculated from production volume of reference product using the relative outputs.
  property water content 0.189061; name WC_waste_PP
  property dry mass 0.841 kg; name DM_waste_polypropylene
  properties: carbon content, fossil 0.825208, heating value, net 32.78 MJ, UVEK_link_1 1042, UVEK_relative_amount_1 -1.18906, wet mass 1 kg
  note on heating value, net: Value assumed for all polypropylene products. Source: Phyllis2, database for (treated) biomass, algae, feedstocks for biogas production and biochar, https://phyllis.nl/Biomass/View/1186, ECN.TNO
- acetylene: 0 kg; name m_acethylene; source Spielmann, M. 2007; pedigree (1,1,1,1,1)
  used during disassembly; assumption: 10% of dismantling of lorry
  property carbon content, fossil 0.923077; name C_content_fossil_acetylene
  property dry mass 1 kg; name m_acethylene_DM
  property wet mass 1 kg; name m_acethylene_WM
  properties: heating value, net 51.2 MJ, UVEK_link_1 101, UVEK_relative_amount_1 1
  note on heating value, net: Based on literature, page 25 (Value may refer to HHV), Althaus H.-J., Chudacoff M., Hischier R., Jungbluth N., Osses M. and Primas A. (2007) Life Cycle Inventories of Chemicals. Final report ecoinvent data v2.0 No. 8. EMPA, Swiss Centre for Life Cycle Inventories, Dübendorf, CH, Online-Version under: www.ecoinvent.org.
- electricity, medium voltage: 3500.9 kWh; = (1+maintenance_factor)*2693; source Spielmann, M. 2007; lognormal variance with pedigree 0.235, pedigree (5,5,5,5,5)
  total electricity consumptiont for production and maintenance (estimated via default factor); the amount of electricity used in production is calculated proportionally to the weight of the machinery (excluding cables) and the dataset on a truck (Spielmann et al. 2007)
  properties: UVEK_relative_amount_1 1, UVEK_link_1 1785
- waste electric and electronic equipment: -7.73 kg; name w_electronics; = (m_electronics)*-1; source Spielmann, M. 2007; lognormal variance with pedigree 0.203, pedigree (4,5,5,5,5)
  production volume 38650 kg; = p_machinery*w_electronics
    Calculated from production volume of reference product using the relative outputs.
  property carbon content, fossil 0.337146; name w_electronics_C_content_fossil; = C_content_fossil_electronics
  property dry mass 1 kg; name w_electronics_DM
  property carbon content, non-fossil 0.00013442; name w_electronics_C_content_non_fossil; = C_content_non_fossil_electronics
  properties: UVEK_link_1 928, wet mass 1 kg, UVEK_relative_amount_1 -1
- polypropylene, granulate: 6.5 kg; name m_PP; = (1+maintenance_factor)*5; source Spielmann, M. 2007; lognormal variance with pedigree 0.235, pedigree (5,5,5,5,5)
  (same comment as for steel, chromium steel 18/8, hot rolled)
  property carbon content, fossil 0.857143; name C_content_fossil_PP
  properties: heating value, net 32.78 MJ, dry mass 1 kg, UVEK_link_1 3548, wet mass 1 kg, UVEK_relative_amount_1 1
  note on heating value, net: Value extracted from "treatment of waste polypropylene, open burning"
  note on carbon content, fossil: Polypropylene is formed by the polymerisation of propylene, C3H6 (ecoinvent v2.2 report 11_II)
- oxygen, liquid: 0 kg; source Spielmann, M. 2007; pedigree (1,1,1,1,1)
  used during disassembly; assumption: 10% of dismantling of lorry
  properties: UVEK_link_1 3319, UVEK_relative_amount_1 1, wet mass 1 kg, dry mass 1 kg
- tap water: 3364.4 kg; name m_tap_water; = (1+maintenance_factor)*2588; source Spielmann, M. 2007; lognormal variance with pedigree 0.235, pedigree (5,5,5,5,5)
  total tap water consumption for production and maintenance (estimated via default factor); the amount of tap water used in production is calculated proportionally to the weight of the machinery (excluding cables) and the dataset on a truck (Spielmann et al. 2007)
  property carbon content, non-fossil 0; name C_content_non_fossil
  property carbon content, fossil 0.00178991; name C_content_fossil
  properties: UVEK_link_1 4285, UVEK_relative_amount_1 1, wet mass 1 kg, dry mass 0.000337476 kg, water content 2962.17
- wire drawing, copper: 7.73 kg; = m_copper; source Spielmann, M. 2007; lognormal variance with pedigree 0.235, pedigree (5,5,5,5,5)
  properties: UVEK_link_1 4895, UVEK_relative_amount_1 1
- cast iron: 757.5 kg; name m_cast_iron; source Spielmann, M. 2007; lognormal variance with pedigree 0.235, pedigree (5,5,5,5,5)
  (same comment as for steel, chromium steel 18/8, hot rolled)
  property wet mass 1 kg; name m_cast_iron_WM
  property carbon content, fossil 0.04; name C_content_fossil_cast_iron
  property dry mass 1 kg; name m_cast_iron_DM
  properties: UVEK_link_1 401, UVEK_relative_amount_1 1
- waste aluminium: -117 kg; name w_aluminium; = (m_aluminium)*-1; source Spielmann, M. 2007; lognormal variance with pedigree 0.203, pedigree (4,5,5,5,5)
  production volume 585000 kg; = p_machinery*w_aluminium
    Calculated from production volume of reference product using the relative outputs.
  property dry mass 1 kg; name w_aluminium_DM
  properties: wet mass 1 kg
- copper, cathode: 7.73 kg; name m_copper; source Spielmann, M. 2007; lognormal variance with pedigree 0.235, pedigree (5,5,5,5,5)
  (same comment as for steel, chromium steel 18/8, hot rolled)
  properties: dry mass 1 kg, UVEK_relative_amount_1 1, wet mass 1 kg, UVEK_link_1 595
  note on UVEK_link_1: Should rather link to a consumption mix (or at least to a production mix, including copper from secondary sources)
- wastewater, average: 0 m3; name w_sewage; source Spielmann, M. 2007; pedigree (1,1,1,1,1)
  amounts of water inputs converted to m3
  production volume 0 m3
    Calculated from production volume of reference product using the relative outputs.
  properties: UVEK_relative_amount_1 -1, water content 2882.2, wet mass 1000 kg, dry mass 0.346837 kg, UVEK_link_1 4590, carbon content, non-fossil 0.194039
- electronics, for control units: 7.73 kg; name m_electronics; source Spielmann, M. 2007; lognormal variance with pedigree 0.235, pedigree (5,5,5,5,5)
  (same comment as for steel, chromium steel 18/8, hot rolled)
  property wet mass 1 kg; name m_electronics_WM
  property dry mass 1 kg; name m_electronics_DM
  property water content 0; name water_content
  property carbon content, non-fossil 0.00013442; name C_content_non_fossil_electronics
  property carbon content, fossil 0.337146; name C_content_fossil_electronics
  property water in wet mass 0 kg; name WWM
  properties: UVEK_relative_amount_1 1, UVEK_link_1 2021
- water, completely softened: 0 kg; name m_water_softened; source Spielmann, M. 2007; pedigree (1,1,1,1,1)
  for battery; 10% of data for truck
  property dry mass 0 kg; name m_water_softened_DM
  properties: UVEK_link_1 4851, UVEK_relative_amount_1 1, wet mass 1 kg
- zinc coat, coils: 242.524 m2; = (1*1000*0.022+1*1000*0.011+6*80*0.01+2*40*0.01)*3.1415*MF_cable; lognormal variance with pedigree 0.235, pedigree (5,5,5,5,5)
  Area of the cables for zinc coating is approximated via the cylindrical surface of cables (length x diameter x pi); for diameters, see comment field for wire drawing
  properties: UVEK_link_1 4964, UVEK_relative_amount_1 1
- scrap copper: 0 kg; name w_copper; source Spielmann, M. 2007; pedigree (1,1,1,1,1)
  production volume 0 kg
    Calculated from production volume of reference product using the relative outputs.
  property dry mass 1 kg; name w_copper_DM
  properties: wet mass 1 kg
- synthetic rubber: 9.66 kg; name m_rubber; source Spielmann, M. 2007; lognormal variance with pedigree 0.235, pedigree (5,5,5,5,5)
  (same comment as for steel, chromium steel 18/8, hot rolled)
  property carbon content, fossil 0.871949; name C_content_fossil_rubber
  properties: UVEK_link_1 4277, UVEK_relative_amount_1 1, heating value, net 26.42 MJ, wet mass 1 kg, dry mass 1 kg
  note on carbon content, fossil: EPDM (Ethylene-propene-diene terpolymer) rubber is a terpolymer of ethylene, propene, and a diene with the residual unsaturated portion of the diene in the side chain (ecoinvent v2.2 report 7-part XX & Ullmann). Chemical formula (deduced from Evidences of Solvent-Induced Miscibility in Polychloroprene-co-Ethylene-Propene Diene Terpolymer Blends, Dubey et al., Journal of Applied Polymer Science, 2009, 111:1884-1891): C20H35
- steel, low-alloyed: 7452.5 kg; name m_steel_unalloyed; = (1+maintenance_factor)*(645+320+500)+m_cables; source Spielmann, M. 2007; lognormal variance with pedigree 0.235, pedigree (5,5,5,5,5)
  total material input for production and maintenance (estimated via default factor); the amount of material used in production is taken from the reference (value for truck) and complemented up to the total weight of the sled + winch; to this amount, the weight of the carriage and the ancillary material are added.In addtion, the steel used for the cables is added (for respective assumptions, see comment on wire drawing, steel)
  properties: UVEK_relative_amount_1 1, carbon content, fossil 0.005, dry mass 1 kg, wet mass 1 kg, UVEK_link_1 4222
  note on UVEK_link_1: Supposted to link to a DS for unalloyed steel (not to low-alloyed steel)
- scrap lead acid battery: -29.5 kg; source Spielmann, M. 2007; lognormal variance with pedigree 0.203, pedigree (4,5,5,5,5)
  production volume 147500 kg
- scrap steel: -1816.07, -2.3009, -5639.98 kg (3 entries); source Spielmann, M. 2007; lognormal variance with pedigree 0.203, pedigree (4,5,5,5,5)
  used for chromium steel, for which no specific dataset is available (15.09.2012)
  production volume 3.72918e7 kg
  properties: dry mass 1 kg, wet mass 1 kg
- waste bulk iron, excluding reinforcement: -243.915, -6.37579, -507.209 kg (3 entries); source Spielmann, M. 2007; lognormal variance with pedigree 0.203, pedigree (4,5,5,5,5)
  production volume 3.7875e6 kg
  properties: dry mass 1 kg, wet mass 1 kg
- waste rubber, unspecified: -4.7307, -0.198594, -4.7307 kg (3 entries); source Spielmann, M. 2007; lognormal variance with pedigree 0.203, pedigree (4,5,5,5,5)
  production volume 48300 kg
  properties: wet mass 1 kg, dry mass 1 kg, UVEK_relative_amount_1 -1, carbon content, fossil 0.853, UVEK_link_1 1079, heating value, net 27.19 MJ
- waste polypropylene: -0.743942, -0.0573536, -0.0236891, -0.022495, -0.858379, -0.00957012, -0.00433756, -6.00913 kg (8 entries); source Spielmann, M. 2007; lognormal variance with pedigree 0.203, pedigree (4,5,5,5,5)
  input of PP correct for water content of waste flow
  production volume 38644.5 kg
  properties: water content 0.189061, carbon content, fossil 0.825208, heating value, net 32.78 MJ, dry mass 0.841 kg, UVEK_link_1 1042, UVEK_relative_amount_1 -1.18906, wet mass 1 kg
- acetylene: 0.087, 0.413 kg (2 entries); source Spielmann, M. 2007; lognormal variance with pedigree 0.235, pedigree (5,5,5,5,5)
  used during disassembly; assumption: 10% of dismantling of lorry
  properties: carbon content, fossil 0.923077, heating value, net 51.2 MJ, dry mass 1 kg, UVEK_link_1 101, UVEK_relative_amount_1 1, wet mass 1 kg
- oxygen, liquid: 0.258372, 0.941628 kg (2 entries); source Spielmann, M. 2007; lognormal variance with pedigree 0.235, pedigree (5,5,5,5,5)
  used during disassembly; assumption: 10% of dismantling of lorry
- wastewater, average: -1.05313, -0.113929, -2.20338 m3 (3 entries); source Spielmann, M. 2007; lognormal variance with pedigree 0.203, pedigree (4,5,5,5,5)
  amounts of water inputs converted to m3
  production volume 16852.2 m3
- water, completely softened: 1.4212, 1.9773, 2.6415 kg (3 entries); source Spielmann, M. 2007; lognormal variance with pedigree 0.235, pedigree (5,5,5,5,5)
  for battery; 10% of data for truck
- scrap copper: -2.45202, -0.115043, -5.16294 kg (3 entries); source Spielmann, M. 2007; lognormal variance with pedigree 0.203, pedigree (4,5,5,5,5)
  production volume 38650 kg
  properties: wet mass 1 kg, dry mass 1 kg

## Emissions to nature
- Carbon dioxide, fossil [air, non-urban air or from high stacks]: 1.69231 kg; = m_acethylene*C_content_fossil_acetylene/12*(12+2*16); source Spielmann, M. 2007; lognormal variance with pedigree 0.033, pedigree (1,1,4,1,1)
  acethylene converted to CO2

## Sampling procedure
Data modified from Spielmann, M,, L. Barreto, V. Erni, F. Frutig and O.Thees (2007): Life cycle assessment of energy wood supply of forest wood chips in Switzerland, Paul Scherrer Institute and Swiss Federal Institute for Forest, Snow and Landscape Research (WSL), unpublished.

## Extrapolations
This dataset has been extrapolated from year 2012 to the year of the calculation (2021). The uncertainty has been adjusted accordingly.
