# ventilation duct production, elbow 90°, steel, 100x50 mm

Dataset: EcoSpold 2, unit process
Geography: RoW
Time period: 2003-01-01 to 2021-12-31
Technology level: current
Classification: ISIC rev.4 ecoinvent: 2819:Manufacture of other general-purpose machinery
Classification: EcoSpold01Categories: ventilation/production of components
Tags: ConvertedDataset
Scenario: Business-as-Usual
System model: Allocation, cut-off by classification
Generated by: Alex Primas
Published in: Hässig, W. 2007
Database: ecoinvent
isCopyrightProtected: true
accessRestrictedTo: 1

## General comment
Production of a typical component used for a ventilation system in a multi family house. The house considered in the investigation includes 6 flats with 130 m2 floor area each and a ventilation rate of 120 m3/h.
[This dataset was already contained in the ecoinvent database version 2. It was not individually updated during the transfer to ecoinvent version 3. Life Cycle Impact Assessment results may still have changed, as they are affected by changes in the supply chain, i.e. in other datasets. This dataset was generated following the ecoinvent quality guidelines for version 2. It may have been subject to central changes described in the ecoinvent version 3 change report (http://www.ecoinvent.org/database/ecoinvent-version-3/reports-of-changes/), and the results of the central updates were reviewed extensively. The changes added e.g. consistent water flows and other information throughout the database. The documentation of this dataset can be found in the ecoinvent reports of version 2, which are still available via the ecoinvent website. The change report linked above covers all central changes that were made during the conversion process.]

## Included activities end
Materials used for the production. Estimation of electricity use for the different production steps. Energy use for heating of the production building. Transport of raw materials to the plant. Estimation for the Infrastructure of the Production site included.

## Geography
Data for production in Germany used.

## Technology
Element made of galvanised steel. Total weight per element 0.27 kg

## Time period
Materials investigated in 2003

## Reference product
- ventilation duct, elbow 90°, steel, 100x50 mm: 1 unit; CPC 44831: Parts of the following appliances: electromechanical domestic appliances, shavers and hairclippers, with self-[…]; By-product classification allocatable product
  EcoSpold01Location=RER
  production volume 3 unit
    This is a placeholder value that does not reflect real-world production volumes. This dataset does not currently require a real-world production volume to work in the database framework, and no actual data were collected yet. This has no negative effect on the results of the ecoinvent database.
  property price 0.35653 EUR2005
    Calculated based on inputs: The price of the product has been calculated as a sum of the values of the material and energy inputs for this product. This value is therefore a rough estimation. It may underestimate the real price since there are additional expenses when producing any product. These expences can include for example labour costs, treatment of waste materials and profit for the producer. Please consider carefully whether this level of data quality is acceptable for your application.
  property carbon content 0.00376852
    carbon content on a dry matter basis (reserved; not for manual entry)
  properties: carbon content, non-fossil 0, water content 0, dry mass 0.27 kg, water in wet mass 0 kg, carbon content, fossil 0.00376852, wet mass 0.27 kg, carbon allocation 0.0010175 kg

## Inputs from technosphere
- sheet rolling, steel: 0.297 kg; lognormal variance with pedigree 0.056, pedigree (3,4,5,5,1)
  Questionnaire, estimations
  EcoSpold01Location=RER
  Uncertainty: Questionnaire, estimations
- welding, arc, steel: 0.2 m; lognormal variance with pedigree 0.0726, pedigree (2,4,5,5,3)
  Questionnaire, approximation for technology
  EcoSpold01Location=RER
  Uncertainty: Questionnaire, approximation for technology
- electricity, medium voltage: 0 kWh; pedigree (1,1,1,1,1)
  Data estimated from related processes
  EcoSpold01Location=UCTE
  Uncertainty: Data estimated from related processes
- zinc coat, coils: 0.11 m2; lognormal variance with pedigree 0.056, pedigree (3,4,5,5,1)
  EcoSpold01Location=RER
  Questionnaire, estimations
  Uncertainty: Questionnaire, estimations
- heat, district or industrial, natural gas: 0 MJ; pedigree (1,1,1,1,1)
  Data estimated from related companies
  EcoSpold01Location=RER
  Uncertainty: Data estimated from related companies
  properties: heating value, net 1 MJ
- heat, district or industrial, other than natural gas: 0 MJ; pedigree (1,1,1,1,1)
  EcoSpold01Location=RER
  4,5,1,1,1,5; Data estimated from related companies
  properties: heating value, net 1 MJ
- ventilation components factory: 1.08e-9 unit; lognormal variance with pedigree 0.396, pedigree (4,5,5,5,3)
  EcoSpold01Location=RER
  Calculated with data of a similar company
  Uncertainty: Calculated with data of a similar company
- steel, unalloyed: 0.187 kg; lognormal variance with pedigree 0.0546, pedigree (2,4,5,5,1)
  EcoSpold01Location=RER
  Questionnaire
  Uncertainty: Questionnaire
  properties: carbon content, fossil 0.0025, dry mass 1 kg, wet mass 1 kg
  note on carbon content, fossil: Unalloyed steels or carbon steels are those in which the level of an individual element in no case reaches or exceeds the limiting concentration given in Tab. 3.1 ecoinvent v2.2 report 10_partII. Assumed to have a C content of 0.25%
- steel, low-alloyed: 0.11 kg; lognormal variance with pedigree 0.0546, pedigree (2,4,5,5,1)
  Questionnaire
  EcoSpold01Location=RER
  Uncertainty: Questionnaire
  properties: carbon content, fossil 0.005, dry mass 1 kg, wet mass 1 kg
  note on carbon content, fossil: Low alloyed steel composition given in Tab. 3.2 ecoinvent v2.2 report 10_partII. Steel assumed to have a C content of 0.5%
- electricity, medium voltage: 0.00209246, 0.000401244, 0.00673605, 0.0979699, 0.0138089, 0.0449915 kWh (6 entries); lognormal variance with pedigree 0.11, pedigree (3,5,5,5,3)
  (same comment as for electricity, medium voltage)
- heat, district or industrial, natural gas: 0.00817573, 0.530474 MJ (2 entries); lognormal variance with pedigree 0.078, pedigree (4,5,5,5,1)
  (same comment as for heat, district or industrial, natural gas)
- heat, district or industrial, other than natural gas: 0.000218339, 0.538432 MJ (2 entries); lognormal variance with pedigree 0.072, pedigree (1,1,5,5,1)
  EcoSpold01Location=RER
  4,5,1,1,1,5; Data estimated from related companies

## Sampling procedure
Questionnaire and technical information of producer. Data of one common product used.

## Extrapolations
none This dataset has been copied from an original dataset covering the geography RER. The uncertainty has been adjusted accordingly.

## Review by Rolf Frischknecht 2007-08-16
passed
none
