# treatment of decommissioned chemical production facilities

Dataset: EcoSpold 2, unit process
Geography: RER
Time period: 2000-01-01 to 2021-12-31
Technology level: current
Classification: ISIC rev.4 ecoinvent: 3830:Materials recovery
Classification: EcoSpold01Categories: waste management/building demolition
Tags: ConvertedDataset; Treatment
Scenario: Business-as-Usual
System model: Allocation, cut-off by classification
Generated by: Roland Hischier
Published in: Althaus H.-J. 2007
Database: ecoinvent
isCopyrightProtected: true
accessRestrictedTo: 1

## General comment
[This dataset was already contained in the ecoinvent database version 2. It was not individually updated during the transfer to ecoinvent version 3. Life Cycle Impact Assessment results may still have changed, as they are affected by changes in the supply chain, i.e. in other datasets. This dataset was generated following the ecoinvent quality guidelines for version 2. It may have been subject to central changes described in the ecoinvent version 3 change report (http://www.ecoinvent.org/database/ecoinvent-version-3/reports-of-changes/), and the results of the central updates were reviewed extensively. The changes added e.g. consistent water flows and other information throughout the database. The documentation of this dataset can be found in the ecoinvent reports of version 2, which are still available via the ecoinvent website. The change report linked above covers all central changes that were made during the conversion process.]

## Included activities end
This module includes the processes used for dismantling and disposal of the production facilities for chemicals per kg of the facilities. The included processes are: transport of metals from dismantling site to recycling / landfilling. Not included is the transport and the further treatment of concrete and rock woll (separate modules).

## Geography
Data used has no specific geographical origin (assumptions).

## Technology
estimated dismantling of the facilities of a chemical plant, assuming that only 50% of the metals can be recyled and the rest has - due to contamination reason - be landfilled.

## Reference product
- decommissioned chemical production facilities: -1 kg; CPC 39990: Other wastes n.e.c.; By-product classification Waste
  EcoSpold01Location=RER
  production volume 1.32237 kg
    This is a placeholder value that does not reflect real-world production volumes. This dataset does not currently require a real-world production volume to work in the database framework, and no actual data were collected yet. This has no negative effect on the results of the ecoinvent database. The placeholder value of this activity was scaled according to the nominal GDP of 2005 (source: United Nations, http://data.un.org/Glossary.aspx?q=GDP+%28current+US%24%29, accessed 20130726) to reflect an appropriate share of the global production volume, which is also a placeholder value.
  property carbon content, non-fossil 5.78006e-6
    Calculated from C content in input materials in the infrastructure
  property price 0 EUR2005
    Waste products are assigned a price of zero as they are assumed to require further treatment.
  property carbon content, fossil 0.0169382
    Calculated from C content in input materials in the infrastructure
  property carbon content 0.016944
    carbon content on a dry matter basis (reserved; not for manual entry)
  properties: dry mass 1 kg, water in wet mass 0 kg, wet mass 1 kg, water content 0, carbon allocation 0.016944 kg

## Inputs from technosphere
- waste concrete, not reinforced: 0 kg; pedigree (1,1,1,1,1)
  EcoSpold01Location=CH
  Rough estimation
  Uncertainty: rough estimation
  production volume 0 kg
    Calculated from the production volume of decommissioned chemical production facilities in proportion to the respective output amounts.
  properties: wet mass 1 kg, dry mass 1 kg
- waste mineral wool: 0 kg; pedigree (1,1,1,1,1)
  EcoSpold01Location=CH
  Rough estimation
  Uncertainty: rough estimation
  production volume 0 kg
    (same comment as for waste concrete, not reinforced)
  properties: dry mass 1 kg, wet mass 1 kg
- electronics scrap from control units: -0.043 kg; lognormal variance with pedigree 0.2106, pedigree (5,5,5,5,5)
  Rough estimation
  EcoSpold01Location=RER
  Uncertainty: rough estimation
  production volume 0.043 kg
    (same comment as for waste concrete, not reinforced)
  properties: carbon content, fossil 0.337146, dry mass 1 kg, carbon content, non-fossil 0.00013442, wet mass 1 kg
- scrap steel: 0 kg; pedigree (1,1,1,1,1)
  EcoSpold01Location=CH
  Rough estimation
  Uncertainty: rough estimation
  production volume 0 kg
    (same comment as for waste concrete, not reinforced)
  properties: wet mass 1 kg, dry mass 1 kg
- waste concrete, not reinforced: -0.275085, -0.00291474 kg (2 entries); lognormal variance with pedigree 0.2106, pedigree (5,5,5,5,5)
  EcoSpold01Location=CH
  Rough estimation
  Uncertainty: rough estimation
  production volume 0.278 kg
- waste mineral wool: -0.00813715, -9.2851e-5 kg (2 entries); lognormal variance with pedigree 0.2106, pedigree (5,5,5,5,5)
  EcoSpold01Location=CH
  Rough estimation
  Uncertainty: rough estimation
  production volume 0.00823 kg
- scrap steel: -0.447433, -0.000566882 kg (2 entries); lognormal variance with pedigree 0.2106, pedigree (5,5,5,5,5)
  EcoSpold01Location=CH
  Rough estimation
  Uncertainty: rough estimation
  production volume 0.448 kg

## Extrapolations
This dataset has been extrapolated from year 2000 to the year of the calculation (2021). The uncertainty has been adjusted accordingly.

## Review by Heiko Kunst 2003-06-20
Passed
Passed
