# acrylic binder production, product in 34% solution state

Dataset: EcoSpold 2, unit process
Geography: RER
Time period: 1995-01-01 to 2021-12-31
Technology level: current
Classification: ISIC rev.4 ecoinvent: 2022:Manufacture of paints, varnishes and similar coatings, printing ink and mas
Synonyms: PBAN-560; 2-Propenoic acid polymer with 1,3-butadiene and 2-propenenitrile; PBAN; Acrylic acid; prop-2-enenitrile; buta-1,3-diene; PBAN (binder)
Scenario: Business-as-Usual
System model: Allocation, cut-off by classification
Generated by: Maggie Osses
Published in: Althaus H.-J. 2007
Database: ecoinvent
isCopyrightProtected: true
accessRestrictedTo: 1

## General comment
This dataset represents the production of 1 kg of acrylic binder (100%). Acrylic binder is used for the production of acrylic paint. This dataset is based on data provided by European manufacturing companies.
References:
von Däniken A. and Chudacoff M. (1995) Vergleichende ökologische Bewertung von Anstrichstoffen im Baubereich - Band 2: Daten. Buwal Schriftenreihe Umwelt Nr. 232. BUWAL, Bern.

## Included activities start
The activity starts when the raw materials enter the process.

## Included activities end
This activity ends with the production of 1 kg of acrylic binder. The manufacturing process is considered with the consumption of raw materials, energy, infrastructure and land use. The generation of solid wastes and emissions into air and water are also taken into account. No by-product is generated in the process. Consumption of auxiliaries are not included due to the lack of data. Solid wastes are assumed to be sent to hazardous waste incineration.

## Geography
The literature source used is based on information provided by European manufacturing companies. No further information is available on the location and characteristics of these manufacturers. Therefore, the representativeness of these values for the European acrylic binder industry is unknown.

## Technology
This dataset is based on confidential data from European manufacturing companies, therefore the production technology is unknown.
References:
von Däniken A. and Chudacoff M. (1995) Vergleichende ökologische Bewertung von Anstrichstoffen im Baubereich - Band 2: Daten. Buwal Schriftenreihe Umwelt Nr. 232. BUWAL, Bern.

## Time period
The literature refers to data from the 1990s.

## Parameters
- fraction, process water, to air: 0.15 dimensionless; name fraction_PW_to_air; lognormal variance with pedigree 0.092025, pedigree (4,4,3,2,4)
  Literature value. In case when no industry/process specific data are available, default evaporation fraction value is used. This value is 15% and is based on literature (Statistics Canada, 2007 & Shaffer, K.H., 2008, Consumptive water use in the Great Lakes Basin, USGS & Shiklomanov, 2003, World Water Resources at the Beginning of the 21st Century) and has been approved by an expert.

## Reference product
- acrylic binder, without water, in 34% solution state: 1 kg; name RP; CPC 35110: Paints and varnishes and related products; By-product classification allocatable product
  Acrylic binder is used for the production of acrylic paint. It has the appearance of a thin milky liquid, which when dry becomes a firm flexible film. Pigments can either be added directly into the binder or the binder can be blended with other resin substances.
  production volume 0.696 kg; name RP_PV
    This is a placeholder value that does not reflect real-world production volumes. This dataset does not currently require a real-world production volume to work in the database framework, and no actual data were collected yet. This has no negative effect on the results of the ecoinvent database. The placeholder value of this activity was estimated by scaling the global production volume (which is also a placeholder value) according to the sales of chemicals products reported by Cefic (European Chemical Industry Council), and the American Chemistry Council.
    According to Cefic (2016) the global sales of chemicals in the year 2015 was 3 534 billion euros. The reported share of sales per region are: EU28 14.7%; Other Europe (Switzerland, Norway, Turkey, Russia and Ukraine) 2.7%; NAFTA (US, Canada and Mexico) 16.5%; Latin America 3.8%; China 39.9%; Japan 3.9%; Republic of Korea 3.2%; India 2.2%; Rest of Asia 11.9%; Rest of the World 1.3%. Cefic also reports the US total sales, which amount to 518.7 billion euros out of the global 3 534 billion euros (14.7%). The same share is reported by the American Chemistry Council (2016), according to which the USA sales account for 15% of global sales for the year 2016.
    References:
    Cefic 2016. Facts and figures 2016 of the European chemical industry. Accessible at: http://www.cefic.org/Facts-and-Figures/Chemicals-Industry-Profile/
    American Chemistry Council 2016. Outlook: U.S. Chemical Industry Continues to Outpace Industrial Output; Accounts for More Than One-Half of Construction Spending by Manufacturing Sector. Accessible at: https://www.americanchemistry.com/Media/PressReleasesTranscripts/ACC-news-releases/US-Chemical-Industry-Continues-to-Outpace-Industrial-Output.html
  property carbon content, fossil 0.599846
    The acrylic acid ethyl ester (ethyl acrylate) is used for both solvent- and water-based paints, and in textiles as a binder in nonwoven fabrics and flocking (Acrylic acid and derivatives: uses, Ullmann). It was used as a representative example of acrylic binders. Its formula is C5H8O2
  property price 3.37 EUR2005
    From UN trade database. http://data.un.org/ Import data from the largest economies of the world are used (Brazil, India, USA, China, Japan and EU-27). Commodities: 'Acrylic or vinyl polymer paint or varnish, non-aqueou', 'Polyester based paints, varnishes, non-aqueous medium' and 'Polymer based paint, varnish in non-aqueous medium ne'.
  property heating value, net 18.18 MJ
    LHV is calculated based on the Carbon content of the product. More details can be found on the respective documentation.
  property carbon content 0.599846
    carbon content on a dry matter basis (reserved; not for manual entry)
  properties: water in wet mass 0 kg, dry mass 1 kg, wet mass 1 kg, carbon content, non-fossil 0, water content 0, carbon allocation 0.599846 kg

## Inputs from technosphere
- chemical factory, organics: 4e-10 unit; lognormal variance with pedigree 0.349225, pedigree (2,3,5,2,3)
  Calculated based on literature data published by the industry. For this activity, no information was readily available concerning infrastructure and land-use. Therefore, the infrastructure is estimated based on data from two chemical factories, the BASF site of Ludwigshafen and the chemical factory in Gendorf (which are both located in Germany), which produce a wide range of chemical substances. Based on this data, the following assumptions are made: the built area amounts to about 4.2 ha, the plant has an average output of 50'000 t/a and a lifespan of fifty years. The estimated infrastructure amount is therefore 4.00 E-10 units per kg of produced chemical.
  References:
  Althaus H.-J., Chudacoff M., Hischier R., Jungbluth N., Osses M. and Primas A. (2007) Life Cycle Inventories of Chemicals. ecoinvent report No. 8, v2.0. EMPA Dübendorf, Swiss Centre for Life Cycle Inventories, Dübendorf, CH.
  Gendorf (2000) Umwelterklärung 2000, Werk Gendorf. Werk Gendorf, Burgkirchen.
- heat, district or industrial, other than natural gas: 0.566 MJ; lognormal variance with pedigree 0.1001, pedigree (3,5,5,3,1)
  Data from survey in literature (von Däniken et al. 1995).
  properties: heating value, net 1 MJ
- butyl acrylate: 0.074 kg; lognormal variance with pedigree 0.1001, pedigree (3,5,5,3,1)
  Data from survey in literature (von Däniken et al. 1995).
  properties: carbon content, fossil 0.756757, dry mass 1 kg, wet mass 1 kg, heating value, net 31.22 MJ
- esters of versatic acid: 0.125 kg; lognormal variance with pedigree 0.1001, pedigree (3,5,5,3,1)
  Data from survey in literature (von Däniken et al. 1995).
  properties: wet mass 1 kg, dry mass 1 kg, carbon content, fossil 0.727273, heating value, net 22.04 MJ
- vinyl acetate: 0.27 kg; lognormal variance with pedigree 0.1001, pedigree (3,5,5,3,1)
  Data from survey in literature (von Däniken et al. 1995).
  properties: carbon content, fossil 0.55814, dry mass 1 kg, wet mass 1 kg, heating value, net 25.35 MJ
  note on carbon content, fossil: Vinyl acetate (CH3CO2CH=CH2) (ecoinvent v2.2 report 11_II), C4H6O2. MW=86 g/mol
- waste paint: 0 kg; name BP_waste_paint; pedigree (1,1,1,1,1)
  Data from survey in literature (von Däniken et al. 1995).
  production volume 0 kg
    Calculated from the production volume of acrylic binder, without water, in 34% solution state in proportion to the respective output amounts.
  property price 0 EUR2005; name BP_waste_paint_price_EUR2005
  properties: carbon content, fossil 0.65, heating value, net 19.7 MJ, dry mass 1 kg, wet mass 1 kg
  note on carbon content, fossil: Tab A.5, ecoinvent v2.2 report 13_I. C content has been calculated after data in the tables, and then referred to 1 kg DM
- electricity, medium voltage: 0.1 kWh; lognormal variance with pedigree 0.1001, pedigree (3,5,5,3,1)
  Data from survey in literature (von Däniken et al. 1995).
- heat, district or industrial, natural gas: 0.5225 MJ; lognormal variance with pedigree 0.1001, pedigree (3,5,5,3,1)
  Data from survey in literature (von Däniken et al. 1995).
  properties: heating value, net 1 MJ
- waste paint: -0.0299102, -8.97554e-5 kg (2 entries); lognormal variance with pedigree 0.2101, pedigree (3,5,5,3,1)
  Data from survey in literature (von Däniken et al. 1995).
  production volume 0.02088 kg

## Inputs from nature
- Water, unspecified natural origin [natural resource, in water]: 0.00046 m3; name water_UNO_input; lognormal variance with pedigree 0.1001, pedigree (3,5,5,3,1)
  Data from survey in literature (von Däniken et al. 1995).

## Emissions to nature
- Hydrocarbons, aliphatic, alkanes, unspecified [air, urban air close to ground]: 7e-5 kg; lognormal variance with pedigree 0.1801, pedigree (3,5,5,3,1)
  Data from survey in literature (von Däniken et al. 1995).
- TOC, Total Organic Carbon [water, surface water]: 4e-5 kg; lognormal variance with pedigree 0.1401, pedigree (3,5,5,3,1)
  Data from survey in literature (von Däniken et al. 1995).
- Dissolved solids [water, surface water]: 0.00036 kg; lognormal variance with pedigree 0.1401, pedigree (3,5,5,3,1)
  Data from survey in literature (von Däniken et al. 1995).
- Suspended solids, unspecified [water, surface water]: 2.1e-5 kg; lognormal variance with pedigree 0.1401, pedigree (3,5,5,3,1)
  Data from survey in literature (von Däniken et al. 1995).
- Water [water, unspecified]: 0.000391 m3; = water_UNO_input*(1-fraction_PW_to_air); lognormal variance with pedigree 0.0807, pedigree (2,2,5,1,1)
  Calculated as a fraction of the input of water. For more details, refer to the mathematical relation and the parameters.
  property fraction, origin: salt water 0; name fraction_origin_salt_water_Ww
  property water in wet mass 1000 kg; name WWM
  property wet mass 1000 kg; name WM
  property fraction, origin: unspecified 1; name fraction_origin_unspecified_Ww
  property carbon content, fossil 0; name C_content_fossil
  property fraction, origin: fresh water 0; name fraction_origin_fresh_water_Ww
  property dry mass 0 kg; name DM
  property carbon content, non-fossil 0; name C_content_non_fossil
- COD, Chemical Oxygen Demand [water, surface water]: 0.00017 kg; lognormal variance with pedigree 0.1401, pedigree (3,5,5,3,1)
  Data from survey in literature (von Däniken et al. 1995).
- DOC, Dissolved Organic Carbon [water, surface water]: 1.1e-5 kg; lognormal variance with pedigree 0.1401, pedigree (3,5,5,3,1)
  Data from survey in literature (von Däniken et al. 1995).
- Water [air, unspecified]: 6.9e-5 m3; = (water_UNO_input*fraction_PW_to_air); lognormal variance with pedigree 0.0807, pedigree (2,2,5,1,1)
  (same comment as for Water)
  property fraction, origin: salt water 0; name fraction_origin_salt_water
  property fraction, origin: fresh water 0; name fraction_origin_fresh_water
  property fraction, origin: unspecified 1; name fraction_origin_unspecified
- BOD5, Biological Oxygen Demand [water, surface water]: 1.8e-5 kg; lognormal variance with pedigree 0.1401, pedigree (3,5,5,3,1)
  Data from survey in literature (von Däniken et al. 1995).

## Sampling procedure
Literature data.

## Extrapolations
This dataset has been extrapolated from year 1995 to the year of the calculation (2021). The uncertainty has been adjusted accordingly.

## Review by Emilia Moreno Ruiz 2017-08-09
This dataset was additionally reviewed in a separate review process by Eric Johnson of Atlantic Consulting as well as Emilia Moreno Ruiz and Gregor Wernet of ecoinvent.
