# transport, freight, lorry 3.5-7.5 metric ton, unregulated

Dataset: EcoSpold 2, unit process
Geography: BR
Time period: 2020-03-01 to 2021-02-28
Technology level: current
Classification: ISIC rev.4 ecoinvent: 4923:Freight transport by road
Scenario: Business-as-Usual
System model: Allocation, cut-off by classification
Share of production covered: 100 %
Generated by: F. Valebona; T. B. Rocha; F. L. Motta
Published in: Valebona, F. 2021
Database: ecoinvent
isCopyrightProtected: true
accessRestrictedTo: 1

## General comment
This dataset is an adaptation of “transport, freight, lorry 3.5-7.5 metric ton, unregulated” in South Africa, as available in version 3.6 of the ecoinvent database to reflect the situation in Brazil. It represents the service of 1tkm freight transport in a lorry of the size class 3.5-7.5 metric tons gross vehicle weight (GVW) and unregulated emissions class.
The Brazilian lorry fleet is regulated under the Vehicles Air Pollution Control Program – Proconve, which phases are equivalent to the European control program – EURO. Since 2012, the Proconve P7 (EURO 5) phase is in practice, while the P8 phase (EURO 6) will start in 2023. Before that, the Proconve P6 phase (EURO 4) was not implemented because of the unavailability of low-sulphur diesel, therefore recontextualized datasets do not consider this phase. The P5 (EURO 3), P4 (EURO 2) and P3 (EURO 1) phases started in 2005, 2000 and 1996, respectively. Prior technologies are classified as unregulated.
For the dataset recontextualization to the Brazilian reality, an updated average freight load and the diesel with 500 ppm of sulfur and 12% biodiesel blend are considered. Moreover, data from emission tests of the national vehicle production and import (CETESB, 2019) is used to update regulated emissions (carbon monoxide, particulate matter and nitrogen oxides). Furthermore, correction factors are used to consider the impact of biodiesel blend on exhaust emissions (USEPA 2002), and the fuel composition is considered to account for carbon dioxide and sulphur dioxide emission.
The vehicle mass category classification considered in Brazilian national statistics is approximated to the one adopted in ecoinvent datasets. The 3.5-7.5 metric ton lorry is representing the Brazilian heavy-duty lorry with gross vehicle weight (GVW) with 3.8 to 6 metric tons and 6 to 10 metric tons categories classification. The average capacity utilization factor (including empty trips) for this category is 57.5 % according to the Road Freight Transport Model from the Brazilian Energy Research Enterprise – EPE (Stukart, 2018). Whereas, the average payload capacity for this category is 3.7 ton (Novo, 2016), resulting in an average freight load of 2.13 ton. GWV is estimated by assuming the same empty vehicle weight as for the RER region for the respective matching categories and accounting for the updated freight load. This resulted in a GWV of 6.13 ton. Vehicle mass dependent non-exhaust emissions (i.e. tyre, brake and road wear) are adjusted accordingly.
The emissions of carbon monoxide (CO), nitrogen oxides (NOx) and Particulate Matter (PM) were updated with data from (CETESB, 2019), which uses data from emission testing of the national vehicle fleet production and imports, weighted by sales amounts. Those tests are run with a reference fuel, which is not blended with biodiesel (ANP, 2018), therefore, those emission factors are adjusted for emissions from burning biodiesel.
The impact of the 12% biodiesel blend in exhaust emissions is accounted for by correction factors derived from USEPA (2002). Correction factors were calculated for the emissions of nitrogen oxides, particulate matter, hydrocarbons, carbon monoxide, acetaldehyde, ethylbenzene, formaldehyde, naphthalene and xylene. Moreover, fuel consumption was corrected with energy content values. For conventional diesel, it was considered energy content of 129.500 Btu/gal, animal-based biodiesel 115.720 Btu/gal and plant-based biodiesel 119.216 Btu/gal (USEPA 2002).
Fuel dependent emissions were updated as well. In Brazil, diesel containing 10 ppm (S10) of sulphur was introduced to attend to the demand of EURO V lorries, as its post-treatment technologies require the use of ultra-low sulphur diesel. Diesel containing 500 ppm (S500) of sulphur is also commercialized for the remaining lorry emission categories. For these cases, the use of S500 is assumed as no information on the share of S500 and S10 diesel used by these categories was available and because the price of S500 is lower than for the S10 (CNT, 2021). Therefore, sulphur dioxide emissions derived from S500 combustion were corrected assuming that all sulphur is emitted as SO2 (0.001 kg SO2/kg fossil diesel) and to account for the blend of biodiesel (12 %), which does not contain sulphur. Carbon dioxide emission is dependent on the fuel carbon content, which was considered as 77.8% for plant-based biodiesel and 76.1 % for animal-based biodiesel, resulting in a Brazilian average of 77.5%, while conventional diesel has 86.7% of carbon (USEPA, 2002). This results in emissions of 3.18 kg of fossil CO2/kg diesel and 2.84 biogenic CO2/kg biodiesel.
The original datasets of 3.5-7.5 ton vehicles with unregulated, EURO 1 and EURO 2 emission regulations consider petrol as a small fraction of fuel (2.5%). As this is not the reality in Brazil, exhaust emissions (apart from CO, NOx and PM) were scaled from the corresponding 7.5-16 ton datasets with same emission regulation according to total fuel consumption (MJ).Technical background is provided in Valebona F.; Rocha T.B.; Motta F. L. Cornerstone Project. Recontextualization of Datasets: Methodology. ACV Brasil, Brazil.
This dataset was developed under the Cornerstone project, an initiative from the Brazilian Business Network on Life cycle Assessment (Rede ACV) in collaboration with ecoinvent to increase the quantity and quality of inventories that represent Brazil, through a thorough adaptation of the datasets. More information about this project is available in redeacv.org.br/en/wg-database/. Technical background is provided in Valebona F.; Rocha T.B.; Motta F. L. Cornerstone Project. Recontextualization of Datasets: Methodology. ACV Brasil, Brazil.
Main data sources for the recontextualization:
ANP, 2018. Agência Nacional do Petróleo, Gás Natural e Biocombustíveis (2018). RANP 764. RESOLUÇÃO ANP Nº 764, DE 20.12.2018 - DOU 21.12.2018.
EPE, 2020. Energy Research Enterprise (2020). Integrated Transport Model. Consultation through Information to Citizen System. Federal Government of Brazil.
Stukart, B., Lima, C., Pacheco, C., Silva, F., Antoniasse, G., Cavalcanti, M., Souza, M., Stelling, P. (2018). Transporte Rodoviário Brasileiro, Transição para Óleo Diesel S10 e Desafios para o Refino Nacional. Rio Oil&Gas. Available at: https://stt.ibp.org.br/eventos/2018/riooil2018/pdfs/Riooil2018_1654_201806222325ibp1654_1 8_transic.pdf. Acessed in: 06/06/2020.
CETESB (2019). Companhia Ambiental do Estado de São Paulo (2019). Emissões Veiculares no Estado de São Paulo. Governo do Estado de São Paulo. Available at: https://cetesb.sp.gov.br/veicular/relatoriose-publicacoes/. Accessed in 15/06/2020.
USEPA, 2002. United States Environmental Protection Agency (2002). A Comprehensive Analysis of Biodiesel Impacts on Exhaust Emissions. Draft Technical Report.
Novo, A. L. (2016). PERSPECTIVAS PARA O CONSUMO DE COMBUSTÍVEL NO TRANSPORTE DE CARGA NO BRASIL: UMA COMPARAÇÃO ENTRE OS EFEITOS ESTRUTURA E INTENSIDADE NO USO FINAL DE ENERGIA DO SETOR. Available at: http://www.ppe.ufrj.br/images/publica%C3%A7%C3%B5es/mestrado/Ana_Luiza_Andrade_Novo.pdf
CNT (2021). CNT acompanha, com atenção, a alta histórica do diesel. Available at: cnt.org.br/agencia-cnt/cnt-acompanha-alta-historica-do-diesel

## Included activities start
From combustion of fuel in the engine. The dataset takes as input the infrastructure of the lorry and road network, the materials and efforts needed for maintenance of these and the fuel consumed in the vehicle for the journey.

## Included activities end
The activity ends with the transport service of 1tkm and the emissions of exhaust and non-exhaust emissions into air, water and soil.

## Geography
Recontextualization from 'transport, freight, lorry 3.5-7.5 metric ton, unregulated, ZA'. Fuel type, freight load factor, regulated and fuel-dependent emissions were updated for the Brazilian situation. The environmental interventions due to vehicle transport are modelled by linking the environmental interventions due to vehicle operation with impacts due to vehicle manufacturing, vehicle maintenance, vehicle disposal, road construction, operation and maintenance of roads and road disposal.

## Technology
Diesel and diesel engine. Lorry transport is further differentiated with respect to vehicle weight and emission technology standard (EURO-standard).
Technology classifications are based on those used widely within the works of the European Environment Agency, particularly in the Emissions Inventory Guidebook.

## Time period
Validity period of the 12% biodiesel blend regulation. The regulation foresees incremental increases in the biodiesel content in the Brazilian market fuel (it started with a 2% blend in 2008, reached 12% in 2020 and will increase 1% a year, until it reaches 15% in 2023).

## Reference product
- transport, freight, lorry 3.5-7.5 metric ton, unregulated: 1 metric ton*km; By-product classification allocatable product; CPC 6511: Road transport services of freight
  production volume 8.3592e9 metric ton*km; name transport_RP_PV; = 1548000000000*0.045*0.12
    Production volume retrieved from the Brazilian National Logistic Plan -2025 (EPL, 2018), which reports the amount of 1,548 billion tonne.km of freight transported by lorries in 2015. The split among lorry size categories has been calculated according to fleet sizes, annual mileages and freight loads. The average annual mileage accounts for the annual mileage decay according to the fleet age of each size class (CETESB, 2019). Furthermore, the shares of emission regulation classes are estimated according to their respective fleet size reported for the state of São Paulo in 2018 (CETESB, 2019).
    References:
    CETESB (2019). Companhia Ambiental do Estado de São Paulo (2019). Emissões Veiculares no Estado de São Paulo. Governo do Estado de São Paulo. Available at: cetesb.sp.gov.br/veicular/relatoriose-publicacoes/. [Accessed on 15/06/2020]
    EPL (2018). Plano Nacional de Logística. PNL - 2025. Relatório Executivo. Available at: epl.gov.br/transporte-inter-regional-de-carga-no-brasil-panorama-2015 [Accessed on 24/05/2021]
  property price 0.0376543 EUR2005
    Calculated based on inputs: The price of the product has been calculated as a sum of the values of the material and energy inputs for this product. This value is therefore a rough estimation. It may underestimate the real price since there are additional expenses when producing any product. These expences can include for example labour costs, treatment of waste materials and profit for the producer. Please consider carefully whether this level of data quality is acceptable for your application.

## Inputs from technosphere
- road: 0.0017154 m*year; lognormal variance with pedigree 0.32, pedigree (3,1,4,5,3)
  Data extrapolated from the original dataset covering the South African region.
  References:
  Notten et al. (2018). Life Cycle Inventories of Road Freight - India and South Africa for the SRI project.
- fatty acid methyl ester: 0.00816354 kg; source ANP 2013; lognormal variance with pedigree 0.0193, pedigree (2,2,4,5,3)
  Fuel consumption data extrapolated from the original dataset covering the South African region. Corrected to account for 12% biodiesel blend accordind to fuels energy content. For conventional diesel, it was considered energy content of 129.500 Btu/gal, for animal-based biodiesel 115.720 Btu/gal and for plant-based biodiesel 119.216 Btu/gal (USEPA, 2002). Final value is influenced by the updated freight load factor form EPE (2020).
  References:
  EPE, 2020. Energy Research Enterprise (2020). Integrated Transport Model. Consultation through Information to Citizen System. Federal Government of Brazil.
  USEPA, 2002. United States Environmental Protection Agency (2002). A Comprehensive Analysis of Biodiesel Impacts on Exhaust Emissions. Draft Technical Report.
  properties: carbon content, non-fossil 0.732, wet mass 1 kg, dry mass 1 kg, carbon content, fossil 0.041
- brake wear emissions, lorry: -2.34037e-5 kg; name brake_emissions; = ((8.13e-9*6131.6)/2.13)*-1; source Ntziachristos, L. 2013; lognormal variance with pedigree 0.0207, pedigree (3,2,4,5,3)
  Road freight specific non-exhaust emissions.
  Brake wear emissions calculation was updated with Brazilian Gross Vehicle Weight (GVW). The linear relation 8.13E-9 kg/kg GVW*km was considered as in the original dataset for the RER region.
  The GVW of the Brazilian 3.5-7.5t lorries using an average load factor is 6867.6 kg. The GVW was calculated from the original RER value according to the updated load factor from EPE (2020). The calculated emission is normalized by the average payload, according to the reference flow.
  References:
  EPE, 2020. Energy Research Enterprise (2020). Integrated Transport Model. Consultation through Information to Citizen System. Federal Government of Brazil.
  Ntziachristos, L., et al. (2013) EMEP/EEA air pollutant emissions inventory guidebook 2009: Exhaust emissions from road transport. European Environment Agency, Copenhagen, DK.
  production volume 195636 kg; = brake_emissions*transport_RP_PV
    Calculated from production volume of reference product using the relative outputs.
  property wet mass 1 kg; name brake_emissions_WM
  property dry mass 1 kg; name brake_emissions_DM
  properties: carbon content, fossil 0.149
  note on carbon content, fossil: This amount equates to the amout for organic carbon reported in the Emissions Inventory Guidebook (Ntziachristos et al., 2013).
- road wear emissions, lorry: -2.01508e-5 kg; name road_emissions; = ((7.0e-9*6131.6)/2.13)*-1; source Ntziachristos, L. 2013; lognormal variance with pedigree 0.0207, pedigree (3,2,4,5,3)
  Road freight specific non-exhaust emissions.
  Road wear emissions calculation was updated with Brazilian Gross Vehicle Weight (GVW). The linear relation 7.0E-9 kg/kg GVW*km was considered as in the original dataset for the RER region.
  The GVW of the Brazilian 3.5-7.5t lorries using an average load factor is 6867.6 kg. The GVW was calculated from the original RER value according to the updated load factor from EPE (2020). The calculated emission is normalized by the average payload, according to the reference flow.
  References:
  EPE, 2020. Energy Research Enterprise (2020). Integrated Transport Model. Consultation through Information to Citizen System. Federal Government of Brazil.
  Ntziachristos, L., et al. (2013) EMEP/EEA air pollutant emissions inventory guidebook 2009: Exhaust emissions from road transport. European Environment Agency, Copenhagen, DK.
  production volume 168445 kg; = road_emissions*transport_RP_PV
    Calculated from production volume of reference product using the relative outputs.
  property dry mass 1 kg; name road_emissions_DM
  property wet mass 1 kg; name road_emissions_WM
  properties: carbon content, fossil 0.75
  note on carbon content, fossil: The amount of carbon released due to road wear is not given in theEmissions Inventory Guidebook (Ntziachristos et al., 2013). For road wear there are no individual substances reported. Here we assume that 75% of the particle emissions are carbon, fossil in their nature due to the bitumen road surfacing.
- maintenance, lorry 16 metric ton: 8.70416e-7 unit; lognormal variance with pedigree 0.32, pedigree (3,1,4,5,3)
  Data extrapolated from the original dataset covering the South African region. Final value is influenced by the updated freight load factor form EPE (2020).
  References:
  EPE, 2020. Energy Research Enterprise (2020). Integrated Transport Model. Consultation through Information to Citizen System. Federal Government of Brazil.
- tyre wear emissions, lorry: -0.000231878 kg; name tyre_emissions; = ((8.055e-8*6131.6)/2.13)*-1; source Ntziachristos, L. 2013; lognormal variance with pedigree 0.0207, pedigree (3,2,4,5,3)
  Road freight specific non-exhaust emissions.
  Tyre wear emissions calculation was updated with Brazilian Gross Vehicle Weight (GVW). The linear relation 8.055E-8 kg/kg GVW*km was considered as in the original dataset for the RER region.
  The GVW of the Brazilian 3.5-7.5t lorries using an average load factor is 6867.6 kg. The GVW was calculated from the original RER value according to the updated load factor from EPE (2020). The calculated emission is normalized by the average payload, according to the reference flow.
  References:
  EPE, 2020. Energy Research Enterprise (2020). Integrated Transport Model. Consultation through Information to Citizen System. Federal Government of Brazil.
  Ntziachristos, L., et al. (2013) EMEP/EEA air pollutant emissions inventory guidebook 2009: Exhaust emissions from road transport. European Environment Agency, Copenhagen, DK.
  production volume 1.93832e6 kg; = tyre_emissions*transport_RP_PV
    Calculated from production volume of reference product using the relative outputs.
  property dry mass 1 kg; name tyre_emissions_DM
  property wet mass 1 kg; name tyre_emissions_WM
  properties: carbon content, fossil 0.675
- lorry, 16 metric ton: 8.70416e-7 unit; lognormal variance with pedigree 0.328, pedigree (3,5,4,5,3)
  (same comment as for maintenance, lorry 16 metric ton)
- road maintenance: 0.00151299 m*year; lognormal variance with pedigree 0.328, pedigree (3,5,4,5,3)
  (same comment as for maintenance, lorry 16 metric ton)
- diesel: 0.059866 kg; lognormal variance with pedigree 0.0193, pedigree (2,2,4,5,3)
  Data extrapolated from the original dataset covering the South African region. Corrected to account for 12% biodiesel blend accordind to fuels energy content. Type of diesel represents the Brazilian diesel with 500 ppm of sulphur concentration. For conventional diesel, it was considered energy content of 129.500 Btu/gal, for animal-based biodiesel 115.720 Btu/gal and for plant-based biodiesel 119.216 Btu/gal (USEPA, 2002). Final value is influenced by the updated freight load factor form EPE (2020).
  References:
  EPE, 2020. Energy Research Enterprise (2020). Integrated Transport Model. Consultation through Information to Citizen System. Federal Government of Brazil.
  USEPA, 2002. United States Environmental Protection Agency (2002). A Comprehensive Analysis of Biodiesel Impacts on Exhaust Emissions. Draft Technical Report.
  properties: heating value, net 42.8 MJ, carbon content, fossil 0.865, wet mass 1 kg, dry mass 1 kg
  note on carbon content, fossil: C-content of diesel is 86.5% (ecoinvent v2.2 report 6_IV, Tab 3.14)

## Emissions to nature
- Carbon monoxide, non-fossil [air, unspecified]: 0.000135598 kg; source CETESB 2019; lognormal variance with pedigree 0.0013, pedigree (2,2,1,1,1)
  Measured data from emission testing of the national vehicle fleet production and imports, weighted by sales amounts (CETESB, 2019). Correction factor applied to account the impact of the biodiesel blend on exhaust emission according to USEPA (2002). Value representing the biogenic emission share. Final value is influenced by the updated freight load factor form EPE (2020).
  References:
  CETESB (2019). Companhia Ambiental do Estado de São Paulo (2019). Emissões Veiculares no Estado de São Paulo. Governo do Estado de São Paulo. Available at: https://cetesb.sp.gov.br/veicular/relatoriose-publicacoes/. Accessed in 15/06/2020.
  EPE, 2020. Energy Research Enterprise (2020). Integrated Transport Model. Consultation through Information to Citizen System. Federal Government of Brazil.
  USEPA, 2002. United States Environmental Protection Agency (2002). A Comprehensive Analysis of Biodiesel Impacts on Exhaust Emissions. Draft Technical Report.
- Chromium VI [air, unspecified]: 4.11436e-12 kg; source Ntziachristos, L. 2013; lognormal variance with pedigree 0.7187, pedigree (2,2,4,5,3)
  (same comment as for maintenance, lorry 16 metric ton)
- Cadmium [air, unspecified]: 5.9658e-10 kg; source Ntziachristos, L. 2013; lognormal variance with pedigree 0.7187, pedigree (2,2,4,5,3)
  Data extrapolated from the original dataset covering the RER region. Final value is influenced by the updated freight load factor form EPE (2020).
  References:
  EPE, 2020. Energy Research Enterprise (2020). Integrated Transport Model. Consultation through Information to Citizen System. Federal Government of Brazil.
- Ammonia [air, unspecified]: 4.76309e-7 kg; source Keller, M. 2010; lognormal variance with pedigree 0.0193, pedigree (2,2,4,5,3)
  (same comment as for maintenance, lorry 16 metric ton)
- Particulates, < 2.5 um [air, unspecified]: 5.07811e-5 kg; source CETESB 2019; lognormal variance with pedigree 0.0013, pedigree (2,2,1,1,1)
  Measured data from emission testing of the national vehicle fleet production and imports, weighted by sales amounts (CETESB, 2019). Correction factor applied to account the impact of the biodiesel blend on exhaust emission according to USEPA (2002). Final value is influenced by the updated freight load factor form EPE (2020).
  References:
  CETESB (2019). Companhia Ambiental do Estado de São Paulo (2019). Emissões Veiculares no Estado de São Paulo. Governo do Estado de São Paulo. Available at: https://cetesb.sp.gov.br/veicular/relatoriose-publicacoes/. Accessed in 15/06/2020.
  EPE, 2020. Energy Research Enterprise (2020). Integrated Transport Model. Consultation through Information to Citizen System. Federal Government of Brazil.
  USEPA, 2002. United States Environmental Protection Agency (2002). A Comprehensive Analysis of Biodiesel Impacts on Exhaust Emissions. Draft Technical Report.
- Benzene [air, unspecified]: 5.33403e-7 kg; lognormal variance with pedigree 0.0193, pedigree (2,2,4,5,3)
  Data extrapolated from the original dataset covering the South African region. Correction factor applied to account the impact of the biodiesel blend on exhaust emission according to USEPA (2002). Final value is influenced by the updated freight load factor form EPE (2020).
  References:
  EPE, 2020. Energy Research Enterprise (2020). Integrated Transport Model. Consultation through Information to Citizen System. Federal Government of Brazil.
  USEPA, 2002. United States Environmental Protection Agency (2002). A Comprehensive Analysis of Biodiesel Impacts on Exhaust Emissions. Draft Technical Report.
- Carbon dioxide, non-fossil [air, unspecified]: 0.0229923 kg; source U. S, Environmental Protection Agency 2002; lognormal variance with pedigree 0.0606, pedigree (3,5,5,5,3)
  Calculated value based on the fuel carbon content, which was considered as 77.8% for plant-based biodiesel and 76.1 % for animal-based biodiesel, resulting in a Brazilian average of 77.5%, while conventional diesel has 86.7% of carbon (USEPA, 2002). This results in emissions of 3.18 kg fossil CO2/kg diesel and 2.84 biogenic CO2/kg biodiesel.
- Nickel [air, unspecified]: 6.03436e-10 kg; source Ntziachristos, L. 2013; lognormal variance with pedigree 0.7187, pedigree (2,2,4,5,3)
  (same comment as for maintenance, lorry 16 metric ton)
- Selenium [air, unspecified]: 6.85725e-12 kg; source Ntziachristos, L. 2013; lognormal variance with pedigree 0.7187, pedigree (2,2,4,5,3)
  (same comment as for maintenance, lorry 16 metric ton)
- Methane, fossil [air, unspecified]: 7.66566e-7 kg; lognormal variance with pedigree 0.0272, pedigree (2,5,4,5,3)
  (same comment as for Benzene)
- Arsenic [air, unspecified]: 6.85725e-12 kg; source Ntziachristos, L. 2013; lognormal variance with pedigree 0.0193, pedigree (2,2,4,5,3)
  (same comment as for maintenance, lorry 16 metric ton)
- Copper [air, unspecified]: 1.45374e-9 kg; source Ntziachristos, L. 2013; lognormal variance with pedigree 0.7187, pedigree (2,2,4,5,3)
  (same comment as for maintenance, lorry 16 metric ton)
- Chromium [air, unspecified]: 2.05717e-9 kg; source Ntziachristos, L. 2013; lognormal variance with pedigree 0.7187, pedigree (2,2,4,5,3)
  (same comment as for maintenance, lorry 16 metric ton)
- Nitrogen oxides [air, unspecified]: 0.000883601 kg; source CETESB 2019; lognormal variance with pedigree 0.0013, pedigree (2,2,1,1,1)
  (same comment as for Particulates, < 2.5 um)
- Dinitrogen monoxide [air, unspecified]: 1.35909e-6 kg; source Keller, M. 2010; lognormal variance with pedigree 0.0272, pedigree (2,5,4,5,3)
  (same comment as for Cadmium)
- Carbon monoxide, fossil [air, unspecified]: 0.000437694 kg; source CETESB 2019; lognormal variance with pedigree 0.0013, pedigree (2,2,1,1,1)
  Measured data from emission testing of the national vehicle fleet production and imports, weighted by sales amounts (CETESB, 2019). Correction factor applied to account the impact of the biodiesel blend on exhaust emission according to USEPA (2002). Value representing the fossil emission share. Final value is influenced by the updated freight load factor form EPE (2020).
  References:
  CETESB (2019). Companhia Ambiental do Estado de São Paulo (2019). Emissões Veiculares no Estado de São Paulo. Governo do Estado de São Paulo. Available at: https://cetesb.sp.gov.br/veicular/relatoriose-publicacoes/. Accessed in 15/06/2020.
  EPE, 2020. Energy Research Enterprise (2020). Integrated Transport Model. Consultation through Information to Citizen System. Federal Government of Brazil.
  USEPA, 2002. United States Environmental Protection Agency (2002). A Comprehensive Analysis of Biodiesel Impacts on Exhaust Emissions. Draft Technical Report.
- Zinc [air, unspecified]: 1.19179e-7 kg; source Ntziachristos, L. 2013; lognormal variance with pedigree 0.7187, pedigree (2,2,4,5,3)
  (same comment as for maintenance, lorry 16 metric ton)
- Carbon dioxide, fossil [air, unspecified]: 0.189626 kg; source U. S, Environmental Protection Agency 2002; lognormal variance with pedigree 0.0606, pedigree (3,5,5,5,3)
  (same comment as for Carbon dioxide, non-fossil)
- NMVOC, non-methane volatile organic compounds, unspecified origin [air, unspecified]: 3.11737e-5 kg; lognormal variance with pedigree 0.0193, pedigree (2,2,4,5,3)
  (same comment as for Benzene)
- Sulfur dioxide [air, unspecified]: 5.9866e-5 kg; source ANP 2013; lognormal variance with pedigree 0.0026, pedigree (3,1,1,1,1)
  Calculated value based on fuel sulphur content. EURO2 lorries are assumed to be fuelled with 500 ppm sulphur content fossil diesel blended with 12% biodiesel, which does not contribute to sulphur emissions.
  References:
  MMA, 2014. Ministry of Environment (2014). Inventário Nacional de Emissões Atmosféricas por Veículos
  Automotores Rodoviários. Available at:
  http://www.antt.gov.br/backend/galeria/arquivos/inventario_de_emissoes_por_veiculos_rodov
  iarios_2013.pdf. Accessed in: 10/06/2020.
- Mercury [air, unspecified]: 3.63433e-10 kg; source Ntziachristos, L. 2013; lognormal variance with pedigree 0.7187, pedigree (2,2,4,5,3)
  (same comment as for maintenance, lorry 16 metric ton)

## Sampling procedure
Literatura data is used to update regulated exhaust emissions and freight load factors. Furthermore, correction factors are used to consider the impact of biodiesel blend on exhaust emissions. Refer to General Comment section for detailed recontextualization methodology.

## Extrapolations
Apart from particulate matter, carbon monoxide, sulfur dioxide, and carbon dioxide, exhaust emissions are extrapolated from an original dataset covering the geography ZA. Infrastructure and maintenance information are also extrapolated from the geography ZA. Fuel use and emission factors were adapted considering the 12% biodiesel blend, however original emission factors references are from earlier periods. The uncertainty has been adjusted accordingly.

## Review by Christian Bauer 2021-03-29
passed
