# palm oil refinery operation

Dataset: EcoSpold 2, unit process
Geography: GLO
Time period: 2012-01-01 to 2021-12-31
Technology level: current
Classification: ISIC rev.4 ecoinvent: 1040:Manufacture of vegetable and animal oils and fats
Scenario: Business-as-Usual
System model: Allocation, cut-off by classification
Generated by: Tereza Levova
Published in: Omni Tech International 2010
Database: ecoinvent
isCopyrightProtected: true
accessRestrictedTo: 1

## General comment
This dataset models palm oil refining based on data for soybean oil refining.

## Included activities start
From reception of crude palm oil at the refinery gate through refining of crude palm oil.

## Included activities end
System boundary is set by the boundaries of the refinery.

## Technology
Average technology for alkaline refining process, which refers to caustic soda being added to degummed crude oil, which reacts with the free fatty acids (FFA) to form soap stock. The oil/soap mixture is separated using a centrifuge, and filtration is performed to further clarify the oil from the soap.

## Parameters
- fraction, process water, to air: 0.15 dimensionless; name fraction_PW_to_air; lognormal variance with pedigree 0.092025, pedigree (4,4,3,2,4)
  Literature value. In case when no industry/process specific data are available, default evaporation fraction value is used. This value is 15% and is based on literature (Statistics Canada, 2007 & Shaffer, K.H., 2008, Consumptive water use in the Great Lakes Basin, USGS & Shiklomanov, 2003, World Water Resources at the Beginning of the 21st Century) and has been approved by an expert.
- fraction: 0.802 dimensionless; name fraction_of_crude_oil_PV_to_refinery; lognormal variance with pedigree 0.0086, pedigree (4,1,1,1,1)
  Estimated based on literature (USDA, http://usda.mannlib.cornell.edu/MannUsda/viewDocumentInfo.do?documentID=1290 and http://lipidlibrary.aocs.org/market/nonfood.htm) 19.8% of vegetable oil, crude produced is further processed to be used for non-food products. The remaining 80.2 % is refined into vegetable oil, refined and used during food production.
- fraction, tap water, to air: 0.15 dimensionless; name fraction_TW_to_air; = fraction_PW_to_air; lognormal variance with pedigree 0.092025, pedigree (4,4,3,2,4)
  Calculated value. See comment in the other parametres present in this dataset. Tap water is considered to be always used as process water, thus process water fractions to air are applied to all tap water input flows to calculate the amount of water consumed in the processes.
- utilisation rate: 0.9 dimensionless; name utilization_rate; lognormal variance with pedigree 0.0086, pedigree (4,1,1,1,1)

## Reference product
- palm oil, refined: 1 kg; name palm_oil_refined_output; CPC 21652: Palm oil, refined; By-product classification allocatable product
  production volume 2.65567e10 kg; name palm_oil_refined_PV; = (34503907*1000*fraction_of_crude_oil_PV_to_refinery)/ palm_oil_crude_input
    According to literature (USDA, http://usda.mannlib.cornell.edu/MannUsda/viewDocumentInfo.do?documentID=1290 and http://lipidlibrary.aocs.org/market/nonfood.htm) 19.8% of vegetable oil, crude produced is further processed to be used for non-food products. The remaining 80.2 % is refined into vegetable oil, refined and used during food production.
  property carbon content, non-fossil 0.752881
    C49H97O6. Palm oil (tab 17.4, ecoinvent v2.2 report 17-part 17)
  property carbon content, fossil 0
    C49H97O6. Palm oil (tab 17.4, ecoinvent v2.2 report 17-part 17)
  property price 0.372 EUR2005; name palm_oil_refined_output_price_EUR2005
    Average 2005 prices for EU27, USA, China, Japan and India from Import/Export data (US$ and tonnes) in UN Commodity Trade Statistics Database; Comodity: palm oil or fractions simply refined
  property heating value, net 37 MJ
    Literature value, Source: Biograce, Condensed list of standard values, version 2 - Public. Available at: https://biograce.net/app/webroot/files/file/BioGrace_condensed_list_of_standard_values_-_version_2_-_Public.doc
  property carbon content 0.752881
    carbon content on a dry matter basis (reserved; not for manual entry)
  property true value 0.372; name palm_oil_refined_output_true_value
    allocation property applied in "true value" allocation // value calculated from revenue
  properties: water content 0, wet mass 1 kg, water in wet mass 0 kg, dry mass 1 kg, carbon allocation 0.752881 kg

## By-products
- soap: 0 kg; name soap_output; CPC 35321: Soap; organic surface-active products and preparations for use as soap; paper, wadding, felt and nonwovens, im[…]; By-product classification allocatable product; pedigree (1,1,1,1,1)
  Estimated value based on soybean oil, crude refining.
  production volume 1.9652e8 kg; = soap_output/ palm_oil_refined_output* palm_oil_refined_PV
    Calculated from production volume of reference product using the relative outputs.
  property carbon content, fossil 0
    Soap (CnH2n+1 COO Na) is produced by a combined saponification and neutralisation process performed on a blend of oleochemical feedstocks comprised of short chain (C12-14, derived from coconut or palm kernel oil) and long chain (C16-18, from tallow or palm oil) esters.The ratio of short to long fatty acid chains is 20:80 (ecoinvent v2.2 report 12). Short fatty acid has been estimated as C12.5H(2*12.5+1); MW R=176 g/mol. Long fatty acid has been estimatedas C16H(2*16+1); MW R=225 g/mol. MW of COONa=67 g/mol
  property carbon content, non-fossil 0.692237
    Soap (CnH2n+1 COO Na) is produced by a combined saponification and neutralisation process performed on a blend of oleochemical feedstocks comprised of short chain (C12-14, derived from coconut or palm kernel oil) and long chain (C16-18, from tallow or palm oil) esters.The ratio of short to long fatty acid chains is 20:80 (ecoinvent v2.2 report 12). Short fatty acid has been estimated as C12.5H(2*12.5+1); MW R=176 g/mol. Long fatty acid has been estimated as C16H(2*16+1); MW R=225 g/mol. MW of COONa=67 g/mol
  property heating value, net 17.93 MJ
    LHV is calculated based on the Carbon content of the product. More details can be found on the respective documentation.
  property price 1.73 EUR2005; name soap_output_price_EUR2005
    According to Industrial Commodity Statistics Yearbook 2005, volume 1. Physical Quantity Data. UN. New York 2008 (hard copy ). The price is for the highest producing country in EU27 where the data are present (Italy) and soap; paper, wadding, and similar, covered with soap or detergent. US$ converted to according to http://en.wikipedia.org/wiki/Table_of_historical_exchange_rates downloaded 30 June 2009.
  property carbon content 0.692237
    carbon content on a dry matter basis (reserved; not for manual entry)
  property true value 0.012802; name soap_output_true_value
    allocation property applied in "true value" allocation // value calculated from revenue
  properties: water content 0.149425, dry mass 0.87 kg, water in wet mass 0.13 kg, wet mass 1 kg, carbon allocation 0.602247 kg

## Inputs from technosphere
- tap water: 150.81 kg; name tap_water_input; source Omni Tech International  2010; lognormal variance with pedigree 0.212, pedigree (3,5,5,5,5)
  Estimated value based on literature.
  properties: water content 2962.17, wet mass 1 kg, dry mass 0.000337476 kg, carbon content, fossil 0.00178991
- sodium hydroxide, without water, in 50% solution state: 0.00222348 kg; lognormal variance with pedigree 0.0526, pedigree (3,5,5,5,1)
  Estimated value based on soybean oil, crude refining.
  properties: dry mass 1 kg, wet mass 1 kg, heating value, net 3.03 MJ
- wastewater from vegetable oil refinery: -0.0870058 m3; name wastewater_from_vegetable_oil_rafinery_o; lognormal variance with pedigree 0.212, pedigree (3,5,5,5,5)
  Estimated value based on soybean oil, crude refining.
  production volume 2.39011e9 m3; = wastewater_from_vegetable_oil_rafinery_o/ palm_oil_refined_output* palm_oil_refined_PV
    Calculated from production volume of reference product using the relative outputs.
  property price 0 EUR2005; name wastewater_from_vegetable__price_EUR2005
  properties: water content 1146.05, wet mass 1000 kg, dry mass 0.871801 kg, carbon content, non-fossil 0.993118
  note on carbon content, non-fossil: COD= 2 kg/m3 (Tab A.19, ecoinvent v2.2 report 13_I). COD was converted to TOC, using conversion factors in Tab 4.10 (ecoinvent v2.2 report 13_IV). TOC was considered as Total Carbon.
- palm oil, crude: 1.00733 kg; name palm_oil_crude_input; = palm_oil_refined_output+(palm_oil_refined_output*0.042); lognormal variance with pedigree 0.1373, pedigree (4,3,4,3,5)
  Estimated based on soybean oil, crude refining the amount of crude oil entering the process is 4.2% higher than the amount of refined oil on the output.
  properties: wet mass 1 kg, dry mass 1 kg, carbon content, non-fossil 0.752881, heating value, net 37 MJ
  note on carbon content, non-fossil: C49H97O6. Palm oil (tab 17.4, ecoinvent v2.2 report 17-part 17)
  note on heating value, net: Literature value, Source: Biograce, Condensed list of standard values, version 2 - Public. Available at: https://biograce.net/app/webroot/files/file/BioGrace_condensed_list_of_standard_values_-_version_2_-_Public.doc
- heat, district or industrial, natural gas: 0.0577754 MJ; lognormal variance with pedigree 0.0126, pedigree (1,4,4,5,1)
  Estimated value based on soybean oil, crude refining.
  properties: heating value, net 1 MJ
- electricity, medium voltage: 0.00431317 kWh; lognormal variance with pedigree 0.0126, pedigree (1,4,4,5,1)
  Estimated value based on soybean oil, crude refining.
- vegetable oil refinery: 1.05943e-10 unit; = 1/(lifetime_capacity_kg* utilization_rate); lognormal variance with pedigree 0.3486, pedigree (4,3,5,1,1)
  The utilization rate of 90% means that out of the whole capacity of the vegetable oil refinery only 90% is actually used for the production.
  property lifetime 50 year; name lifetime
  property lifetime capacity [kg] 1.01389e10 kg; name lifetime_capacity_kg; = (1/0.9)*500*365*1000*lifetime
  note on lifetime capacity [kg]: Calculated according to literature (World Bank, 1999, The Indian Oilseed Complex, http://books.google.ch/books?id=cAmzHYm7kHoC&pg=PA151&dq=edible+oil+refinery+plant+infrastructure+area&hl=en&sa=X&ei=x65MT729L7HN4QSYmszJAg&redir_esc=y#v=onepage&q=edible%20oil%20refinery%20plant%20infrastructure%20area&f=false) the average size European vegetable oil refinery produce 500 tones/day of refined vegetable oil.

## Emissions to nature
- Water [air, non-urban air or from high stacks]: 0.0638042 m3; = (tap_water_input-( (wastewater_from_vegetable_oil_rafinery_o*-1)*1000)) / 1000; source Omni Tech International  2010; lognormal variance with pedigree 0.212, pedigree (3,5,5,5,5)
  Based on mass balance of water in and out.
  property water in wet mass 1000 kg; name WWM
  property dry mass 0 kg; name DM
  property wet mass 1000 kg; name WM
  property carbon content, non-fossil 0; name C_content_non_fossil
  property carbon content, fossil 0; name C_content_fossil

## Sampling procedure
Based on soybean oil refinery operation.

## Review by Bo Weidema 2012-03-14
Production volumes are for 2005, even though the dataset is indicated to be valid for 2012.
