# treatment of waste polyurethane, municipal incineration

Dataset: EcoSpold 2, unit process
Geography: CH
Time period: 1994-01-01 to 2021-12-31
Technology level: outdated
Classification: ISIC rev.4 ecoinvent: 3821:Treatment and disposal of non-hazardous waste
Classification: EcoSpold01Categories: waste management/municipal incineration
Synonyms: PU; PUR; diol-diisocyanate copolymer
Tags: ConvertedDataset; Treatment
Scenario: Business-as-Usual
System model: Allocation, cut-off by classification
Generated by: Gabor Doka (obsolete)
Published in: Doka G. 2007
Database: ecoinvent
isCopyrightProtected: true
accessRestrictedTo: 1

## General comment
Inventoried waste contains 100% PU; .
waste composition (wet, in ppm): upper heating value 30.9 MJ/kg; lower heating value 30.67 MJ/kg; H2O 2000; O 178700; H 84276; C 640700; S 203.07; N 60922; P n.a.; B n.a.; Cl 24369; Br 70.934; F 14.896; I n.a.; Ag n.a.; As 1.9253; Ba 188.99; Cd 82.301; Co 32.011; Cr 41.41; Cu 321.89; Hg 0.86045; Mn 80.984; Mo n.a.; Ni 20.874; Pb 473.27; Sb 43.54; Se 2.128; Sn 26.555; V 291.99; Zn 566.54; Be 0.50667; Sc n.a.; Sr 89.68; Ti 1013.3; Tl 0.40534; W n.a.; Si n.a.; Fe 3775.4; Ca n.a.; Al 202.67; K n.a.; Mg n.a.; Na 1485;
Share of carbon in waste that is biogenic 0%.
Share of iron in waste that is metallic/recyclable 0%.
Net energy produced in MSWI: 3.47MJ/kg waste electric energy and 7MJ/kg waste thermal energy
Allocation of energy production: no substitution or expansion. Total burden allocated to waste disposal function of MSWI.
One kg of this waste produces 0.01893 kg of slag and 0.005854 kg of residues, which are landfilled. Additional solidification with 0.002342 kg of cement.
[This dataset was already contained in the ecoinvent database version 2. It was not individually updated during the transfer to ecoinvent version 3. Life Cycle Impact Assessment results may still have changed, as they are affected by changes in the supply chain, i.e. in other datasets. This dataset was generated following the ecoinvent quality guidelines for version 2. It may have been subject to central changes described in the ecoinvent version 3 change report (http://www.ecoinvent.org/database/ecoinvent-version-3/reports-of-changes/), and the results of the central updates were reviewed extensively. The changes added e.g. consistent water flows and other information throughout the database. The documentation of this dataset can be found in the ecoinvent reports of version 2, which are still available via the ecoinvent website. The change report linked above covers all central changes that were made during the conversion process.]

## Included activities end
waste-specific air and water emisions from incineration, auxiliary material consumption for flue gas cleaning. Short-term emissions to river water and long-term emisisons to ground water from slag compartment (from bottom slag) and residual material landfill (from solidified fly ashes and scrubber slugde). Process energy demands for MSWI.

## Geography
Specific to the technology mix encountered in Switzerland in 2000. Well applicable to modern incineration practices in Europe, North America or Japan.

## Technology
replaced by newer incineration technology with fly ash extraction. Average Swiss MSWI plants in 2000 with electrostatic precipitator for fly ash (ESP), wet flue gas scrubber and 29.4% SNCR , 32.2% SCR-high dust , 24.6% SCR-low dust -DeNOx facilities and 13.8% without Denox (by burnt waste, according to Swiss average). Share of waste incinerated in plants with magnetic scrap separation from slag : 50%. Gross electric efficiency technology mix 12.997% and Gross thermal efficiency technology mix 25.57%

## Time period
Waste composition as given in literature reference, theoretical data or other source. Transfer coefficients for modern Swiss MSWI. Emission speciation based on early 90ies data.

## Reference product
- waste polyurethane: -1 kg; name waste_PE; By-product classification Waste; CPC 39270: Waste, parings and scrap of plastics; CAS 9009-54-5
  EcoSpold01Location=CH
  production volume 0 kg; name waste_PE_PV
    outdated. Replaced by newer incineration technology with fly ash extraction.
  property price 0 EUR2005; name waste_PE_price_EUR2005
    Waste products are assigned a price of zero as they are assumed to require further treatment.
  property carbon content, fossil 0.641283
    C content was calculated for 1 kg DM, using data in Tab A.2, ecoinvent v2.2 report 13_I.
  property heating value, net 30.67 MJ
    Value taken from the general comment of the treatment dataset.
  property carbon content 0.641283
    carbon content on a dry matter basis (reserved; not for manual entry)
  properties: dry mass 0.998 kg, wet mass 1 kg, water in wet mass 0.002 kg, water content 0.00200401, carbon content, non-fossil 0, carbon allocation 0.64 kg

## Inputs from technosphere
- ammonia, anhydrous, liquid: 0.00307 kg; lognormal variance with pedigree 1.13, pedigree (1,1,5,1,1)
  uncertainty calculated from uncertainty in average DeNOx input, uncertainty in the share of thermal NOx, uncertainty of nitrogen content in average municipal waste and the unertainty in nitrogen content in *this* waste.
  EcoSpold01Location=CH
  properties: wet mass 1 kg, dry mass 1 kg
- slag landfill: 3.37e-11 unit; lognormal variance with pedigree 0.08, pedigree (1,1,5,1,1)
  uncertainty is calculated from uncertainties in waste composition and transfer coefficients in incinerator
  EcoSpold01Location=CH
- waste cement, hydrated: -0.00585 kg; name waste_cement_ByP; lognormal variance with pedigree 0.08, pedigree (1,1,5,1,1)
  EcoSpold01Location=CH
  Hydrated cement for solidification of landfilled residual material. Uncertainty calculated from unertainty of the waste composition of this waste and transfer coefficients in the incinerator and of the solidification recipe.
  production volume 0 kg; = ABS( waste_cement_ByP/ waste_PE* waste_PE_PV)
    Calculated from the production volume of waste polyurethane, 0.2% water in proportion to the respective output amounts.
  property price 0 EUR2005; name waste_cement_ByP_price_EUR2005
  properties: dry mass 1 kg, wet mass 1 kg
- chromium oxide, flakes: 1.8e-6 kg; lognormal variance with pedigree 1.84, pedigree (1,1,5,1,1)
  Proxy for vanadium pentoxide V2O5 in SCR catalyst, uncertainty calculated from uncertainty in average DeNOx input, uncertainty in the share of thermal NOx, uncertainty of nitrogen content in average municipal waste and the unertainty in nitrogen content in *this* waste.
  EcoSpold01Location=RER
  properties: wet mass 1 kg, dry mass 1 kg
- chemical, inorganic: 7.25e-5 kg; lognormal variance with pedigree 0.3, pedigree (1,1,5,1,1)
  EcoSpold01Location=GLO
  Proxy for Polyelectrolyte. uncertainty calculated from uncertainty in average auxiliary material input, and the unertainty of the waste composition of this waste
  properties: carbon content, fossil 0.003, dry mass 1 kg, wet mass 1 kg
  note on carbon content, fossil: This dataset is an unweighted average of 20 inorganic substances (listed in Tab 88.1, ecoinvent v2.2 report 8, part II), being part of the top100 chemicals included in this database. The C-content has also been calculated as an unweighted average of the C content of the substances composing this dataset.
- chemical, organic: 0.000329 kg; lognormal variance with pedigree 1.03, pedigree (1,1,5,1,1)
  Proxy for TMT15. uncertainty calculated from uncertainty in average auxiliary material input, and the unertainty of the waste composition of this waste
  EcoSpold01Location=GLO
  properties: wet mass 1 kg, heating value, net 19.03 MJ, dry mass 1 kg, carbon content, fossil 0.628
  note on carbon content, fossil: This dataset is an unweighted average of 20 organic substances (listed in Tab 88.1, ecoinvent v2.2 report 8, part II), being part of the top100 chemicals included in this database. The C-content has also been calculated as an unweighted average of the C content of the substances composing this dataset.
- quicklime, milled, packed: 0.00423 kg; lognormal variance with pedigree 0.31, pedigree (1,1,5,1,1)
  uncertainty calculated from uncertainty in average auxiliary material input, and the unertainty of the waste composition of this waste
  EcoSpold01Location=CH
  properties: water content 0.010101, dry mass 0.99 kg, wet mass 1 kg
- residual material landfill: 1.22e-11 unit; lognormal variance with pedigree 0.07, pedigree (1,1,5,1,1)
  (same comment as for slag landfill)
- iron (III) chloride, without water, in 40% solution state: 0.000124 kg; lognormal variance with pedigree 0.37, pedigree (1,1,5,1,1)
  EcoSpold01Location=CH
  uncertainty calculated from uncertainty in average auxiliary material input, and the unertainty of the waste composition of this waste
  properties: wet mass 1 kg, dry mass 1 kg
- titanium dioxide: 8.8e-5 kg; lognormal variance with pedigree 1.84, pedigree (1,1,5,1,1)
  uncertainty calculated from uncertainty in average DeNOx input, uncertainty in the share of thermal NOx, uncertainty of nitrogen content in average municipal waste and the unertainty in nitrogen content in *this* waste.
  EcoSpold01Location=RER
  properties: wet mass 1 kg, dry mass 1 kg
- cement, unspecified: 0.00234 kg; lognormal variance with pedigree 0.08, pedigree (1,1,5,1,1)
  EcoSpold01Location=CH
  Cement for solidification of landfilled residual material. Uncertainty calculated from unertainty of the waste composition of this waste, of transfer coefficients in the incinerator and of the solidification recipe.
  properties: dry mass 1 kg, wet mass 1 kg
- hydrochloric acid, without water, in 30% solution state: 4.35e-5 kg; lognormal variance with pedigree 0.3, pedigree (1,1,5,1,1)
  EcoSpold01Location=RER
  uncertainty calculated from uncertainty in average auxiliary material input, and the unertainty of the waste composition of this waste
  properties: heating value, net 3.32 MJ, dry mass 1 kg, wet mass 1 kg
- process-specific burdens, municipal waste incineration: 1 kg; lognormal variance with pedigree 0.04, pedigree (1,1,5,1,1)
  demands per kilogram waste. uncertainty is heeded in the module;activityLink introduced to establish a direct link to the corresponding regional supply of this product
  EcoSpold01Location=CH
- process-specific burdens, slag landfill: 0.0189 kg; lognormal variance with pedigree 0.08, pedigree (1,1,5,1,1)
  EcoSpold01Location=CH
  uncertainty is calculated from uncertainties in waste composition and transfer coefficients in incinerator;activityLink introduced to establish a direct link to the corresponding regional supply of this product
- municipal waste incineration facility: 2.5e-10 unit; lognormal variance with pedigree 0.04, pedigree (1,1,5,1,1)
  EcoSpold01Location=CH
  demands per kilogram waste. uncertainty is heeded in the module
- process-specific burdens, residual material landfill: 0.00585 kg; lognormal variance with pedigree 0.07, pedigree (1,1,5,1,1)
  (same comment as for process-specific burdens, slag landfill)
- sodium hydroxide, without water, in 50% solution state: 0.024 kg; lognormal variance with pedigree 0.31, pedigree (1,1,5,1,1)
  (same comment as for hydrochloric acid, without water, in 30% solution state)
  properties: heating value, net 3.03 MJ, wet mass 1 kg, dry mass 1 kg
- heat, district or industrial, natural gas: 0.27 MJ; lognormal variance with pedigree 1.13, pedigree (1,1,5,1,1)
  (same comment as for titanium dioxide)
  properties: heating value, net 1 MJ

## Emissions to nature
- Chloride [water, surface water]: 0.0238 kg; lognormal variance with pedigree 0.27, pedigree (1,1,5,1,1)
  uncertainty is calculated from uncertainties in waste composition and transfer coefficients in incinerator and landfills
- Copper, ion [water, ground-, long-term]: 0.00026 kg; lognormal variance with pedigree 0.82, pedigree (1,1,5,1,1)
  Long-term emissions from landfilling of incineration residues. uncertainty is calculated from uncertainties in waste composition and transfer coefficients in incinerator and landfills.
- Sodium, ion [water, ground-, long-term]: 0.00115 kg; lognormal variance with pedigree 0.43, pedigree (1,1,5,1,1)
  (same comment as for Copper, ion)
- Zinc, ion [water, ground-, long-term]: 8.78e-6 kg; lognormal variance with pedigree 5.39, pedigree (1,1,5,1,1)
  (same comment as for Copper, ion)
- Copper, ion [water, surface water]: 1.31e-8 kg; lognormal variance with pedigree 1.48, pedigree (1,1,5,1,1)
  (same comment as for Chloride)
- Arsenic [air, urban air close to ground]: 1.96e-14 kg; lognormal variance with pedigree 1.63, pedigree (1,1,5,1,1)
  uncertainty is calculated from uncertainties in waste composition and transfer coefficients in incinerator
- Vanadium [air, urban air close to ground]: 2.92e-8 kg; lognormal variance with pedigree 0.89, pedigree (1,1,5,1,1)
  (same comment as for Arsenic)
- DOC, Dissolved Organic Carbon [water, ground-, long-term]: 0.00626 kg; lognormal variance with pedigree 0.05, pedigree (1,1,5,1,1)
  (same comment as for Copper, ion)
- Methane, fossil [air, urban air close to ground]: 6.38e-6 kg; lognormal variance with pedigree 0.091225, pedigree (2,3,5,2,1)
  Confidential data from 5 plants in Switzerland and Germany
  Uncertainty: & basic uncertainty of 1.5; confidential data from 5 plants in Switzerland and Germany
- COD, Chemical Oxygen Demand [water, ground-, long-term]: 0.0158 kg; lognormal variance with pedigree 0.05, pedigree (1,1,5,1,1)
  (same comment as for Copper, ion)
- Cobalt [water, surface water]: 5.48e-9 kg; lognormal variance with pedigree 1.6, pedigree (1,1,5,1,1)
  (same comment as for Chloride)
- Carbon dioxide, fossil [air, urban air close to ground]: 2.32 kg; lognormal variance with pedigree 0.05, pedigree (1,1,5,1,1)
  (same comment as for Arsenic)
- Dinitrogen monoxide [air, urban air close to ground]: 0.000257 kg; lognormal variance with pedigree 1.24, pedigree (1,1,5,1,1)
  uncertainty calculated from uncertainty in average N-emissions, uncertainty in the share of thermal NOx, uncertainty of nitrogen content in average municipal waste and the unertainty in nitrogen content in *this* waste.
- Cobalt [water, ground-, long-term]: 2.8e-5 kg; lognormal variance with pedigree 1.1, pedigree (1,1,5,1,1)
  (same comment as for Copper, ion)
- Thallium [water, surface water]: 2.48e-10 kg; lognormal variance with pedigree 1.9, pedigree (1,1,5,1,1)
  (same comment as for Chloride)
- Mercury [air, urban air close to ground]: 2.97e-14 kg; lognormal variance with pedigree 1.73, pedigree (1,1,5,1,1)
  (same comment as for Arsenic)
- Hydrogen chloride [air, urban air close to ground]: 2.71e-7 kg; lognormal variance with pedigree 0.35, pedigree (1,1,5,1,1)
  (same comment as for Arsenic)
- Mercury [water, surface water]: 9.2e-9 kg; lognormal variance with pedigree 1.59, pedigree (1,1,5,1,1)
  (same comment as for Chloride)
- Lead [water, ground-, long-term]: 3.37e-5 kg; lognormal variance with pedigree 6.88, pedigree (1,1,5,1,1)
  (same comment as for Copper, ion)
- Copper [air, urban air close to ground]: 2.38e-9 kg; lognormal variance with pedigree 0.9, pedigree (1,1,5,1,1)
  (same comment as for Arsenic)
- Cyanide [air, urban air close to ground]: 5.48e-5 kg; lognormal variance with pedigree 1.24, pedigree (1,1,5,1,1)
  (same comment as for Dinitrogen monoxide)
- Beryllium [water, ground-, long-term]: 4.08e-7 kg; lognormal variance with pedigree 1.48, pedigree (1,1,5,1,1)
  (same comment as for Copper, ion)
- Tin, ion [water, surface water]: 9.85e-10 kg; lognormal variance with pedigree 1.29, pedigree (1,1,5,1,1)
  (same comment as for Chloride)
- Strontium [water, ground-, long-term]: 8.96e-5 kg; lognormal variance with pedigree 1.02, pedigree (1,1,5,1,1)
  (same comment as for Copper, ion)
- Ammonia [air, urban air close to ground]: 4.83e-5 kg; lognormal variance with pedigree 1.24, pedigree (1,1,5,1,1)
  (same comment as for Dinitrogen monoxide)
- Bromine [air, urban air close to ground]: 2.13e-7 kg; lognormal variance with pedigree 1.06, pedigree (1,1,5,1,1)
  (same comment as for Arsenic)
- Tin [air, urban air close to ground]: 3.52e-8 kg; lognormal variance with pedigree 1.2, pedigree (1,1,5,1,1)
  (same comment as for Arsenic)
- Lead [air, urban air close to ground]: 1.76e-8 kg; lognormal variance with pedigree 0.84, pedigree (1,1,5,1,1)
  (same comment as for Arsenic)
- Titanium, ion [water, surface water]: 4.88e-9 kg; lognormal variance with pedigree 2.06, pedigree (1,1,5,1,1)
  (same comment as for Chloride)
- Nitrogen oxides [air, urban air close to ground]: 0.00194 kg; lognormal variance with pedigree 1.24, pedigree (1,1,5,1,1)
  (same comment as for Dinitrogen monoxide)
- Fluoride [water, ground-, long-term]: 1.33e-5 kg; lognormal variance with pedigree 0.86, pedigree (1,1,5,1,1)
  (same comment as for Copper, ion)
- Arsenic, ion [water, surface water]: 8.68e-7 kg; lognormal variance with pedigree 1.28, pedigree (1,1,5,1,1)
  (same comment as for Chloride)
- Bromine [water, surface water]: 5.85e-5 kg; lognormal variance with pedigree 0.88, pedigree (1,1,5,1,1)
  (same comment as for Chloride)
- Nitrate [water, surface water]: 0.000779 kg; lognormal variance with pedigree 0.18, pedigree (1,1,5,1,1)
  (same comment as for Chloride)
- Mercury [water, ground-, long-term]: 4.48e-8 kg; lognormal variance with pedigree 3.4, pedigree (1,1,5,1,1)
  (same comment as for Copper, ion)
- Tin, ion [water, ground-, long-term]: 1.33e-5 kg; lognormal variance with pedigree 1.53, pedigree (1,1,5,1,1)
  (same comment as for Copper, ion)
- Cadmium, ion [water, surface water]: 3.73e-8 kg; lognormal variance with pedigree 1, pedigree (1,1,5,1,1)
  (same comment as for Chloride)
- TOC, Total Organic Carbon [water, ground-, long-term]: 0.00626 kg; lognormal variance with pedigree 0.05, pedigree (1,1,5,1,1)
  (same comment as for Copper, ion)
- Cadmium, ion [water, ground-, long-term]: 8.26e-7 kg; lognormal variance with pedigree 6.87, pedigree (1,1,5,1,1)
  (same comment as for Copper, ion)
- TOC, Total Organic Carbon [water, surface water]: 1.76e-5 kg; lognormal variance with pedigree 0.27, pedigree (1,1,5,1,1)
  (same comment as for Chloride)
- Strontium [water, surface water]: 5.65e-8 kg; lognormal variance with pedigree 1.72, pedigree (1,1,5,1,1)
  (same comment as for Chloride)
- Aluminium [air, urban air close to ground]: 3.17e-7 kg; lognormal variance with pedigree 0.92, pedigree (1,1,5,1,1)
  (same comment as for Arsenic)
- Barium [water, surface water]: 2.6e-8 kg; lognormal variance with pedigree 1.8, pedigree (1,1,5,1,1)
  (same comment as for Chloride)
- Selenium [air, urban air close to ground]: 1.07e-14 kg; lognormal variance with pedigree 1.63, pedigree (1,1,5,1,1)
  (same comment as for Arsenic)
- Hydrogen fluoride [air, urban air close to ground]: 7.84e-9 kg; lognormal variance with pedigree 1.28, pedigree (1,1,5,1,1)
  (same comment as for Arsenic)
- Manganese [air, urban air close to ground]: 4.41e-13 kg; lognormal variance with pedigree 1.15, pedigree (1,1,5,1,1)
  (same comment as for Arsenic)
- Fluoride [water, surface water]: 1.15e-6 kg; lognormal variance with pedigree 0.91, pedigree (1,1,5,1,1)
  (same comment as for Chloride)
- Beryllium [air, urban air close to ground]: 5.07e-10 kg; lognormal variance with pedigree 1.71, pedigree (1,1,5,1,1)
  (same comment as for Arsenic)
- Bromine [water, ground-, long-term]: 1.24e-5 kg; lognormal variance with pedigree 1.05, pedigree (1,1,5,1,1)
  (same comment as for Copper, ion)
- Manganese [water, surface water]: 4.53e-9 kg; lognormal variance with pedigree 1.8, pedigree (1,1,5,1,1)
  (same comment as for Chloride)
- Cobalt [air, urban air close to ground]: 1.02e-12 kg; lognormal variance with pedigree 1.25, pedigree (1,1,5,1,1)
  (same comment as for Arsenic)
- BOD5, Biological Oxygen Demand [water, surface water]: 2.4e-5 kg; lognormal variance with pedigree 0.16, pedigree (1,1,5,1,1)
  (same comment as for Chloride)
- Aluminium [water, surface water]: 1.69e-8 kg; lognormal variance with pedigree 1.2, pedigree (1,1,5,1,1)
  (same comment as for Chloride)
- Vanadium, ion [water, surface water]: 1.97e-7 kg; lognormal variance with pedigree 1.08, pedigree (1,1,5,1,1)
  (same comment as for Chloride)
- Vanadium, ion [water, ground-, long-term]: 5.01e-5 kg; lognormal variance with pedigree 1.6, pedigree (1,1,5,1,1)
  (same comment as for Copper, ion)
- Antimony [water, ground-, long-term]: 2.78e-5 kg; lognormal variance with pedigree 0.91, pedigree (1,1,5,1,1)
  (same comment as for Copper, ion)
- Sulfur dioxide [air, urban air close to ground]: 8.65e-7 kg; lognormal variance with pedigree 0.92, pedigree (1,1,5,1,1)
  (same comment as for Arsenic)
- Titanium [air, urban air close to ground]: 1.01e-6 kg; lognormal variance with pedigree 0.72, pedigree (1,1,5,1,1)
  (same comment as for Arsenic)
- Zinc, ion [water, surface water]: 1.04e-7 kg; lognormal variance with pedigree 0.69, pedigree (1,1,5,1,1)
  (same comment as for Chloride)
- Thallium [air, urban air close to ground]: 4.05e-10 kg; lognormal variance with pedigree 1.74, pedigree (1,1,5,1,1)
  (same comment as for Arsenic)
- Aluminium [water, ground-, long-term]: 0.00015 kg; lognormal variance with pedigree 0.85, pedigree (1,1,5,1,1)
  (same comment as for Copper, ion)
- Cadmium [air, urban air close to ground]: 4.53e-9 kg; lognormal variance with pedigree 1.06, pedigree (1,1,5,1,1)
  (same comment as for Arsenic)
- Chloride [water, ground-, long-term]: 0.000575 kg; lognormal variance with pedigree 0.15, pedigree (1,1,5,1,1)
  (same comment as for Copper, ion)
- Lead [water, surface water]: 1.32e-8 kg; lognormal variance with pedigree 0.9, pedigree (1,1,5,1,1)
  (same comment as for Chloride)
- Chromium, ion [water, surface water]: 1.32e-7 kg; lognormal variance with pedigree 1.13, pedigree (1,1,5,1,1)
  (same comment as for Chloride)
- BOD5, Biological Oxygen Demand [water, ground-, long-term]: 0.00517 kg; lognormal variance with pedigree 0.05, pedigree (1,1,5,1,1)
  (same comment as for Copper, ion)
- Beryllium [water, surface water]: 3.15e-10 kg; lognormal variance with pedigree 1.94, pedigree (1,1,5,1,1)
  (same comment as for Chloride)
- Sodium, ion [water, surface water]: 0.000321 kg; lognormal variance with pedigree 0.35, pedigree (1,1,5,1,1)
  (same comment as for Chloride)
- Nickel, ion [water, surface water]: 1.31e-8 kg; lognormal variance with pedigree 1.79, pedigree (1,1,5,1,1)
  (same comment as for Chloride)
- Sulfate [water, ground-, long-term]: 0.000509 kg; lognormal variance with pedigree 0.55, pedigree (1,1,5,1,1)
  (same comment as for Copper, ion)
- Selenium [water, surface water]: 6.93e-7 kg; lognormal variance with pedigree 1.21, pedigree (1,1,5,1,1)
  (same comment as for Chloride)
- Nickel [air, urban air close to ground]: 9.01e-13 kg; lognormal variance with pedigree 1.31, pedigree (1,1,5,1,1)
  (same comment as for Arsenic)
- Antimony [water, surface water]: 1.51e-5 kg; lognormal variance with pedigree 0.94, pedigree (1,1,5,1,1)
  (same comment as for Chloride)
- Barium [water, ground-, long-term]: 0.000168 kg; lognormal variance with pedigree 0.97, pedigree (1,1,5,1,1)
  (same comment as for Copper, ion)
- Sodium [air, urban air close to ground]: 1.4e-5 kg; lognormal variance with pedigree 0.66, pedigree (1,1,5,1,1)
  (same comment as for Arsenic)
- Iron, ion [water, ground-, long-term]: 0.00177 kg; lognormal variance with pedigree 1.3, pedigree (1,1,5,1,1)
  (same comment as for Copper, ion)
- Titanium, ion [water, ground-, long-term]: 0.000304 kg; lognormal variance with pedigree 1.06, pedigree (1,1,5,1,1)
  (same comment as for Copper, ion)
- Iron, ion [water, surface water]: 1.29e-6 kg; lognormal variance with pedigree 0.52, pedigree (1,1,5,1,1)
  (same comment as for Chloride)
- COD, Chemical Oxygen Demand [water, surface water]: 4.28e-5 kg; lognormal variance with pedigree 0.29, pedigree (1,1,5,1,1)
  (same comment as for Chloride)
- Strontium [air, urban air close to ground]: 8.97e-9 kg; lognormal variance with pedigree 1.05, pedigree (1,1,5,1,1)
  (same comment as for Arsenic)
- Arsenic, ion [water, ground-, long-term]: 1.06e-6 kg; lognormal variance with pedigree 1.52, pedigree (1,1,5,1,1)
  (same comment as for Copper, ion)
- Zinc [air, urban air close to ground]: 9.26e-9 kg; lognormal variance with pedigree 0.82, pedigree (1,1,5,1,1)
  (same comment as for Arsenic)
- Selenium [water, ground-, long-term]: 1.43e-6 kg; lognormal variance with pedigree 1.03, pedigree (1,1,5,1,1)
  (same comment as for Copper, ion)
- Nickel, ion [water, ground-, long-term]: 1.95e-5 kg; lognormal variance with pedigree 1.16, pedigree (1,1,5,1,1)
  (same comment as for Copper, ion)
- DOC, Dissolved Organic Carbon [water, surface water]: 1.76e-5 kg; lognormal variance with pedigree 0.27, pedigree (1,1,5,1,1)
  (same comment as for Chloride)
- Manganese [water, ground-, long-term]: 6.97e-5 kg; lognormal variance with pedigree 1.12, pedigree (1,1,5,1,1)
  (same comment as for Copper, ion)
- Sulfate [water, surface water]: 9.86e-5 kg; lognormal variance with pedigree 0.46, pedigree (1,1,5,1,1)
  (same comment as for Chloride)
- Thallium [water, ground-, long-term]: 2.37e-7 kg; lognormal variance with pedigree 1.3, pedigree (1,1,5,1,1)
  (same comment as for Copper, ion)
- Chromium [air, urban air close to ground]: 3.06e-12 kg; lognormal variance with pedigree 1.22, pedigree (1,1,5,1,1)
  (same comment as for Arsenic)
- Iron [air, urban air close to ground]: 1.26e-7 kg; lognormal variance with pedigree 0.57, pedigree (1,1,5,1,1)
  (same comment as for Arsenic)
- Barium [air, urban air close to ground]: 1.89e-7 kg; lognormal variance with pedigree 0.94, pedigree (1,1,5,1,1)
  (same comment as for Arsenic)
- Chromium VI [water, surface water]: 1.35e-6 kg; lognormal variance with pedigree 1.06, pedigree (1,1,5,1,1)
  (same comment as for Chloride)
- Chromium VI [water, ground-, long-term]: 4.38e-6 kg; lognormal variance with pedigree 1.34, pedigree (1,1,5,1,1)
  (same comment as for Copper, ion)
- Nitrate [water, ground-, long-term]: 0.00219 kg; lognormal variance with pedigree 0.22, pedigree (1,1,5,1,1)
  (same comment as for Copper, ion)
- Antimony [air, urban air close to ground]: 1.69e-13 kg; lognormal variance with pedigree 1.24, pedigree (1,1,5,1,1)
  (same comment as for Arsenic)
- Carbon monoxide, fossil [air, urban air close to ground]: 0.000223 kg; lognormal variance with pedigree 0.690625, pedigree (1,3,5,2,1)
  Literature data from switzerland and germany adapted to plant age distribution in switzerland
  Uncertainty: & basic uncertainty of 5; literature data from switzerland and germany adapted to plant age distribution in switzerland

## Sampling procedure
waste-specific calculation based on literature data

## Extrapolations
This dataset has been extrapolated from year 2000 to the year of the calculation (2021). The uncertainty has been adjusted accordingly.

## Review by Niels Jungbluth 2003-07-15
Passed. Calculation for standard deviation 95 of, i.e., infrastructure,
land occupation, transport services or other services can differ from
standard Pedigree approach used in this project and figures obtained by
this procedure.
