# treatment of used internal combustion engine, passenger car, shredding

Dataset: EcoSpold 2, unit process
Geography: GLO
Time period: 2005-01-01 to 2021-12-31
Technology level: current
Classification: EcoSpold01Categories: waste management/recycling
Classification: ISIC rev.4 ecoinvent: 3830:Materials recovery
Tags: Treatment
Scenario: Business-as-Usual
System model: Allocation, cut-off by classification
Generated by: Andrea Del Duce
Published in: Hischier R. 2007
Database: ecoinvent
isCopyrightProtected: true
accessRestrictedTo: 1

## General comment
This dataset describes the shredding of the used internal combustion engine (ICE) of a passenger car. The entries are given on a per kg basis. The original data has been collected for an ICE with a weight of approximately 275kg. The infrastructure and emission data is based on the e-waste shredding dataset which is based on literature. The output scrap and waste material quantities are derived from the respective ICE production dataset. The materialization of the motor is divided in 5 main fractions: scrap steel, scrap Aluminium, scrap Copper, scrap plastics and a shredding residue. These are the output waste flows of the process.The details concerning the materialization of the ICE trated in this dataset are described in Althaus and Gauch "Vergleichende Oekobilanz der Elektromobilität: Elektromobilität bersus konventionelle Mobilität mit Bio- und fossilen Treibstoffen".
[This dataset was already contained in the ecoinvent database version 2. It was not individually updated during the transfer to ecoinvent version 3. Life Cycle Impact Assessment results may still have changed, as they are affected by changes in the supply chain, i.e. in other datasets. This dataset was generated following the ecoinvent quality guidelines for version 2. It may have been subject to central changes described in the ecoinvent version 3 change report (http://www.ecoinvent.org/database/ecoinvent-version-3/reports-of-changes/), and the results of the central updates were reviewed extensively. The changes added e.g. consistent water flows and other information throughout the database. The documentation of this dataset can be found in the ecoinvent reports of version 2, which are still available via the ecoinvent website. The change report linked above covers all central changes that were made during the conversion process.]

## Included activities start
The dataset takes as input the used internal combustion engine and includes the treatment facility.

## Included activities end
This dataset returns the scrap fractions going to the specific recycling facilities and the emissions produced during the treatment process.

## Geography
Data from European studies, values used as global average data.

## Technology
Modern Shredder facility with 2 shredder, 2 magnetic separation & 2 Eddy-current separation steps. The shredded ICE corresponds to modern average technology.

## Parameters
- aluminum fraction recovery: 0.8258 dimensionless; name rec_f_Al
- copper fraction recovery: 0.7821 dimensionless; name rec_f_Cu
- plastic fraction recovery: 0.8829 dimensionless; name rec_f_Plastic
- steel fraction recovery: 0.95 dimensionless; name rec_f_Fe

## Reference product
- used internal combustion engine, passenger car: -1 kg; name RP_amount_1; CPC 39990: Other wastes n.e.c.; By-product classification Waste
  production volume 1.65e10 kg; name RP_PV_1
    Estimate based on projections of passenger car production for 2012 (http://www.worldometers.info/cars/). Total of 60000000 vehicles for 2012.
  property price 0 EUR2005; name RP_amount_1_price_EUR2005
    Waste products are assigned a price of zero as they are assumed to require further treatment.

## By-products
- aluminium scrap, post-consumer: 0 kg; source H.-J. Althaus 2010; CPC 39363: Waste and scrap of aluminium; By-product classification Recyclable; pedigree (1,1,1,1,1)
  Metal outputs from glider shredding based on ecoinvent transfer coefficients from weee shredding (ecoinvent report 18, p.21). Deatails on the materialization of the ICE are given in Althaus and Gauch 2010.
  production volume 0 kg; = RP_PV_1 * (ABS(BP_amount_4) / ABS(RP_amount_1))
    Calculated from production volume of reference product using the relative outputs.
  property price 0.685 EUR2005
    Temporary price data. Calculated as 90% of purchasers price based on: estimated at 85% of new scrap
  property carbon content 0
    carbon content on a dry matter basis (reserved; not for manual entry)
  properties: dry mass 1 kg, carbon content, non-fossil 0, wet mass 1 kg, water content 0, water in wet mass 0 kg, carbon content, fossil 0, carbon allocation 0 kg
- copper scrap, sorted, pressed: 0 kg; source H.-J. Althaus 2010; CPC 39361: Waste and scrap of copper; By-product classification Recyclable; pedigree (1,1,1,1,1)
  (same comment as for aluminium scrap, post-consumer)
  production volume 0 kg; = RP_PV_1 * (ABS( BP_amount_6) / ABS(RP_amount_1))
    Calculated from production volume of reference product using the relative outputs.
  property price 2.84 EUR2005
    Temporary price data. Calculated as 90% of purchasers price based on: Source: USGS Mineral Yearbook 2007, Table 1 in <http://minerals.usgs.gov/minerals/pubs/commodity/recycle/myb1-2007-recyc.pdf>
  property carbon content 0
    carbon content on a dry matter basis (reserved; not for manual entry)
  properties: water content 0, dry mass 1 kg, carbon content, fossil 0, wet mass 1 kg, carbon content, non-fossil 0, water in wet mass 0 kg, carbon allocation 0 kg
- spent automobile catalyst: 0 kg; source H.-J. Althaus 2010; CPC 39990: Other wastes n.e.c.; By-product classification Recyclable; pedigree (1,1,1,1,1)
  Spent catalyst removed in manual dismantling.
  production volume 0 kg; = RP_PV_1 * (ABS(BP_amount_1) / ABS(RP_amount_1))
    Calculated from production volume of reference product using the relative outputs.
  properties: price 0 EUR2005
- iron scrap, unsorted: 0 kg; source H.-J. Althaus 2010; CPC 39310: Slag, dross, scalings and other waste from the manufacture of iron or steel; By-product classification Recyclable; pedigree (1,1,1,1,1)
  (same comment as for aluminium scrap, post-consumer)
  production volume 0 kg; = RP_PV_1 * (ABS( BP_amount_5) / ABS(RP_amount_1))
    Calculated from production volume of reference product using the relative outputs.
  property price 0.149 EUR2005
    Temporary price data. Calculated as 90% of purchasers price based on: estimated at 85% of sorted scrap
  property carbon content 0
    carbon content on a dry matter basis (reserved; not for manual entry)
  properties: water in wet mass 0 kg, wet mass 1 kg, carbon content, non-fossil 0, carbon content, fossil 0, dry mass 1 kg, water content 0, carbon allocation 0 kg

## Inputs from technosphere
- residue from shredder fraction from manual dismantling: 0 kg; name BP_amount_3; source H.-J. Althaus 2010; pedigree (1,1,1,1,1)
  Residue calculated after applying on 1 kg of glider the recovery fractions given in ecoinvent report 18, p.21. Deatails on the materialization of the ICE are given in Althaus and Gauch: "Vergleichende Oekobilanz der Elektromobilität: Elektromobilität bersus konventionelle Mobilität mit Bio- und fossilen Treibstoffen".
  production volume 0 kg
    Calculated from production volume of reference product using the relative outputs.
  property price 0 EUR2005; name BP_amount_3_price_EUR2005
  properties: wet mass 1 kg, carbon content, fossil 0.664925, dry mass 1 kg
- mechanical treatment facility, waste electric and electronic equipment: 8e-10 unit; source Hischier R. 2007; lognormal variance with pedigree 0.5761, pedigree (4,5,5,3,5)
  Value taken from shredding of electric waste. Pedigree matrix changed accordingly. Original comment:rough estimation of infrastructure
  EcoSpold01Location=GLO
  Uncertainty: rough estimation of infrastructure
- electricity, medium voltage: 0.066 kWh; source Hischier R. 2007; lognormal variance with pedigree 0.0513, pedigree (2,3,5,3,1)
  Value taken from shredding of electric waste. Pedigree matrix changed accordingly. Original comment:literature values - based on survey of European companies
  EcoSpold01Location=UCTE
  Uncertainty: literature values - based on survey of European companies
- waste plastic, mixture: 0 kg; name BP_amount_2; source H.-J. Althaus 2010; pedigree (1,1,1,1,1)
  Sum of plastic materials in ICE dataset. The final output has been calculated based on ecoinvent transfer coefficients from weee shredding (ecoinvent report 18, p.21). Details on the materialization of the ICE are given in Althaus and Gauch 2010.
  production volume 0 kg
    Calculated from production volume of reference product using the relative outputs.
  property price 0 EUR2005; name BP_amount_2_price_EUR2005
  properties: carbon content, fossil 0.747344, heating value, net 30.79 MJ, dry mass 0.847 kg, water content 0.180638, wet mass 1 kg
  note on heating value, net: Value taken from the general comment of the treatment dataset.
- aluminium scrap, post-consumer: -0.408771 kg; source H.-J. Althaus 2010; lognormal variance with pedigree 0.0504, pedigree (2,3,5,4,3)
  (same comment as for aluminium scrap, post-consumer)
  production volume 6.74472e9 kg
  properties: dry mass 1 kg, wet mass 1 kg, price 0.685 EUR2005
- copper scrap, sorted, pressed: -0.00568587 kg; source H.-J. Althaus 2010; lognormal variance with pedigree 0.0518, pedigree (2,4,5,4,3)
  (same comment as for aluminium scrap, post-consumer)
  production volume 9.38168e7 kg
  properties: price 2.84 EUR2005, dry mass 1 kg, wet mass 1 kg
- spent automobile catalyst: -0.003636 kg; source H.-J. Althaus 2010; lognormal variance with pedigree 0.0444, pedigree (2,4,5,4,2)
  Spent catalyst removed in manual dismantling.
  production volume 5.9994e7 kg
- iron scrap, unsorted: -0.298965 kg; source H.-J. Althaus 2010; lognormal variance with pedigree 0.0504, pedigree (2,3,5,4,3)
  (same comment as for aluminium scrap, post-consumer)
  production volume 4.93292e9 kg
  properties: wet mass 1 kg, price 0.149 EUR2005, dry mass 1 kg
- residue from shredder fraction from manual dismantling: -0.00227703, -0.150723 kg (2 entries); source H.-J. Althaus 2010; lognormal variance with pedigree 0.043, pedigree (2,3,5,4,2)
  (same comment as for residue from shredder fraction from manual dismantling)
  production volume 2.5245e9 kg
- waste plastic, mixture: -0.0130024, -0.00100241, -0.000414032, -0.000393162, -0.0150025, -0.000167264, -7.58108e-5, -0.105026 kg (8 entries); source H.-J. Althaus 2010; lognormal variance with pedigree 0.0504, pedigree (2,3,5,4,3)
  (same comment as for waste plastic, mixture)
  production volume 2.22888e9 kg

## Emissions to nature
All rows: source Hischier R. 2007
- Tin [air, urban air close to ground]: 3.01e-7 kg; lognormal variance with pedigree 0.1101, pedigree (1,4,5,3,3)
  Value taken from shredding of electric waste. Pedigree matrix changed accordingly. Original comment: values from Swiss Recycling company in Morf (2004)
  Uncertainty: values from Swiss Recycling company in Morf (2004)
- Nickel [air, urban air close to ground]: 1.61e-7 kg; lognormal variance with pedigree 0.1101, pedigree (1,4,5,3,3)
  (same comment as for Tin)
- Copper [air, urban air close to ground]: 4.2e-7 kg; lognormal variance with pedigree 0.1101, pedigree (1,4,5,3,3)
  (same comment as for Tin)
- Antimony [air, urban air close to ground]: 1.19e-7 kg; lognormal variance with pedigree 0.1101, pedigree (1,4,5,3,3)
  (same comment as for Tin)
- Aluminium [air, urban air close to ground]: 1.4e-6 kg; lognormal variance with pedigree 0.1101, pedigree (1,4,5,3,3)
  (same comment as for Tin)
- Chlorine [air, urban air close to ground]: 3.22e-7 kg; lognormal variance with pedigree 0.1101, pedigree (1,4,5,3,3)
  (same comment as for Tin)
- Phosphorus [air, urban air close to ground]: 1.4e-8 kg; lognormal variance with pedigree 0.1101, pedigree (1,4,5,3,3)
  (same comment as for Tin)
- Bromine [air, urban air close to ground]: 2.38e-7 kg; lognormal variance with pedigree 0.1101, pedigree (1,4,5,3,3)
  (same comment as for Tin)
- Chromium [air, urban air close to ground]: 5.18e-8 kg; lognormal variance with pedigree 0.1101, pedigree (1,4,5,3,3)
  (same comment as for Tin)
- Cadmium [air, urban air close to ground]: 2.38e-8 kg; lognormal variance with pedigree 0.1101, pedigree (1,4,5,3,3)
  (same comment as for Tin)
- Zinc [air, urban air close to ground]: 1.309e-6 kg; lognormal variance with pedigree 0.1101, pedigree (1,4,5,3,3)
  (same comment as for Tin)
- Polychlorinated biphenyls [air, urban air close to ground]: 1.89e-9 kg; lognormal variance with pedigree 0.1901, pedigree (1,4,5,3,3)
  (same comment as for Tin)
- Iron [air, urban air close to ground]: 4.83e-6 kg; lognormal variance with pedigree 0.1101, pedigree (1,4,5,3,3)
  (same comment as for Tin)
- Lead [air, urban air close to ground]: 4.13e-7 kg; lognormal variance with pedigree 0.1101, pedigree (1,4,5,3,3)
  (same comment as for Tin)
- Mercury [air, urban air close to ground]: 1.19e-10 kg; lognormal variance with pedigree 0.1101, pedigree (1,4,5,3,3)
  (same comment as for Tin)

## Sampling procedure
own estimation

## Extrapolations
This dataset has been extrapolated from year 2005 to the year of the calculation (2021). The uncertainty has been adjusted accordingly.

## Review by Christian Bauer 2012-06-28
passed
