# desulfurisation of hard coal flue gas

Dataset: EcoSpold 2, unit process
Geography: RER
Time period: 1985-01-01 to 2021-12-31
Technology level: current
Classification: ISIC rev.4 ecoinvent: 3510:Electric power generation, transmission and distribution
Classification: EcoSpold01Categories: hard coal/power plants
Synonyms: DeSOx; Wet scrubber
Tags: ConvertedDataset
Scenario: Business-as-Usual
System model: Allocation, cut-off by classification
Generated by: Christian Bauer
Published in: Röder, A. 2007
Database: ecoinvent
isCopyrightProtected: true
accessRestrictedTo: 1

## General comment
This dataset represents the flue gas desulfurisation process of a hard coal power plant per 1 kg SOx retained. All environmental burdens associated with the operation of the scrubber are allocated to the SOx retained and hence to the operation of the power plant. The efficiency of the desulfurisation is 90%.
[This dataset was already contained in the ecoinvent database version 2. It was not individually updated during the transfer to ecoinvent version 3. Life Cycle Impact Assessment results may still have changed, as they are affected by changes in the supply chain, i.e. in other datasets. This dataset was generated following the ecoinvent quality guidelines for version 2. It may have been subject to central changes described in the ecoinvent version 3 change report (http://www.ecoinvent.org/database/ecoinvent-version-3/reports-of-changes/), and the results of the central updates were reviewed extensively. The changes added e.g. consistent water flows and other information throughout the database. The documentation of this dataset can be found in the ecoinvent reports of version 2, which are still available via the ecoinvent website. The change report linked above covers all central changes that were made during the conversion process.]

## Included activities start
Desulfurisation process starting with the operation of a hard coal power plant.

## Included activities end
This activity ends with 1 kg retained SOx resulting from the flue gas desulfurisation process of a coal power plant. The dataset includes apart the materials also the waste water emissions and the solid waste. The dataset doesn’t include the produced gypsum as a byproduct.

## Geography
Data for an average European desulfurisation plant.

## Technology
About 85% of the installed capacity of desulphurization plants are installed as scrubber with lime or limestone (Vernon et al. 1990). The current proportion of desulfurisation with limestone is estimated with 80%. The additional consumption of electricity and heat for the desulfurisation process is taken into account in the net efficiency.
The process steps are the detergent treatment, the absorption of flue gas components in the scrubbing suspension, the oxidation to sulfate (HSO3- to SO4-), the neutralization of the water suspension by the addition of limestone, crystallization of the gypsum, separation of the gypsum crystal from the mother liquor, calcination, pelleting or briquetting of gypsum for further use (IPP 1990, Baum 1988).
With limestone (CaCO3), the gases SO2, SO3, HCl and HF are absorbed in a scrubbing solution. Limestone has a low reactivity, but is preferred compared with quicklime (CaO) and slaked lime (Ca(OH)2 for economic reasons (IIP 1990). The de-dusted flue gas is either cooled in a pre-scrubber or directly cooled in the absorber. There, the hydrogen halides, the residual dust particulates and up to 20% of the SO2 are washed out. The suspension from the pre-scrubber can also be removed separately. Thus, mixing with the gypsum can be prevented. Droplet separators retain entrained liquid droplets and the clean gas is reheated and discharged through the chimney. By air intake oxidation is encouraged in the scrubber sump to form the gypsum.
The pH-value, the ratio of the absorption liquid to the amount of exhaust gas and the concentration of absorption liquid significantly affect the separation efficiency. In (Hövelmann 1987) an efficiency of 95% is quantified. In other sources, this value is estimated at 80%. In the EU a value of 90% is obligatory, which can be achieved with a scrubber with limestone.
References:
Vernon J.L., Soud H.N. (1990) FGD installations on coal-fired plants. IEA Coal Research, London.
IIP Karlsruhe, Ministerium für Umwelt Baden-Württemberg (1990) Entsorgung von Reststoffen aus der Rauchgasreinigung; Teil 2: TA Luft-Feuerungsanlagen. Karlsruhe.
Baum F. (1988) Luftreinhaltung in der Praxis. München, Deutschland.
Hövelmann A. (1987) Neue Entsorgungsprobleme kohlegefeuerter Kraftwerke. Jül-2172, KFA Jülich.

## Parameters
- annual production volume, electricity: 6.26824e11 kWh; name apv_electricity; lognormal variance with pedigree 0.0006, pedigree (1,1,1,1,1)
  Literature value. Production of electricity with hard coal in electricity only and combined heat and power plants in the geography RER. Data for 2012 from IEA statistics.
  IEA/OECD. 2014. Electricity Information 2014. International Energy Agency (IEA), Paris Cedex (FR).
- fraction, cooling water, once-through system, to air: 0.004 dimensionless; name fraction_CW_OT_to_air; lognormal variance with pedigree 0.0413, pedigree (2,3,1,3,1)
  Calculated based on literature value (Scown, C.D., 2011, Water Footprint of U.S. Transportation Fuels and supplying information of the article) (Vionnet, S., Quantis Water Database - Technical Report, 2012).
- SOx, retained, in hard coal flue gas desulfurisation: 0.00201 kg/kWh; name sox_retained_hard_coal; lognormal variance with pedigree 0.044, pedigree (3,1,1,5,1)
  Taken over from the global dataset for this activity.
- fraction, water, decarbonised, to air: 0.3875 dimensionless; name fraction_WDC_to_air; = fraction_CW_to_air; lognormal variance with pedigree 0.092025, pedigree (4,4,3,2,4)
  Calculated value. See comments in the other parametres present in this dataset. Decarbonised water is considered to be always used as cooling water, thus cooling water fractions to air are applied to all carbonised water input flows to calculate the amount of water consumed in the processes.
- fraction, cooling water, recirculating system, to air: 0.771 dimensionless; name fraction_CW_R_to_air; lognormal variance with pedigree 0.0413, pedigree (2,3,1,3,1)
  (same comment as for fraction, cooling water, once-through system, to air)
- fraction, cooling water, cooling pond system, to air: 0.032 dimensionless; name fraction_CW_CP_to_air; lognormal variance with pedigree 0.0413, pedigree (2,3,1,3,1)
  (same comment as for fraction, cooling water, once-through system, to air)
- fraction, cooling water, to air: 0.3875 dimensionless; name fraction_CW_to_air; = (0.5*fraction_CW_OT_to_air)+(0.5*fraction_CW_R_to_air); lognormal variance with pedigree 0.092025, pedigree (4,4,3,2,4)
  Calculated value based on literature value (see comments of the other parametres present in this dataset) and expert opinion. In the case when no industry/literature data are available about the type of cooling or directly fraction, cooling water, to air specific for the process a default assumption is applied. It is assumed that the once-through cooling system is used in 50% of all cases and recirculating system is used in another 50% of all cases.

## Reference product
- SOx retained, in hard coal flue gas desulfurisation: 1 kg; name RP_amount_1; CPC 34231: Chemical elements n.e.c.; inorganic acids except phosphoric, nitric and sulphonitric; inorganic oxygen compoun[…]; By-product classification allocatable product
  EcoSpold01Location=RER
  production volume 1.25992e9 kg; name RP_PV_1; = apv_electricity* sox_retained_hard_coal
    Calculated value.
    The dataset "electricity production, hard coal, GLO 2015" provides the value of 0.00201 kg of SOx retained in hard coal flue-gas desulfurisation per kWh of electricity produced and the annual production volume of hard coal electricity amounted to Value 6.7668E+12kWh.
  property price 0.18556 EUR2005
    Calculated based on inputs: The price of the product has been calculated as a sum of the values of the material and energy inputs for this product. This value is therefore a rough estimation. It may underestimate the real price since there are additional expenses when producing any product. These expences can include for example labour costs, treatment of waste materials and profit for the producer. Please consider carefully whether this level of data quality is acceptable for your application.
  property carbon content 0
    carbon content on a dry matter basis (reserved; not for manual entry)
  properties: wet mass 1 kg, carbon content, fossil 0, carbon content, non-fossil 0, water content 0, dry mass 1 kg, water in wet mass 0 kg, carbon allocation 0 kg

## Inputs from technosphere
- sodium hydroxide, without water, in 50% solution state: 0.02 kg; source Gebhard G. 1989; lognormal variance with pedigree 0.0641, pedigree (3,4,5,3,1)
  Estimation.
  Further references:
  Uerpmann E.-P. (1990) Betriebserfahrungen mit nasser Rauchgasentschwefelung in Braunkohlekraftwerken. In: VGB-Seminar Rauchgasreinigung und Reststoffentsorgung in Kraftwerken, Industrie- und Heizkraftwerken. Cottbus, Deutschland.
  EcoSpold01Location=RER
  properties: heating value, net 3.03 MJ, dry mass 1 kg, wet mass 1 kg
- waste gypsum: 0 kg; name BP_amount_2
  Literature value. The gypsum (CaSO2 * 2H2O) contains the retained sulfur and a certain amount of the input water. Gypsum resulting from wet lime scrubbing shows impurities of up to 6% (Calcite, CaCl2, Fluoride, flue ash, clays, silicates, quartz, ferric oxide, dolomite, siderite) (IIP 1990). Still, the quality of the gypsum is high enough so that it can be sold on the market.
  Tab. 9.32 (Verschiedene REA-Bilanzen aus diversen Quellen) and Tab. 9.33, p.126f in Röder et al. (2007): REA-Massenbilanz pro kg reduziertes SO2, REA-Nass nach Tab. 9.33, REA-Nass Brk-D (Nass-Entschwefelung der westdeutschen Braunkohlekraftwerke). The tables are compilations of different sources for wet flue-gas desulfurisation mass-balances. Tab.9.33 shows the mass balance values chosen for this dataset.
  Source:
  IIP Karlsruhe, Ministerium für Umwelt Baden-Württemberg (1990). Entsorgung von Reststoffen aus der Rauchgasreinigung; Teil 2: TA Luft-Feuerungsanlagen. Karlsruhe]
  production volume 0 kg
    Calculated from production volume of reference product using the relative outputs.
  property price 0 EUR2005; name BP_amount_2_price_EUR2005
  properties: dry mass 0.806 kg, wet mass 1 kg, water content 0.240695
- wastewater, average: 0 m3; name BP_amount_1
  Literature value. 5 kg waste water per kg SO2 retained, containing all emissions to water in this dataset. An average sewage is assumed, which is a simplification. Initial input of water was 20kg; the remaining parts are in the gypsum, the sludge and in the air.
  This water can be used for humidification of the ash and is then disposed off together with the ash (Gebhard et al. 1989).
  Tab. 9.32 (Verschiedene REA-Bilanzen aus diversen Quellen) and Tab. 9.33, p.126f in Röder et al. (2007): REA-Massenbilanz pro kg reduziertes SO2, REA-Nass nach Tab. 9.33, REA-Nass Brk-D (Nass-Entschwefelung der westdeutschen Braunkohlekraftwerke). The tables are compilations of different sources for wet flue-gas desulfurisation mass-balances. Tab.9.33 shows the mass balance values chosen for this dataset.
  Gebhard G., Lukas W., Bambauer H.U. (1989) Stabilisierung von Rückständen aus der Braunkohleentschwefelung. In: VGB Kraftwerkstechnik 69, Heft 4, 1989, s.384-392.
  production volume 0 m3
    Calculated from production volume of reference product using the relative outputs.
  property price 0 EUR2005; name BP_amount_1_price_EUR2005
  properties: wet mass 1000 kg, dry mass 0.346837 kg, water content 2882.2, carbon content, non-fossil 0.194039
  note on carbon content, non-fossil: 0.0673 kg TOC/m3 (Tab A.17, ecoinvent v2.2 report 13_I). TOC was considered as Total Carbon.
- municipal solid waste: -0.06 kg; name BP_amount_3; source Gebhard G. 1989; lognormal variance with pedigree 0.0641, pedigree (3,4,5,3,1)
  EcoSpold01Location=CH
  Estimation. The radiation activity of the sludge is not negligible and, depending on the substance around 20-80 Bq kg per kg of separated SO2 respectively 10-50 kBq per TJin. The sludge is treated respectively disposed.
  Further references:
  Hövelmann A. (1987) Neue Entsorgungsprobleme kohlegefeuerter Kraftwerke. Jül-2172, KFA Jülich.
  Uerpmann E.-P. (1990) Betriebserfahrungen mit nasser Rauchgasentschwefelung in Braunkohlekraftwerken. In: VGB-Seminar Rauchgasreinigung und Reststoffentsorgung in Kraftwerken, Industrie- und Heizkraftwerken. Cottbus, Deutschland.
  production volume 7.5595e7 kg; = BP_amount_3/ RP_amount_1* RP_PV_1
    Calculated from the production volume of SOx retained, in hard coal flue gas desulfurisation in proportion to the respective output amounts.
  properties: carbon content, fossil 0.171549, water content 0.297017, carbon content, non-fossil 0.261655, wet mass 1 kg, dry mass 0.771 kg, heating value, net 11.74 MJ
  note on carbon content, fossil: MSW composition in tab 4.1, ecoinvent v2.2 report 13_I. C content referred to 1 kg DM
  note on heating value, net: Value taken from the general comment of the treatment dataset.
- lime: 1.3 kg; source Gebhard G. 1989; lognormal variance with pedigree 0.0641, pedigree (3,4,5,3,1)
  Estimation. According to (Hövelmann 1987) 1.6 tons of limestone (CaCO3) per ton of SO2 is needed for a hard coal power plant (750 MW). The reaction equation of the limestone process is CaCO3 + 2H2O + SO2 + _O2 -> CaSO4 • 2H2O + CO2. It can be derived that stoichiometrically 1.56 kg of limestone is necessary and 0.69 kg of CO2 is produced per kg of SO2.
  Further references:
  Hövelmann A. (1987) Neue Entsorgungsprobleme kohlegefeuerter Kraftwerke. Jül-2172, KFA Jülich.
  Uerpmann E.-P. (1990) Betriebserfahrungen mit nasser Rauchgasentschwefelung in Braunkohlekraftwerken. In: VGB-Seminar Rauchgasreinigung und Reststoffentsorgung in Kraftwerken, Industrie- und Heizkraftwerken. Cottbus, Deutschland.
  EcoSpold01Location=CH
  properties: dry mass 1 kg, carbon content, fossil 0.120005, wet mass 1 kg
- water, decarbonised: 0 kg; name water_decarbonised_input; source Gebhard G. 1989; pedigree (1,1,1,1,1)
  EcoSpold01Location=RER
  Estimation. The water for the desulfurisation process does not need to meet any higher demands and corresponds to the quality of cooling water.
  Further references:
  Uerpmann E.-P. (1990) Betriebserfahrungen mit nasser Rauchgasentschwefelung in Braunkohlekraftwerken. In: VGB-Seminar Rauchgasreinigung und Reststoffentsorgung in Kraftwerken, Industrie- und Heizkraftwerken. Cottbus, Deutschland.
  Estimation. The water for the desulfurisation process does not need to meet any higher demands and corresponds to the quality of cooling water.
  Further references:
  Uerpmann E.-P. (1990) Betriebserfahrungen mit nasser Rauchgasentschwefelung in Braunkohlekraftwerken. In: VGB-Seminar Rauchgasreinigung und Reststoffentsorgung in Kraftwerken, Industrie- und Heizkraftwerken. Cottbus, Deutschland.
  properties: wet mass 1 kg
- sulfuric acid: 0.08 kg; source Gebhard G. 1989; lognormal variance with pedigree 0.0641, pedigree (3,4,5,3,1)
  EcoSpold01Location=RER
  Estimation.
  Further references:
  Uerpmann E.-P. (1990) Betriebserfahrungen mit nasser Rauchgasentschwefelung in Braunkohlekraftwerken. In: VGB-Seminar Rauchgasreinigung und Reststoffentsorgung in Kraftwerken, Industrie- und Heizkraftwerken. Cottbus, Deutschland.
  properties: wet mass 1 kg, dry mass 1 kg
- quicklime, milled, loose: 0.2 kg; source Gebhard G. 1989; lognormal variance with pedigree 0.0641, pedigree (3,4,5,3,1)
  Estimation.
  Further references:
  Uerpmann E.-P. (1990) Betriebserfahrungen mit nasser Rauchgasentschwefelung in Braunkohlekraftwerken. In: VGB-Seminar Rauchgasreinigung und Reststoffentsorgung in Kraftwerken, Industrie- und Heizkraftwerken. Cottbus, Deutschland.
  EcoSpold01Location=CH
  properties: water content 0.010101, dry mass 0.99 kg, wet mass 1 kg
- waste gypsum: -2.67362, -0.126384 kg (2 entries)
  (same comment as for waste gypsum)
  production volume 3.52777e9 kg
- wastewater, average: -0.0045119, -0.000488103 m3 (2 entries)
  (same comment as for wastewater, average)
  production volume 6.29958e6 m3
- water, decarbonised: 10.5169, 2.12015, 6.97145, 0.00667788, 0.384865 kg (5 entries); source Gebhard G. 1989; lognormal variance with pedigree 0.0641, pedigree (3,4,5,3,1)
  (same comment as for water, decarbonised)

## Emissions to nature
- TOC, Total Organic Carbon [water, surface water]: 0.000277778 kg; source Hövelmann A. 1987; lognormal variance with pedigree 0.0941, pedigree (3,4,5,3,1)
  Estimation. Data and discharge limits for wastewater emissions are mainly used from Germany. These values are assumed for all of Europe, since the other operators in AUT and NL must meet similar environmental standards.
  Further references:
  Bambauer H.U., Gebhard G., Holzapfel Th., Krause Ch., Willner G. (1988) Schadstoff-Immobilisierung in Stabilisaten aus Braunkohleaschen und REA-Produkten. In: Fortschr. Miner. 66, 2, s.253-290. Stuttgart.
  Grünewald K.G., Dettmann P., Fassbänder M., Jahn P. (1991) Bau- und Betriebserfahrungen mit der ersten abwasserfreien Pilot-Anlage zur REA-Abwasseraufbereitung mit Wertstoffrückgewinnung. VGB Kraftwerk und Umwelt.
  Kyte W.S. (1991) Waste and Water Issues. Proceedings "Coal in the Environment", London.
  Syring H. (1990) REA-Abwasser-Beseitigung. In: VGB-Seminar "Rauchgasreinigung und Reststoffentsorgung in Kraftwerken, Industrie- und Heizkraftwerken, Cottbus.
- Arsenic, ion [water, surface water]: 5e-6 kg; source Hövelmann A. 1987; lognormal variance with pedigree 0.7041, pedigree (3,4,5,3,1)
  Estimation. Data and discharge limits for wastewater emissions are mainly used from Germany. These values are assumed for all of Europe, since the other operators in AUT and NL must meet similar environmental standards (Hövelmann 1987, Syring 1990, Grünewald et al. 1991, Kyte 1991, Bambauer et al. 1988).
  Further references:
  Bambauer H.U., Gebhard G., Holzapfel Th., Krause Ch., Willner G. (1988) Schadstoff-Immobilisierung in Stabilisaten aus Braunkohleaschen und REA-Produkten. In: Fortschr. Miner. 66, 2, s.253-290. Stuttgart.
  Grünewald K.G., Dettmann P., Fassbänder M., Jahn P. (1991) Bau- und Betriebserfahrungen mit der ersten abwasserfreien Pilot-Anlage zur REA-Abwasseraufbereitung mit Wertstoffrückgewinnung. VGB Kraftwerk und Umwelt.
  Kyte W.S. (1991) Waste and Water Issues. Proceedings "Coal in the Environment", London.
  Syring H. (1990) REA-Abwasser-Beseitigung. In: VGB-Seminar "Rauchgasreinigung und Reststoffentsorgung in Kraftwerken, Industrie- und Heizkraftwerken, Cottbus.
- Sulfate [water, surface water]: 0.01 kg; source Hövelmann A. 1987; lognormal variance with pedigree 0.0941, pedigree (3,4,5,3,1)
  (same comment as for TOC, Total Organic Carbon)
- Polonium-210 [water, surface water]: 0.047 kBq; source Hövelmann A. 1987; lognormal variance with pedigree 0.3641, pedigree (3,4,5,3,1)
  Literature value. In the wastewater of the desulfurisation plant radioactive elements occur and must be detected. The radiation activities of these elements are not very relevant and the maximum values can be significantly (factor 10) higher.
- Copper, ion [water, surface water]: 3e-6 kg; source Hövelmann A. 1987; lognormal variance with pedigree 0.7041, pedigree (3,4,5,3,1)
  (same comment as for TOC, Total Organic Carbon)
- Thorium-232 [water, surface water]: 0.011 kBq; source Hövelmann A. 1987; lognormal variance with pedigree 0.3641, pedigree (3,4,5,3,1)
  (same comment as for Polonium-210)
- Molybdenum [water, surface water]: 3e-6 kg; source Hövelmann A. 1987; lognormal variance with pedigree 0.7041, pedigree (3,4,5,3,1)
  (same comment as for TOC, Total Organic Carbon)
- Calcium, ion [water, surface water]: 0.05 kg; source Hövelmann A. 1987; lognormal variance with pedigree 0.7041, pedigree (3,4,5,3,1)
  (same comment as for Arsenic, ion)
- Cadmium, ion [water, surface water]: 3e-7 kg; source Hövelmann A. 1987; lognormal variance with pedigree 0.7041, pedigree (3,4,5,3,1)
  (same comment as for Arsenic, ion)
- Suspended solids, unspecified [water, surface water]: 3e-6 kg; source Hövelmann A. 1987; lognormal variance with pedigree 0.0941, pedigree (3,4,5,3,1)
  (same comment as for TOC, Total Organic Carbon)
- Selenium [water, surface water]: 5e-7 kg; source Hövelmann A. 1987; lognormal variance with pedigree 0.7041, pedigree (3,4,5,3,1)
  (same comment as for TOC, Total Organic Carbon)
- Nickel, ion [water, surface water]: 3e-6 kg; source Hövelmann A. 1987; lognormal variance with pedigree 0.7041, pedigree (3,4,5,3,1)
  (same comment as for TOC, Total Organic Carbon)
- Uranium-238 [water, surface water]: 0.023 kBq; source Hövelmann A. 1987; lognormal variance with pedigree 0.3641, pedigree (3,4,5,3,1)
  (same comment as for Polonium-210)
- Vanadium, ion [water, surface water]: 3e-6 kg; source Hövelmann A. 1987; lognormal variance with pedigree 0.7041, pedigree (3,4,5,3,1)
  (same comment as for TOC, Total Organic Carbon)
- Antimony [water, surface water]: 3e-6 kg; source Hövelmann A. 1987; lognormal variance with pedigree 0.7041, pedigree (3,4,5,3,1)
  (same comment as for Arsenic, ion)
- Manganese [water, surface water]: 5e-6 kg; source Hövelmann A. 1987; lognormal variance with pedigree 0.7041, pedigree (3,4,5,3,1)
  (same comment as for TOC, Total Organic Carbon)
- Sodium, ion [water, surface water]: 0.0025 kg; source Hövelmann A. 1987; lognormal variance with pedigree 0.7041, pedigree (3,4,5,3,1)
  (same comment as for TOC, Total Organic Carbon)
- Potassium-40 [water, surface water]: 0.059 kBq; source Hövelmann A. 1987; lognormal variance with pedigree 0.3641, pedigree (3,4,5,3,1)
  (same comment as for Polonium-210)
- Mercury [water, surface water]: 3e-7 kg; source Hövelmann A. 1987; lognormal variance with pedigree 0.7041, pedigree (3,4,5,3,1)
  (same comment as for TOC, Total Organic Carbon)
- COD, Chemical Oxygen Demand [water, surface water]: 0.00075 kg; source Hövelmann A. 1987; lognormal variance with pedigree 0.0941, pedigree (3,4,5,3,1)
  (same comment as for TOC, Total Organic Carbon)
- Zinc, ion [water, surface water]: 5e-6 kg; source Hövelmann A. 1987; lognormal variance with pedigree 0.7041, pedigree (3,4,5,3,1)
  (same comment as for TOC, Total Organic Carbon)
- Boron [water, surface water]: 0.00033 kg; source Hövelmann A. 1987; lognormal variance with pedigree 0.7041, pedigree (3,4,5,3,1)
  (same comment as for Arsenic, ion)
- Lead-210 [water, surface water]: 0.047 kBq; source Hövelmann A. 1987; lognormal variance with pedigree 0.3641, pedigree (3,4,5,3,1)
  (same comment as for Polonium-210)
- Nitrate [water, surface water]: 0.005 kg; source Hövelmann A. 1987; lognormal variance with pedigree 0.0941, pedigree (3,4,5,3,1)
  (same comment as for TOC, Total Organic Carbon)
- Radium-226 [water, surface water]: 0.029 kBq; source Hövelmann A. 1987; lognormal variance with pedigree 0.3641, pedigree (3,4,5,3,1)
  (same comment as for Polonium-210)
- Magnesium [water, surface water]: 0.01 kg; source Hövelmann A. 1987; lognormal variance with pedigree 0.7041, pedigree (3,4,5,3,1)
  (same comment as for TOC, Total Organic Carbon)
- Fluoride [water, surface water]: 0.00015 kg; source Hövelmann A. 1987; lognormal variance with pedigree 0.0941, pedigree (3,4,5,3,1)
  (same comment as for TOC, Total Organic Carbon)
- Chromium, ion [water, surface water]: 3e-6 kg; source Hövelmann A. 1987; lognormal variance with pedigree 0.7041, pedigree (3,4,5,3,1)
  (same comment as for TOC, Total Organic Carbon)
- DOC, Dissolved Organic Carbon [water, surface water]: 0.000277778 kg; source Hövelmann A. 1987; lognormal variance with pedigree 0.0941, pedigree (3,4,5,3,1)
  (same comment as for TOC, Total Organic Carbon)
- Chloride [water, surface water]: 0.25 kg; source Hövelmann A. 1987; lognormal variance with pedigree 0.0941, pedigree (3,4,5,3,1)
  (same comment as for TOC, Total Organic Carbon)
- Water [water, unspecified]: 0.01225 m3; name water_to_water_unspecified; = (water_decarbonised_input/1000)*(1-fraction_WDC_to_air); lognormal variance with pedigree 0.0807, pedigree (2,2,5,1,1)
  Calculated value based on literature values and expert opinion. See comments in the parametres' comment field.
  property fraction, origin: salt water 0; name fraction_origin_salt_water_Ww
  property wet mass 1000 kg; name WM
  property fraction, origin: unspecified 0; name fraction_origin_unspecified_Ww
  property fraction, origin: fresh water 1; name fraction_origin_fresh_water_Ww
  property carbon content, non-fossil 0; name C_content_non_fossil
  property carbon content, fossil 0; name C_content_fossil
  property water in wet mass 1000 kg; name WWM
  property dry mass 0 kg; name DM
- Carbon dioxide, fossil [air, non-urban air or from high stacks]: 0.55 kg; source Gebhard G. 1989; lognormal variance with pedigree 0.0641, pedigree (3,4,5,3,1)
  Estimation. According to (Hövelmann 1987) 1.6 tons of limestone (CaCO3) per ton of SO2 is needed for a hard coal power plant (750 MW). The reaction equation of the limestone process is CaCO3 + 2H2O + SO2 + _O2 -> CaSO4 • 2H2O + CO2. It can be derived that stoichiometrically 1.56 kg of limestone is necessary and 0.69 kg of CO2 is produced per kg of SO2.
  Further references:
  Hövelmann A. (1987) Neue Entsorgungsprobleme kohlegefeuerter Kraftwerke. Jül-2172, KFA Jülich.
  Uerpmann E.-P. (1990) Betriebserfahrungen mit nasser Rauchgasentschwefelung in Braunkohlekraftwerken. In: VGB-Seminar Rauchgasreinigung und Reststoffentsorgung in Kraftwerken, Industrie- und Heizkraftwerken. Cottbus, Deutschland.
- Ammonium, ion [water, surface water]: 3.85e-6 kg; source Hövelmann A. 1987; lognormal variance with pedigree 0.0941, pedigree (3,4,5,3,1)
  (same comment as for Arsenic, ion)
- Water [air, unspecified]: 0.00775 m3; name water_to_air_unspecified; = (water_decarbonised_input/1000*fraction_WDC_to_air); lognormal variance with pedigree 0.0807, pedigree (2,2,5,1,1)
  (same comment as for Water)
  property fraction, origin: fresh water 1; name fraction_origin_fresh_water
  property fraction, origin: unspecified 0; name fraction_origin_unspecified
  property fraction, origin: salt water 0; name fraction_origin_salt_water
- Phosphate [water, surface water]: 2e-6 kg; source Hövelmann A. 1987; lognormal variance with pedigree 0.0941, pedigree (3,4,5,3,1)
  (same comment as for TOC, Total Organic Carbon)
- Iron, ion [water, surface water]: 3e-6 kg; source Hövelmann A. 1987; lognormal variance with pedigree 0.7041, pedigree (3,4,5,3,1)
  (same comment as for TOC, Total Organic Carbon)
- BOD5, Biological Oxygen Demand [water, surface water]: 2.5e-5 kg; source Hövelmann A. 1987; lognormal variance with pedigree 0.0941, pedigree (3,4,5,3,1)
  (same comment as for Arsenic, ion)
- Lead [water, surface water]: 5e-7 kg; source Hövelmann A. 1987; lognormal variance with pedigree 0.7041, pedigree (3,4,5,3,1)
  (same comment as for TOC, Total Organic Carbon)
- Tin, ion [water, surface water]: 3e-6 kg; source Hövelmann A. 1987; lognormal variance with pedigree 0.7041, pedigree (3,4,5,3,1)
  (same comment as for TOC, Total Organic Carbon)
- Potassium, ion [water, surface water]: 5e-5 kg; source Hövelmann A. 1987; lognormal variance with pedigree 0.7041, pedigree (3,4,5,3,1)
  (same comment as for TOC, Total Organic Carbon)
- Aluminium [water, surface water]: 3e-6 kg; source Hövelmann A. 1987; lognormal variance with pedigree 0.7041, pedigree (3,4,5,3,1)
  (same comment as for Arsenic, ion)
- Sulfite [water, surface water]: 0.0001 kg; source Hövelmann A. 1987; lognormal variance with pedigree 0.0941, pedigree (3,4,5,3,1)
  (same comment as for TOC, Total Organic Carbon)

## Sampling procedure
Based on literature.

## Extrapolations
This dataset has been extrapolated from year 2000 to the year of the calculation (2021). The uncertainty has been adjusted accordingly.

## Review by Roland Hischier 2011-09-23
Transfer of documentation done.

## Review by Hans-Jörg Althaus 2003-07-04
passed
