# liquid manure storage and processing facility construction

Dataset: EcoSpold 2, unit process
Geography: CH
Time period: 1994-01-01 to 2021-12-31
Technology level: current
Classification: ISIC rev.4 ecoinvent: 4290:Construction of other civil engineering projects
Classification: EcoSpold01Categories: agricultural means of production/buildings
Tags: ConvertedDataset
Scenario: Business-as-Usual
System model: Allocation, cut-off by classification
Generated by: Dunja Dux
Published in: Nemecek, T. 2007
Database: ecoinvent
isCopyrightProtected: true
accessRestrictedTo: 1

## General comment
The module includes a covered, underfloor and rectangular slurry store made of concrete. Also included is a marine screw agitator. Size: 300 m3. Lifetime of the building is 40 years.
[This dataset was already contained in the ecoinvent database version 2. It was not individually updated during the transfer to ecoinvent version 3. Life Cycle Impact Assessment results may still have changed, as they are affected by changes in the supply chain, i.e. in other datasets. This dataset was generated following the ecoinvent quality guidelines for version 2. It may have been subject to central changes described in the ecoinvent version 3 change report (http://www.ecoinvent.org/database/ecoinvent-version-3/reports-of-changes/), and the results of the central updates were reviewed extensively. The changes added e.g. consistent water flows and other information throughout the database. The documentation of this dataset can be found in the ecoinvent reports of version 2, which are still available via the ecoinvent website. The change report linked above covers all central changes that were made during the conversion process.]

## Included activities end
The inventory takes into account the use of construction materials and building machines for construction, repair and replacement including waste disposal and the transportation of the materials to the building site. Not taken into account were direct emission of the construction, disposal of production waste and the use of resources during utilization phase.

## Geography
The inventory applies for Swiss agricultural buildings only, because of the solid method of construction.

## Technology
The data of the inventory are based on one example of a typical agricultural building.

## Reference product
- liquid manure storage and processing facility: 1 m3; CPC 53121: Industrial buildings; By-product classification allocatable product
  EcoSpold01Location=CH
  production volume 123.428 m3
    Existing slurry store volume in CH in 1996: 14'847'685 m3.
    Per m3 liquid manure processed, 0.0000347 units of store (=5 months average storage time/(12months*40years*300m3/unit-year)). (note the unit of this dataset is "unit" of a store with 300 m3 capacity, i.e. m3 is not a correct unit of this dataset). Amount of liquid manure is from cattle and swine in mixed farming systems. The amount of liquid manure from cattle is calculated from the number of cattle (from FAOSTAT), 2833 kg feed dry matter intake per unit of cattle, 22% of this dry matter appears in the manure (18% for beef cattle, 23% for dairy cows), 3% of the manure is handled as liquid manure with 7.5% dry matter content. The amount of swine manure is calculated from the meat production (from FAOSTAT), 0.94 kg manure dry matter per kg meat (at 55% dry matter), 71% of swine manure handled as liquid manure with 5% dry matter content.
  property price 111.955 EUR2005
    Calculated based on inputs: The price of the product has been calculated as a sum of the values of the material and energy inputs for this product. This value is therefore a rough estimation. It may underestimate the real price since there are additional expenses when producing any product. These expences can include for example labour costs, treatment of waste materials and profit for the producer. Please consider carefully whether this level of data quality is acceptable for your application.

## Inputs from technosphere
All rows: lognormal variance with pedigree 0.0401, pedigree (1,2,5,1,1)
- waste wood, untreated: -1.36 kg
  EcoSpold01Location=CH
  production volume 167.862 kg
    Calculated from the production volume of liquid manure storage and processing facility in proportion to the respective output amounts.
  properties: dry mass 0.8 kg, carbon content, non-fossil 0.48632, wet mass 1 kg, water content 0.25, heating value, net 13.99 MJ
  note on carbon content, non-fossil: Tab A.4, ecoinvent v2.2 report 13_I. C content has been referred to 1 kg DM,
  note on heating value, net: Value taken from the general comment of the treatment dataset.
- excavation, skid-steer loader: 1.49 m3
  EcoSpold01Location=RER
  activityLink introduced to establish a direct link to the corresponding regional supply of this product
- sawnwood, softwood, dried (u=20%), planed: 0.00272 m3
  EcoSpold01Location=RER
  properties: wet mass 540 kg, heating value, net 6514.84 MJ, dry mass 450 kg, water content 0.2, carbon content, non-fossil 0.494
  note on carbon content, non-fossil: C content of dry mass is 0.494 kgC/kg dry wood (ecoinvent v2.2 report 9)
- concrete, normal: 0.367 m3
  EcoSpold01Location=CH
  properties: wet mass 2380 kg, dry mass 2190 kg, water content 0.086758
- reinforcing steel: 22.6 kg
  EcoSpold01Location=RER
  properties: wet mass 1 kg, dry mass 1 kg, carbon content, fossil 0.004
- cast iron: 1.91 kg
  EcoSpold01Location=RER
  properties: carbon content, fossil 0.04, dry mass 1 kg, wet mass 1 kg
  note on carbon content, fossil: Cast iron is made by remelting pig iron in small furnaces (e.g. cupola furnaces or electric arc furnaces) and poured into moulds to make castings. It usually contains 2% to 6% carbon (ecoinvent v2.2 report 10_partII). An average content of 4% was considered
- steel, chromium steel 18/8, hot rolled: 1.74 kg
  EcoSpold01Location=RER
  properties: carbon content, fossil 0.0008, wet mass 1 kg, dry mass 1 kg
  note on carbon content, fossil: Stainless steel model is the grade 304 steel (18/8 stainless, 18% chromium 8% nickel; max. 0.08% C)
- lean concrete: 0.0244 m3
  EcoSpold01Location=CH
  properties: water content 0.0528846, dry mass 2080 kg, wet mass 2190 kg
- electricity, low voltage: 0.478 kWh
  EcoSpold01Location=CH
- waste concrete, not reinforced: -53.6 kg
  EcoSpold01Location=CH
  production volume 6615.74 kg
    (same comment as for waste wood, untreated)
  properties: dry mass 1 kg, wet mass 1 kg
- excavation, hydraulic digger: 2.53 m3
  (same comment as for excavation, skid-steer loader)
- zinc coat, pieces: 0.109 m2
  activityLink introduced to establish a direct link to the corresponding regional supply of this product
  EcoSpold01Location=RER
- waste reinforced concrete: -829 kg
  EcoSpold01Location=CH
  production volume 102322 kg
    (same comment as for waste wood, untreated)
  properties: water content 0.00585407, dry mass 0.99418 kg, wet mass 1 kg
- waste bulk iron, excluding reinforcement: -3.75 kg
  EcoSpold01Location=CH
  production volume 462.855 kg
    (same comment as for waste wood, untreated)
  properties: wet mass 1 kg, dry mass 1 kg

## Inputs from nature
- Occupation, construction site [natural resource, land]: 0.376 m2*year; lognormal variance with pedigree 0.0801, pedigree (1,2,5,1,1)
- Transformation, to urban, discontinuously built [natural resource, land]: 0.376 m2; lognormal variance with pedigree 0.1601, pedigree (1,2,5,1,1)
- Transformation, from pasture, man made [natural resource, land]: 0.376 m2; lognormal variance with pedigree 0.1601, pedigree (1,2,5,1,1)
- Occupation, urban, discontinuously built [natural resource, land]: 15 m2*year; lognormal variance with pedigree 0.0801, pedigree (1,2,5,1,1)

## Sampling procedure
The inventory is calculated based on a solid database of agricultural buildings.

## Extrapolations
This dataset has been extrapolated from year 2002 to the year of the calculation (2021). The uncertainty has been adjusted accordingly.

## Review by Roland Hischier 2003-08-06
Passed.
