# clay plaster production

Dataset: EcoSpold 2, unit process
Geography: RoW
Time period: 1995-01-01 to 2021-12-31
Technology level: current
Classification: ISIC rev.4 ecoinvent: 2392:Manufacture of clay building materials
Classification: EcoSpold01Categories: mortar and plaster/production
Synonyms: Lehmmörtel
Tags: ConvertedDataset
Scenario: Business-as-Usual
System model: Allocation, cut-off by classification
Generated by: Daniel Kellenberger (obsolete)
Published in: Kellenberger D. 2004
Database: ecoinvent
isCopyrightProtected: true
accessRestrictedTo: 1

## General comment
The raw materials per kg ready mix product are mixed in following ratio: sand: 0.55kg, clay: 0.25kg, water: 0.2kg. After mixing it is internally transported to the packing installation and packed. Can be used without adding water. No direct process emissions are taken into account as they play a subordinate role compared to the emissions of the raw material production (e.g. drying of silica sand) and because no data are available. For inventoring the infrastructure, a yearly production amount of 150'000 tons is assumed. The lifespan of the machines is assumed to be 20 years.
Clay plaster. Image source: http://www.strawbale.com/wp-content/uploads/earth-plaster-200x300.jpg, accessed 20151211

## Included activities end
Includes the whole manufacturing process to produce clay plaster (raw material provision, raw material mixing, packing, and storage), transports to plant, and infrastructure. No requirements for administration are included. No additional buildings and land-use have been taken into account as it is assumed that the mixing process takes place in an existing building of the sand/cement industry or on the construction site

## Geography
The amount of raw materials is based on estimations. The transportation distance is an estimation. For the infrastructure RER- and for the silica sand DE-modules are used as proxy

## Technology
Assumed average current technology. The raw materials are mixed in a certain ratio, transported to the packing installation and packed.

## Parameters
- fraction, tap water, to air: 0.5 dimensionless; lognormal variance with pedigree 0.092025, pedigree (4,4,3,2,4)
- fraction, process water, to air: 0.5 dimensionless; lognormal variance with pedigree 0.092025, pedigree (4,4,3,2,4)

## Reference product
- clay plaster: 1 kg; CPC 373: Refractory products and structural non-refractory clay products; By-product classification allocatable product
  EcoSpold01Location=CH
  production volume 8.06274e9 kg; = ((2216787.822*1000)/0.164)*0.15/0.25
    Estimated value. According to Elzea Kogel, J, Trivedi, N.C., Barker, J.M. & Krukowski, S. T. (editors) (2006) Industrial Minerals and Rocks: Commodities, Markets and Uses, 7th edition, no precise estimates have been made so far on clay production, problems in these estimates are the exclusion of China and India in the majority of statistical references and the inclusion of different types of clays in different categories depending on the reporting geography. Kogel et al. estimate for 2002 World production of common clay to be hundreds of Mt, for refractory more than 20Mt , Kaolin 43 Mt mined and 26 Mt sold, Bentonite 10.3 Mt, Fuller’s earth uncertain 10Mt, ball clay 15.5 Mt and Hormites 2.1 Mt. As no precise estimate was found the World production volume for clay and kaolin production are estimated from European production volumes. For Bentonite and Kaolin World values are available from the European mineral statistics 2009-2013 (http://www.bgs.ac.uk/mineralsuk/statistics/europeanStatistics.html, accessed 08.02.2016) for which Eu production for Kaolin is 34.5% of World’s production and for Bentonite is the 16.4%. The remaining World values are scaled assuming that EU represents the 26% of World’s production, based on the average between Kaolin and Bentonite. Following the commodities are listed with their Prodcom codes, Prodcom name and production volume for EU 28 in tons: 08122210 “Bentonite” 2216788 tons, 08122230 “Fireclay” 2542435 tons, 08122250 “Common clays and shales for construction use (excluding bentonite, fireclay, expanded clays, kaolin and kaolinic clays); andalusite, kyanite and sillimanite; mullite; chamotte or dinas earths” 32000000 tons, and 08122160 “Kaolinitic clays (ball and plastic clays)” 2997294 tons. According to the European mineral statistics 2009-2013 (<http://www.bgs.ac.uk/mineralsuk/statistics/europeanStatistics.html>, accessed 08.02.2016), Europe (EU36) produces 9.1Mt of Kaolin, which is 34.5% of World production, of which 47.8% (16% of all World production) comes from Germany. The largest producer in 2013 was US with 23%, China represented the 12%, Brazil 8%, and Iran 6%. The European mineral statistics values are used for both Europe and the World estimates. The same source reports for EU36 Bentonite production of 2.73 Mt for 2013, which represents the 16.4% of World production. The values for Europe matches the values indicated from Eurostat and it used to estimate World’s production. Germany produces 13.1% of Europe’s bentonite 358844 tons. The volume of produced clay is assigned to the different activities based on USGS (2015) estimates of uses in the USA (<http://minerals.usgs.gov/minerals/pubs/commodity/clays/mcs-2015-clays.pdf>, accessed 08.02.2016) and according to input of clay per reference product. Of common clay, 39% is used for brick (for which 50% is assumed to be used for clay bricks and 50% light clay bricks), 23% lightweight aggregate, 31% cement, and 7% other uses (USGS specifies that 9% of common clay is used for lightweight concrete block production in the 2013 Minerals yearbook http://minerals.usgs.gov/minerals/pubs/commodity/clays/myb1-2013-clays.pdf, accessed 08.02.2016). Of ball clay, 39% is used for floor and wall tiles, 17% sanitary ware, and 44% other uses. Of bentonite 26% absorbents, 24% drilling mud, 15% foundry sand bond (assumed to represent plaster clay), 11% iron ore pelletising, and 24% other uses. Of fire clay, 34% for heavy clay products, and 66% for refractory and other products. Of fuller’s earth, 70% absorbents, and 30% for other uses. The US produce 15 to 25 % of refined clays (without common clay and shale). Comparing the estimated global values with the data for USGS (2015) for the production in USA, the US is responsible for 20% of Kaolin products, 34% of Bentonite and more than 10% of common clays. USGS (2015) reports USA to “probably” represent 15% to 25% of World production of refined clays excluding common clays.
  property price 0.12 EUR2005
    Calculated value based on data from United Nations Commodity Trade Statistics Database (comtrade.un.org). UN comtrade category: 250810 Bentonite. Year 2005. Using exchange rate of 1EURO = 1.209 USD. Average of price of import into 5 main markets (EU, US, JP, IN and CN).
  property carbon content, fossil 0
    Raw materials are listed in Tab 5.2, ecoinvent v2.2 report 7, part XVII. C content is calculated after C content of raw materials
  property carbon content, non-fossil 0
    (same comment as for clay plaster)
  property carbon content 0
    carbon content on a dry matter basis (reserved; not for manual entry)
  properties: water in wet mass 0.2 kg, water content 0.25, wet mass 1 kg, dry mass 0.8 kg, carbon allocation 0 kg

## Inputs from technosphere
- industrial machine, heavy, unspecified: 6.67e-6 kg; lognormal variance with pedigree 0.692, pedigree (1,1,5,5,1)
  estimated
  EcoSpold01Location=RER
- electricity, medium voltage: 0 kWh; pedigree (1,1,1,1,1)
  estimated
  EcoSpold01Location=CH
- clay: 0.25 kg; lognormal variance with pedigree 0.692, pedigree (1,1,5,5,1)
  estimated
  EcoSpold01Location=CH
  properties: wet mass 1 kg, water content 0.0362694, dry mass 0.965 kg
- conveyor belt: 3.33e-8 m; lognormal variance with pedigree 0.692, pedigree (1,1,5,5,1)
  estimated
  EcoSpold01Location=RER
- silica sand: 0.55 kg; lognormal variance with pedigree 0.692, pedigree (1,1,5,5,1)
  estimated
  EcoSpold01Location=DE
  properties: dry mass 0.99 kg, wet mass 1 kg, water content 0.010101
- tap water: 0 kg; pedigree (1,1,1,1,1)
  EcoSpold01Location=CH
  estimated
  properties: wet mass 1 kg, carbon content, fossil 0.00178991, water content 2962.17, dry mass 0.000337476 kg
  note on carbon content, fossil: Bicarbonate content is 2.93 mol/m3. CO2 content is 0.1 mol/m3 (ecoinvent v2.2 report 8, Tab 93.1).
- electricity, medium voltage: 0.000285312, 5.47106e-5, 0.00125624, 0.000445986, 0.0041592, 0.000918478, 0.0133584, 0.00188288, 0.00543876 kWh (9 entries); lognormal variance with pedigree 0.692, pedigree (1,1,5,5,1)
  estimated
  EcoSpold01Location=CH
- tap water: 0.00187093, 0.000372197, 0.0800317, 0.00938534, 0.000244157, 0.000694501, 0.107401 kg (7 entries); lognormal variance with pedigree 0.692, pedigree (1,1,5,5,1)
  EcoSpold01Location=CH
  estimated

## Emissions to nature
- Water [water, unspecified]: 0.0001 m3; lognormal variance with pedigree 0.0827, pedigree (2,2,5,5,1)
  Calculated value based on literature values and expert opinion. See comments in the parametres' comment field.
  property dry mass 0 kg; name DM
  property carbon content, non-fossil 0; name C_content_non_fossil
  property wet mass 1000 kg; name WM
  property water in wet mass 1000 kg; name WWM
  property carbon content, fossil 0; name C_content_fossil
- Water [air, unspecified]: 0.0001 m3; lognormal variance with pedigree 0.0827, pedigree (2,2,5,5,1)
  (same comment as for Water)

## Sampling procedure
estimation

## Extrapolations
This dataset has been copied from an original dataset covering the geography CH. The uncertainty has been adjusted accordingly.

## Review by Roberto Dones 2004-04-05
passed
