# canal construction

Dataset: EcoSpold 2, unit process
Geography: RER
Time period: 1993-01-01 to 2021-12-31
Technology level: current
Classification: EcoSpold01Categories: transport systems/ship
Classification: ISIC rev.4 ecoinvent: 4290:Construction of other civil engineering projects
Scenario: Business-as-Usual
System model: Allocation, cut-off by classification
Generated by: Michael Spielmann (obsolete)
Published in: Spielmann M. 2007
Database: ecoinvent
isCopyrightProtected: true
accessRestrictedTo: 1

## General comment
The dataset represents the construction, the maintenance and land use of one canal with life time assumed to be 118 years.

## Included activities start
Canal construction is starting with the material for construction. Canal maintenance and land use is starting with the energy consumption.

## Included activities end
The dataset ends with the construction and the maintenance and land use of one canal. The dataset includes the material for construction and the transport of these materials. The dataset doesn't includ the disposal of the canal. For the maintenance and land use dataset, it ends with the maintenance and land use of one port. The dataset includes the energy consumption and land occupation and transformation.

## Geography
Data is based on a case study of one canal in Germany.

## Technology
The data are derived from the Main-Donau-Canal in Germany. The canal is characterised by a width of 42 m and an average depth of 4m. The life span of the canal is assumed to be 118 years. The data employed in this study is derived from Maibach et al. (1999). Data for electricity consumption, predominately due the operation of sluices is derived from Enquête (1994) as quoted in Maibach et al. (1999). The canal bed area is estimated with 42m2/m canal. In addition, 10 meters at each edge is modelled as road traffic area. The life span of the canal is assumed to be 118 years.
References:
Maibach M., Peter D. and Seiler B. (1999) Ökoinventar Transporte: Grundlagen für den ökologischen Vergleich von Transportsystemen und den Einbezug von Transportsystemen in Ökobilanzen. Technischer Schlussbericht. In: Schweizerischer Nationalfonds zur Förderung der wissenschaftlichen Forschung (ed. SPP Umwelt M.). 2nd Edition. INFRAS, Zürich
Enquête (1994) Schutz der Erdatmospäre, Verkehr, Band 4, Studienband, Teilband II. Enquête Kommission, Bonn

## Reference product
- canal: 1 m*year; CPC 53232: Harbours, waterways and related facilities; By-product classification allocatable product
  production volume 1.32237 m*year
    This is a placeholder value that does not reflect real-world production volumes. This dataset does not currently require a real-world production volume to work in the database framework, and no actual data were collected yet. This has no negative effect on the results of the ecoinvent database. The placeholder value of this activity was scaled according to the nominal GDP of 2005 (source: United Nations, http://data.un.org/Glossary.aspx?q=GDP+%28current+US%24%29, accessed 20130726) to reflect an appropriate share of the global production volume, which is also a placeholder value.
  property price 53.8128 EUR2005
    Calculated based on inputs: The price of the product has been calculated as a sum of the values of the material and energy inputs for this product. This value is therefore a rough estimation. It may underestimate the real price since there are additional expenses when producing any product. These expences can include for example labour costs, treatment of waste materials and profit for the producer. Please consider carefully whether this level of data quality is acceptable for your application.

## Inputs from technosphere
All rows: source Maibach M. 1999
- reinforcing steel: 8.68 kg; lognormal variance with pedigree 0.08, pedigree (1,1,5,1,1)
  Literature value. The data employed in this study is derived from Maibach et al. (1999)
  properties: carbon content, fossil 0.004, wet mass 1 kg, dry mass 1 kg
- excavation, skid-steer loader: 4.03 m3; lognormal variance with pedigree 0.34, pedigree (1,1,5,1,1)
  Literature value. The data employed in this study is derived from Maibach et al. (1999);activityLink introduced to establish a direct link to the corresponding regional supply of this product
- concrete, medium strength: 0.13 m3; lognormal variance with pedigree 0.08, pedigree (1,1,5,1,1)
  Literature value. The data employed in this study is derived from Maibach et al. (1999)
  properties: dry mass 2190 kg, water content 0.086758, wet mass 2380 kg
- pitch: 0 kg; pedigree (1,1,1,1,1)
  Literature value. The data employed in this study is derived from Maibach et al. (1999)
  properties: dry mass 1 kg, wet mass 1 kg, carbon content, fossil 0.83, heating value, net 28 MJ
- electricity, medium voltage: 3.42 kWh; lognormal variance with pedigree 0.34, pedigree (1,1,5,1,1)
  Literature value. Data for electricity consumption, predominately due the operation of sluices is derived from Enquête (1994) as quoted in Maibach et al. (1999). Maintenance and land use
  Further references:
  Enquête (1994) Schutz der Erdatmospäre, Verkehr, Band 4, Studienband, Teilband II. Enquête Kommission, Bonn
- pitch: 0.00864317, 5.68281e-5 kg (2 entries); lognormal variance with pedigree 0.08, pedigree (1,1,5,1,1)
  Literature value. The data employed in this study is derived from Maibach et al. (1999)

## Inputs from nature
All rows: lognormal variance with pedigree 0.08, pedigree (1,1,5,1,1)
- Occupation, river, artificial [natural resource, land]: 42 m2*year
  Literature value, representing occupied area in the 90'ties. Maintenance and land use
- Transformation, to traffic area, road network [natural resource, land]: 0.169 m2
  Estimation based on land occupation and an assumed life span of the canal of 118 years. Maintenance and land use
- Occupation, traffic area, road network [natural resource, land]: 20 m2*year
  Literature value, representing occupied area in the 90'ties. Maintenance and land use
- Transformation, to river, artificial [natural resource, land]: 0.356 m2
  (same comment as for Transformation, to traffic area, road network)
- Transformation, from unspecified [natural resource, land]: 0.525 m2
  (same comment as for Transformation, to traffic area, road network)

## Sampling procedure
literature studies and own assumptions

## Extrapolations
This dataset has been extrapolated from year 1994 to the year of the calculation (2021). The uncertainty has been adjusted accordingly.

## Review by Carl Vadenbo 2012-06-29
In preparation for the release of ecoinvent v3.0, the datasets 'canal RER' and 'maintenance, operation, canal RER' in ecoinvent v2.2 were merged into the dataset 'canal construction, RER 1993-1994'. The amounts of the exchanges were reviewed and were found to correspond to the disaggregated datasets. The uncertainty information has only been adjusted for geographical representativeness in GLO, and consequently needs to be revised before subsequent releases of the database. Despite this shortcoming, the new dataset was accepted for inclusion into the ecoinvent database on 2012.07.04.

## Review by Niels Jungbluth 2003-08-29
passed

## Review by Roland Hischier 2011-09-23
Transfer of Documentation done.
