# passenger car production, electric, without battery

Dataset: EcoSpold 2, unit process
Geography: GLO
Time period: 2000-01-01 to 2021-12-31
Technology level: modern
Classification: ISIC rev.4 ecoinvent: 2910:Manufacture of motor vehicles
Tags: complementary product
Scenario: Business-as-Usual
System model: Allocation, cut-off by classification
Generated by: F. Habermacher
Published in: F. Habermacher 2011
Database: ecoinvent
isCopyrightProtected: true
accessRestrictedTo: 1

## General comment
This dataset describes the production of an electric passenger car without its battery. The entries are based on a per kg basis. The model is optimized for a vehicle of about 1200kg including the battery. It is subdivided in two modules, the glider and the drivetrain. Each module contains the specific materialization and production efforts and emissions. The specific end of life treatment of each module is covered in the respective dataset. The dataset includes the manual dismantling of the car at the end of its life and the waste fractions deriving from this process. The battery of the vehicle is in the respective transport dataset.

## Included activities start
The datset takes as input the two modules (glider and drivetrain) which build the vehicle without battery. The production efforts, emissions and manufacturing infrastructure are in the respective modules. The dataset also includes the manual dismantling of the vehicle at the end of its lifetime.

## Included activities end
The activity ends with the assembly of the car without battery and returns the waste fractions from the dismantling.

## Technology
The dataset is based on averages over passenger car technologies spanning from 2000 to 2010 which are expected to be representative up to 2015.

## Parameters
- glider weight: 838 kg; name glider_weight
  For parametrization of vehicle.
- powertrain weight: 80.22 kg; name powertrain_weight
  For parametrization of vehicle.

## Reference product
- passenger car, electric, without battery: 1 kg; name RP_amount_1; = (glider_weight+powertrain_weight); source F. Habermacher 2011; By-product classification allocatable product; CPC 49113: Motor cars and other motor vehicles principally designed for the transport of persons (except public-transport[…]
  Estimate based on currently produced electric vehicles.
  production volume 8.26398e6 kg; name RP_PV_1
    Based on a rough estimate of a total production of about 9000 electric passenger cars.
  property price 26.4708 EUR2005
    Calculated based on inputs: The price of the product has been calculated as a sum of the values of the material and energy inputs for this product. This value is therefore a rough estimation. It may underestimate the real price since there are additional expenses when producing any product. These expences can include for example labour costs, treatment of waste materials and profit for the producer. Please consider carefully whether this level of data quality is acceptable for your application.

## Inputs from technosphere
- glider, passenger car: 0.912635 kg; = glider_weight; source F. Habermacher 2011; lognormal variance with pedigree 0.043, pedigree (2,3,5,4,2)
  Estimate based on currently produced electric vehicles.
- waste glass: 0 kg; name BP_amount_3; source F. Habermacher 2011; pedigree (1,1,1,1,1)
  Glass contributions from the manual dismantling of the car. Information on the materialisation of the dismatled vehicle are in Habermacher 2010. The waste fractions per kg are calculated without considering the weight of the battery.
  production volume 0 kg
    Calculated from production volume of reference product using the relative outputs.
  property price 0 EUR2005; name BP_amount_3_price_EUR2005
  property water content 0; name water_content
  property water in wet mass 0 kg; name WWM
  property carbon content, non-fossil 0; name C_content_non_fossil
  property carbon content, fossil 0; name C_content_fossil
  properties: heating value, net 0.05 MJ, dry mass 1 kg, wet mass 1 kg
  note on heating value, net: Value extracted from "treatment of waste glass, open dump, very wet infiltration class (1000mm)"
- waste rubber, unspecified: 0 kg; name BP_amount_1; source F. Habermacher 2011; pedigree (1,1,1,1,1)
  Rubber from the tyres.Information on the materialisation of the dismatled vehicle are in Habermacher 2010. The waste fractions per kg are calculated without considering the weight of the battery.
  production volume 0 kg
    Calculated from production volume of reference product using the relative outputs.
  property price 0 EUR2005; name BP_amount_1_price_EUR2005
  properties: carbon content, fossil 0.853, heating value, net 27.19 MJ, wet mass 1 kg, dry mass 1 kg
  note on heating value, net: Value taken from the general comment of the treatment dataset.
- waste mineral oil: 0 kg; name BP_amount_2; source F. Habermacher 2011; pedigree (1,1,1,1,1)
  Various lubricants used in the vehicle.Information on the materialisation of the dismatled vehicle are in Habermacher 2010. The waste fractions per kg are calculated without considering the weight of the battery.
  production volume 0 kg
    Calculated from production volume of reference product using the relative outputs.
  property price 0 EUR2005; name BP_amount_2_price_EUR2005
  property wet mass 1 kg; name WM
  property dry mass 0.9 kg; name DM
  properties: water content 0.111111, carbon content, fossil 0.864444, heating value, net 34.7 MJ
  note on carbon content, fossil: Tab A.6, ecoinvent v2.2 report 13_I. C content has been calculated after data in the tables, and then referred to 1 kg DM
- manual dismantling of used electric passenger car: 1 unit; = (glider_weight+powertrain_weight); lognormal variance with pedigree 0.0504, pedigree (2,3,5,4,3)
  One dismantling unit per kg vehicle is needed.
- powertrain, for electric passenger car: 0.0873647 kg; = powertrain_weight; source F. Habermacher 2011; lognormal variance with pedigree 0.043, pedigree (2,3,5,4,2)
  Estimate based on currently produced electric vehicles.
- waste glass: -0.00555637, -0.000269603, -2.51536e-5, -0.000112553, -0.00292513, -3.81971e-5, -6.11639e-6, -0.0275669 kg (8 entries); source F. Habermacher 2011; lognormal variance with pedigree 0.0504, pedigree (2,3,5,4,3)
  (same comment as for waste glass)
  production volume 301635 kg
- waste rubber, unspecified: -0.02525, -0.00105999, -0.02525 kg (3 entries); source F. Habermacher 2011; lognormal variance with pedigree 0.0504, pedigree (2,3,5,4,3)
  (same comment as for waste rubber, unspecified)
  production volume 426091 kg
- waste mineral oil: -0.00094974, -2.35118e-5, -0.00248675 kg (3 entries); source F. Habermacher 2011; lognormal variance with pedigree 0.0504, pedigree (2,3,5,4,3)
  (same comment as for waste mineral oil)
  production volume 28593.4 kg
  properties: water content 0.111111, carbon content, fossil 0.864444, wet mass 1 kg, dry mass 0.9 kg, heating value, net 34.7 MJ

## Sampling procedure
Average of material compositions published in literature between 2000 and 2010.

## Extrapolations
This dataset has been extrapolated from year 2015 to the year of the calculation (2021). The uncertainty has been adjusted accordingly.

## Review by Christian Bauer 2012-09-11
passed
