# NMC811 hydroxide production, for Li-ion battery

Dataset: EcoSpold 2, unit process
Geography: RoW
Time period: 2018-01-01 to 2021-12-31
Technology level: current
Classification: ISIC rev.4 ecoinvent: 2011:Manufacture of basic chemicals
Synonyms: nickel-manganese-cobalt 811 hydroxide; NMC8111(OH)2
Scenario: Business-as-Usual
System model: Allocation, cut-off by classification
Generated by: Eleonora Crenna
Published in: Dai, Q. 2018
Database: ecoinvent
isCopyrightProtected: true
accessRestrictedTo: 1

## General comment
This dataset represents the production of 1 kg nickel manganese cobalt (NMC) hydroxide, used as a precursor in the production of the cathode active material of Li-ion battery with NMC811 cathode. This dataset is a copy of the corresponding regional dataset. Production volume was adjusted.

## Included activities start
The activity starts when sulfate compounds and other chemicals enter the process at the factory.

## Included activities end
The activity ends with the production at factory gate of NMC811 hydroxide via co-precipitation process of input sulfate compounds

## Geography
The values in this dataset come from the inspection to a company in Ningxia Province in China in 2018, and are assumed to be representative of the production of NMC811 hydroxide in China.

## Technology
NMC811 hydroxide (NMC(OH)2) is produced by co-precipitation of nickel sulfate (NiSO4), manganese sulfate (MnSO4), and cobalt sulfate (CoSO4). The process begins with dissolving and mixing NiSO4, MnSO4 and CoSO4 in a tank reactor in a ratio 8:1:1. Once the solution is completely dissolved and mixed, sodium hydroxide (NaOH) and ammonium hydroxide (NH4OH) are added in the tank reactor, where nickel, manganese e cobalt co-precipitate in form of NMC(OH)2 (solid). Once precipitated, NMC(OH)2 is filtered out, washed, and dried to produce the NMC precursor. Sodium sulfate is produced as by-product. The conversion efficiency of the input materials in the reaction is 100%. The excess of ammonia is removed in an ammonia stripping tower, and recycled for subsequent precursor production.
Reference:
Dai, Q., Kelly, J. C., Dunn, J., & Benavides, P. (2018a). Update of Bill-of-Materials and Cathode Materials Production for Lithium-Ion Batteries in the GREET Model. 2018. Argonne National Laboratory.

## Time period
The time period is from 2018 (year of the publication of data) and 2020 (year of the dataset)

## Reference product
- NMC811 hydroxide: 1 kg; name RefProd; By-product classification allocatable product; CPC 34220: Zinc oxide; zinc peroxide; chromium oxides and hydroxides; manganese oxides; iron oxides and hydroxides; earth[…]; CAS 346417-97-8
  production volume 1.34969e7 kg; name PV_RP
    The PV is expressed in kg. According to UN Comtrade (https://comtrade.un.org/data/, HS code: 850760) 1317479226 kg Li-ion batteries were traded worldwide in 2019. Approximately 5% are NMC811 Li-ion batteries (Benchmark Mineral Intelligence, 2019. The Current Position of Li-ion Raw Material Supply and the Role of Recycling). NMC811 hydroxide represents approximately 24% weight of a battery pack
  property price 7.12 EUR2005; name RefProd_price_EUR2005
    Calculated based on inputs: The price of the product has been calculated as a sum of the values of the material and energy inputs for this product. This value is therefore a rough estimation. It may underestimate the real price since there are additional expenses when producing any product. These expences can include for example labour costs, treatment of waste materials and profit for the producer. Please consider carefully whether this level of data quality is acceptable for your application.
  property water in wet mass 0 kg; name RefProd_WWM
  property carbon content, non-fossil 0; name RefProd_C_content_non_fossil
    biogene carbon content on a dry matter basis
  property dry mass 1 kg; name RefProd_DM
  property water content 0; name RefProd_water_content
  property carbon content, fossil 0; name RefProd_C_content_fossil
    fossil carbon content on a dry matter basis
  property wet mass 1 kg; name RefProd_WM
  property heating value, net 2.62 MJ
    LHV is calculated based on the elemental composition of the substance. The chemical formula of the substance is found to be: Ni0.8Mn0.1Co0.1(OH)2, (PubChem 2020).
    Reference: Kim, S., Chen, J., Cheng, T., Gindulyte, A., He, J., He, S., Li, Q., Shoemaker, B. A., Thiessen, P. A., Yu, B., Zaslavsky, L., Zhang, J., & Bolton, E. E. (2019). PubChem 2019 update: improved access to chemical data. Nucleic acids research, 47(D1), D1102–D1109. https://doi.org/10.1093/nar/gky1033
  property carbon content 0
    carbon content on a dry matter basis (reserved; not for manual entry)
  property true value 7.12; name RefProd_true_value
    allocation property applied in "true value" allocation // value calculated from revenue
  properties: carbon allocation 0 kg

## By-products
- sodium sulfate, anhydrite: 0 kg; name BP_sodium; CPC 34240: Phosphates of triammonium; salts and peroxysalts of inorganic acids and metals n.e.c.; By-product classification allocatable product; CAS 7757-82-6; pedigree (1,1,1,1,1)
  Calculated value to obtain mass balance.
  production volume 2.10723e7 kg; = abs((BP_sodium/RefProd)*PV_RP)
    Calculated from production volume of reference product using the relative outputs.
  property price 0.191 EUR2005; name BP_sodium_price_EUR2005
    Temporary price data. Calculated as 90% of purchasers price based on: 2004 Import/Export data (total trades (USD) divided by total weight (kg) in EU27, USA, China, Japan and India) from UN Commodity Trade Statistics Database (http://data.un.org/Explorer.aspxDatabase [Accessed 2 July 2010]). Commodity: Sodium sulphates other than disodium sulphate
  property carbon content 0
    carbon content on a dry matter basis (reserved; not for manual entry)
  property true value 0.298201; name BP_sodium_true_value
    allocation property applied in "true value" allocation // value calculated from revenue
  properties: carbon content, fossil 0, wet mass 1 kg, carbon content, non-fossil 0, water in wet mass 0 kg, dry mass 1 kg, water content 0, carbon allocation 0 kg

## Inputs from technosphere
- ammonia, anhydrous, liquid: 0 kg; name ammonia_input; source Dai, Q. 2018; pedigree (1,1,1,1,1)
  Calculated value. 0.12 kg NH4OH are used to enhance the co-precipitation phase. Then it is recovered in a closed loop in form of ammonia (NH3) after the stripping process and reused in the precursor production process (Dai et al., 2018). The amount of ammonia recovered and reintegrated in the system is accounted here. According to USEPA (2000) and Kinidi et al. (2018) the efficiency of the ammonia stripping process is relatively high, on average 90%, meaning that 10% input ammonia is lost (via evaporation) and the same amount needs to be reintegrated in the initial system to feed the co-precipitation process. NH3 = 17.031 g/mol; NH4OH = 35.037 g/mol. NH3/NH4OH = 49%
  References:
  Dai, Q., Kelly, J. C., Dunn, J., & Benavides, P. (2018). Update of Bill-of-Materials and Cathode Materials Production for Lithium-Ion Batteries in the GREET Model. 2018. Argonne National Laboratory.
  Kinidi, L., Tan, I. A. W., Wahab, A., Binti, N., Tamrin, K. F. B., Hipolito, C. N., & Salleh, S. F. (2018). Recent development in ammonia stripping process for industrial wastewater treatment. International Journal of Chemical Engineering, 2018.
  USEPA, 2000. Wastewater Technology Fact Sheet Ammonia Stripping.
  properties: wet mass 1 kg, dry mass 1 kg
- heat, district or industrial, natural gas: 0 MJ; pedigree (1,1,1,1,1)
  Literature. Heat for alkali pretreatment, reactor heating, ammonia stripping and evaporation. Original value of 38.618 mmBTU/ton NMC(OH)2 taken from the more up-to-date version of GREET2 model (Argonne National Laboratory, 2019, Available at: https://greet.es.anl.gov/ ) and Dai et al. (2018)
  Reference:
  Dai, Q., Kelly, J. C., Dunn, J., & Benavides, P. (2018). Update of Bill-of-Materials and Cathode Materials Production for Lithium-Ion Batteries in the GREET Model. 2018. Argonne National Laboratory.
  properties: heating value, net 1 MJ
- chemical factory, organics: 7.11213e-10 unit; lognormal variance with pedigree 0.3048, pedigree (3,3,2,5,1)
  Calculated value. Annual production: 27000 metric ton cathode material (Dai et al., 2018) and 50 yr lifetime chemical factory
  Reference:
  Dai, Q., Kelly, J. C., Dunn, J., & Benavides, P. (2018). Update of Bill-of-Materials and Cathode Materials Production for Lithium-Ion Batteries in the GREET Model. 2018. Argonne National Laboratory.
- wastewater, average: 0 m3; name BP_wastewater; pedigree (1,1,1,1,1)
  Calculated value to obtain mass balance.
  production volume 0 m3
    Calculated from production volume of reference product using the relative outputs.
  property price 0 EUR2005; name BP_wastewater_price_EUR2005
  properties: carbon content, fossil 0.0104329, water content 2882.2, wet mass 1000 kg, dry mass 0.346837 kg
- manganese sulfate: 0.15692 kg; source Dai, Q. 2018; lognormal variance with pedigree 0.004, pedigree (2,3,2,5,1)
  Literature.
  properties: wet mass 1 kg, dry mass 1 kg
- cobalt sulfate: 0.161067 kg; source Dai, Q. 2018; lognormal variance with pedigree 0.004, pedigree (2,3,2,5,1)
  Literature.
  properties: dry mass 1 kg, wet mass 1 kg, cobalt content 0.380316
- sodium hydroxide, without water, in 50% solution state: 0.853778 kg; source Dai, Q. 2018; lognormal variance with pedigree 0.004, pedigree (2,3,2,5,1)
  Literature.
  properties: heating value, net 3.03 MJ, dry mass 1 kg, wet mass 1 kg
- nickel sulfate: 1.28654 kg; source Dai, Q. 2018; lognormal variance with pedigree 0.004, pedigree (2,3,2,5,1)
  Literature. The anhydrous form of nickel sulfate is used in the dataset.
  properties: wet mass 1 kg, dry mass 1 kg
- ammonia, anhydrous, liquid: 0.000114932, 0.000768166, 0.000178805, 0.000354275, 0.000347096, 3.63794e-5, 0.000162629, 0.00384734 kg (8 entries); source Dai, Q. 2018; lognormal variance with pedigree 0.0054, pedigree (3,3,2,5,1)
  (same comment as for ammonia, anhydrous, liquid)
- heat, district or industrial, natural gas: 1.56538, 37.5409 MJ (2 entries); lognormal variance with pedigree 0.004, pedigree (2,3,2,5,1)
  (same comment as for heat, district or industrial, natural gas)
- wastewater, average: -5.98006e-5, -0.000552782 m3 (2 entries); lognormal variance with pedigree 0.0454, pedigree (3,3,2,5,4)
  Calculated value to obtain mass balance.
  production volume 8614.26 m3

## Inputs from nature
- Water, cooling, unspecified natural origin [natural resource, in water]: 0.000612582 m3; name water_input; lognormal variance with pedigree 0.0054, pedigree (3,3,2,5,1)
  Literature. Original value 168.62 gal/ton NMC(OH)2 taken from the more up-to-date version of GREET2 model (Argonne National LAboratory, 2019, Available at: https://greet.es.anl.gov/ ) and Dai et al. (2018). Conversion factor: 1 gal = 3.785 kg. Then conversion into m3: 1 kg = 0.001 m3
  Reference:
  Dai, Q., Kelly, J. C., Dunn, J., & Benavides, P. (2018). Update of Bill-of-Materials and Cathode Materials Production for Lithium-Ion Batteries in the GREET Model. 2018. Argonne National Laboratory.

## Emissions to nature
- Ammonia [air, unspecified]: 0.00580962 kg; = ammonia_input; lognormal variance with pedigree 0.004, pedigree (2,3,2,5,1)
  Calculated value to obtain mass balance with ammonia liquid input.

## Sampling procedure
From Literature.

## Extrapolations
The dataset is extrapolated from CN data; the uncertainty has been adjusted accordingly.
