# wood chipping, industrial residual wood, stationary electric chipper

Dataset: EcoSpold 2, unit process
Geography: RER
Time period: 1996-01-01 to 2021-12-31
Technology level: current
Classification: ISIC rev.4 ecoinvent: 1610:Sawmilling and planing of wood
Tags: Swiss brush-up completed; ConvertedDataset
Scenario: Business-as-Usual
System model: Allocation, cut-off by classification
Generated by: Frank Werner
Published in: Werner F. 2007
Database: ecoinvent
isCopyrightProtected: true
accessRestrictedTo: 1

## General comment
This data represents the service of wood chopping to output one kg of dry mass wood chips.
The dataset represents the use of a chopper in sawmill. The data is provided by a Swiss company, which is assumed representative for central Europe. The dataset describes a sawmill with an annual output of 5'000 m3; compared to sizes of plants elsewhere, this is a very small plant. Several types of choppers exist.
Here only one model is developed and the uncertainty, especially for energy consumption, is rather high.

## Included activities start
Wood chopping process starting from industrial residual wood (sidings and squarings) at sawmill site.

## Included activities end
This activity ends with wood chips wood at sawmill site, The dataset includes chopping of industrial residual wood in stationary electric chopper. The dataset does not include direct wood dust emissions to the air from the chopper.

## Geography
Data for Switzerland used for central Europe

## Technology
The dataset represents the use of a stationary electric chopper. The chopper is powered by a motor of 37 kW; additionally a 5 kW-motor is used for the feeding of the wood. Its service life is around 30'000 service hours or 100'000 piled m3.
Reference:
Etienne (1993) Personal communication. Etienne AG, Luzern. (a private company)

## Reference product
- wood chipping, industrial residual wood, stationary electric chipper: 1 kg; By-product classification allocatable product; CPC 88311: Wood manufacturing services
  Reference product. The production of one kg of wood chips by use of a stationary wood chopper. The reference product refers to the chopping process itself, and not the input of wood. The wood chopper runs on electricity and is integrated at the sawmill. Several types of choppers exist but this dataset is developed for only one model produced in Switzerland. The wood chips produced may be from residual wood and/or industrial wood in the forest and subsequently used as biomass fuel.
  production volume 1.32237 kg
    This is a placeholder value that does not reflect real-world production volumes. This dataset does not currently require a real-world production volume to work in the database framework, and no actual data were collected yet. This has no negative effect on the results of the ecoinvent database. The placeholder value of this activity was scaled according to the nominal GDP of 2005 (source: United Nations, http://data.un.org/Glossary.aspx?q=GDP+%28current+US%24%29, accessed 20130726) to reflect an appropriate share of the global production volume, which is also a placeholder value.
  property price 0.00214967 EUR2005
    Calculated based on inputs: The price of the product has been calculated as a sum of the values of the material and energy inputs for this product. This value is therefore a rough estimation. It may underestimate the real price since there are additional expenses when producing any product. These expences can include for example labour costs, treatment of waste materials and profit for the producer. Please consider carefully whether this level of data quality is acceptable for your application.

## Inputs from technosphere
- electricity, medium voltage: 0.02 kWh; source Bergmair J 1996; lognormal variance with pedigree 0.0757, pedigree (3,3,5,3,3)
  Literature Value
  properties: UVEK_link_1 1779, UVEK_relative_amount_1 1
  note on UVEK_link_1: to be used only in special submissions in coordination with ecoinvent and the Swiss FOEN
- steel, low-alloyed, hot rolled: 4.08e-6 kg; source Frischknecht R. 2004; lognormal variance with pedigree 0.0757, pedigree (3,3,5,3,3)
  Literature Value
  properties: wet mass 1 kg, UVEK_link_2 4222, UVEK_relative_amount_1 1, carbon content, fossil 0.005, UVEK_relative_amount_2 1, UVEK_link_1 2662, dry mass 1 kg
  note on carbon content, fossil: Low alloyed steel composition given in Tab. 3.2 ecoinvent v2.2 report 10_partII. Steel assumed to have a C content of 0.5%
- lubricating oil: 2.04e-6 kg; source Frischknecht R. 2004; lognormal variance with pedigree 0.0757, pedigree (3,3,5,3,3)
  Literature Value
  properties: dry mass 1 kg, UVEK_relative_amount_1 1, heating value, net 40.2 MJ, UVEK_link_1 2866, carbon content, fossil 0.75, wet mass 1 kg
  note on heating value, net: Literature value, Source: IPCC 2006, 2006 IPCC Guidelines for National Greenhouse Gas Inventories, Prepared by the National Greenhouse Gas Inventories Programme, Eggleston H.S., Buendia L., Miwa K., Ngara T. and Tanabe K. (eds). Published: IGES, Japan
  note on carbon content, fossil: Lubricating oil is produced from diesel. C-content/dry mass of fats and oils considered 75%, from: ecoinvent v2.2 report, n 15a, pg 40
- chipper, stationary, electric: 5.3e-8 unit; lognormal variance with pedigree 0.6461, pedigree (4,5,5,3,4)
  Estimation

## Sampling procedure
Literature

## Extrapolations
This dataset has been extrapolated from year 2002 to the year of the calculation (2021). The uncertainty has been adjusted accordingly.
