# electricity voltage transformation from medium to low voltage, renewable energy products

Dataset: EcoSpold 2, unit process
Geography: CH
Time period: 2011-01-01 to 2021-12-31
Technology level: current
Classification: ISIC rev.4 ecoinvent: 3510:Electric power generation, transmission and distribution
Scenario: Business-as-Usual
System model: Allocation, cut-off by classification
Generated by: Christian Bauer
Published in: Itten R. 2012
Database: ecoinvent
isCopyrightProtected: false
accessRestrictedTo: 1

## General comment
This dataset represents the transformation of label-certified electricity voltage from medium to low voltage.

Definition of the voltage levels:
- High voltage level above 24 kV (large scale industry)
- Medium voltage level between 1 kV and 24 kV (medium to small scale industry, service sector
and public buildings)
- Low voltage level below 1 kV (Households)

## Included activities start
This activity starts with the label-certified medium voltage electricity arriving at the transformer station.

## Included activities end
This activity ends with 1kWh of label-certified medium voltage electricity transformed to low voltage.

This dataset includes the losses during voltage transformation.

It doesn't include the transformer station itself as this is included in the dataset for the transmission network.

## Geography
Inventory represents Swiss data for label-certified electricity.

## Technology
Transformers are essential components of the electricity grid. They connect the different voltage levels.
Big power plants feed the electricity at a very high voltage to the electricity grid. Transformers between 600 MVA and 80 MVA can be found in substations, where the high transmission voltage is transformed to the medium distribution voltage. In an additional step the medium voltage is transformed to low voltage using transformers below 2.5 MVA. The small transformers below 2.5 MVA are allocated to the low voltage level, whereas all the other transformers are allocated to the medium voltage level.

## Time period
Production volume = lable-certified electricity available on the Swiss market in 2011.

## Reference product
- electricity, low voltage, renewable energy products: 1 kWh; CPC 17100: Electrical energy; By-product classification allocatable product
  production volume 4.35e9 kWh
    Literature value/statistics. Amount of label-certified electricity available on the low voltage electricity level in Switzerland in 2011. See ecoQuery for a detailed description of the modelling of the electricity chain from high to medium and from medium to low voltage.
  property price 0.0669 EUR2005
    Temporary price data. Calculated as 90% of purchasers price based on: Price for industrial users from IEA Key world energy statistics 2004 (www.iea.org). In addition, regarding label-certified electricity, the Swiss government has a market instrument for renewable energy which is calculated as the difference between the market price and the production price. This was started in 2009 and is 0.45 Rp/kWh (http://www.bfe.admin.ch/themen/00612/02073/index.html?lang=de). Therefore, the production price of label certified energy is assumed to be the supplyer price plus the 0.45Rp/kWh.The unit conversion from CH to EUR is based on the ecoinvent unit conversion file (1 CHF2005 = 0.644 EUR2005).

## Inputs from technosphere
- electricity, medium voltage, renewable energy products: 0 kWh
  Electricity from the medium voltage market.
- electricity, medium voltage, renewable energy products: 1.0276 kWh
  Calculated value/estimation. This value compensates for the losses during transformation from medium to low voltage. The calculation is made based on total electricity losses between net electricity available at the busbar and the use of electricity calculated based on the IEA electricity information 2014, table 1.1, Electrity supply vs. transmission losses. These total losses over the whole chain are then allocated to the different voltage levels as well as transformation and transmission losses based on information in Itten et al. 2014. For details please see the documentation available on ecoQuery.
  IEA. 2014. Electricity Information 2014. ISBN 978-92-64-21692-1. International Energy Agency (IEA), Paris Cedex (FR).
  Itten R., Frischknecht R., Stucki M. 2014. Life Cycle Inventories of Electricity Mixes and Grid. Version 1.3. treeze, Uster, Switzerland

## Extrapolations
This dataset has been extrapolated from year 2015 to the year of the calculation (2021). The uncertainty has been adjusted accordingly.

## Review by Carl Vadenbo 2015-05-22
The update of the whole electricity sector for the ecoinvent v3.2 database consist of hundreds of datasets. All these datasets have passed through a streamlined review processes where the underlying modelling of production volumes, technology shares and efficiencies was reviewed in detail prior to the datasets being submitted to the database.
