# solder production, bar, Sn63Pb37, for electronics industry

Dataset: EcoSpold 2, unit process
Geography: GLO
Time period: 2005-01-01 to 2021-12-31
Technology level: current
Classification: EcoSpold01Categories: metals/extraction
Classification: ISIC rev.4 ecoinvent: 2029:Manufacture of other chemical products n.e.c.
Tags: ConvertedDataset
Scenario: Business-as-Usual
System model: Allocation, cut-off by classification
Generated by: Roland Hischier
Published in: Hischier R. 2007
Database: ecoinvent
isCopyrightProtected: true
accessRestrictedTo: 1

## General comment
This dataset represents the production of 1 kg of solder bar of the type Sn63Pb37. It is based on information representing current solder materials used in the electronics industry. Data are taken from literature (report from a European research project in the field of lead-free soldering). Infrastructure are based on own assumptions.
[This dataset was already contained in the ecoinvent database version 2. It was not individually updated during the transfer to ecoinvent version 3. Life Cycle Impact Assessment results may still have changed, as they are affected by changes in the supply chain, i.e. in other datasets. This dataset was generated following the ecoinvent quality guidelines for version 2. It may have been subject to central changes described in the ecoinvent version 3 change report (http://www.ecoinvent.org/database/ecoinvent-version-3/reports-of-changes/), and the results of the central updates were reviewed extensively. The changes added e.g. consistent water flows and other information throughout the database. The documentation of this dataset can be found in the ecoinvent reports of version 2, which are still available via the ecoinvent website. The change report linked above covers all central changes that were made during the conversion process.]

## Included activities start
From reception of metals at the factory gate.

## Included activities end
This dataset includes raw material input, energy consumption and emissions (air), as well as an estimation of the efforts and the infrastructure for the production of solder bar.

## Geography
Data represent global valid composition data for Pb-containing solder bar, used in the electronics industry.

## Technology
Typical solder material for the electronics industry production through melting process out of respective metals.

## Reference product
- solder, bar, Sn63Pb37, for electronics industry: 1 kg; name solder_bar_RP; CPC 42950: Wire, rods, tubes, plates, electrodes and similar products, of base metal or of metal carbides, coated or core[…]; By-product classification allocatable product
  EcoSpold01Location=GLO
  A soldering material or a solder is a fusible metal alloy, with a melting point or melting range of 180-190°C (360-370 °F), which is melted to join metallic surfaces, especially in the fields of electronics and plumbing, in a process called soldering. Lead solder: most often, a mixture of 63% tin and 37% lead is used in this case, due to the fact that this mixture has the lowest melting point, a melting point that is close to the above mentioned 180°C. They are the most often used Pb-containing solder in the electronics industry.
  production volume 4.52381e7 kg; = solder_bar_RP/ tin_IN*57000000*0.5
    Calculated based on literature value (http://blogs.indium.com/blog/solder-price, accessed 20140602) and estimates.
    Approximatelly 57000 tons of tin is used in solder bar production. It is estimated, that 50% is produced by this solder production technology.
  property price 6.67625 EUR2005; name solder_bar_RP_price_EUR2005
    Calculated based on inputs: The price of the product has been calculated as a sum of the values of the material and energy inputs for this product. This value is therefore a rough estimation. It may underestimate the real price since there are additional expenses when producing any product. These expences can include for example labour costs, treatment of waste materials and profit for the producer. Please consider carefully whether this level of data quality is acceptable for your application.
  property carbon content 0
    carbon content on a dry matter basis (reserved; not for manual entry)
  properties: dry mass 1 kg, wet mass 1 kg, water content 0, carbon content, non-fossil 0, water in wet mass 0 kg, carbon content, fossil 0, carbon allocation 0 kg

## Inputs from technosphere
- aluminium casting facility: 4.725e-11 unit; lognormal variance with pedigree 0.5761, pedigree (4,5,5,3,5)
  Proxy, due to a lack of specific information, the infrastructure module for aluminium casting is used.
  EcoSpold01Location=RER
  Uncertainty: rough estimation of infrastructure
- electricity, medium voltage: 0.161 kWh; source Alvarado Ascencio C. 2005; lognormal variance with pedigree 0.0513, pedigree (2,3,5,3,1)
  EcoSpold01Location=UCTE
  Literature Value.
  Uncertainty: data from literature
- heat, district or industrial, natural gas: 1.815 MJ; source Alvarado Ascencio C. 2005; lognormal variance with pedigree 0.0513, pedigree (2,3,5,3,1)
  Literature Value.
  EcoSpold01Location=RER
  Uncertainty: data from literature
  properties: heating value, net 1 MJ
- lead: 0.37 kg; source Alvarado Ascencio C. 2005; lognormal variance with pedigree 0.0513, pedigree (2,3,5,3,1)
  Literature Value.
  EcoSpold01Location=RER
  Uncertainty: data from literature
  properties: wet mass 1 kg, dry mass 1 kg
- tin: 0.63 kg; name tin_IN; source Alvarado Ascencio C. 2005; lognormal variance with pedigree 0.0513, pedigree (2,3,5,3,1)
  Literature Value.
  EcoSpold01Location=RER
  Uncertainty: data from literature
  properties: dry mass 1 kg, wet mass 1 kg

## Emissions to nature
All rows: source Alvarado Ascencio C. 2005
- Particulates, > 2.5 um, and < 10um [air, urban air close to ground]: 7.8143e-6 kg; lognormal variance with pedigree 0.3513, pedigree (2,3,5,3,1)
  Literature Value.
  Uncertainty: data from literature
- Particulates, < 2.5 um [air, urban air close to ground]: 6.0777e-6 kg; lognormal variance with pedigree 0.3513, pedigree (2,3,5,3,1)
  Literature Value.
  Uncertainty: data from literature
- Lead [air, urban air close to ground]: 1.537e-6 kg; lognormal variance with pedigree 0.0913, pedigree (2,3,5,3,1)
  Literature Value.
  Uncertainty: data from literature
- Particulates, > 10 um [air, urban air close to ground]: 3.473e-6 kg; lognormal variance with pedigree 0.3513, pedigree (2,3,5,3,1)
  Literature Value.
  Uncertainty: data from literature
- Tin [air, urban air close to ground]: 2.8e-7 kg; lognormal variance with pedigree 0.0913, pedigree (2,3,5,3,1)
  Literature Value.
  Uncertainty: data from literature

## Sampling procedure
own estimation

## Extrapolations
This dataset has been extrapolated from year 2005 to the year of the calculation (2021). The uncertainty has been adjusted accordingly.

## Review by Roland Hischier 2011-09-21
Transfer of documentation done.

## Review by Rolf Frischknecht 2007-09-14
passed
