# operation, computer, laptop, 23% active work

Dataset: EcoSpold 2, unit process
Geography: CH
Time period: 2001-01-01 to 2021-12-31
Technology level: current
Classification: EcoSpold01Categories: electronics/services
Classification: ISIC rev.4 ecoinvent: 8219:Photocopying, document preparation and other specialized office support act
Synonyms: Lifebook; Notebook
Tags: Operation; ConvertedDataset
Scenario: Business-as-Usual
System model: Allocation, cut-off by classification
Generated by: Martin Lehmann
Published in: Hischier R. 2007
Database: ecoinvent
isCopyrightProtected: false
accessRestrictedTo: 1

## General comment
The laptop computer office use is calculated according to the share between active (5.5 hrs/day), standby (2 hrs/day) and off (16.5 hrs/day) modes taken from literature information.
[This dataset was already contained in the ecoinvent database version 2. It was not individually updated during the transfer to ecoinvent version 3. Life Cycle Impact Assessment results may still have changed, as they are affected by changes in the supply chain, i.e. in other datasets. This dataset was generated following the ecoinvent quality guidelines for version 2. It may have been subject to central changes described in the ecoinvent version 3 change report (http://www.ecoinvent.org/database/ecoinvent-version-3/reports-of-changes/), and the results of the central updates were reviewed extensively. The changes added e.g. consistent water flows and other information throughout the database. The documentation of this dataset can be found in the ecoinvent reports of version 2, which are still available via the ecoinvent website. The change report linked above covers all central changes that were made during the conversion process.]

## Included activities end
Describes the use of a laptop computer in an office. Calculated per 1 hour of laptop use in an office. Swiss supply mix applied for electricity consumption (low voltage).

## Geography
The data is based on producer and literature information from Europe and the USA, combined with own assumptions for Switzerland.

## Technology
No technology involved, except for the production of the laptop computer, which is described in another dataset.

## Reference product
- operation, computer, laptop, 23% active work: 1 hour; CPC 85: Support services; By-product classification allocatable product
  EcoSpold01Location=CH
  production volume 0.0336675 hour
    This is a placeholder value that does not reflect real-world production volumes. This dataset does not currently require a real-world production volume to work in the database framework, and no actual data were collected yet. This has no negative effect on the results of the ecoinvent database. The placeholder value of this activity was scaled according to the nominal GDP of 2005 (source: United Nations, http://data.un.org/Glossary.aspx?q=GDP+%28current+US%24%29, accessed 20130726) to reflect an appropriate share of the global production volume, which is also a placeholder value.
  property price 0.0251555 EUR2005
    Calculated based on inputs: The price of the product has been calculated as a sum of the values of the material and energy inputs for this product. This value is therefore a rough estimation. It may underestimate the real price since there are additional expenses when producing any product. These expences can include for example labour costs, treatment of waste materials and profit for the producer. Please consider carefully whether this level of data quality is acceptable for your application.

## Inputs from technosphere
- operation, computer, laptop, off mode: 0.6875 hour; lognormal variance with pedigree 0.070025, pedigree (3,5,5,2,1)
  activityLink introduced to establish a direct link to the corresponding regional supply of this product
  EcoSpold01Location=CH
- operation, computer, laptop, active mode: 0.22917 hour; lognormal variance with pedigree 0.070025, pedigree (3,5,5,2,1)
  EcoSpold01Location=CH
  activityLink introduced to establish a direct link to the corresponding regional supply of this product
- operation, computer, laptop, standby/sleep mode: 0.083333 hour; lognormal variance with pedigree 0.070025, pedigree (3,5,5,2,1)
  (same comment as for operation, computer, laptop, off mode)

## Sampling procedure
Literature, producer information and own assumptions

## Extrapolations
This dataset has been extrapolated from year 2006 to the year of the calculation (2021). The uncertainty has been adjusted accordingly.

## Review by Jürgen Sutter 2010-02-09
passed
none
