# cathode-ray tube production, cathode ray tube display

Dataset: EcoSpold 2, unit process
Geography: GLO
Time period: 1998-01-01 to 2021-12-31
Technology level: old
Classification: ISIC rev.4 ecoinvent: 2620:Manufacture of computers and peripheral equipment
Classification: EcoSpold01Categories: electronics/module
Tags: ConvertedDataset
Scenario: Business-as-Usual
System model: Allocation, cut-off by classification
Generated by: Roland Hischier
Published in: Hischier R. 2007
Database: ecoinvent
isCopyrightProtected: true
accessRestrictedTo: 1

## General comment
This dataset represents the production of 1 kg of cathode-ray tube for cathode ray tube display production. Main data about the CRT tube production are taken from a US LCA study of CRT and LCD screens. Data represent the production of an average 17inch CRT computer screen in the late 1990s.
[This dataset was already contained in the ecoinvent database version 2. It was not individually updated during the transfer to ecoinvent version 3. Life Cycle Impact Assessment results may still have changed, as they are affected by changes in the supply chain, i.e. in other datasets. This dataset was generated following the ecoinvent quality guidelines for version 2. It may have been subject to central changes described in the ecoinvent version 3 change report (http://www.ecoinvent.org/database/ecoinvent-version-3/reports-of-changes/), and the results of the central updates were reviewed extensively. The changes added e.g. consistent water flows and other information throughout the database. The documentation of this dataset can be found in the ecoinvent reports of version 2, which are still available via the ecoinvent website. The change report linked above covers all central changes that were made during the conversion process.]

## Included activities start
From reception of raw materials and auxiliaries at the factory gate.

## Included activities end
This dataset includes raw materials, auxiliaries including technical gases, packaging materials, energy and water consumption, emissions to air and to water and waste. Infrastructure are based on the information of the European packaging glass production and have thus, higher uncertainties.

## Geography
Data from a US LCA study used as global average data

## Technology
Average CRT production technology in the late 1990s. Average production composed of: production of the shadow mask, frame around the CRT, production of the cathode ray tube (i.e. coating of inner side, installation of electron gun & shadow mask, fixation of funnel and panel parts, evacuation) and paletting until the complete CRT are ready for the next production step.

## Parameters
- fraction, process water, to air: 0.061 dimensionless; name fraction_PW_to_air; lognormal variance with pedigree 0.092025, pedigree (4,4,3,2,4)
  Literature value (Statistics Canada, 2007 & Shaffer, K.H., 2008, Consumptive water use in the Great Lakes Basin, USGS) (Vionnet, S., Quantis Water Database - Technical Report, 2012).

## Reference product
- cathode-ray tube, cathode ray tube display: 1 kg; CPC 47140: Thermionic, cold cathode or photo-cathode valves and tubes (including cathode ray tubes); By-product classification allocatable product
  Computer monitors or displays are the visual interface between a computer and the user / operator. The CRT technology has been invented by the German physicist Karl Ferdinand Braun in 1897. It is the display technology that has been for a long time used in almost all computer displays, video monitors, televisions, radar displays and oscilloscopes. The CRT technically refers to any electronic vacuum tube employing a focused beam of electrons. Cathode rays work thereby in the form of streams of high speed electrons emitted from the heating of a cathode inside a vacuum tube, at its rear end. The emitted electrons form a beam within the tube due to the voltage difference applied across the two electrodes (the CRT screen typically forms the anode). The beam is then perturbed (deflected), either by a magnetic or an electric field, to trace over ('scan') the inside surface of the screen (anode). The screen is covered with a phosphorescent coating (often transition metals or rare earth elements), which emits visible light when excited by the electrons. Early computer displays used so-called vector monitors, a type of CRT similar to an oscilloscope but typically using magnetic, rather than electrostatic, deflection. Here, the beam traces straight lines between arbitrary points, repeatedly refreshing the display as quickly as possible. Vector displays for computers were limited in that they could display only a shape's outline (advanced vector systems could provide a limited amount of shading), and only a limited amount of crudely-drawn text (the number of shapes and/or textual characters drawn was severely limited, because the speed of refresh was roughly inversely proportional to how many vectors needed to be drawn). Other graphical displays used 'storage tubes'. Such CRTs inherently stored the image, and did not require periodic refreshing. Furthermore, displays for early computers that needed to display more text than was practical by using vectors, or that required high speed for photographic output, used a so-called Charactron CRT. This type incorporates a perforated metal character mask (stencil), which shapes a wide electron beam to form a character on the screen. The system selects a character on the mask using one set of deflection circuits, and selects the position to draw the character at using a second set. The beam is activated briefly to draw the character at that position. Many of these early computer displays used "slow", or long-persistence, phosphors to reduce flicker for the operator. While it reduces eyestrain for relatively static displays, the drawback of long-persistence phosphor is that when the display is changed, it produces a visible afterimage that can take up to several seconds to fade. This makes all these technologies inappropriate for animation, or for real-time dynamic information displays.
  Modern colour tubes use three different phosphors which emit red, green, and blue light respectively. They are packed either in strips or clusters. Such colour CRTs have thus three electron guns, one for each primary colour, arranged either in a straight line or in a triangular configuration (the guns are usually constructed as a single unit). The beam of each gun reaches the dots of exactly one colour; a grille or mask absorbs those electrons that would otherwise hit the wrong phosphor. Since each beam starts at a slightly different location within the tube, and all three beams are perturbed in essentially the same way, a particular deflection charge will cause the beams to hit a slightly different location on the screen (called a 'subpixel'). The so-called dot pitch defines thereby the "native resolution" of such displays. Despite all the advantages that new, flat display technologies seem to have, colour CRTs still find adherents in computer gaming due to their high refresh rates and higher resolution per initial cost. CRT's are also still popular in the printing and broadcasting industries as well as in the profe
  EcoSpold01Location=GLO
  production volume 1 kg
    Dummy value to be replaced by measured, estimated or calculated value
  property carbon content, fossil 0.00299576
    Calculated as the addition of C contents in the product composition
  property price 11.9824 EUR2005
    Calculated based on inputs: The price of the product has been calculated as a sum of the values of the material and energy inputs for this product. This value is therefore a rough estimation. It may underestimate the real price since there are additional expenses when producing any product. These expences can include for example labour costs, treatment of waste materials and profit for the producer. Please consider carefully whether this level of data quality is acceptable for your application.
  property carbon content 0.00299576
    carbon content on a dry matter basis (reserved; not for manual entry)
  properties: dry mass 1 kg, carbon content, non-fossil 0, water content 0, wet mass 1 kg, water in wet mass 0 kg, carbon allocation 0.00299576 kg

## Inputs from technosphere
- hydrogen peroxide, without water, in 50% solution state: 0 kg; source Socolof M. L. 2001; pedigree (1,1,1,1,1)
  EcoSpold01Location=RER
  Literature Value.
  Uncertainty: data from an US-EPA LCA study
  properties: wet mass 1 kg, heating value, net 7.13 MJ, dry mass 1 kg
- acrylic dispersion, without water, in 65% solution state: 0 kg; source Socolof M. L. 2001; pedigree (1,1,1,1,1)
  Literature Value.
  EcoSpold01Location=RER
  Uncertainty: data from an US-EPA LCA study
  properties: heating value, net 16.66 MJ, carbon content, fossil 0.549932, dry mass 1 kg, wet mass 1 kg
  note on carbon content, fossil: Dispersants ensure that the individual particles in the emulsion paint do not combine to form agglomerates.The poly(acrylic acids) are suitable dispersing agents (Ullmann), and have therefore been used as representative example. Their formula is (C3H4O2)n. The formulation of this specific dispersion includes 50% acrylic binder
- heat, district or industrial, natural gas: 4.9728 MJ; source Socolof M. L. 2001; lognormal variance with pedigree 0.0407, pedigree (1,3,5,3,1)
  EcoSpold01Location=RER
  Literature Value.
  Uncertainty: data from an US-EPA LCA study
  properties: heating value, net 1 MJ
- wastewater from cathode ray tube production: -0.0049159 m3; name wastewater_output; source Socolof M. L. 2001; lognormal variance with pedigree 0.0407, pedigree (1,3,5,3,1)
  EcoSpold01Location=CH
  Literature Value.
  Uncertainty: data from an US-EPA LCA study
  production volume 0.0049159 m3
    Calculated from the production volume of cathode-ray tube, cathode ray tube display in proportion to the respective output amounts.
  property price 0 EUR2005; name wastewater_output_price_EUR2005
  properties: dry mass 8.42179 kg, carbon content, fossil 0.0400425, water content 117.74, wet mass 1000 kg
  note on carbon content, fossil: COD is 7.79e-4 kg/kg (Tab 12.11, ecoinvent v2.2 report 18_III). COD was converted to TOC, using conversion factors in Tab 4.10 (ecoinvent v2.2 report 13_IV). TOC was considered as Total Carbon.
- acetone, liquid: 0 kg; source Socolof M. L. 2001; pedigree (1,1,1,1,1)
  Literature Value.
  EcoSpold01Location=RER
  Uncertainty: data from an US-EPA LCA study
  properties: carbon content, fossil 0.62069, heating value, net 31.32 MJ, wet mass 1 kg, dry mass 1 kg
- electricity, medium voltage: 0.82814 kWh; source Socolof M. L. 2001; lognormal variance with pedigree 0.0407, pedigree (1,3,5,3,1)
  EcoSpold01Location=UCTE
  Literature Value.
  Uncertainty: data from an US-EPA LCA study
- frit, for cathode ray tube display: 0.0062336 kg; source Socolof M. L. 2001; lognormal variance with pedigree 0.0407, pedigree (1,3,5,3,1)
  Literature Value.
  EcoSpold01Location=GLO
  Uncertainty: data from an US-EPA LCA study
  properties: wet mass 1 kg, dry mass 1 kg
- iron (III) chloride, without water, in 40% solution state: 0.012804 kg; lognormal variance with pedigree 0.0407, pedigree (1,3,5,3,1)
  Proxy with literature value, to represent red phosphor iron is used.
  EcoSpold01Location=CH
  Uncertainty: data from an US-EPA LCA study
  properties: wet mass 1 kg, dry mass 1 kg
- chlorine, liquid: 0 kg; source Socolof M. L. 2001; pedigree (1,1,1,1,1)
  Literature Value.
  EcoSpold01Location=RER
  Uncertainty: data from an US-EPA LCA study
  properties: dry mass 1 kg, wet mass 1 kg
- hydrochloric acid, without water, in 30% solution state: 0 kg; source Socolof M. L. 2001; pedigree (1,1,1,1,1)
  Literature Value.
  EcoSpold01Location=RER
  Uncertainty: data from an US-EPA LCA study
  properties: dry mass 1 kg, wet mass 1 kg, heating value, net 3.32 MJ
- waste mineral oil: 0 kg; source Socolof M. L. 2001; pedigree (1,1,1,1,1)
  EcoSpold01Location=CH
  Literature Value.
  Uncertainty: data from an US-EPA LCA study
  production volume 0 kg
    (same comment as for wastewater from cathode ray tube production)
  properties: carbon content, fossil 0.864444, heating value, net 34.7 MJ, wet mass 1 kg, dry mass 0.9 kg, water content 0.111111
  note on carbon content, fossil: Tab A.6, ecoinvent v2.2 report 13_I. C content has been calculated after data in the tables, and then referred to 1 kg DM
  note on heating value, net: Value taken from the general comment of the treatment dataset.
- mischmetal: 0.00053652 kg; source Socolof M. L. 2001; lognormal variance with pedigree 0.0407, pedigree (1,3,5,3,1)
  Proxy with literature value, to represent red phosphor mischmetal is used.
  EcoSpold01Location=GLO
  Uncertainty: data from an US-EPA LCA study
  properties: dry mass 1 kg, wet mass 1 kg
- sodium hydroxide, without water, in 50% solution state: 0.0054224 kg; source Socolof M. L. 2001; lognormal variance with pedigree 0.0407, pedigree (1,3,5,3,1)
  Estimation, the total amount is based on literature and the split on own assumptions.
  EcoSpold01Location=RER
  Uncertainty: data from an US-EPA LCA study
  properties: dry mass 1 kg, heating value, net 3.03 MJ, wet mass 1 kg
- calcium chloride: 0 kg; source Socolof M. L. 2001; pedigree (1,1,1,1,1)
  EcoSpold01Location=RER
  Literature Value.
  Uncertainty: data from an US-EPA LCA study
  properties: dry mass 1 kg, wet mass 1 kg
- nickel, class 1: 0.0091738 kg; lognormal variance with pedigree 0.0407, pedigree (1,3,5,3,1)
  Proxy with literature value, to represent red phosphor nickel is used.
  EcoSpold01Location=GLO
  Uncertainty: data from an US-EPA LCA study
  properties: wet mass 1 kg, dry mass 1 kg
- sheet rolling, steel: 0.18523 kg; source Socolof M. L. 2001; lognormal variance with pedigree 0.0407, pedigree (1,3,5,3,1)
  EcoSpold01Location=RER
  Estimation based on literature.
  Further references:
  Menad N. (1999) Cathode ray tube recycling. In: Resources, Conservation and Recycling, 26, pp. 143-154.
  Uncertainty: data from an US-EPA LCA study
- sulfuric acid: 0 kg; source Socolof M. L. 2001; pedigree (1,1,1,1,1)
  EcoSpold01Location=RER
  Literature Value.
  Uncertainty: data from an US-EPA LCA study
  properties: wet mass 1 kg, dry mass 1 kg
- electron gun, for cathode ray tube display: 0.0094393 kg; source Socolof M. L. 2001; lognormal variance with pedigree 0.0407, pedigree (1,3,5,3,1)
  Literature Value.
  EcoSpold01Location=GLO
  Uncertainty: data from an US-EPA LCA study
  properties: carbon content, fossil 0.0862743, dry mass 1 kg, wet mass 1 kg
  note on carbon content, fossil: Calculated as the addition of C contents in the product composition
- steel, unalloyed: 0.016269 kg; source Socolof M. L. 2001; lognormal variance with pedigree 0.0407, pedigree (1,3,5,3,1)
  EcoSpold01Location=RER
  Literature Value.
  Uncertainty: data from an US-EPA LCA study
  properties: wet mass 1 kg, dry mass 1 kg, carbon content, fossil 0.0025
  note on carbon content, fossil: Unalloyed steels or carbon steels are those in which the level of an individual element in no case reaches or exceeds the limiting concentration given in Tab. 3.1 ecoinvent v2.2 report 10_partII. Assumed to have a C content of 0.25%
- waste plastic, mixture: 0 kg; source Socolof M. L. 2001; pedigree (1,1,1,1,1)
  Literature Value.
  EcoSpold01Location=CH
  Uncertainty: data from an US-EPA LCA study
  production volume 0 kg
    (same comment as for wastewater from cathode ray tube production)
  properties: carbon content, fossil 0.747344, water content 0.180638, dry mass 0.847 kg, wet mass 1 kg, heating value, net 30.79 MJ
  note on carbon content, fossil: C content in 1 kg DM was calculated using data in Tab A.2, ecoinvent v2.2 report 13_I
- printed wiring board mounting facility: 2.08e-7 unit; lognormal variance with pedigree 0.3861, pedigree (4,5,5,3,1)
  Proxy, due to a lack of specific information, the infrastructure module for the mounting of printed wiring boards is used.
  EcoSpold01Location=GLO
  Uncertainty: Estimation, based on printed wiring board mounting plant
- heat, district or industrial, other than natural gas: 14.651 MJ; source Socolof M. L. 2001; lognormal variance with pedigree 0.0407, pedigree (1,3,5,3,1)
  Literature Value.
  EcoSpold01Location=RER
  Uncertainty: data from an US-EPA LCA study
  properties: heating value, net 1 MJ
- oxygen, liquid: 0 kg; source Socolof M. L. 2001; pedigree (1,1,1,1,1)
  Literature Value.
  EcoSpold01Location=RER
  Uncertainty: data from an US-EPA LCA study
  properties: dry mass 1 kg, wet mass 1 kg
- electric arc furnace slag: 0 kg; source Socolof M. L. 2001; pedigree (1,1,1,1,1)
  EcoSpold01Location=CH
  Literature Value.
  Uncertainty: data from an US-EPA LCA study
  production volume 0 kg
    (same comment as for wastewater from cathode ray tube production)
  properties: carbon content, fossil 0.00338635, dry mass 1 kg, wet mass 1 kg
- nitrogen, liquid: 0 kg; source Socolof M. L. 2001; pedigree (1,1,1,1,1)
  EcoSpold01Location=RER
  Literature Value.
  Uncertainty: data from an US-EPA LCA study
  properties: wet mass 1 kg, dry mass 1 kg
- sodium hypochlorite, without water, in 15% solution state: 0 kg; source Socolof M. L. 2001; pedigree (1,1,1,1,1)
  Literature Value.
  EcoSpold01Location=RER
  Uncertainty: data from an US-EPA LCA study
  properties: dry mass 1 kg, wet mass 1 kg
- spent solvent mixture: 0 kg; source Socolof M. L. 2001; pedigree (1,1,1,1,1)
  EcoSpold01Location=CH
  Literature Value.
  Uncertainty: data from an US-EPA LCA study
  production volume 0 kg
    (same comment as for wastewater from cathode ray tube production)
  properties: dry mass 0.835 kg, carbon content, fossil 0.571257, water content 0.197605, heating value, net 21.7 MJ, wet mass 1 kg
  note on carbon content, fossil: Tab A.7, ecoinvent v2.2 report 13_I. C content has been calculated after data in the tables, and then referred to 1 kg DM
- zinc sulfide: 0.00095234 kg; source Socolof M. L. 2001; lognormal variance with pedigree 0.0407, pedigree (1,3,5,3,1)
  EcoSpold01Location=RER
  Proxy with literature value, to represent blue phosphor and green phosphor zinc sulfide is used.
  Uncertainty: data from an US-EPA LCA study
  properties: dry mass 1 kg, wet mass 1 kg
- blast furnace sludge: 0 kg; source Socolof M. L. 2001; pedigree (1,1,1,1,1)
  EcoSpold01Location=CH
  Literature Value.
  Uncertainty: data from an US-EPA LCA study
  production volume 0 kg
    (same comment as for wastewater from cathode ray tube production)
  properties: carbon content, fossil 0.339168, wet mass 1 kg, water content 0.0940919, dry mass 0.914 kg
- carbon black: 0.0019252 kg; source Socolof M. L. 2001; lognormal variance with pedigree 0.0407, pedigree (1,3,5,3,1)
  EcoSpold01Location=GLO
  Proxy with literature value, to represent aquadag, carbon black is used.
  Uncertainty: data from an US-EPA LCA study
  properties: dry mass 1 kg, wet mass 1 kg, carbon content, fossil 0.85, heating value, net 25.76 MJ
- chemical, inorganic: 0.001943 kg; source Socolof M. L. 2001; lognormal variance with pedigree 0.0407, pedigree (1,3,5,3,1)
  EcoSpold01Location=GLO
  Estimation, the total amount is based on literature and the split on own assumptions.
  Uncertainty: data from an US-EPA LCA study
  properties: carbon content, fossil 0.003, wet mass 1 kg, dry mass 1 kg
  note on carbon content, fossil: This dataset is an unweighted average of 20 inorganic substances (listed in Tab 88.1, ecoinvent v2.2 report 8, part II), being part of the top100 chemicals included in this database. The C-content has also been calculated as an unweighted average of the C content of the substances composing this dataset.
- toluene, liquid: 0 kg; source Socolof M. L. 2001; pedigree (1,1,1,1,1)
  EcoSpold01Location=RER
  Literature Value.
  Uncertainty: data from an US-EPA LCA study
  properties: carbon content, fossil 0.913043, wet mass 1 kg, heating value, net 38.17 MJ, dry mass 1 kg
- waste frit from cathode ray tube production: -0.00028193 kg; source Socolof M. L. 2001; lognormal variance with pedigree 0.0407, pedigree (1,3,5,3,1)
  EcoSpold01Location=CH
  Literature Value.
  Uncertainty: data from an US-EPA LCA study
  production volume 0.00028193 kg
    (same comment as for wastewater from cathode ray tube production)
  properties: dry mass 1 kg, wet mass 1 kg
- ammonia, anhydrous, liquid: 0 kg; source Socolof M. L. 2001; pedigree (1,1,1,1,1)
  EcoSpold01Location=RER
  Literature Value.
  Uncertainty: data from an US-EPA LCA study
  properties: dry mass 1 kg, wet mass 1 kg
- boric acid, anhydrous, powder: 0.00044206 kg; source Socolof M. L. 2001; lognormal variance with pedigree 0.0407, pedigree (1,3,5,3,1)
  Literature Value.
  EcoSpold01Location=RER
  Uncertainty: data from an US-EPA LCA study
  properties: wet mass 1 kg, dry mass 1 kg
- chemical, organic: 0.011252 kg; source Socolof M. L. 2001; lognormal variance with pedigree 0.0407, pedigree (1,3,5,3,1)
  (same comment as for chemical, inorganic)
  properties: heating value, net 19.03 MJ, carbon content, fossil 0.628, wet mass 1 kg, dry mass 1 kg
  note on carbon content, fossil: This dataset is an unweighted average of 20 organic substances (listed in Tab 88.1, ecoinvent v2.2 report 8, part II), being part of the top100 chemicals included in this database. The C-content has also been calculated as an unweighted average of the C content of the substances composing this dataset.
- ammonium carbonate: 0 kg; source Socolof M. L. 2001; pedigree (1,1,1,1,1)
  (same comment as for sodium hydroxide, without water, in 50% solution state)
  properties: carbon content, fossil 0.125, dry mass 1 kg, wet mass 1 kg, heating value, net 13.88 MJ
- panel glass, for cathode ray tube display: 0.66131 kg; source Socolof M. L. 2001; lognormal variance with pedigree 0.0407, pedigree (1,3,5,3,1)
  Literature value, the split is based on Menad (1999).
  Further references:
  Menad N. (1999) Cathode ray tube recycling. In: Resources, Conservation and Recycling, 26, pp. 143-154
  EcoSpold01Location=GLO
  Uncertainty: data from an US-EPA LCA study
  properties: wet mass 1 kg, dry mass 1 kg
- steel, chromium steel 18/8, hot rolled: 0.15981 kg; source Socolof M. L. 2001; lognormal variance with pedigree 0.0407, pedigree (1,3,5,3,1)
  (same comment as for sheet rolling, steel)
  properties: dry mass 1 kg, carbon content, fossil 0.0008, wet mass 1 kg
  note on carbon content, fossil: Stainless steel model is the grade 304 steel (18/8 stainless, 18% chromium 8% nickel; max. 0.08% C)
- quicklime, milled, loose: 0 kg; source Socolof M. L. 2001; pedigree (1,1,1,1,1)
  Literature Value.
  EcoSpold01Location=CH
  Uncertainty: data from an US-EPA LCA study
  properties: dry mass 0.99 kg, wet mass 1 kg, water content 0.010101
- funnel glass, for cathode ray tube display: 0.25084 kg; source Socolof M. L. 2001; lognormal variance with pedigree 0.0407, pedigree (1,3,5,3,1)
  EcoSpold01Location=GLO
  Literature value, the split is based on Menad (1999).
  Further references:
  Menad N. (1999) Cathode ray tube recycling. In: Resources, Conservation and Recycling, 26, pp. 143-154
  Uncertainty: data from an US-EPA LCA study
  properties: dry mass 1 kg, wet mass 1 kg
- waste wood, untreated: 0 kg; source Socolof M. L. 2001; pedigree (1,1,1,1,1)
  EcoSpold01Location=CH
  Literature Value.
  Uncertainty: data from an US-EPA LCA study
  production volume 0 kg
    (same comment as for wastewater from cathode ray tube production)
  properties: water content 0.25, dry mass 0.8 kg, wet mass 1 kg, heating value, net 13.99 MJ, carbon content, non-fossil 0.48632
  note on carbon content, non-fossil: Tab A.4, ecoinvent v2.2 report 13_I. C content has been referred to 1 kg DM,
- xylene: 0 kg; source Socolof M. L. 2001; pedigree (1,1,1,1,1)
  EcoSpold01Location=RER
  Literature Value.
  Uncertainty: data from an US-EPA LCA study
  properties: heating value, net 38.84 MJ, wet mass 1 kg, carbon content, fossil 0.905061, dry mass 1 kg
- waste, from silicon wafer production, inorganic: -2.6729e-5 kg; source Socolof M. L. 2001; lognormal variance with pedigree 0.0407, pedigree (1,3,5,3,1)
  EcoSpold01Location=CH
  Literature Value.
  Uncertainty: data from an US-EPA LCA study
  production volume 2.6729e-5 kg
    (same comment as for wastewater from cathode ray tube production)
  properties: carbon content, fossil 0.0347572, wet mass 1 kg, dry mass 0.906 kg, water content 0.103753
- hydrogen peroxide, without water, in 50% solution state: 0.000868382, 0.00412232 kg (2 entries); source Socolof M. L. 2001; lognormal variance with pedigree 0.0407, pedigree (1,3,5,3,1)
  EcoSpold01Location=RER
  Literature Value.
  Uncertainty: data from an US-EPA LCA study
- acrylic dispersion, without water, in 65% solution state: 0.000148469, 0.000704801 kg (2 entries); source Socolof M. L. 2001; lognormal variance with pedigree 0.0407, pedigree (1,3,5,3,1)
  Literature Value.
  EcoSpold01Location=RER
  Uncertainty: data from an US-EPA LCA study
- acetone, liquid: 7.87083e-6, 2.17552e-5 kg (2 entries); source Socolof M. L. 2001; lognormal variance with pedigree 0.0407, pedigree (1,3,5,3,1)
  Literature Value.
  EcoSpold01Location=RER
  Uncertainty: data from an US-EPA LCA study
- chlorine, liquid: 0.000627831, 0.00313857 kg (2 entries); source Socolof M. L. 2001; lognormal variance with pedigree 0.0407, pedigree (1,3,5,3,1)
  Literature Value.
  EcoSpold01Location=RER
  Uncertainty: data from an US-EPA LCA study
- hydrochloric acid, without water, in 30% solution state: 0.000749671, 0.00335313 kg (2 entries); source Socolof M. L. 2001; lognormal variance with pedigree 0.0407, pedigree (1,3,5,3,1)
  Literature Value.
  EcoSpold01Location=RER
  Uncertainty: data from an US-EPA LCA study
- waste mineral oil: -6.54168e-5, -1.61946e-6, -0.000171284 kg (3 entries); source Socolof M. L. 2001; lognormal variance with pedigree 0.0407, pedigree (1,3,5,3,1)
  EcoSpold01Location=CH
  Literature Value.
  Uncertainty: data from an US-EPA LCA study
  production volume 0.00023832 kg
- calcium chloride: 0.00265922, 0.00920978 kg (2 entries); source Socolof M. L. 2001; lognormal variance with pedigree 0.0407, pedigree (1,3,5,3,1)
  EcoSpold01Location=RER
  Literature Value.
  Uncertainty: data from an US-EPA LCA study
- sulfuric acid: 0.00133306, 0.0101899 kg (2 entries); source Socolof M. L. 2001; lognormal variance with pedigree 0.0407, pedigree (1,3,5,3,1)
  EcoSpold01Location=RER
  Literature Value.
  Uncertainty: data from an US-EPA LCA study
- waste plastic, mixture: -0.000270774, -2.08751e-5, -8.62216e-6, -8.18755e-6, -0.000312426, -3.48325e-6, -1.57875e-6, -0.00218715 kg (8 entries); source Socolof M. L. 2001; lognormal variance with pedigree 0.0407, pedigree (1,3,5,3,1)
  Literature Value.
  EcoSpold01Location=CH
  Uncertainty: data from an US-EPA LCA study
  production volume 0.0028131 kg
- oxygen, liquid: 0.000152328, 0.000555152 kg (2 entries); source Socolof M. L. 2001; lognormal variance with pedigree 0.0407, pedigree (1,3,5,3,1)
  Literature Value.
  EcoSpold01Location=RER
  Uncertainty: data from an US-EPA LCA study
- electric arc furnace slag: -4.11519e-5, -6.20882e-6, -0.000264039 kg (3 entries); source Socolof M. L. 2001; lognormal variance with pedigree 0.0407, pedigree (1,3,5,3,1)
  EcoSpold01Location=CH
  Literature Value.
  Uncertainty: data from an US-EPA LCA study
  production volume 0.0003114 kg
- nitrogen, liquid: 0.000919864, 0.00335114 kg (2 entries); source Socolof M. L. 2001; lognormal variance with pedigree 0.0407, pedigree (1,3,5,3,1)
  EcoSpold01Location=RER
  Literature Value.
  Uncertainty: data from an US-EPA LCA study
- sodium hypochlorite, without water, in 15% solution state: 1.50421e-6, 7.14069e-6 kg (2 entries); source Socolof M. L. 2001; lognormal variance with pedigree 0.0407, pedigree (1,3,5,3,1)
  Literature Value.
  EcoSpold01Location=RER
  Uncertainty: data from an US-EPA LCA study
- spent solvent mixture: -9.64661e-6, -2.26005e-7, -2.46884e-5 kg (3 entries); source Socolof M. L. 2001; lognormal variance with pedigree 0.0407, pedigree (1,3,5,3,1)
  EcoSpold01Location=CH
  Literature Value.
  Uncertainty: data from an US-EPA LCA study
  production volume 3.4561e-5 kg
- blast furnace sludge: -7.72158e-5, -1.96166e-5, -0.000132017, -0.00086925 kg (4 entries); source Socolof M. L. 2001; lognormal variance with pedigree 0.0407, pedigree (1,3,5,3,1)
  EcoSpold01Location=CH
  Literature Value.
  Uncertainty: data from an US-EPA LCA study
  production volume 0.0010981 kg
- toluene, liquid: 5.27765e-5, 0.000395824 kg (2 entries); source Socolof M. L. 2001; lognormal variance with pedigree 0.0407, pedigree (1,3,5,3,1)
  EcoSpold01Location=RER
  Literature Value.
  Uncertainty: data from an US-EPA LCA study
- ammonia, anhydrous, liquid: 1.78848e-7, 1.19536e-6, 2.78241e-7, 5.40123e-7, 5.51294e-7, 2.53071e-7, 2.08054e-6, 5.66107e-8, 5.98691e-6 kg (9 entries); source Socolof M. L. 2001; lognormal variance with pedigree 0.0407, pedigree (1,3,5,3,1)
  EcoSpold01Location=RER
  Literature Value.
  Uncertainty: data from an US-EPA LCA study
- ammonium carbonate: 0.000147722, 0.000299118 kg (2 entries); source Socolof M. L. 2001; lognormal variance with pedigree 0.0407, pedigree (1,3,5,3,1)
  (same comment as for sodium hydroxide, without water, in 50% solution state)
- quicklime, milled, loose: 7.38938e-5, 0.00884201 kg (2 entries); source Socolof M. L. 2001; lognormal variance with pedigree 0.0407, pedigree (1,3,5,3,1)
  Literature Value.
  EcoSpold01Location=CH
  Uncertainty: data from an US-EPA LCA study
- waste wood, untreated: -4.42573e-5, -3.482e-6, -9.77989e-6, -2.33582e-6, -2.80433e-5, -1.47751e-6, -2.54574e-7, -0.00037205 kg (8 entries); source Socolof M. L. 2001; lognormal variance with pedigree 0.0407, pedigree (1,3,5,3,1)
  EcoSpold01Location=CH
  Literature Value.
  Uncertainty: data from an US-EPA LCA study
  production volume 0.00046168 kg
- xylene: 6.86038e-6, 3.79996e-5 kg (2 entries); source Socolof M. L. 2001; lognormal variance with pedigree 0.0407, pedigree (1,3,5,3,1)
  EcoSpold01Location=RER
  Literature Value.
  Uncertainty: data from an US-EPA LCA study

## Inputs from nature
- Water, unspecified natural origin [natural resource, in water]: 0.05541 m3; name water_UNO_input; lognormal variance with pedigree 0.0407, pedigree (1,3,5,3,1)
  Calculated Value, from the amount of waste water assuming 90% of the water leaving the production site as waste water.
  Uncertainty: data from an US-EPA LCA study

## Emissions to nature
- Iron, ion [water, surface water]: 1.5421e-5 kg; source Socolof M. L. 2001; lognormal variance with pedigree 0.6907, pedigree (1,3,5,3,1)
  Literature Value.
  Uncertainty: data from an US-EPA LCA study
- Cyanide [water, surface water]: 5.6636e-8 kg; source Socolof M. L. 2001; lognormal variance with pedigree 0.0807, pedigree (1,3,5,3,1)
  Literature Value.
  Uncertainty: data from an US-EPA LCA study
- NMVOC, non-methane volatile organic compounds, unspecified origin [air, urban air close to ground]: 1.486e-5 kg; source Socolof M. L. 2001; lognormal variance with pedigree 0.1607, pedigree (1,3,5,3,1)
  Literature Value.
  Uncertainty: data from an US-EPA LCA study
- Molybdenum [water, surface water]: 1.1215e-8 kg; source Socolof M. L. 2001; lognormal variance with pedigree 0.6907, pedigree (1,3,5,3,1)
  Literature Value.
  Uncertainty: data from an US-EPA LCA study
- DOC, Dissolved Organic Carbon [water, surface water]: 0.000249915 kg; lognormal variance with pedigree 0.0807, pedigree (1,3,5,3,1)
  Calculated Value, as equal to TOC.
  Uncertainty: data from an US-EPA LCA study
- Carbon monoxide, fossil [air, urban air close to ground]: 0.0015888 kg; source Socolof M. L. 2001; lognormal variance with pedigree 0.1607, pedigree (1,3,5,3,1)
  Literature Value.
  Uncertainty: data from an US-EPA LCA study
- Manganese [water, surface water]: 3.3645e-7 kg; source Socolof M. L. 2001; lognormal variance with pedigree 0.6907, pedigree (1,3,5,3,1)
  Literature Value.
  Uncertainty: data from an US-EPA LCA study
- Phosphate [water, surface water]: 7.5655e-8 kg; source Socolof M. L. 2001; lognormal variance with pedigree 0.0807, pedigree (1,3,5,3,1)
  Literature Value.
  Uncertainty: data from an US-EPA LCA study
- Nitrogen oxides [air, urban air close to ground]: 0.0002028 kg; source Socolof M. L. 2001; lognormal variance with pedigree 0.0707, pedigree (1,3,5,3,1)
  Literature Value.
  Uncertainty: data from an US-EPA LCA study
- TOC, Total Organic Carbon [water, surface water]: 0.000249915 kg; lognormal variance with pedigree 0.0807, pedigree (1,3,5,3,1)
  Calculated Value, by default as TOC (gC) = COD/2.7 (COD measured in g O2). Should more correctly be calculated from the carbon content of the specified emissions to water.
  Uncertainty: data from an US-EPA LCA study
- Dimethylamine [air, urban air close to ground]: 3.2617e-6 kg; source Socolof M. L. 2001; lognormal variance with pedigree 0.1607, pedigree (1,3,5,3,1)
  Literature Value.
  Uncertainty: data from an US-EPA LCA study
- Zinc, ion [water, surface water]: 1.2991e-6 kg; source Socolof M. L. 2001; lognormal variance with pedigree 0.6907, pedigree (1,3,5,3,1)
  Literature Value.
  Uncertainty: data from an US-EPA LCA study
- Water [air, unspecified]: 0.00338001 m3; name water_to_air_unspecified; = (water_UNO_input*fraction_PW_to_air); lognormal variance with pedigree 0.0807, pedigree (2,2,5,1,1)
  Calculated value based on literature values and expert opinion. See comments in the parametres' comment field.
  property fraction, origin: unspecified 1; name fraction_origin_unspecified
  property fraction, origin: salt water 0; name fraction_origin_salt_water
  property fraction, origin: fresh water 0; name fraction_origin_fresh_water
- Fluoride [water, surface water]: 0.00032243 kg; source Socolof M. L. 2001; lognormal variance with pedigree 0.0807, pedigree (1,3,5,3,1)
  Literature Value.
  Uncertainty: data from an US-EPA LCA study
- Nickel, ion [water, surface water]: 7.4112e-6 kg; source Socolof M. L. 2001; lognormal variance with pedigree 0.6907, pedigree (1,3,5,3,1)
  Literature Value.
  Uncertainty: data from an US-EPA LCA study
- Phosphorus [water, surface water]: 4.7196e-6 kg; source Socolof M. L. 2001; lognormal variance with pedigree 0.0807, pedigree (1,3,5,3,1)
  Literature Value.
  Uncertainty: data from an US-EPA LCA study
- BOD5, Biological Oxygen Demand [water, surface water]: 0.0005972 kg; source Socolof M. L. 2001; lognormal variance with pedigree 0.0807, pedigree (1,3,5,3,1)
  Literature Value.
  Uncertainty: data from an US-EPA LCA study
- Suspended solids, unspecified [water, surface water]: 0.00043271 kg; source Socolof M. L. 2001; lognormal variance with pedigree 0.0807, pedigree (1,3,5,3,1)
  Literature Value.
  Uncertainty: data from an US-EPA LCA study
- Copper, ion [water, surface water]: 1.6822e-7 kg; source Socolof M. L. 2001; lognormal variance with pedigree 0.6907, pedigree (1,3,5,3,1)
  Literature Value.
  Uncertainty: data from an US-EPA LCA study
- Water [water, unspecified]: 0.0471141 m3; name water_to_water_unspecified; = water_UNO_input*(1-fraction_PW_to_air)-(wastewater_output*-1); lognormal variance with pedigree 0.0807, pedigree (2,2,5,1,1)
  (same comment as for Water)
  property carbon content, fossil 0; name C_content_fossil
  property carbon content, non-fossil 0; name C_content_non_fossil
  property wet mass 1000 kg; name WM
  property fraction, origin: fresh water 0; name fraction_origin_fresh_water_Ww
  property water in wet mass 1000 kg; name WWM
  property fraction, origin: unspecified 1; name fraction_origin_unspecified_Ww
  property fraction, origin: salt water 0; name fraction_origin_salt_water_Ww
  property dry mass 0 kg; name DM
- Toluene [air, urban air close to ground]: 0.00035888 kg; source Socolof M. L. 2001; lognormal variance with pedigree 0.1607, pedigree (1,3,5,3,1)
  Literature Value.
  Uncertainty: data from an US-EPA LCA study
- Xylene [air, urban air close to ground]: 3.5888e-5 kg; source Socolof M. L. 2001; lognormal variance with pedigree 0.1607, pedigree (1,3,5,3,1)
  Literature Value.
  Uncertainty: data from an US-EPA LCA study
- Lead [water, surface water]: 2.8131e-7 kg; source Socolof M. L. 2001; lognormal variance with pedigree 0.6907, pedigree (1,3,5,3,1)
  Literature Value.
  Uncertainty: data from an US-EPA LCA study
- Oils, unspecified [water, surface water]: 2.2523e-5 kg; source Socolof M. L. 2001; lognormal variance with pedigree 0.3407, pedigree (1,3,5,3,1)
  Literature Value.
  Uncertainty: data from an US-EPA LCA study
- Chromium, ion [water, surface water]: 9.5327e-7 kg; source Socolof M. L. 2001; lognormal variance with pedigree 0.6907, pedigree (1,3,5,3,1)
  Literature Value.
  Uncertainty: data from an US-EPA LCA study
- Nitrogen [water, surface water]: 0.00067103 kg; source Socolof M. L. 2001; lognormal variance with pedigree 0.0807, pedigree (1,3,5,3,1)
  Literature Value.
  Uncertainty: data from an US-EPA LCA study
- Sulfur dioxide [air, urban air close to ground]: 0.00093084 kg; source Socolof M. L. 2001; lognormal variance with pedigree 0.0807, pedigree (1,3,5,3,1)
  Literature Value.
  Uncertainty: data from an US-EPA LCA study
- COD, Chemical Oxygen Demand [water, surface water]: 0.00067477 kg; source Socolof M. L. 2001; lognormal variance with pedigree 0.0807, pedigree (1,3,5,3,1)
  Literature Value.
  Uncertainty: data from an US-EPA LCA study

## Sampling procedure
literature

## Extrapolations
This dataset has been extrapolated from year 2001 to the year of the calculation (2021). The uncertainty has been adjusted accordingly.

## Review by Jürgen Sutter 2007-11-08
passed.
