# bark chips, wet, measured as dry mass to generic market for residual hardwood, wet

Dataset: EcoSpold 2, unit process
Geography: Europe without Switzerland
Time period: 2014-01-01 to 2021-12-31
Technology level: current
Classification: ISIC rev.4 ecoinvent: 1610:Sawmilling and planing of wood
Scenario: Business-as-Usual
System model: Allocation, cut-off by classification
Generated by: Nora Minas
Database: ecoinvent
isCopyrightProtected: true
accessRestrictedTo: 1

## General comment
This activity is linking the more specific market for bark chips, to the more generic market for residual hardwood, wet; and residual softwood, wet.It makes accesible the specific product bark chips through the more generic products of wet residual wood.
[This dataset is meant to replace the following datasets:
- bark chips, wet, measured as dry mass to generic market for residual hardwood, wet, RER, 2014 - 2014]

## Included activities start
Entry of the specific product "bark chips, wet, measured as dry mass"

## Included activities end
Delivery of the generic products "residual hardwood, wet" and "residual softwood, wet"

## Reference product
- residual hardwood, wet: 1 m3; name residual_hardwood_wet; CPC 39283: Non-agglomerated wood waste and scrap; By-product classification allocatable product
  production volume 1.30615e6 m3; = 8.49E+09*0.1/ residual_hardwood_wet_DM
    8.49E+09 kg is the rough Production Volumes of bark chips produced out of debarking and other dedicated activities in Europe withou Switzerland. It is considered that 10% of this volume is consumed as the more generic product "residual hardwood, wet", and 10% as "residual softwood, wet". The Dry Mass of those products is used to calculate the Production Volumes in m3.
  property price 41.8 EUR2005; name residual_hardwood_wet_price_EUR2005
    Temporary price data. Calculated as 90% of purchasers price based on: 2004 World Export prices from FaoStat http://faostat.fao.org/site/626/DesktopDefault.aspx?PageID=626#ancor downloaded 29 April 2009; calculated as export value divided by export volume. Commodity: 'wood residues'.
  property dry mass 650 kg; name residual_hardwood_wet_DM
  property heating value, net 8612.79 MJ
    LHV is calculated based on the Carbon content of the product. More details can be found on the respective documentation.The property is based on a value of 7.79MJ/kg
  property carbon content 0.494
    carbon content on a dry matter basis (reserved; not for manual entry)
  property true value 20.9; name residual_hardwood_wet_true_value
    allocation property applied in "true value" allocation // value calculated from revenue
  properties: water in wet mass 455 kg, wet mass 1105 kg, carbon content, fossil 0, water content 0.7, carbon content, non-fossil 0.494, carbon allocation 321.1 kg

## By-products
- residual softwood, wet: 0 m3; name residual_softwood_wet; CPC 39283: Non-agglomerated wood waste and scrap; By-product classification allocatable product
  production volume 1.88667e6 m3; = 8.49E+09*0.1/ residual_softwood_wet_DM
    8.49E+09 kg is the rough Production Volumes of bark chips produced out of debarking and other dedicated activities in Europe withput Switzerland. It is considered that 10% of this volume is consumed as the more generic product "residual hardwood, wet", and 10% as "residual softwood, wet". The Dry Mass of those products is used to calculate the Production Volumes in m3.
  property price 19.5 EUR2005; name residual_softwood_wet_price_EUR2005
    Data on Import/Export (USD/kg) from UN data has been used. (http://data.un.org/Data.aspx?d=ComTrade&f=_l1Code%3a45, [accessed 10th June 2010]) Commodity: 'Sawdust, wood waste or scrap'. A density of 250 kg/m3 was used to convert from M3 to kg (data on density: http://wiki.answers.com/Q/What_is_the_density_of_sawdust, [Accessed 13 June 2010]).
  property wet mass 765 kg; name residual_softwood_wet_WM
  property dry mass 450 kg; name residual_softwood_wet_DM
  property heating value, net 5962.7 MJ
    (same comment as for residual hardwood, wet)
  property carbon content 0.494
    carbon content on a dry matter basis (reserved; not for manual entry)
  property true value 9.75; name residual_softwood_wet_true_value
    allocation property applied in "true value" allocation // value calculated from revenue
  properties: water in wet mass 315 kg, water content 0.7, carbon content, fossil 0, carbon content, non-fossil 0.494, carbon allocation 222.3 kg

## Inputs from technosphere
- bark chips, wet, measured as dry mass: 750.082 kg; = (residual_softwood_wet_DM* residual_softwood_wet)+ (residual_hardwood_wet_DM* residual_hardwood_wet)
  Calculated using the Dry Mass of the reference product and the by-product. It has been considered that this product feeds the generic markets for "residual hardwood, wet" and "residual softwood, wet" in a 50%:50% share.
  properties: heating value, net 4.81 MJ, dry mass 1 kg, water content 1.4, wet mass 2.4 kg, carbon content, non-fossil 0.494
