# heat production, natural gas, at industrial furnace low-NOx >100kW

Dataset: EcoSpold 2, unit process
Geography: CA-QC
Time period: 1990-01-01 to 2021-12-31
Technology level: current
Classification: ISIC rev.4 ecoinvent: 3530:Steam and air conditioning supply
Classification: EcoSpold01Categories: natural gas/heating systems
Tags: Recontextualization
Scenario: Business-as-Usual
System model: Allocation, cut-off by classification
Generated by: Pablo Tirado
Published in: Faist Emmenegger, M. 2007
Database: ecoinvent
isCopyrightProtected: true
accessRestrictedTo: 1

## General comment
This dataset represents the production of heat from natural gas, at industrial furnace low-NOx>100kW in Quebec.This is an adaptation for Quebec from the corresponding global dataset. Only time period, annual production volume and heating value have been modified. Uncertainties have been adjusted accordingly.

## Included activities start
Activity starts with the combustion of the fuel.

## Included activities end
This activity ends with 1MJ of heat produced by the furnace.
This dataset also includes:

- Emissions due to combustion of fuel
-inputs needed for combustion (electricity)
-by-products of combustion
-infrastructures

## Geography
Quebec dataset based on Global dataset, which was itself based on an adaptation of an european dataset. Emission data extrapolated from Switzerland to Europe (RER). Uncertainty has been modified accordingly

## Technology
Technology available in mid 1990s. Uncertainty has been modified accordingly

## Time period
Old emission values (from early 1990s. It is considered valid until 2015. Uncertainty has been modified accordingly.

## Parameters
- annual fuel consumption in m3: 6.2105e8 m3; name annualFuelConsumptionm3; = (2.51E+09-2.58E+07)/4; lognormal variance with pedigree 0.0012, pedigree (2,1,1,1,1)
  Data on fuel consumption of industrial sectors provided by the MDDEP (Quebec Ministry of Sustainable Development, Environment, Wildlife and Parks).
  Average of the period 2005-2009
  Heat provided by cogen units contributing to the market has been substracted (2.58E+07 MJ)
  The total has been split equally for the four natural gas technologies.
  Uncertainty: Variance from default value table.
  DQP based on the quality of the data (primary data from Quebec gouvernment)

## Reference product
- heat, district or industrial, natural gas: 1 MJ; CPC 17300: Steam and hot water; By-product classification allocatable product
  EcoSpold01Location=RER
  production volume 2.02897e10 MJ; = annualFuelConsumptionm3/ natGasIn
    Literature/­calculated value. Annual fuel consumption (from Quebec statistics) divided by the amount of fuel needed to produce 1MJ (this amounts includes the efficiency of the process)
  property price 0.0106 EUR2005
    Average European district heat price from Ecoheatcool and Euroheat 2005-2006, Ecoheat Work package 1: The European heat market. Final report. 10.6 EUR/GJ i s the price of district heat. http://www.solarthermalworld.org/files/Ecoheatcool%20WP1%20Web.pdf?download
  property Corresponding fuel use 1.11111 MJ
    This property represents the inverse of the efficiency of the boiler. It is calculated by dividing the lower heating value of the fuel input by the heat/electricity output.
  properties: heating value, net 1 MJ

## Inputs from technosphere
- industrial furnace, natural gas: 3.11111e-9 unit; source Faist Emmenegger, M. 2007; lognormal variance with pedigree 0.09, pedigree (1,1,5,5,3)
  EcoSpold01Location=RER
  uncertainty of life time and extrapolation to range of capacity
  Uncertainty: Completeness, temporal, geographical and technological indicators adapted considering differences with original dataset.
- electricity, low voltage: 0.00463333 kWh; source Faist Emmenegger, M. 2007; lognormal variance with pedigree 0.17, pedigree (1,1,5,5,3)
  range of electricity for pumps etc., old information
  EcoSpold01Location=UCTE
  Uncertainty: Completeness, temporal, geographical and technological indicators adapted considering differences with original dataset.
- natural gas, high pressure: 0.0306091 m3; name natGasIn; source Faist Emmenegger, M. 2007; lognormal variance with pedigree 0.05, pedigree (1,1,5,5,3)
  EcoSpold01Location=RER
  Uncertainty: Completeness, temporal, geographical and technological indicators adapted considering differences with original dataset.
  properties: heating value, net 36.3 MJ, wet mass 0.84 kg, carbon content, fossil 0.602381, heating value, gross 39 MJ, dry mass 0.84 kg
  note on heating value, net: Literature value, Source: United Nations Statistics Division (2018) International Recommendations for Energy Statistics (IRES). Available at: http://unstats.un.org/unsd/statcom/doc11/BG-IRES.pdf.
  note on carbon content, fossil: An average C content of 0.506 kg C/ m3 has been assumed (this average has been calculated using data in Tab 3.5, ecoinvent v2.2 report 6_V

## Emissions to nature
All rows: source Faist Emmenegger, M. 2007
- Carbon dioxide, fossil [air, urban air close to ground]: 0.0622222 kg; lognormal variance with pedigree 0.05, pedigree (1,1,5,5,3)
  composition of natural gas
  Uncertainty: Completeness, temporal, geographical and technological indicators adapted considering differences with original dataset.
- Mercury [air, urban air close to ground]: 3.33333e-11 kg; lognormal variance with pedigree 0.7, pedigree (1,1,5,5,3)
  trace element in natural gas
  Uncertainty: Completeness, temporal, geographical and technological indicators adapted considering differences with original dataset.
- Benzene [air, urban air close to ground]: 4.44444e-7 kg; lognormal variance with pedigree 1.13, pedigree (1,1,5,5,3)
  rough estimate, high uncertainty
  Uncertainty: Completeness, temporal, geographical and technological indicators adapted considering differences with original dataset.
- Benzo(a)pyrene [air, urban air close to ground]: 1.11111e-11 kg; lognormal variance with pedigree 1.13, pedigree (1,1,5,5,3)
  (same comment as for Benzene)
- Propionic acid [air, urban air close to ground]: 2.22222e-8 kg; lognormal variance with pedigree 1.13, pedigree (1,1,5,5,3)
  (same comment as for Benzene)
- Formaldehyde [air, urban air close to ground]: 1.11111e-7 kg; lognormal variance with pedigree 1.13, pedigree (1,1,5,5,3)
  (same comment as for Benzene)
- Dinitrogen monoxide [air, urban air close to ground]: 1.11111e-7 kg; lognormal variance with pedigree 1.13, pedigree (1,1,5,5,3)
  (same comment as for Benzene)
- PAH, polycyclic aromatic hydrocarbons [air, urban air close to ground]: 1.11111e-8 kg; lognormal variance with pedigree 1.13, pedigree (1,1,5,5,3)
  (same comment as for Benzene)
- Acetaldehyde [air, urban air close to ground]: 1.11111e-9 kg; lognormal variance with pedigree 1.13, pedigree (1,1,5,5,3)
  (same comment as for Benzene)
- Butane [air, urban air close to ground]: 7.77778e-7 kg; lognormal variance with pedigree 1.13, pedigree (1,1,5,5,3)
  (same comment as for Benzene)
- Methane, fossil [air, urban air close to ground]: 2.22222e-6 kg; lognormal variance with pedigree 1.13, pedigree (1,1,5,5,3)
  (same comment as for Benzene)
- Nitrogen oxides [air, urban air close to ground]: 2.55556e-5 kg; lognormal variance with pedigree 0.35, pedigree (1,1,5,5,3)
  old data
  Uncertainty: Completeness, temporal, geographical and technological indicators adapted considering differences with original dataset.
- Particulates, < 2.5 um [air, urban air close to ground]: 1.11111e-7 kg; lognormal variance with pedigree 0.17, pedigree (1,1,5,5,3)
  literature
  Uncertainty: Completeness, temporal, geographical and technological indicators adapted considering differences with original dataset.
- Pentane [air, urban air close to ground]: 1.33333e-6 kg; lognormal variance with pedigree 1.13, pedigree (1,1,5,5,3)
  (same comment as for Benzene)
- Dioxins, measured as 2,3,7,8-tetrachlorodibenzo-p-dioxin [air, urban air close to ground]: 0 kg; pedigree (1,1,1,1,1)
  (same comment as for Benzene)
- Propane [air, urban air close to ground]: 2.22222e-7 kg; lognormal variance with pedigree 1.13, pedigree (1,1,5,5,3)
  (same comment as for Benzene)
- Toluene [air, urban air close to ground]: 2.22222e-7 kg; lognormal variance with pedigree 1.13, pedigree (1,1,5,5,3)
  (same comment as for Benzene)
- Sulfur dioxide [air, urban air close to ground]: 6.11111e-7 kg; lognormal variance with pedigree 0.05, pedigree (1,1,5,5,3)
  (same comment as for Carbon dioxide, fossil)
- Carbon monoxide, fossil [air, urban air close to ground]: 1.55556e-5 kg; lognormal variance with pedigree 0.7, pedigree (1,1,5,5,3)
  (same comment as for Nitrogen oxides)
- Acetic acid [air, urban air close to ground]: 1.66667e-7 kg; lognormal variance with pedigree 1.13, pedigree (1,1,5,5,3)
  (same comment as for Benzene)

## Sampling procedure
Literature

## Extrapolations
This dataset has been extrapolated from year 2015 to the year of the calculation (2021). The uncertainty has been adjusted accordingly.

## Review by Christian Bauer 2013-10-11
passed
