# chicken production

Dataset: EcoSpold 2, unit process
Geography: GLO
Time period: 1994-01-01 to 2021-12-31
Technology level: current
Classification: ISIC rev.4 ecoinvent: 0146:Raising of poultry
Scenario: Business-as-Usual
System model: Allocation, cut-off by classification
Generated by: Sofia Parada Tur
Database: ecoinvent
isCopyrightProtected: true
accessRestrictedTo: 1

## General comment
This dataset is a rough estimation for describing the production of a broiler chicken for meat production. The lifetime of a broiler is assumed 6 weeks before it is brought to the slaughter and its average weight is 2.35 kg. The inventory includes process emissions. It is recommended to revise this dataset as soon as possible.

## Included activities start
The activity starts with the arrival of the chick in the shed.

## Included activities end
The activity ends with the end of the chicken's life in the shed for its slaughter.

## Technology
based on available literature on raising of poultry.

## Time period
date of publication of main literature sources

## Parameters
- fraction, process water, to air: 0.15 dimensionless; name fraction_PW_to_air; lognormal variance with pedigree 0.092025, pedigree (4,4,3,2,4)
  Literature value. In case when no industry/process specific data are available, default evaporation fraction value is used. This value is 15% and is based on literature (Statistics Canada, 2007 & Shaffer, K.H., 2008, Consumptive water use in the Great Lakes Basin, USGS & Shiklomanov, 2003, World Water Resources at the Beginning of the 21st Century) and has been approved by an expert.

## Reference product
- chicken for slaughtering, live weight: 1 kg; name chicken_RP; CPC 02151: Chickens; By-product classification allocatable product
  production volume 7.02e10 kg; name chicken_PV
    based on FAO statistics for world production of chicken meat in 2005, namley 7.02E7 tonnes.
  property price 1.44 EUR2005; name chicken_RP_price_EUR2005
    Calculated based on literature value (indexmundi.com, accessed 20121214) for year 2005.
  property carbon content, non-fossil 0.4375
    C content in live meat was considered 43.75% (DM basis). Data from Weidema B.P., Wesnaes M., Hermansen J., Kristensen T., Halberg N. (2007a). Environmental Improvement Potentials of Meat and Dairy Products. Report to the European Commission, Institute for Prospective Technological Studies. In press.
  property dry mass 0.34 kg; name chicken_RP_DM
  property carbon content 0.4375
    carbon content on a dry matter basis (reserved; not for manual entry)
  properties: water content 1.94118, water in wet mass 0.66 kg, carbon content, fossil 0, wet mass 1 kg, carbon allocation 0.14875 kg

## By-products
- poultry manure, fresh: 0 kg; source Tao, Jing 2008; By-product classification Recyclable; CPC 34654: Excreta of animals useful for manure/fertilizer and fuel preparation; pedigree (1,1,1,1,1)
  The production of manure is calculated with the dry mass mass balance. For a broiler of body weight 2,355kg, the feed intake is 4,074 kg in DM. (FAO, 2010. URL:(http://www.fao.org/docrep/012/al175e/al175e.pdf). The broiler meat has a dry mass of 0.34 (http://www.fsis.usda.gov/Factsheets/Water_in_Meats/index.asp). The poultry manure has a dry mass of 0.38 (calculated based on dataset "treatment of poultry manure, fresh")
  production volume 0 kg; = chicken_PV* manure_BP
    Calculated from production volume of reference product using the relative outputs.
  property price 0.088 EUR2005; name manure_BP_price_EUR2005
    Temporary price data. Calculated as 90% of purchasers price based on: Calculated from price of dried poultry manure, assuming 50% of costs are fertiliser value and dividing by the mass relationshps between input and output of the drying activity (2.266 kg in per kg out)
  property carbon content, non-fossil 0.33389
    Composition data obtained from Poultry manure dried, in (http://beefmagazine.com/images/2009%20feed%20table.pdf). First, composition data were refered to 1 kg dry mass. Then, C-contents were calculated considering a C-content/dry mass of 46% in carbohydrates (including fibres), 53% in proteins and 75% in fats. All data from "Evolutionary and Biochemical Aspects", A.D. Kay and T. Vrede (in Global Ecology, 2010, Elsevier B.V., S.E. Jørgensen Ed.).
  property dry mass 0.38 kg; name manure_BP_DM
  property carbon content 0.33389
    carbon content on a dry matter basis (reserved; not for manual entry)
  properties: water content 1.63158, wet mass 1 kg, carbon content, fossil 0, water in wet mass 0.62 kg, carbon allocation 0.126878 kg

## Inputs from technosphere
- heat, district or industrial, other than natural gas: 0.308325 MJ; = 0.6/1.946* chicken_RP; source Halberg, N. 2003; lognormal variance with pedigree 0.0446, pedigree (1,4,5,5,1)
  for 1 broiler of 1.946 kg, the electricity input is 1.04 KWh and 0.6 MJ of heat (danish data, 2000)
  properties: heating value, net 1 MJ
- energy feed, gross: 0 MJ; source Kratzer et al. 1994; pedigree (1,1,1,1,1)
  based on cumulative feed intake for a broiler after 6 weeks, and body weight of 2,355kg, namely 4,074 kg (FAO, 2010. URL:(http://www.fao.org/docrep/012/al175e/al175e.pdf)
  The gross energy is calculated based on the metabolisable energy requirements (in MJ/kg) for broilers, namely 3200 kcal/kg broiler for standard diets. (Nutrient Requirements of Poultry: Ninth Revised Edition, NATIONAL ACADEMY PRESS, Washington, 1994). The gross energy conversion is calculated with the average of wheat and barley gross energy-metabolisable energy ratio for broilers. This is 1.48 (Scott, TA, 1997)(http://ps.fass.org/content/77/3/449.full.pdf)
  properties: wet mass 1 kg, dry mass 1 kg
- electricity, high voltage: 0.53443 kWh; = 1.04/1.946* chicken_RP; source Halberg, N. 2003; lognormal variance with pedigree 0.0446, pedigree (1,4,5,5,1)
  (same comment as for heat, district or industrial, other than natural gas)
- shed: 5.27426e-8 m2; = 1/(0.79*50*60000*8); source Van Horne, PLM 2008; lognormal variance with pedigree 0.2092, pedigree (5,5,5,4,5)
  The required amount of infrastructure (RA) is calculated as:
  RA (unit/kg reference product) = output units of reference product (kg) / (utilisation rate * lifetime capacity)
  The utilisation rate is the rate between the actual use and the theoretical use of the shade.The max, under certain conditions stockage density for broilers is stated to be 42 kg/m2 (FAO, 2008 http://www.fao.org/AG/againfo/home/events/bangkok2007/docs/part2/2_5.pdf). It is assumed this is the max. value for space use. In the EU the regulation allows up to 33 kg/m2 under normal conditions (FAO, 2008. http://www.fao.org/AG/againfo/home/events/bangkok2007/docs/part2/2_5.pdf) . We assume this is the average utilisation of the space. The utilisation rate is then calculated as 0.79.
  The lifetime capacity is calculated with the lifetime of the shed (50 years) and the and the yearly capacity of the shed. LIterature review gives an average of 30,000 at the shed at one given time and the space given is 33 kg/m2. This makes 60,000 kg per unit during the lifetime of the chickens, which is 6 weeks. This makes 8 6-week periods in 1 year. The capacity is then calculated as 60,000*8.
- protein feed, 100% crude: 0.351924 kg; = 4.074*(20.3/100)/2.35 * chicken_RP; source Kratzer et al. 1994; lognormal variance with pedigree 0.050625, pedigree (3,5,5,2,1)
  based on cumulative feed intake for a broiler after 6 weeks, and body weight 2.35 kg, namely 4074 gr (FAO, 2010. URL:(http://www.fao.org/docrep/012/al175e/al175e.pdf)
  The crude protein (in % kg/kg feed) is based on the average crude protein needs of broilers during the starting, growth and finishing phases, namely 20.3% (Nutrient Requirements of Poultry: Ninth Revised Edition, NATIONAL ACADEMY PRESS, Washington, 1994)
  properties: carbon content, non-fossil 0.53, wet mass 1 kg, dry mass 1 kg
  note on carbon content, non-fossil: considered pure protein (ecoinvent v2.2 report 17, pg 288). C-content in protein is estimated to be 53% ( from "Evolutionary and Biochemical Aspects", A.D. Kay and T. Vrede (in Global Ecology, 2010, Elsevier B.V., S.E. Jørgensen Ed.).
- poultry manure, fresh: -1.93057 kg; source Tao, Jing 2008; lognormal variance with pedigree 0.0506, pedigree (3,5,5,1,1)
  (same comment as for poultry manure, fresh)
  production volume 1.35526e11 kg
  properties: water content 1.63158, wet mass 1 kg, carbon content, non-fossil 0.33389
  note on carbon content, non-fossil: Composition data obtained from Poultry manure dried, in (http://beefmagazine.com/images/2009%20feed%20table.pdf). First, composition data were refered to 1 kg dry mass. Then, C-contents were calculated considering a C-content/dry mass of 46% in carbohydrates (including fibres), 53% in proteins and 75% in fats. All data from "Evolutionary and Biochemical Aspects", A.D. Kay and T. Vrede (in Global Ecology, 2010, Elsevier B.V., S.E. Jørgensen Ed.).
- energy feed, gross: 0.131462, 34.2439 MJ (2 entries); source Kratzer et al. 1994; lognormal variance with pedigree 0.050625, pedigree (3,5,5,2,1)
  (same comment as for energy feed, gross)

## Inputs from nature
- Water, unspecified natural origin [natural resource, in water]: 0.00518 m3; name water_UNO_input; source Kratzer et al. 1994; lognormal variance with pedigree 0.050625, pedigree (3,5,5,2,1)
  based on cumulated water consumption of a broiler from week 1 to week 6, namely 5180 ml.

## Emissions to nature
- Water [air, unspecified]: 0.000777 m3; name water_to_air_unspecified; lognormal variance with pedigree 0.0492, pedigree (2,5,5,1,1)
  calculated with water balance. The water that does not leave the system as chicken meat and as poultry manure, is assumed to be evaporated.
  property fraction, origin: fresh water 0; name fraction_origin_fresh_water
  property fraction, origin: unspecified 1; name fraction_origin_unspecified
  property fraction, origin: salt water 0; name fraction_origin_salt_water
- Water [water, unspecified]: 0.004403 m3; name water_to_water_unspecified; = water_UNO_input*(1-fraction_PW_to_air); lognormal variance with pedigree 0.130025, pedigree (4,4,5,2,4)
  Calculated value based on literature values and expert opinion. See comments in the parametres' comment field.
  property fraction, origin: unspecified 1; name fraction_origin_unspecified_Ww
  property fraction, origin: salt water 0; name fraction_origin_salt_water_Ww
  property fraction, origin: fresh water 0; name fraction_origin_fresh_water_Ww
- Methane, non-fossil [air, non-urban air or from high stacks]: 0.000570401 kg; = (1.11/1000)/1.946* chicken_RP; source Halberg, N. 2003; lognormal variance with pedigree 0.0446, pedigree (1,4,5,5,1)
  for 1 broiler of 1.946 kg, the methane emissions are 1.11gr.
- Dinitrogen monoxide [air, non-urban air or from high stacks]: 0.00108428 kg; = (2.11/1000)/1.946* chicken_RP; source Halberg, N. 2003; lognormal variance with pedigree 0.0446, pedigree (1,4,5,5,1)
  for 1 broiler of 1.946 kg, the N2O emissions are 2.11gr.
- Nitrate [water, surface water]: 0.0412744 kg; = (80.32/1000)/1.946* chicken_RP; source Halberg, N. 2003; lognormal variance with pedigree 0.084, pedigree (1,4,5,5,1)
  producing 1 broiler of 1.946 kg emits 80.32gr nitrate into water
- Ammonia [air, non-urban air or from high stacks]: 0.0146454 kg; = (28.50/1000)/1.946* chicken_RP; source Halberg, N. 2003; lognormal variance with pedigree 0.0446, pedigree (1,4,5,5,1)
  for 1 broiler of 1.946 kg, the ammonia emissions are 28.50gr.
- Phosphate [water, surface water]: 0.000226105 kg; = (0.44/1000)/1.946* chicken_RP; source Halberg, N. 2003; lognormal variance with pedigree 0.084, pedigree (1,4,5,5,1)
  producing 1 broiler of 1.946 kg emits 0.44 gr. phosphate into water

## Sampling procedure
this inventory is based on literature review

## Extrapolations
This dataset has been extrapolated from year 2008 to the year of the calculation (2021). The uncertainty has been adjusted accordingly.

## Review by Bo Weidema 2012-04-11
This is a rather crude dataset, but the main inputs and outputs are included and balanced. For a furture update, the BREF document <http://eippcb.jrc.es/reference/BREF/irpp_bref_0703.pdf> may be of interest.
