# hard coal, import from Indonesia

Dataset: EcoSpold 2, unit process
Geography: IN
Time period: 2010-01-01 to 2021-01-01
Technology level: current
Classification: EcoSpold01Categories: hard coal/production
Classification: ISIC rev.4 ecoinvent: 0510:Mining of hard coal
Scenario: Business-as-Usual
System model: Allocation, cut-off by classification
Share of production covered: 100 %
Generated by: P V Kiran Ananth
Published in: P V Kiran Ananth 2017
Database: ecoinvent
isCopyrightProtected: true
accessRestrictedTo: 1

## General comment
This activity represents import of hard coal from Indonesia. India imports coal from many countries in the world to meet its growing energy demands. As per the provisional coal statistics 2015-16, Ministry of coal. India imported 199.884 million tones of coal in the year 2015-16. The countries from where coal was mainly imported were Indonesia , Australia and south Africa. Out of the overall import , Indonesia contributed to around 48.12 % , Australia contributed to around 23.79 % and South Africa contributed around 18.05 %.

## Included activities start
The activity starts with 1 ton coal at Indonesian ports ready to be exported to India

## Included activities end
This module includes the transport of the coal from Indonesia to ports in India

## Geography
Imported coal from indonesia to various ports in India

## Technology
Not specified

## Reference product
- hard coal: 1 kg; CPC 11010: Hard coal; By-product classification allocatable product
  EcoSpold01Location=CPA
  production volume 9.1261e10 kg
    Literature Data: The data is taken from provisional coal statistics for the year 2016-17 which is published by Goverment of India , Ministry of coal and Coal Controller of India - Kolkata. The link for the document is given http://www.coalcontroller.gov.in/pages/view/44-provisional-coal-statistics
  property price 0.036 EUR2005
    Steam coal import costs in EU in IEA key world energy statistics 2003-2004.
  property carbon content, fossil 0.845
    C content 75-94% (specified in Tab 1.1, report 6, part VI). A mean content of 0.845 kg C/ kg dry hard coal was considered
  property heating value, net 27.91 MJ
    Based on the Characterization factor of Hard coal in the CED method
  property carbon content 0.845
    carbon content on a dry matter basis (reserved; not for manual entry)
  properties: dry mass 0.94 kg, carbon content, non-fossil 0, water content 0.0638298, wet mass 1 kg, water in wet mass 0.06 kg, carbon allocation 0.7943 kg

## Inputs from technosphere
- transport, freight, sea, bulk carrier for dry goods: 4.5833 metric ton*km; lognormal variance with pedigree 0.1202, pedigree (1,1,2,1,1)
  Calculated data based on average distance between Indonesia and various ports in the country. The distances have been calculated using online maps.
- hard coal: 1.008 kg; lognormal variance with pedigree 0.0014, pedigree (2,1,2,1,1)
  Own Assumption based on Literature data. Transit and Handling losses taken into account. The values have been taken as per CERC (Central Electricity regulatory Commision) guidelines which gives a loss of 0.2 % as transit and handling loss for pit head thermal power plants and 0.8 % as transit and handling loss for other power plants, The value taken here is 0.8% as the coal is used in non pithead power plants.
  property carbon content, fossil 0.845; name C_content_fossil
  property dry mass 0.94 kg; name DM
  property wet mass 1 kg; name WM
  property water in wet mass 0.06 kg; name WWM
  property water content 0.0638298; name water_content
  property carbon content, non-fossil 0; name C_content_non_fossil
  properties: heating value, net 27.91 MJ
  note on carbon content, fossil: C content 75-94% (specified in Tab 1.1, report 6, part VI). A mean content of 0.845 kg C/ kg dry hard coal was considered
  note on heating value, net: Based on the Characterization factor of Hard coal in the CED method

## Emissions to nature
- Particulates, > 10 um [air, unspecified]: 0.008 kg; lognormal variance with pedigree 0.0408, pedigree (2,1,2,1,1)
  Transportation Losses: Transit and Handling losses taken into account. The values have been taken as per CERC (Central Electricity regulatory Commision) guidelines which gives a loss of 0.2 % as transit and handling loss for pit head thermal power plants and 0.8 % as transit and handling loss for other power plants. The value taken here is 0.8%.

## Sampling procedure
Literature Data: The import data for coal has been taken from Provisional coal Statistics 2016-17. While for the average distance online maps have been used to calculate average distance between Australia and various Indian Ports. Provisional Coal Statistics 2016-17 can be downloaded from http://www.coalcontroller.gov.in/pages/view/44-provisional-coal-statistics

## Extrapolations
This dataset has been extrapolated from year 2020 to the year of the calculation (2021). The uncertainty has been adjusted accordingly.
