# tap water production, seawater reverse osmosis, ultrafiltration pretreatment, enhance module, two stages

Dataset: EcoSpold 2, unit process
Geography: GLO
Time period: 2004-01-01 to 2021-12-31
Technology level: modern
Classification: EcoSpold01Categories: water supply/production
Classification: ISIC rev.4 ecoinvent: 3600:Water collection, treatment and supply
Scenario: Business-as-Usual
System model: Allocation, cut-off by classification
Generated by: Marylène Dussault
Published in: Al-Sarkal, T. 2013
Database: ecoinvent
isCopyrightProtected: true
accessRestrictedTo: 1

## General comment
This dataset represents the production of 1 kg of drinking water (potable water) from seawater reverse osmosis with ultrafiltration pretreatment using enhanced membrane modules and a two stages configuration. An enhanced membrane is a polyamide membrane of 40.9 m2 of active membrane surface and maximum operating pressure of 1200 psig (83 bars). Two stages allow higher recovery rate, but requires higher operation pressure. Thus, only enhance membrane can be used with this configuration. This dataset is based on published literature and on modeling. Reverse osmosis system was modeled using typical seawater characterisation, two stages enhance module membrane system with recovery rate of 55% and energy recovery by pressure exchanger of 40%. It includes water intake of seawater, ultrafiltration pretreatment, reverse osmosis filtration, recarbonisation and emissions of brine to sea. The modeling of the reverse osmosis treatment was done using the ROSA (Reverse Osmosis System Analysis) system design software from Dow Chemical. Recarbonation and post-treatment of permeate water are modeled with the Rothberg, Tamburini and Winsor (RTW) Model for Corrosion Control and Process Chemistry 4.0 by Tetra Tech. Typical seawater characterisation for salinity of 3.5% (w/w) was used for modeling. Composition is based on literature (Open University 1989).
Open University (1989). Seawater: its composition, properties and behaviour. Gerry Bearman Editor, Pergamon Press, 165p.

## Included activities start
From intake of seawater. This dataset includes energy and material inputs for the different water treatment stages: chlorination, coagulation, ultrafiltration, dechlorination, reverse osmosis membrane filtration and post-treatment. It includes material for the membrane module and pressure vessel assuming lifetimes of 5 and 15 years, respectively.

## Included activities end
This dataset ends with the production of tap water, at facility gate. Electricity for lighting and heating the building is excluded due to lack of data. Note that the energy for the pumps pressurizing water at the beginning of the network was estimated due to lack of data. It excludes energy for pumping stations and water losses within the network which is included in the tap water market. Emissions to the environment are limited to release of brine to the environment and carbon dioxide emissions from water under atmospheric conditions.

## Parameters
- pressure vessel_lifetime: 15 year; name PressV_lft; lognormal variance with pedigree 0.0426, pedigree (5,4,1,1,1)
  Estimated value. Lifetime of pressure vessel assumed to be of 15 years.
- pretreatment and post-treatment sulfuric acid: 9e-10 kg; name pp_H2SO4; lognormal variance with pedigree 0.0052, pedigree (3,4,1,1,2)
  Literature value.Value based on published amounts by Al-sarkal, T. et al. 2013,
- module lifetime: 5 year; name module_lft; lognormal variance with pedigree 0.0087, pedigree (4,2,1,1,1)
  Literature value. Expected lifetime of membrane from 5 years to years (Bureau of Reclamation (2003) Desalting Handbook for Planners. 3rd Edition, July 2003, Desalination and Water Purification Research and Development Program. Report No. 72). For conservative reason a lifetime of 5 years was selected, but is parametrised for easy adaptation by user.
- polycarboxylate commercial concentration: 0.4 kg/kg; name conc_polycarbox; lognormal variance with pedigree 0.0006, pedigree (1,1,1,1,1)
  Literature value. Based on ecoinvent process definition for polycarboxylate. Used to account for water content in commercial product.
- sodium hydroxide commercial concentration: 0.5 kg/kg; name conc_NaOH; lognormal variance with pedigree 0.0006, pedigree (1,1,1,1,1)
  Literature value. Based on ecoinvent process definition for sodium hydroxide. Used to account for water content in commercial product.
- reverse osmosis sulfuric acid: 3.71e-5 kg; name ro_H2SO4; lognormal variance with pedigree 0.0046, pedigree (3,4,1,1,1)
  Calculated value. Sulfuric acid associated with reverse osmosis operation based on modeling for seawater reverse osmosis with conventional pretreatment considering single stage baseline 8-inch spiral wound modules using ROSA system design software (Dow Chemical).
- pretreatment and post-treament electricity: 6.8e-5 kWh; name pre_post_kWh; lognormal variance with pedigree 0.0052, pedigree (3,4,1,1,2)
  Literature value. Based on Fujairah-1 seawater reverse osmosis plant (Al-sarkal, T. et al. 2013).
- amount of pressure vessels: 104 unit; name pressV; lognormal variance with pedigree 0.0038, pedigree (2,4,1,1,2)
  Calculated value. Amount of pressure vessel based on simulation using ROSA for on seawater reverse osmosis medium size train (10080 m3/d).
- reverse osmosis electricity: 0.00234 kWh; name RO_kWh; lognormal variance with pedigree 0.0046, pedigree (3,4,1,1,1)
  Calculated value. Electricity associated with operational pression based on modeling for seawater reverse osmosis with conventional pretreatment considering single stage baseline 8-inch spiral wound modules using ROSA system design software (Dow Chemical). Energy recovery from pressure exchanger of 40% is considered which is a typical value.
- average permeate flux: 16.5 l/(h.m2); name av_p_flux; lognormal variance with pedigree 0.0038, pedigree (2,4,1,1,2)
  Calculated value. Average permeate flux for reverse osmosis operation based on modeling for seawater reverse osmosis with conventional pretreatment considering single stage baseline 8-inch spiral wound modules using ROSA system design software (Dow Chemical). Value is a function of pre-treatment.
- reinforcing steel in concrete: 0.02 dimensionless; name reinf_steel; lognormal variance with pedigree 0.014, pedigree (4,1,1,1,1)
  Estimation. Reinforcing steel content in reinforced concrete for potable water treatment equipements provided by industrial expert.
- amount of modules unit per pressure vessel: 6 unit; name module_pressV; lognormal variance with pedigree 0.0038, pedigree (2,4,1,1,2)
  Calculated value. Amount of module units per pressure vessel based on simulation using ROSA for on seawater reverse osmosis medium size train (10080 m3/d).
- concentrate, carbon dioxide under pressure: 1.84e-5 kg; name concentrate_CO2; lognormal variance with pedigree 0.0052, pedigree (3,4,1,1,2)
  Calculated value. Carbon dioxide concentration in concentrate from reverse osmosis operation is based on modeling for seawater reverse osmosis with conventional pretreatment considering single stage baseline 8-inch spiral wound modules using ROSA system design software (Dow Chemical).
- pressure vessel, epoxy mass per module: 2.09048 kg/unit; name PressV_epoxy; lognormal variance with pedigree 0.0046, pedigree (3,4,1,1,1)
  Calculated value. Average mass of material per module unit based on technical drawing for 8-inch pressure vessel - 1000 PSI from Advanced composite PVT. LTD, India.
- sodium hypochlorite commercial concentration: 0.15 kg/kg; name conc_NaClO; lognormal variance with pedigree 0.0006, pedigree (1,1,1,1,1)
  Literature value. Based on ecoinvent process definition for sodium hypochlorite. Used to account for water content in commercial product.
- pressure vessel, glass fibre mass per module: 26.78 kg/unit; name PressV_fglass; lognormal variance with pedigree 0.0046, pedigree (3,4,1,1,1)
  (same comment as for pressure vessel, epoxy mass per module)
- iron trichloride commercial concentration: 0.35 kg/kg; name conc_FeCl3; lognormal variance with pedigree 0.0006, pedigree (1,1,1,1,1)
  Literature value. Based on ecoinvent process definition for iron trichloride. Used to account for water content in commercial product.
- pressurization electricity: 0.000375 kWh; name pressur_kWh; lognormal variance with pedigree 0.0246, pedigree (4,5,1,1,3)
  Estimated value. Energy requirements for pressurizing treated water into network at facility gate. Calculated from report share of energy requirements from convention potable water treatment and average energy consumption for entire treatment as reported by the Energy Sector Management Assistance Program and the American Water Works Association (American Water Works Association, AWWA - American Society of Civil Engineers, ASCE (2012). Water Treatment Plant Design, 5th edition. Editors: Randtke S.J., Horsley M.B.. McGraw-Hill; Energy Sector Management Assistance Program, ESMAP (2012). A primer on energy efficiency for municipal water and wastewater utilities).
- sulfuric acid commercial concentration: 0.93 kg/kg; name conc_H2SO4; lognormal variance with pedigree 0.0112, pedigree (4,4,1,1,2)
  Literature value. Based on typical commercial concentration for sulfuric acid. Used to account for water content in commercial product.

## Reference product
- tap water: 1 kg; name tapwater; CPC 18000: Natural water; By-product classification allocatable product; CAS 7732-18-5
  production volume 3.16e10 kg; name PV_water
    Estimated value. Total production of tap water from seawater reverse osmosis is based on reported value from Lattermann 2010 (2006 reported data). Share of pretreatment (i.e. 91% conventional vs 9% ultrafiltration) is based on proportion ratio of installed capacity of ultrafiltration pretreatment to water desalination technologies in 2010 and total installed desalination capacity in 2010 (Lattermann, 2012). Share for seawater membrane module (baseline vs enhanced) and configuration (1 stage vs 2 stages) where fixed arbitrary and should be revised as soon as better data is available. Total production of tap water from seawater reverse osmosis (based on installed capacity in 2006) is 3.51E12 kg. Thus, 3.19E12 kg of tap water from seawater reverse osmosis produced with conventional pretreatment and 3.16E11 kg produced using ultrafiltration pretreatment. It was assumed that baseline module with 1 stage configuration would be the most frequent combination used within facilities and that more recent technologies involving enhanced modules and 2 stages configuration be less frequent. Share where fixed as follow: 75% baseline-1stage, 15% enhanced-1stage, 10% enhanced-2stages.
  property mass concentration, carbonate 0.0001511 kg/m3; name tapwater_c_CO3
    Calculated value. Concentration of ion species in treated water after reverse osmosis and recarbonization treatment. Permeate ion concentration was modeled with Rosa. Recarbonisation was modeled with RWT software.
  property price 0.000397 EUR2005; name tapwater_price_EUR2005
    Converted from EU price by using Purchasing Power Parities (0.8458 in 2003 and 0.8426 in 2004)
  property mass concentration, fluorine 1e-5 kg/m3; name tapwater_c_F
    (same comment as for tap water)
  property carbon content, fossil 1.51046e-5; = (tapwater_c_CO3*0.2+ tapwater_c_HCO3*0.197+ tapwater_c_H2CO3*0.194)/1000
    Calculated value. Carbon content based on concentration of H2CO3, HCO3- and CO3 ions. Assumed to be of fossil origin because of recarbonization.
  property mass concentration, boron 0.0011 kg/m3; name tapwater_c_B
    (same comment as for tap water)
  property mass concentration, bicarbonate 0.07236 kg/m3; name tapwater_c_HCO3
    Calculated value. Concentration of ion species in treated water after reverse osmosis and recarbonization treatment. Permeat ion concentration was modeled with Rosa. Recarbonisation was modeled with RWT software.
  property mass concentration, chloride 0.1114 kg/m3; name tapwater_C_Cl_ion
    (same comment as for tap water)
  property pH 7.53; name tapwater_pH
    Calculated value. Value of tap water after recarbonisation as modeled using pH is a measure of acidity it is defined as -log10(c_H+) where c_H+ is the hydrogen ion concentration in moles per liter.
  property carbon content, non-fossil 0
    Calculated value. Carbon content based on concentration of H2CO3, HCO3- and CO3 ions. Assumed to be non-fossil origin.
  property mass concentration, carbonic acid 0.004224 kg/m3; name tapwater_c_H2CO3
    (same comment as for tap water)
  property mass concentration, calcium 0.02407 kg/m3; name tapwater_c_Ca
    (same comment as for tap water)
  property mass concentration, sodium 0.06754 kg/m3; name tapwater_c_Na
    (same comment as for tap water)
  property mass concentration, potassium 0.00278 kg/m3; name tapwater_c_K
    (same comment as for tap water)
  property mass concentration, dissolved sulfate SO4 as S 0.00156 kg/m3; name tapwater_c_SO4_S
    (same comment as for tap water)
  property mass concentration, strontium 2e-5 kg/m3; name tapwater_c_Sr
    (same comment as for tap water)
  property mass concentration, magnesium 0.00185 kg/m3; name tapwater_c_Mg
    (same comment as for tap water)
  property carbon content 1.51046e-5
    carbon content on a dry matter basis (reserved; not for manual entry)
  properties: wet mass 1 kg, water content 2962.17, dry mass 0.000337476 kg, water in wet mass 0.999663 kg, carbon allocation 5.09744e-9 kg

## Inputs from technosphere
- water works, capacity 6.23E10l/year: 5.3526e-13 unit; name RO_plant_1; = 1/RO_plant_lifetime_capacity_l; lognormal variance with pedigree 0.0086, pedigree (1,1,4,1,1)
  Calculated value. Based on water works capacity and lifetime. Share of infrastructure attributed to the prodction of 1 kg of drinking water is estimated by dividing the 1 unit of drinking water plant by the total estimated amount of water this plant will produce.
  Uncertainty: Calculated variable. Uncertainty will be determined from propagation of uncertainty factors of underlying variables. Uncertainty of actual relation between variables not accounted for at this time, although this could be included in a future update.
  property lifetime capacity [l] 1.86825e12 l; name RO_plant_lifetime_capacity_l
  note on lifetime capacity [l]: Lifetime capacity in litres. Based on water works daily capacity, and expected lifetime (30 yr). Assumed 1kg/l water density
- polyacrylamide: 3e-8 kg; source Biswas, W. 2009; lognormal variance with pedigree 0.0132, pedigree (3,4,4,1,2)
  Literature value.Chemical use for water post-treatment reported as polyelectrolyte based on Biswas, W. K. (2009).
  properties: heating value, net 23.88 MJ
- iron(III) chloride, without water, in a 12% iron solution state: 5.2e-13 kg; name FeCl3; source Al-Sarkal, T. 2013; lognormal variance with pedigree 0.0132, pedigree (3,4,4,1,2)
  Literature value.Chemical use for water pretreatment based on Al-sarkal, T. et al. 2013.
- lime, hydrated, packed: 0 kg; pedigree (1,1,1,1,1)
  Calculated value. Represents dosage for recarbonisation of permeate water as calculated by RWT software. Caracterisation of permeate used was calculated from modeling seawater reverse osmosis with conventional pretreatment considering single stage baseline 8-inch spiral wound modules using ROSA system design software (Dow Chemical).
  properties: wet mass 1 kg, dry mass 0.997 kg, water content 0.00300903
- citric acid: 9.37e-7 kg; source Biswas, W. 2009; lognormal variance with pedigree 0.0132, pedigree (3,4,4,1,2)
  Literature value. Sum of chemical use for pretreatment and reverse osmosis based on Biswas, W. K. (2009).
  properties: dry mass 1 kg, carbon content, fossil 0.375099, wet mass 1 kg, heating value, net 16.41 MJ
- chlorine, liquid: 0 kg; source Biswas, W. 2009; pedigree (1,1,1,1,1)
  Literature value.Chemical use for final desinfection based on Biswas, W. K. (2009).
  properties: wet mass 1 kg, dry mass 1 kg
- sodium hydroxide, without water, in 50% solution state: 2.72701e-5 kg; name NaOH; lognormal variance with pedigree 0.0132, pedigree (3,4,4,1,2)
  Literature value. Sum of chemical use for reverse osmosis of water and backwash of membrane based on Al-sarkal, T. et al. 2013 and Biswas, W. K. (2009).
  properties: heating value, net 3.03 MJ, dry mass 1 kg, wet mass 1 kg
- polycarboxylates, 40% active substance: 0 kg; name polycarbox; source Biswas, W. 2009; pedigree (1,1,1,1,1)
  Literature value. Average and uncertainty based on published amounts by
  Biswas, W. K. (2009).
  properties: heating value, net 4.54 MJ, wet mass 1 kg, dry mass 0.4 kg, water content 1.5, carbon content, fossil 0.496429
- seawater reverse osmosis module: 1.3837e-6 m2; = AMS* module_pressV* pressV/(av_p_flux* module_lft*UnitConversion(1, 'year', 'hour')*AMS* module_pressV* pressV); lognormal variance with pedigree 0.008, pedigree (1,1,4,1,1)
  This unit process refers to the unit of active membrane surface for reverse osmosis of seawater.
  Uncertainty: Calculated variable. Uncertainty will be determined from propagation of uncertainty factors of underlying variables. Uncertainty of actual relation between variables not accounted for at this time, although this could be included in a future update.
  property active membrane surface per module unit 40.9 m2; name AMS
- EDTA, ethylenediaminetetraacetic acid: 2.34e-9 kg; source Biswas, W. 2009; lognormal variance with pedigree 0.2106, pedigree (5,5,5,5,5)
  Approximated process. Represents detergent used for cleaning reverse osmosis membrane. Value based on literature reported as detergent in liquid state in Biswas, W. K. (2009). Density of EDTA used (0.84 kg/l). Highly uncertain value since nature of detergent is unknown. Uncertainty have been maximized.
  properties: wet mass 1 kg, carbon content, fossil 0.410959, dry mass 1 kg, heating value, net 19.09 MJ
- glass fibre: 3.02001e-7 kg; name fglass; = PressV_fglass* module_pressV* pressV/( av_p_flux* PressV_lft*UnitConversion(1, 'year', 'hour')*AMS* module_pressV* pressV); lognormal variance with pedigree 0.008, pedigree (1,1,4,1,1)
  Calculated value.
  Uncertainty: Calculated variable. Uncertainty will be determined from propagation of uncertainty factors of underlying variables. Uncertainty of actual relation between variables not accounted for at this time, although this could be included in a future update.
  properties: dry mass 1 kg, wet mass 1 kg
- electricity, low voltage: 0.002783 kWh; = RO_kWh+ pre_post_kWh+pressur_kWh; lognormal variance with pedigree 0.008, pedigree (1,1,4,1,1)
  (same comment as for glass fibre)
- municipal solid waste: 0 kg; name MSW; source Biswas, W. 2009
  Literature value. Value based on report solid waste generation per kg of SWRO water production in Biswas, W. K. (2009).
  production volume 0 kg
    Calculated from production volume of reference product using the relative outputs.
  property price 0 EUR2005; name MSW_price_EUR2005
  properties: water content 0.297017, carbon content, non-fossil 0.261655, heating value, net 11.74 MJ, wet mass 1 kg, carbon content, fossil 0.171549, dry mass 0.771 kg
  note on carbon content, non-fossil: MSW composition in tab 4.1, ecoinvent v2.2 report 13_I. C content referred to 1 kg DM
  note on heating value, net: Value taken from the general comment of the treatment dataset.
- epoxy resin, liquid: 0 kg; name epoxy; pedigree (1,1,1,1,1)
  (same comment as for glass fibre)
  properties: carbon content, fossil 0.42325, wet mass 1 kg, dry mass 1 kg, heating value, net 12.82 MJ
- sulfuric acid: 0 kg; name H2SO4; pedigree (1,1,1,1,1)
  (same comment as for glass fibre)
  properties: dry mass 1 kg, wet mass 1 kg
- tap water: 5.59593e-5 kg; = (NaClO/conc_NaClO-NaClO)+ (FeCl3/conc_FeCl3-FeCl3)+( polycarbox/ conc_polycarbox- polycarbox)+( H2SO4/conc_H2SO4 - H2SO4)+(NaOH/conc_NaOH-NaOH); lognormal variance with pedigree 0.008, pedigree (1,1,4,1,1)
  Calculated variable. This flow represents the amount of water in chemical solution. Chemical processes represent active substance only. Water is added seperatly.
  Uncertainty: Calculated variable. Uncertainty will be determined from propagation of uncertainty factors of underlying variables. Uncertainty of actual relation between variables not accounted for at this time, although this could be included in a future update.
  properties: water content 2962.17, dry mass 0.000337476 kg, wet mass 1 kg, carbon content, fossil 0.00178991
  note on carbon content, fossil: Bicarbonate content is 2.93 mol/m3. CO2 content is 0.1 mol/m3 (ecoinvent v2.2 report 8, Tab 93.1).
- waste glass pane in burnable frame: 0 kg; name w_fglass; pedigree (1,1,1,1,1)
  Calculated value. Process used as proxy for disposal of fiber glass/epoxy pressure vessel.
  Uncertainty: Calculated variable. Uncertainty will be determined from propagation of uncertainty factors of underlying variables. Uncertainty of actual relation between variables not accounted for at this time, although this could be included in a future update.
  production volume 0 kg
    Calculated from production volume of reference product using the relative outputs.
  property price 0 EUR2005; name w_fglass_price_EUR2005
  properties: dry mass 1 kg, wet mass 1 kg
- sodium hydrogen sulfite: 7.39e-8 kg; source Biswas, W. 2009; lognormal variance with pedigree 0.0132, pedigree (3,4,4,1,2)
  Literature value.Chemical use for water dechlorination treatment to protect reverse osmosis membrane based on Biswas, W. K. (2009).
  properties: dry mass 1 kg, wet mass 1 kg
- sodium hypochlorite, without water, in 15% solution state: 0 kg; name NaClO; pedigree (1,1,1,1,1)
  Literature value. Sum of chemical use for water pretreatment and backwash of membrane based on Al-sarkal, T. et al. 2013 and Biswas, W. K. (2009).
  Al-Sarkal, T., & Arafat, H. a. (2013). Ultrafiltration versus sedimentation-based pretreatment in Fujairah-1 RO plant: Environmental impact study. Desalination, 317, 55-66.
  Biswas, W. K. (2009). Life Cycle Assessment of Seawater Desalinization in Western Australia, 369-375.
  properties: dry mass 1 kg, wet mass 1 kg
- carbon dioxide, liquid: 0 kg; pedigree (1,1,1,1,1)
  (same comment as for lime, hydrated, packed)
  properties: wet mass 1 kg, carbon content, fossil 0.272727, dry mass 1 kg, heating value, net 8.27 MJ
- lime, hydrated, packed: 3.66135e-7, 4.31339e-5 kg (2 entries); lognormal variance with pedigree 0.0126, pedigree (3,4,4,1,1)
  (same comment as for lime, hydrated, packed)
- chlorine, liquid: 2.00031e-7, 9.99969e-7 kg (2 entries); source Biswas, W. 2009; lognormal variance with pedigree 0.0132, pedigree (3,4,4,1,2)
  Literature value.Chemical use for final desinfection based on Biswas, W. K. (2009).
- polycarboxylates, 40% active substance: 1.01161e-6, 2.04839e-6 kg (2 entries); source Biswas, W. 2009; lognormal variance with pedigree 0.21, pedigree (5,5,5,5,5)
  (same comment as for polycarboxylates, 40% active substance)
- municipal solid waste: -8.41891e-7, -5.16018e-9, -3.6109e-9, -1.43304e-8, -1.0135e-5 kg (5 entries); source Biswas, W. 2009
  (same comment as for municipal solid waste)
  production volume 347600 kg
- epoxy resin, liquid: 4.10198e-9, 1.94726e-8 kg (2 entries); lognormal variance with pedigree 0.008, pedigree (1,1,4,1,1)
  (same comment as for glass fibre)
- sulfuric acid: 4.29208e-6, 3.28088e-5 kg (2 entries); lognormal variance with pedigree 0.008, pedigree (1,1,4,1,1)
  (same comment as for glass fibre)
- waste glass pane in burnable frame: -2.74033e-9, -3.22835e-7 kg (2 entries); lognormal variance with pedigree 0.008, pedigree (1,1,4,1,1)
  (same comment as for waste glass pane in burnable frame)
  production volume 10288.2 kg
- sodium hypochlorite, without water, in 15% solution state: 6.5424e-7, 3.10576e-6 kg (2 entries); lognormal variance with pedigree 0.0132, pedigree (3,4,4,1,2)
  (same comment as for sodium hypochlorite, without water, in 15% solution state)
- carbon dioxide, liquid: 5.82555e-6, 2.76744e-5 kg (2 entries); lognormal variance with pedigree 0.0126, pedigree (3,4,4,1,1)
  (same comment as for lime, hydrated, packed)

## Inputs from nature
- Water, salt, ocean [natural resource, in water]: 0.001818 m3; name raw_water; source Al-Sarkal, T. 2013; lognormal variance with pedigree 0.008, pedigree (1,1,4,1,1)
  Calculated value. Based on ratio of raw water intake and permeate of Fujairah-1 seawater reverse osmosis plant (Al-sarkal, T. et al. 2013).
  Uncertainty: Calculated variable. Uncertainty will be determined from propagation of uncertainty factors of underlying variables. Uncertainty of actual relation between variables not accounted for at this time, although this could be included in a future update.
  property mass concentration, strontium 0.013 kg/m3; name raw_water_c_Sr
  property mass concentration, dissolved sulfate SO4 as S 2.689 kg/m3; name raw_water_c_SO4_S
  property mass concentration, calcium 0.406 kg/m3; name raw_water_c_Ca
  property mass concentration, chloride 19.2741 kg/m3; name raw_water_C_Cl_ion
  property mass concentration, magnesium 1.291 kg/m3; name raw_water_c_Mg
  property mass concentration, fluoride 0.001 kg/m3; name raw_water_c_F_s
  property mass concentration, sodium 10.7151 kg/m3; name raw_water_c_Na
  property mass concentration, potassium 0.386 kg/m3; name raw_water_c_K
  property mass concentration, boron 0.0045 kg/m3; name raw_water_c_B
  property mass concentration, bicarbonate 0.142 kg/m3; name raw_water_c_HCO3
  property mass concentration, carbonate 0.0182 kg/m3; name raw_water_c_CO3
  property mass concentration, carbone dioxide 0.0007 kg/m3; name raw_water_c_CO2_s

## Emissions to nature
- Carbon dioxide, non-fossil [air, non-urban air or from high stacks]: 1.84e-5 kg; lognormal variance with pedigree 0.0512, pedigree (5,4,4,1,2)
  Calculated value. Mass of carbon dioxide emitted to air assuming carbon dioxide in concentrate under pressure will all be emited to air after release of concentrate at atmospheric conditions. Concentraiton in concentrate was calculated by modeling seawater reverse osmosis using ROSA system design software (Dow Chemical).
  property molecular weight 44.01 g/mol; name CO2_mol_weight
- Boron [water, ocean]: 7.1e-6 kg; lognormal variance with pedigree 0.052, pedigree (3,4,4,1,1)
  Calculated value. Mass of ion returned to the ocean with the concentrate as calculated by modeling for seawater reverse osmosis with conventional pretreatment considering single stage baseline 8-inch spiral wound modules using ROSA system design software (Dow Chemical). Note that the impact from emission of concentrate reside mostly in the high ion loaded water and small area of release which individual substance emissions will not be well acounted by impact models.
- Hydrogen carbonate [water, ocean]: 0.0002346 kg; name HCO3; lognormal variance with pedigree 0.052, pedigree (3,4,4,1,1)
  Calculated value. Mass of ion returned to the ocean with the concentrate as calculated by modeling for seawater reverse osmosis with conventional pretreatment considering single stage baseline 8-inch spiral wound modules using ROSA system design software (Dow Chemical) and RWT for recarbonisation. Note that the impact from emission of concentrate reside mostly in the high ion loaded water and small area of release which individual substance emissions will not be well acounted by impact models.
- Potassium, ion [water, ocean]: 0.0006991 kg; lognormal variance with pedigree 0.052, pedigree (3,4,4,1,1)
  (same comment as for Boron)
- Strontium [water, ocean]: 2.36e-5 kg; lognormal variance with pedigree 0.052, pedigree (3,4,4,1,1)
  (same comment as for Boron)
- Chloride [water, ocean]: 0.0349365 kg; lognormal variance with pedigree 0.052, pedigree (3,4,4,1,1)
  (same comment as for Boron)
- Water [water, ocean]: 0.000818182 m3; name concentrate; lognormal variance with pedigree 0.0126, pedigree (3,4,4,1,1)
  Calculated value. Volume of concentrate (water returned to the environment) based production of 1 kg of tap water and on recovery rate.
- Fluoride [water, ocean]: 1.8e-6 kg; lognormal variance with pedigree 0.052, pedigree (3,4,4,1,1)
  (same comment as for Boron)
- Sodium, ion [water, ocean]: 0.0194151 kg; lognormal variance with pedigree 0.052, pedigree (3,4,4,1,1)
  (same comment as for Boron)
- Carbonate [water, ocean]: 2.8e-6 kg; lognormal variance with pedigree 0.052, pedigree (3,4,4,1,1)
  (same comment as for Hydrogen carbonate)
- Calcium, ion [water, ocean]: 0.0007376 kg; lognormal variance with pedigree 0.052, pedigree (3,4,4,1,1)
  (same comment as for Hydrogen carbonate)
- Sulfate [water, ocean]: 0.0049537 kg; lognormal variance with pedigree 0.052, pedigree (3,4,4,1,1)
  (same comment as for Boron)
- Magnesium [water, ocean]: 0.0023455 kg; lognormal variance with pedigree 0.052, pedigree (3,4,4,1,1)
  (same comment as for Boron)

## Extrapolations
This dataset has been extrapolated from year 2012 to the year of the calculation (2021). The uncertainty has been adjusted accordingly.

## Review by Emilia Moreno Ruiz 2014-05-22
renaming water work infrastructure
