# furnace production, wood chips, with silo, 5000kW

Dataset: EcoSpold 2, unit process
Geography: CH
Time period: 2010-01-01 to 2021-12-31
Technology level: modern
Classification: ISIC rev.4 ecoinvent: 2815:Manufacture of ovens, furnaces and furnace burners
Classification: EcoSpold01Categories: oil/cogeneration
Synonyms: wood fired central heating; wood chips boiler production; wood fired boiler production
Tags: biomass power
Scenario: Business-as-Usual
System model: Allocation, cut-off by classification
Generated by: Marco Mina
Database: ecoinvent
isCopyrightProtected: true
accessRestrictedTo: 1

## General comment
This dataset represents the production and the disposal of a wood chips burning furnace for district heating networks, with the woodchips storage silo, with a lifetime of 20 years.

## Included activities start
From reception of furnace components at the factory gate

## Included activities end
This activity ends with the disposal of the device in the end of its lifetime. The dataset includes the most important materials used for the fabrication of the furnace, the accumulator hot water tanks, the pipes for water connection, the screw conveyor system and the chimney flue pipes: steel, concrete, metal alloys, rock wool, plastics, electronic components, polystyrene, lubricating oil, paint. The dataset includes the basement for the furnace (around 210m2) and the wood chips storage silo in concrete (dimensions: 13x7x5m), which is assumed to be built in an external space out from an existing building. The dataset includes the land transformation and occupation and the energy and heat for the construction and the disposal of the device.

## Geography
Could be used for Central European conditions

## Technology
Boiler of modern technology available on the European and Swiss market, with conveyor grate technology and combustion chambers in refractory bricks, designed for an optimal combustion process. The model of reference is a woodchips boiler, brand Uniconfort mod.Global with capacity of 5000 kW. It was compared with another model with similar technology (Schmid mod.Pyrotronic UTSR 5000kW). Represent the typical boiler for a wide district heating network or for heating many industrial/residential buildings.
Source of image: http://www.uniconfort.com/en/global-model-boilers

## Time period
This model of furnace is commercialized in Europe and Switzerland and is still available on the market (end 2011)

## Reference product
- furnace, wood chips, with silo, 5000kW: 1 unit; name RP_amount_1; By-product classification allocatable product; CPC 43420: Industrial or laboratory furnaces and ovens, except non-electric bakery ovens; other industrial or laboratory […]
  production volume 25 unit; name RP_PV_1
    Extrapolated from an estimation of the auto furnaces cogen plants/renewable incinerators produced within the country (source: Holzenergiestatistik, Basler und Hoffmann, 2010)
  property price 317640 EUR2005
    Average 2005 prices for EU27, USA, China, Japan and India from Import/Export data (US$ and tonnes) in UN Commodity Trade Statistics Database; Commodity: "Industrial furnace, oven, incinerator non-electric ne". The prices are per kg and converted to per unit by summed weight of material concumption of the process in existing ecoinvent dâtaset for production of this furnace. (Based on 2.0) - For weight of concrete, used in the construction of the silo, it is separately added for from price per m3 used of each unit and apply EU&DK input output database 2003 (0.08 Euro2003/kg DS of concrete => 176 Euro2003/m3 concrete).
  property lifetime 20 year; name lifetime
  property capacity [MW] 5 MW; name capacity_MW
  property lifetime capacity [kWh] 8.76e8 kWh; name lifetime_capacity_kWh; = (lifetime*8760)*capacity_MW*1000
    calculated value

## By-products
- iron scrap, unsorted: 0 kg; CPC 39310: Slag, dross, scalings and other waste from the manufacture of iron or steel; By-product classification Recyclable; pedigree (1,1,1,1,1)
  disposal of the cast iron
  production volume 0 kg; = RP_PV_1 * (BP_amount_5 / RP_amount_1)
    Calculated from production volume of reference product using the relative outputs.
  property price 0.149 EUR2005
    Temporary price data. Calculated as 90% of purchasers price based on: estimated at 85% of sorted scrap
  property carbon content 0
    carbon content on a dry matter basis (reserved; not for manual entry)
  properties: carbon content, fossil 0, water in wet mass 0 kg, carbon content, non-fossil 0, wet mass 1 kg, dry mass 1 kg, water content 0, carbon allocation 0 kg

## Inputs from technosphere
- electricity, low voltage: 5874 kWh; source Uniconfort srl 2011; lognormal variance with pedigree 0.101, pedigree (4,3,4,5,1)
  Estimation - data derives from comparison between old dataset value, energy required for steel manufacturing (similar weight device) and suggestions from Uniconfort technician
- heat, central or small-scale, other than natural gas: 9570 MJ; source Uniconfort srl 2011; lognormal variance with pedigree 0.101, pedigree (4,3,4,5,1)
  estimation - data comes from a comparison between old dataset value and communication with Uniconfort producer (total annual heating value in factory/production)
  properties: heating value, net 1 MJ
- polystyrene foam slab: 361 kg; source Uniconfort srl 2011; lognormal variance with pedigree 0.0298, pedigree (3,3,4,5,1)
  calculated value - 7 accumulator hot water tanks 6000 liters [1719 dm3 (calculated value for insulation a tank 180*288 cm) * 0.03 kg/dm3 (specific weight polystyrene foam slab)]*7
  properties: heating value, net 38.67 MJ, wet mass 1 kg, dry mass 1 kg, carbon content, fossil 0.859091
  note on carbon content, fossil: XPS consists in 91% of polystyrene, 7% of blowing agent and the re-maining 2% are flame retardants (bromine compounds) and other additives (ecoinvent v2.2 report 7, part XIV, pg69). The chemical formula of polystyrene is (C8H8)n. Here, the blowing agent is CO2.
- lubricating oil: 32 kg; source Uniconfort srl 2011; lognormal variance with pedigree 0.101, pedigree (4,3,4,5,1)
  estimation - used for the manufacturing of the furnace and for the maintenance. It is just added to the internal part of the furnace
  properties: heating value, net 40.2 MJ, dry mass 1 kg, wet mass 1 kg, carbon content, fossil 0.75
  note on heating value, net: Literature value, Source: IPCC 2006, 2006 IPCC Guidelines for National Greenhouse Gas Inventories, Prepared by the National Greenhouse Gas Inventories Programme, Eggleston H.S., Buendia L., Miwa K., Ngara T. and Tanabe K. (eds). Published: IGES, Japan
  note on carbon content, fossil: Lubricating oil is produced from diesel. C-content/dry mass of fats and oils considered 75%, from: ecoinvent v2.2 report, n 15a, pg 40
- steel, low-alloyed, hot rolled: 74820 kg; name steel_low_alloyed; source Uniconfort srl 2011; lognormal variance with pedigree 0.0298, pedigree (3,3,4,5,1)
  Calculated value - calculated with the difference of the total weight of the device with the summa of the weight of all the other materials (also based on qualified technician suggestions)
  properties: dry mass 1 kg, carbon content, fossil 0.005, wet mass 1 kg
  note on carbon content, fossil: Low alloyed steel composition given in Tab. 3.2 ecoinvent v2.2 report 10_partII. Steel assumed to have a C content of 0.5%
- electronics scrap from control units: -12 kg; name BP_amount_9; lognormal variance with pedigree 0.0107, pedigree (1,2,4,5,1)
  disposal of electronical parts
  production volume 300 kg; = RP_PV_1 * BP_amount_9
    Calculated from production volume of reference product using the relative outputs.
  property price 0 EUR2005; name BP_amount_3_price_EUR2005
  properties: dry mass 1 kg, wet mass 1 kg, carbon content, fossil 0.337146, carbon content, non-fossil 0.00013442, lifetime 20 year
- copper, cathode: 46 kg; source Uniconfort srl 2011; lognormal variance with pedigree 0.0298, pedigree (3,3,4,5,1)
  estimation
  properties: dry mass 1 kg, wet mass 1 kg
- scrap steel: -74890 kg; name BP_amount_7; = ((steel_low_alloyed+chromium_steel))*-1; lognormal variance with pedigree 0.0107, pedigree (1,2,4,5,1)
  disposal of steel low-alloyed and chromium steel (body of the furnace, accumulation water tanks, screw conveyour, chimney flue pipes)
  production volume 1.87225e6 kg; = RP_PV_1 * BP_amount_7
    Calculated from production volume of reference product using the relative outputs.
  property price 0 EUR2005; name BP_amount_5_price_EUR2005
  properties: wet mass 1 kg, lifetime 20 year, dry mass 1 kg
- alkyd paint, white, without solvent, in 60% solution state: 12 kg; source Uniconfort srl 2011; lognormal variance with pedigree 0.0298, pedigree (3,3,4,5,1)
  estimation
  properties: heating value, net 10.3 MJ, carbon content, non-fossil 0.199629, dry mass 1 kg, wet mass 1 kg, carbon content, fossil 0.140367
  note on carbon content, non-fossil: C content was calculated as an addition of C content in the raw materials.
- waste mineral wool, for final disposal: -1846 kg; name BP_amount_4; lognormal variance with pedigree 0.0107, pedigree (1,2,4,5,1)
  disposal of insulation material (boiler + chimney)
  production volume 46150 kg; = RP_PV_1 * BP_amount_4
    Calculated from production volume of reference product using the relative outputs.
  property price 0 EUR2005; name BP_amount_11_price_EUR2005
  properties: wet mass 1 kg, lifetime 20 year, dry mass 1 kg
- electronics, for control units: 12 kg; source Uniconfort srl 2011; lognormal variance with pedigree 0.0298, pedigree (3,3,4,5,1)
  estimation
  properties: carbon content, fossil 0.337146, wet mass 1 kg, dry mass 1 kg, carbon content, non-fossil 0.00013442
  note on carbon content, fossil: The control unit has a composition of 46% steel (housing), 32% plastics, 14% printed wiring boards and 8% cables (various types).;
- waste polyethylene: -18 kg; name BP_amount_8; lognormal variance with pedigree 0.0107, pedigree (1,2,4,5,1)
  disposal of plastic materials
  production volume 450 kg; = RP_PV_1 * BP_amount_8
    Calculated from production volume of reference product using the relative outputs.
  property price 0 EUR2005; name BP_amount_6_price_EUR2005
  properties: wet mass 1 kg, carbon content, fossil 0.825301, heating value, net 42.47 MJ, water content 0.00401606, lifetime 20 year, dry mass 0.996 kg
  note on carbon content, fossil: C content in 1 kg DM was calculated using data in Tab A.1, ecoinvent v2.2 report 13_I
  note on heating value, net: Value taken from the general comment of the treatment dataset.
- aluminium, wrought alloy: 104 kg; source Uniconfort srl 2011; lognormal variance with pedigree 0.0298, pedigree (3,3,4,5,1)
  estimation
  properties: wet mass 1 kg, dry mass 1 kg
- waste polystyrene isolation, flame-retardant: -361 kg; name BP_amount_2; lognormal variance with pedigree 0.0107, pedigree (1,2,4,5,1)
  disposal of accumulator water tanks insulation
  production volume 9025 kg; = RP_PV_1 * (BP_amount_2 / RP_amount_1)
    Calculated from production volume of reference product using the relative outputs.
  property price 0 EUR2005; name BP_amount_7_price_EUR2005
  properties: water content 0.00199232, wet mass 1 kg, heating value, net 38.67 MJ, dry mass 0.998012 kg, carbon content, fossil 0.918145
  note on carbon content, fossil: Polystyrene isolation (EPS) is flame-retarded with hexa-bromo-cyclo-dodecan (C12H18Br6) and contains 0.67 w% bromine (ecoinvent v2.2 report 13_I, pg 39). The rest is polystyrene: (C8H8)n.
- polyethylene, high density, granulate: 18 kg; source Uniconfort srl 2011; lognormal variance with pedigree 0.0298, pedigree (3,3,4,5,1)
  estimation
  properties: wet mass 1 kg, dry mass 1 kg, carbon content, fossil 0.857143, heating value, net 42.47 MJ
  note on carbon content, fossil: Polyethylene is formed out of a huge amount of ethylene monomers (C2H4) (ecoinvent v2.2 report 11_II). MW=28 g/mol
- waste mineral oil: -32 kg; name BP_amount_3; lognormal variance with pedigree 0.0107, pedigree (1,2,4,5,1)
  disposal of the lubricating oil
  production volume 800 kg; = RP_PV_1 * (BP_amount_3 / RP_amount_1)
    Calculated from production volume of reference product using the relative outputs.
  property price 0 EUR2005; name BP_amount_1_price_EUR2005
  properties: wet mass 1 kg, heating value, net 34.7 MJ, water content 0.111111, carbon content, fossil 0.864444, dry mass 0.9 kg
  note on carbon content, fossil: Tab A.6, ecoinvent v2.2 report 13_I. C content has been calculated after data in the tables, and then referred to 1 kg DM
- refractory, fireclay, packed: 41220 kg; source Uniconfort srl 2011; lognormal variance with pedigree 0.0298, pedigree (3,3,4,5,1)
  estimation - refractory bricks in fireclay are used in the combustion chamber inside the furnace, for a efficient combustion (big quantity of refractory is necessary when woodchips have high content of water)
  properties: dry mass 1 kg, wet mass 1 kg
- scrap copper: -46 kg; name BP_amount_6; lognormal variance with pedigree 0.0113, pedigree (2,2,4,5,1)
  disposal of copper
  production volume 1150 kg; = RP_PV_1 * BP_amount_6
    Calculated from production volume of reference product using the relative outputs.
  property price 0 EUR2005; name BP_amount_10_price_EUR2005
  properties: dry mass 1 kg, wet mass 1 kg, lifetime 20 year
- cast iron: 1115 kg; source Uniconfort srl 2011; lognormal variance with pedigree 0.0298, pedigree (3,3,4,5,1)
  estimation
  properties: dry mass 1 kg, wet mass 1 kg, carbon content, fossil 0.04
  note on carbon content, fossil: Cast iron is made by remelting pig iron in small furnaces (e.g. cupola furnaces or electric arc furnaces) and poured into moulds to make castings. It usually contains 2% to 6% carbon (ecoinvent v2.2 report 10_partII). An average content of 4% was considered
- concrete, normal: 56 m3; name concrete; source Uniconfort srl 2011; lognormal variance with pedigree 0.0298, pedigree (3,3,4,5,1)
  calculated value - basing on the silo dimensions (from furnace manual) the amount of concrete was calculated (10.5 m3 for the basement + 45m3 for the silo). [thickness of the walls of the silo: 20 cm]
  properties: water content 0.086758, wet mass 2380 kg, dry mass 2190 kg
- waste concrete: -131600 kg; name BP_amount_10; = (concrete*2350)*-1; lognormal variance with pedigree 0.0107, pedigree (1,2,4,5,1)
  calculated value - disposal of the concrete for the furnace basement and for the woodchips silo, converted from m3 in kg [56 m3 of concrete * 2350 kg/m3 (concrete density)]
  production volume 3.29e6 kg; = RP_PV_1 * BP_amount_10
    Calculated from production volume of reference product using the relative outputs.
  property price 0 EUR2005; name BP_amount_2_price_EUR2005
  properties: dry mass 0.5 kg, water content 1, wet mass 1 kg, lifetime 20 year
- drawing of pipe, steel: 70 kg; source Uniconfort srl 2011; lognormal variance with pedigree 0.0298, pedigree (3,3,4,5,1)
  estimation - for water pipes connections
- inert waste, for final disposal: -41220 kg; name BP_amount_1; lognormal variance with pedigree 0.0107, pedigree (1,2,4,5,1)
  disposal of the refractory bricks
  production volume 1.0305e6 kg; = RP_PV_1 * BP_amount_1
    Calculated from production volume of reference product using the relative outputs.
  property price 0 EUR2005; name BP_amount_4_price_EUR2005
  properties: wet mass 1 kg, dry mass 0.995 kg, lifetime 20 year, water content 0.00502513
- scrap aluminium: -104 kg; name BP_amount_11; lognormal variance with pedigree 0.0107, pedigree (1,2,4,5,1)
  disposal of aluminium components in the furnace
  production volume 2600 kg; = RP_PV_1 * BP_amount_11
    Calculated from production volume of reference product using the relative outputs.
  property price 0 EUR2005; name BP_amount_9_price_EUR2005
  properties: dry mass 1 kg, wet mass 1 kg, lifetime 20 year
- stone wool: 1846 kg; source Uniconfort srl 2011; lognormal variance with pedigree 0.0298, pedigree (3,3,4,5,1)
  calculated value - summa of rock wool for the insulation of the chimney flue pipes (122 kg: 12m height, 80cm diameter, thickness rockwool 3cm) and rockwool inside the furnace (1724 kg = 13258 dm3 * 0.13 kg/m3)
  properties: wet mass 1 kg, dry mass 1 kg, carbon content, fossil 0.015401
  note on carbon content, fossil: The chemical composition of the glass fibres used in the rock wool production is similar to the composition of naturally cooled volcano basalt and has a composition listed in Tab. 3.1 and 3.2 in ecoinvent v2.2 report 16, part XIV. Rock wool contains: a minimum of 96% mineral fibres,between 0.5 and 3.0 weight percent of phenolic resin depending on the specific product characteristics, and about 0.2 percent mineral oil (ecoinvent v2.2 report 16, part XIV). An average composition of 1.8% phenolic resin, 0.2% mineral oil, and 98% mineral fibres has been assumed and used to calculate C content of the rock wool
- iron-nickel-chromium alloy: 528 kg; source Uniconfort srl 2011; lognormal variance with pedigree 0.0298, pedigree (3,3,4,5,1)
  estimation - components for the conveyor grate in the combustion chamber
  properties: wet mass 1 kg, dry mass 1 kg
- steel, chromium steel 18/8, hot rolled: 70 kg; name chromium_steel; source Uniconfort srl 2011; lognormal variance with pedigree 0.0298, pedigree (3,3,4,5,1)
  estimation . several components in the body of the furnace
  properties: wet mass 1 kg, carbon content, fossil 0.0008, dry mass 1 kg
  note on carbon content, fossil: Stainless steel model is the grade 304 steel (18/8 stainless, 18% chromium 8% nickel; max. 0.08% C)
- sheet rolling, steel: 2005 kg; source Uniconfort srl 2011; lognormal variance with pedigree 0.0298, pedigree (3,3,4,5,1)
  estimation
- iron scrap, unsorted: -1115 kg; lognormal variance with pedigree 0.0107, pedigree (1,2,4,5,1)
  disposal of the cast iron
  production volume 27875 kg
  properties: wet mass 1 kg, dry mass 1 kg, price 0.149 EUR2005

## Inputs from nature
- Transformation, to industrial area [natural resource, land]: 420 m2; source Uniconfort srl 2011; lognormal variance with pedigree 0.0752, pedigree (4,5,5,5,1)
  calculated value - calculated area necessary for the furnace installation based on specific picture in the furnace manual
- Transformation, from unspecified [natural resource, land]: 420 m2; name land_use; source Uniconfort srl 2011; lognormal variance with pedigree 0.0752, pedigree (4,5,5,5,1)
  (same comment as for Transformation, to industrial area)
- Occupation, industrial area [natural resource, land]: 8400 m2*year; = land_use*20; source Uniconfort srl 2011; lognormal variance with pedigree 0.1706, pedigree (4,5,5,5,1)
  calculated value - (transformation * lifetime of the furnace) [lifetime of the furnace: 20 years]
  Uncertainty: b

## Sampling procedure
literature, furnace manual available for customers, personal communication from producer and technician, measurement during furnaces exposition

## Extrapolations
This dataset has been extrapolated from year 2011 to the year of the calculation (2021). The uncertainty has been adjusted accordingly.

## Review by Martin Kilga 2012-03-19
Validation warnings:

- Reference products of infrastructure activities should not have mass or energy units as units or property units.

## Review by Bo Weidema 2012-03-19
This dataset has only been reviewed by two editors. Since this is an infrastructure dataset, this deviation from normal procedures is acceptable.

## Review by Bo Weidema 2012-03-19
Passed. Documentation adequate, inputs relevant, mass balance correct, and correct handling of capacity utilisation.
