# treatment of residue from mechanical treatment, industrial device, municipal waste incineration

Dataset: EcoSpold 2, unit process
Geography: CH
Time period: 1994-01-01 to 2021-12-31
Technology level: outdated
Classification: EcoSpold01Categories: waste management/municipal incineration
Classification: ISIC rev.4 ecoinvent: 3821:Treatment and disposal of non-hazardous waste
Tags: Treatment; ConvertedDataset
Scenario: Business-as-Usual
System model: Allocation, cut-off by classification
Generated by: Roland Hischier
Published in: Hischier R. 2007
Database: ecoinvent
isCopyrightProtected: true
accessRestrictedTo: 1

## General comment
Inventoried waste contains 1.54% rubber; 37.7% Plastics from electronic consumer goods; 37.7% Plastics from electronic industrial goods; 22.4% MSWI iron scrap; 0.07% Alu in MSW; 0.08% Glass; 0.07% wiring copper; 0.01% Pb in ASR inert; 0.01% silver; .
waste composition (wet, in ppm): upper heating value 27.77 MJ/kg; lower heating value 26.62 MJ/kg; H2O 6925.9; O 66288; H 57394; C 626790; S 490.45; N 10021; P 555.51; B n.a.; Cl 5262.9; Br 4143.8; F 188.36; I n.a.; Ag 100; As 5.6507; Ba 133.36; Cd 114.19; Co 22.209; Cr 308; Cu 6139.4; Hg 0.64043; Mn 541.6; Mo 2.2603; Ni 612.14; Pb 296.06; Sb 3659.8; Se 1.4764; Sn 302.69; V 56.44; Zn 623.07; Be 0.35152; Sc n.a.; Sr 62.219; Ti 3373.1; Tl 0.28122; W n.a.; Si 9438.5; Fe 183420; Ca 2402.9; Al 4786.3; K 88.151; Mg n.a.; Na 156.68;
Share of carbon in waste that is biogenic 0%.
Share of iron in waste that is metallic/recyclable 99.4%.
Net energy produced in MSWI: 2.93MJ/kg waste electric energy and 5.97MJ/kg waste thermal energy
Allocation of energy production: no substitution or expansion. Total burden allocated to waste disposal function of MSWI.
One kg of this waste produces 0.1466 kg of slag and 0.01401 kg of residues, which are landfilled. Additional solidification with 0.005603 kg of cement.
[This dataset was already contained in the ecoinvent database version 2. It was not individually updated during the transfer to ecoinvent version 3. Life Cycle Impact Assessment results may still have changed, as they are affected by changes in the supply chain, i.e. in other datasets. This dataset was generated following the ecoinvent quality guidelines for version 2. It may have been subject to central changes described in the ecoinvent version 3 change report (http://www.ecoinvent.org/database/ecoinvent-version-3/reports-of-changes/), and the results of the central updates were reviewed extensively. The changes added e.g. consistent water flows and other information throughout the database. The documentation of this dataset can be found in the ecoinvent reports of version 2, which are still available via the ecoinvent website. The change report linked above covers all central changes that were made during the conversion process.]

## Included activities end
waste-specific air and water emisions from incineration, auxiliary material consumption for flue gas cleaning. Short-term emissions to river water and long-term emisisons to ground water from slag compartment (from bottom slag) and residual material landfill (from solidified fly ashes and scrubber slugde). Process energy demands for MSWI.

## Geography
Specific to the technology mix encountered in Switzerland in 2000. Well applicable to modern incineration practices in Europe, North America or Japan.

## Technology
replaced by newer incineration technology with fly ash extraction. Average Swiss MSWI plants in 2000 (grate incinerators) with electrostatic precipitator for fly ash (ESP), wet flue gas scrubber and 29.4% SNCR , 32.2% SCR-high dust , 24.6% SCR-low dust -DeNOx facilities and 13.8% without Denox (by burnt waste, according to Swiss average). Share of waste incinerated in plants with magnetic scrap separation from slag : 50%. Gross electric efficiency technology mix 12.997% and Gross thermal efficiency technology mix 25.57%

## Time period
Waste composition as given in literature reference, theoretical data or other source. Transfer coefficients for modern Swiss MSWI. Emission speciation based on early 90ies data.

## Reference product
- residue from mechanical treatment, industrial device: -1 kg; CPC 39: Wastes or scraps; By-product classification Waste
  EcoSpold01Location=CH
  production volume 0 kg; name RP_PV_1
    outdated. Replaced by newer incineration technology with fly ash extraction.
  property price 0 EUR2005
    Waste products are assigned a price of zero as they are assumed to require further treatment.
  property carbon content, fossil 0.640502
    Tab 4.39, ecoinvent v2.2 report 18_V, for details in fraction composition. Carbon content in plastic was calculated using data in Tab A.2, ecoinvent v2.2 report 13_I. Others was also considered plastic, and calculated the same way (from pg 70, ecoinvent v2.2 report 18_V). Ferro was assumed to have a C content of 0.012 kg C/ kg (C content of steel, calculated out of emission factors published in Commission Decision of 18 July 2007 establishing guidelines for the monitoring and reporting of greenhouse gas emissions pursuant to Directive 2003/87/EC of the European Parliament and of the Council (notified under document number C(2007) 3416)). The other component of the fraction were considered to content no C.
  property heating value, net 26.62 MJ
    Value taken from the general comment of the treatment dataset.
  property carbon content 0.640502
    carbon content on a dry matter basis (reserved; not for manual entry)
  properties: water content 0, water in wet mass 0 kg, carbon content, non-fossil 0, wet mass 1 kg, dry mass 1 kg, carbon allocation 0.640502 kg

## Inputs from technosphere
- chemical, inorganic: 1.7615e-5 kg; lognormal variance with pedigree 0.38, pedigree (1,1,5,1,1)
  EcoSpold01Location=GLO
  Proxy for Polyelectrolyte. uncertainty calculated from uncertainty in average auxiliary material input, and the unertainty of the waste composition of this waste
  properties: dry mass 1 kg, wet mass 1 kg, carbon content, fossil 0.003
  note on carbon content, fossil: This dataset is an unweighted average of 20 inorganic substances (listed in Tab 88.1, ecoinvent v2.2 report 8, part II), being part of the top100 chemicals included in this database. The C-content has also been calculated as an unweighted average of the C content of the substances composing this dataset.
- slag landfill: 2.6067e-10 unit; lognormal variance with pedigree 0.07, pedigree (1,1,5,1,1)
  EcoSpold01Location=CH
  uncertainty is calculated from uncertainties in waste composition and transfer coefficients in incinerator
- heat, district or industrial, natural gas: 0.0443709 MJ; lognormal variance with pedigree 1.32, pedigree (1,1,5,1,1)
  EcoSpold01Location=RER
  uncertainty calculated from uncertainty in average DeNOx input, uncertainty in the share of thermal NOx, uncertainty of nitrogen content in average municipal waste and the unertainty in nitrogen content in *this* waste.
  properties: heating value, net 1 MJ
- process-specific burdens, municipal waste incineration: 1 kg; lognormal variance with pedigree 0.04, pedigree (1,1,5,1,1)
  EcoSpold01Location=CH
  demands per kilogram waste. uncertainty is heeded in the module;activityLink introduced to establish a direct link to the corresponding regional supply of this product
- quicklime, milled, packed: 0.00088828 kg; lognormal variance with pedigree 0.48, pedigree (1,1,5,1,1)
  uncertainty calculated from uncertainty in average auxiliary material input, and the unertainty of the waste composition of this waste
  EcoSpold01Location=CH
  properties: wet mass 1 kg, water content 0.010101, dry mass 0.99 kg
- process-specific burdens, residual material landfill: 0.014007 kg; lognormal variance with pedigree 0.12, pedigree (1,1,5,1,1)
  uncertainty is calculated from uncertainties in waste composition and transfer coefficients in incinerator;activityLink introduced to establish a direct link to the corresponding regional supply of this product
  EcoSpold01Location=CH
- municipal waste incineration facility: 2.5e-10 unit; lognormal variance with pedigree 0.04, pedigree (1,1,5,1,1)
  demands per kilogram waste. uncertainty is heeded in the module
  EcoSpold01Location=CH
- chemical, organic: 0.0004529 kg; lognormal variance with pedigree 0.99, pedigree (1,1,5,1,1)
  Proxy for TMT15. uncertainty calculated from uncertainty in average auxiliary material input, and the unertainty of the waste composition of this waste
  EcoSpold01Location=GLO
  properties: dry mass 1 kg, heating value, net 19.03 MJ, carbon content, fossil 0.628, wet mass 1 kg
  note on carbon content, fossil: This dataset is an unweighted average of 20 organic substances (listed in Tab 88.1, ecoinvent v2.2 report 8, part II), being part of the top100 chemicals included in this database. The C-content has also been calculated as an unweighted average of the C content of the substances composing this dataset.
- ammonia, anhydrous, liquid: 0.00050554 kg; lognormal variance with pedigree 1.32, pedigree (1,1,5,1,1)
  EcoSpold01Location=CH
  uncertainty calculated from uncertainty in average DeNOx input, uncertainty in the share of thermal NOx, uncertainty of nitrogen content in average municipal waste and the unertainty in nitrogen content in *this* waste.
  properties: dry mass 1 kg, wet mass 1 kg
- process-specific burdens, slag landfill: 0.14663 kg; lognormal variance with pedigree 0.07, pedigree (1,1,5,1,1)
  (same comment as for process-specific burdens, residual material landfill)
- sodium hydroxide, without water, in 50% solution state: 0.0051303 kg; lognormal variance with pedigree 0.47, pedigree (1,1,5,1,1)
  EcoSpold01Location=RER
  uncertainty calculated from uncertainty in average auxiliary material input, and the unertainty of the waste composition of this waste
  properties: wet mass 1 kg, dry mass 1 kg, heating value, net 3.03 MJ
- waste cement, hydrated: -0.014007 kg; name BP_amount_1; lognormal variance with pedigree 0.13, pedigree (1,1,5,1,1)
  Hydrated cement for solidification of landfilled residual material. Uncertainty calculated from unertainty of the waste composition of this waste and transfer coefficients in the incinerator and of the solidification recipe.
  EcoSpold01Location=CH
  production volume 0 kg; = RP_PV_1* BP_amount_1
    Calculated from the production volume of residue from mechanical treatment, industrial device in proportion to the respective output amounts.
  property price 0 EUR2005; name BP_amount_1_price_EUR2005
  properties: dry mass 1 kg, wet mass 1 kg
- titanium dioxide: 1.4471e-5 kg; lognormal variance with pedigree 2.03, pedigree (1,1,5,1,1)
  uncertainty calculated from uncertainty in average DeNOx input, uncertainty in the share of thermal NOx, uncertainty of nitrogen content in average municipal waste and the unertainty in nitrogen content in *this* waste.
  EcoSpold01Location=RER
  properties: wet mass 1 kg, dry mass 1 kg
- chromium oxide, flakes: 2.9532e-7 kg; lognormal variance with pedigree 2.03, pedigree (1,1,5,1,1)
  Proxy for vanadium pentoxide V2O5 in SCR catalyst, uncertainty calculated from uncertainty in average DeNOx input, uncertainty in the share of thermal NOx, uncertainty of nitrogen content in average municipal waste and the unertainty in nitrogen content in *this* waste.
  EcoSpold01Location=RER
  properties: wet mass 1 kg, dry mass 1 kg
- hydrochloric acid, without water, in 30% solution state: 1.0569e-5 kg; lognormal variance with pedigree 0.38, pedigree (1,1,5,1,1)
  (same comment as for sodium hydroxide, without water, in 50% solution state)
  properties: dry mass 1 kg, wet mass 1 kg, heating value, net 3.32 MJ
- iron (III) chloride, without water, in 40% solution state: 0.0004346 kg; lognormal variance with pedigree 0.33, pedigree (1,1,5,1,1)
  EcoSpold01Location=CH
  uncertainty calculated from uncertainty in average auxiliary material input, and the unertainty of the waste composition of this waste
  properties: wet mass 1 kg, dry mass 1 kg
- residual material landfill: 2.9181e-11 unit; lognormal variance with pedigree 0.12, pedigree (1,1,5,1,1)
  uncertainty is calculated from uncertainties in waste composition and transfer coefficients in incinerator
  EcoSpold01Location=CH
- cement, unspecified: 0.0056028 kg; lognormal variance with pedigree 0.13, pedigree (1,1,5,1,1)
  Cement for solidification of landfilled residual material. Uncertainty calculated from unertainty of the waste composition of this waste, of transfer coefficients in the incinerator and of the solidification recipe.
  EcoSpold01Location=CH
  properties: dry mass 1 kg, wet mass 1 kg

## Emissions to nature
- Chromium VI [water, ground-, long-term]: 5.9438e-6 kg; lognormal variance with pedigree 3.54, pedigree (1,1,5,1,1)
  Long-term emissions from landfilling of incineration residues. uncertainty is calculated from uncertainties in waste composition and transfer coefficients in incinerator and landfills.
- Nickel, ion [water, ground-, long-term]: 0.00058794 kg; lognormal variance with pedigree 0.74, pedigree (1,1,5,1,1)
  (same comment as for Chromium VI)
- Bromine [air, urban air close to ground]: 1.2431e-5 kg; lognormal variance with pedigree 0.53, pedigree (1,1,5,1,1)
  uncertainty is calculated from uncertainties in waste composition and transfer coefficients in incinerator
- Lead [water, ground-, long-term]: 0.00019289 kg; lognormal variance with pedigree 2.73, pedigree (1,1,5,1,1)
  (same comment as for Chromium VI)
- Thallium [water, surface water]: 1.7228e-10 kg; lognormal variance with pedigree 1.94, pedigree (1,1,5,1,1)
  uncertainty is calculated from uncertainties in waste composition and transfer coefficients in incinerator and landfills
- Mercury [water, ground-, long-term]: 3.3321e-8 kg; lognormal variance with pedigree 3.43, pedigree (1,1,5,1,1)
  (same comment as for Chromium VI)
- Calcium, ion [water, surface water]: 9.1176e-6 kg; lognormal variance with pedigree 1.04, pedigree (1,1,5,1,1)
  (same comment as for Thallium)
- Thallium [water, ground-, long-term]: 1.641e-7 kg; lognormal variance with pedigree 1.34, pedigree (1,1,5,1,1)
  (same comment as for Chromium VI)
- Calcium [air, urban air close to ground]: 3.9086e-6 kg; lognormal variance with pedigree 0.6, pedigree (1,1,5,1,1)
  (same comment as for Bromine)
- BOD5, Biological Oxygen Demand [water, ground-, long-term]: 0.0050594 kg; lognormal variance with pedigree 0.05, pedigree (1,1,5,1,1)
  (same comment as for Chromium VI)
- Aluminium [air, urban air close to ground]: 2.8207e-6 kg; lognormal variance with pedigree 0.52, pedigree (1,1,5,1,1)
  (same comment as for Bromine)
- Chloride [water, surface water]: 0.0051194 kg; lognormal variance with pedigree 0.42, pedigree (1,1,5,1,1)
  (same comment as for Thallium)
- Vanadium, ion [water, surface water]: 2.5169e-8 kg; lognormal variance with pedigree 1.83, pedigree (1,1,5,1,1)
  (same comment as for Thallium)
- Carbon monoxide, fossil [air, urban air close to ground]: 0.0002229 kg; lognormal variance with pedigree 0.690625, pedigree (1,3,5,2,1)
  Literature data from switzerland and germany adapted to plant age distribution in switzerland
  Uncertainty: & basic uncertainty of 5; literature data from switzerland and germany adapted to plant age distribution in switzerland
- Potassium, ion [water, ground-, long-term]: 7.2599e-5 kg; lognormal variance with pedigree 0.72, pedigree (1,1,5,1,1)
  (same comment as for Chromium VI)
- Titanium, ion [water, ground-, long-term]: 0.0010107 kg; lognormal variance with pedigree 0.9, pedigree (1,1,5,1,1)
  (same comment as for Chromium VI)
- Antimony [water, ground-, long-term]: 0.0023158 kg; lognormal variance with pedigree 0.41, pedigree (1,1,5,1,1)
  (same comment as for Chromium VI)
- Antimony [air, urban air close to ground]: 1.4054e-11 kg; lognormal variance with pedigree 0.66, pedigree (1,1,5,1,1)
  (same comment as for Bromine)
- Zinc [air, urban air close to ground]: 9.4409e-9 kg; lognormal variance with pedigree 0.81, pedigree (1,1,5,1,1)
  (same comment as for Bromine)
- Lead [water, surface water]: 6.4706e-9 kg; lognormal variance with pedigree 1.36, pedigree (1,1,5,1,1)
  (same comment as for Thallium)
- Nitrogen oxides [air, urban air close to ground]: 0.00031882 kg; lognormal variance with pedigree 1.44, pedigree (1,1,5,1,1)
  uncertainty calculated from uncertainty in average N-emissions, uncertainty in the share of thermal NOx, uncertainty of nitrogen content in average municipal waste and the unertainty in nitrogen content in *this* waste.
- Sodium, ion [water, ground-, long-term]: 0.00012667 kg; lognormal variance with pedigree 0.74, pedigree (1,1,5,1,1)
  (same comment as for Chromium VI)
- Molybdenum [water, surface water]: 3.8604e-7 kg; lognormal variance with pedigree 0.99, pedigree (1,1,5,1,1)
  (same comment as for Thallium)
- Silicon [water, surface water]: 7.392e-7 kg; lognormal variance with pedigree 0.84, pedigree (1,1,5,1,1)
  (same comment as for Thallium)
- Manganese [water, ground-, long-term]: 0.00054085 kg; lognormal variance with pedigree 0.78, pedigree (1,1,5,1,1)
  (same comment as for Chromium VI)
- Tin, ion [water, ground-, long-term]: 0.00022579 kg; lognormal variance with pedigree 0.89, pedigree (1,1,5,1,1)
  (same comment as for Chromium VI)
- Silicon [water, ground-, long-term]: 0.00025562 kg; lognormal variance with pedigree 5.85, pedigree (1,1,5,1,1)
  (same comment as for Chromium VI)
- Beryllium [water, ground-, long-term]: 2.831e-7 kg; lognormal variance with pedigree 1.52, pedigree (1,1,5,1,1)
  (same comment as for Chromium VI)
- Copper [air, urban air close to ground]: 1.7764e-8 kg; lognormal variance with pedigree 0.53, pedigree (1,1,5,1,1)
  (same comment as for Bromine)
- TOC, Total Organic Carbon [water, surface water]: 1.7183e-5 kg; lognormal variance with pedigree 0.27, pedigree (1,1,5,1,1)
  (same comment as for Thallium)
- Potassium [air, urban air close to ground]: 2.6577e-7 kg; lognormal variance with pedigree 1.03, pedigree (1,1,5,1,1)
  (same comment as for Bromine)
- Sodium [air, urban air close to ground]: 9.8888e-7 kg; lognormal variance with pedigree 0.95, pedigree (1,1,5,1,1)
  (same comment as for Bromine)
- COD, Chemical Oxygen Demand [water, ground-, long-term]: 0.015467 kg; lognormal variance with pedigree 0.05, pedigree (1,1,5,1,1)
  (same comment as for Chromium VI)
- Hydrogen fluoride [air, urban air close to ground]: 9.9135e-8 kg; lognormal variance with pedigree 0.94, pedigree (1,1,5,1,1)
  (same comment as for Bromine)
- Copper, ion [water, ground-, long-term]: 0.0056781 kg; lognormal variance with pedigree 0.46, pedigree (1,1,5,1,1)
  (same comment as for Chromium VI)
- TOC, Total Organic Carbon [water, ground-, long-term]: 0.0061205 kg; lognormal variance with pedigree 0.05, pedigree (1,1,5,1,1)
  (same comment as for Chromium VI)
- DOC, Dissolved Organic Carbon [water, surface water]: 1.7183e-5 kg; lognormal variance with pedigree 0.27, pedigree (1,1,5,1,1)
  (same comment as for Thallium)
- DOC, Dissolved Organic Carbon [water, ground-, long-term]: 0.0061205 kg; lognormal variance with pedigree 0.05, pedigree (1,1,5,1,1)
  (same comment as for Chromium VI)
- Tin [air, urban air close to ground]: 2.0288e-7 kg; lognormal variance with pedigree 0.88, pedigree (1,1,5,1,1)
  (same comment as for Bromine)
- Titanium [air, urban air close to ground]: 3.3731e-6 kg; lognormal variance with pedigree 0.56, pedigree (1,1,5,1,1)
  (same comment as for Bromine)
- Bromine [water, surface water]: 0.0034151 kg; lognormal variance with pedigree 0.42, pedigree (1,1,5,1,1)
  (same comment as for Thallium)
- Sulfate [water, surface water]: 0.00020213 kg; lognormal variance with pedigree 0.44, pedigree (1,1,5,1,1)
  (same comment as for Thallium)
- Silver, ion [water, ground-, long-term]: 9.9997e-5 kg; lognormal variance with pedigree 1, pedigree (1,1,5,1,1)
  (same comment as for Chromium VI)
- Cobalt [water, ground-, long-term]: 1.9445e-5 kg; lognormal variance with pedigree 1.15, pedigree (1,1,5,1,1)
  (same comment as for Chromium VI)
- Nitrate [water, ground-, long-term]: 0.00035997 kg; lognormal variance with pedigree 0.42, pedigree (1,1,5,1,1)
  (same comment as for Chromium VI)
- Vanadium [air, urban air close to ground]: 5.6507e-11 kg; lognormal variance with pedigree 1.15, pedigree (1,1,5,1,1)
  (same comment as for Bromine)
- Selenium [water, surface water]: 4.8087e-7 kg; lognormal variance with pedigree 1.25, pedigree (1,1,5,1,1)
  (same comment as for Thallium)
- Lead [air, urban air close to ground]: 4.123e-9 kg; lognormal variance with pedigree 0.91, pedigree (1,1,5,1,1)
  (same comment as for Bromine)
- Nitrate [water, surface water]: 0.00012817 kg; lognormal variance with pedigree 0.3, pedigree (1,1,5,1,1)
  (same comment as for Thallium)
- Methane, fossil [air, urban air close to ground]: 6.3821e-6 kg; lognormal variance with pedigree 0.091225, pedigree (2,3,5,2,1)
  Confidential data from 5 plants in Switzerland and Germany
  Uncertainty: & basic uncertainty of 1.5; confidential data from 5 plants in Switzerland and Germany
- Mercury [air, urban air close to ground]: 2.2119e-14 kg; lognormal variance with pedigree 1.77, pedigree (1,1,5,1,1)
  (same comment as for Bromine)
- Strontium [air, urban air close to ground]: 6.2219e-9 kg; lognormal variance with pedigree 1.1, pedigree (1,1,5,1,1)
  (same comment as for Bromine)
- Barium [air, urban air close to ground]: 1.3336e-7 kg; lognormal variance with pedigree 0.98, pedigree (1,1,5,1,1)
  (same comment as for Bromine)
- Barium [water, surface water]: 1.8337e-8 kg; lognormal variance with pedigree 1.84, pedigree (1,1,5,1,1)
  (same comment as for Thallium)
- Cadmium, ion [water, surface water]: 5.1826e-8 kg; lognormal variance with pedigree 0.95, pedigree (1,1,5,1,1)
  (same comment as for Thallium)
- Iron, ion [water, ground-, long-term]: 0.047984 kg; lognormal variance with pedigree 0.22, pedigree (1,1,5,1,1)
  (same comment as for Chromium VI)
- Copper, ion [water, surface water]: 2.2732e-7 kg; lognormal variance with pedigree 1.37, pedigree (1,1,5,1,1)
  (same comment as for Thallium)
- Barium [water, ground-, long-term]: 0.00011839 kg; lognormal variance with pedigree 1.01, pedigree (1,1,5,1,1)
  (same comment as for Chromium VI)
- Chromium [air, urban air close to ground]: 2.9247e-12 kg; lognormal variance with pedigree 0.97, pedigree (1,1,5,1,1)
  (same comment as for Bromine)
- Calcium, ion [water, ground-, long-term]: 0.0020984 kg; lognormal variance with pedigree 0.57, pedigree (1,1,5,1,1)
  (same comment as for Chromium VI)
- Cobalt [water, surface water]: 3.7992e-9 kg; lognormal variance with pedigree 1.65, pedigree (1,1,5,1,1)
  (same comment as for Thallium)
- Vanadium, ion [water, ground-, long-term]: 5.558e-6 kg; lognormal variance with pedigree 2.42, pedigree (1,1,5,1,1)
  (same comment as for Chromium VI)
- Phosphate [water, surface water]: 8.5729e-8 kg; lognormal variance with pedigree 1.14, pedigree (1,1,5,1,1)
  (same comment as for Thallium)
- Tin, ion [water, surface water]: 8.0697e-9 kg; lognormal variance with pedigree 1.23, pedigree (1,1,5,1,1)
  (same comment as for Thallium)
- Fluoride [water, surface water]: 1.4479e-5 kg; lognormal variance with pedigree 0.64, pedigree (1,1,5,1,1)
  (same comment as for Thallium)
- Arsenic, ion [water, surface water]: 2.5475e-6 kg; lognormal variance with pedigree 1.16, pedigree (1,1,5,1,1)
  (same comment as for Thallium)
- Manganese [water, surface water]: 2.7745e-8 kg; lognormal variance with pedigree 1.82, pedigree (1,1,5,1,1)
  (same comment as for Thallium)
- Arsenic [air, urban air close to ground]: 5.7637e-14 kg; lognormal variance with pedigree 1.5, pedigree (1,1,5,1,1)
  (same comment as for Bromine)
- Molybdenum [water, ground-, long-term]: 1.8697e-6 kg; lognormal variance with pedigree 1.5, pedigree (1,1,5,1,1)
  (same comment as for Chromium VI)
- Aluminium [water, ground-, long-term]: 0.0037711 kg; lognormal variance with pedigree 0.49, pedigree (1,1,5,1,1)
  (same comment as for Chromium VI)
- Thallium [air, urban air close to ground]: 2.8122e-10 kg; lognormal variance with pedigree 1.79, pedigree (1,1,5,1,1)
  (same comment as for Bromine)
- Nickel, ion [water, surface water]: 3.8453e-7 kg; lognormal variance with pedigree 1.4, pedigree (1,1,5,1,1)
  (same comment as for Thallium)
- Nickel [air, urban air close to ground]: 1.6291e-11 kg; lognormal variance with pedigree 0.86, pedigree (1,1,5,1,1)
  (same comment as for Bromine)
- Sodium, ion [water, surface water]: 2.9017e-5 kg; lognormal variance with pedigree 0.57, pedigree (1,1,5,1,1)
  (same comment as for Thallium)
- Dinitrogen monoxide [air, urban air close to ground]: 4.2315e-5 kg; lognormal variance with pedigree 1.44, pedigree (1,1,5,1,1)
  (same comment as for Nitrogen oxides)
- Hydrogen chloride [air, urban air close to ground]: 5.6534e-8 kg; lognormal variance with pedigree 0.54, pedigree (1,1,5,1,1)
  (same comment as for Bromine)
- Fluoride [water, ground-, long-term]: 0.00016802 kg; lognormal variance with pedigree 0.6, pedigree (1,1,5,1,1)
  (same comment as for Chromium VI)
- Sulfate [water, ground-, long-term]: 0.0012672 kg; lognormal variance with pedigree 0.57, pedigree (1,1,5,1,1)
  (same comment as for Chromium VI)
- Chromium VI [water, surface water]: 1.2965e-6 kg; lognormal variance with pedigree 0.83, pedigree (1,1,5,1,1)
  (same comment as for Thallium)
- Cadmium, ion [water, ground-, long-term]: 1.8112e-6 kg; lognormal variance with pedigree 6.74, pedigree (1,1,5,1,1)
  (same comment as for Chromium VI)
- Beryllium [water, surface water]: 2.1844e-10 kg; lognormal variance with pedigree 1.98, pedigree (1,1,5,1,1)
  (same comment as for Thallium)
- Sulfur dioxide [air, urban air close to ground]: 1.3658e-6 kg; lognormal variance with pedigree 0.81, pedigree (1,1,5,1,1)
  (same comment as for Bromine)
- Strontium [water, surface water]: 3.9175e-8 kg; lognormal variance with pedigree 1.78, pedigree (1,1,5,1,1)
  (same comment as for Thallium)
- Silicon [air, urban air close to ground]: 5.2006e-6 kg; lognormal variance with pedigree 0.44, pedigree (1,1,5,1,1)
  (same comment as for Bromine)
- Titanium, ion [water, surface water]: 1.6257e-8 kg; lognormal variance with pedigree 1.9, pedigree (1,1,5,1,1)
  (same comment as for Thallium)
- Cyanide [air, urban air close to ground]: 9.0185e-6 kg; lognormal variance with pedigree 1.44, pedigree (1,1,5,1,1)
  (same comment as for Nitrogen oxides)
- Cadmium [air, urban air close to ground]: 6.2509e-9 kg; lognormal variance with pedigree 1.02, pedigree (1,1,5,1,1)
  (same comment as for Bromine)
- Iron [air, urban air close to ground]: 3.9691e-8 kg; lognormal variance with pedigree 0.19, pedigree (1,1,5,1,1)
  (same comment as for Bromine)
- Ammonia [air, urban air close to ground]: 7.9399e-6 kg; lognormal variance with pedigree 1.44, pedigree (1,1,5,1,1)
  (same comment as for Nitrogen oxides)
- Manganese [air, urban air close to ground]: 2.8307e-14 kg; lognormal variance with pedigree 0.95, pedigree (1,1,5,1,1)
  (same comment as for Bromine)
- Mercury [water, surface water]: 6.8486e-9 kg; lognormal variance with pedigree 1.64, pedigree (1,1,5,1,1)
  (same comment as for Thallium)
- Silver, ion [water, surface water]: 3.4719e-9 kg; lognormal variance with pedigree 2.1, pedigree (1,1,5,1,1)
  (same comment as for Thallium)
- Zinc, ion [water, ground-, long-term]: 5.4129e-5 kg; lognormal variance with pedigree 4.45, pedigree (1,1,5,1,1)
  (same comment as for Chromium VI)
- Aluminium [water, surface water]: 1.894e-7 kg; lognormal variance with pedigree 0.9, pedigree (1,1,5,1,1)
  (same comment as for Thallium)
- Molybdenum [air, urban air close to ground]: 4.5205e-9 kg; lognormal variance with pedigree 1.52, pedigree (1,1,5,1,1)
  (same comment as for Bromine)
- Cobalt [air, urban air close to ground]: 7.0514e-13 kg; lognormal variance with pedigree 1.31, pedigree (1,1,5,1,1)
  (same comment as for Bromine)
- Iron, ion [water, surface water]: 1.1697e-6 kg; lognormal variance with pedigree 1.05, pedigree (1,1,5,1,1)
  (same comment as for Thallium)
- Beryllium [air, urban air close to ground]: 3.5152e-10 kg; lognormal variance with pedigree 1.77, pedigree (1,1,5,1,1)
  (same comment as for Bromine)
- COD, Chemical Oxygen Demand [water, surface water]: 4.1892e-5 kg; lognormal variance with pedigree 0.29, pedigree (1,1,5,1,1)
  (same comment as for Thallium)
- Phosphorus [air, urban air close to ground]: 3.7671e-7 kg; lognormal variance with pedigree 0.8, pedigree (1,1,5,1,1)
  (same comment as for Bromine)
- Selenium [water, ground-, long-term]: 9.9268e-7 kg; lognormal variance with pedigree 1.06, pedigree (1,1,5,1,1)
  (same comment as for Chromium VI)
- Selenium [air, urban air close to ground]: 7.4249e-15 kg; lognormal variance with pedigree 1.68, pedigree (1,1,5,1,1)
  (same comment as for Bromine)
- Antimony [water, surface water]: 0.001254 kg; lognormal variance with pedigree 0.44, pedigree (1,1,5,1,1)
  (same comment as for Thallium)
- Phosphate [water, ground-, long-term]: 5.1352e-5 kg; lognormal variance with pedigree 5.14, pedigree (1,1,5,1,1)
  (same comment as for Chromium VI)
- Chloride [water, ground-, long-term]: 0.00014346 kg; lognormal variance with pedigree 0.26, pedigree (1,1,5,1,1)
  (same comment as for Chromium VI)
- Strontium [water, ground-, long-term]: 6.2138e-5 kg; lognormal variance with pedigree 1.06, pedigree (1,1,5,1,1)
  (same comment as for Chromium VI)
- Chromium, ion [water, surface water]: 1.2607e-7 kg; lognormal variance with pedigree 0.88, pedigree (1,1,5,1,1)
  (same comment as for Thallium)
- Potassium, ion [water, surface water]: 1.5286e-5 kg; lognormal variance with pedigree 0.64, pedigree (1,1,5,1,1)
  (same comment as for Thallium)
- BOD5, Biological Oxygen Demand [water, surface water]: 2.3456e-5 kg; lognormal variance with pedigree 0.16, pedigree (1,1,5,1,1)
  (same comment as for Thallium)
- Carbon dioxide, fossil [air, urban air close to ground]: 2.2726 kg; lognormal variance with pedigree 0.05, pedigree (1,1,5,1,1)
  (same comment as for Bromine)
- Zinc, ion [water, surface water]: 1.0759e-7 kg; lognormal variance with pedigree 0.66, pedigree (1,1,5,1,1)
  (same comment as for Thallium)
- Bromine [water, ground-, long-term]: 0.00072461 kg; lognormal variance with pedigree 0.52, pedigree (1,1,5,1,1)
  (same comment as for Chromium VI)
- Arsenic, ion [water, ground-, long-term]: 3.1032e-6 kg; lognormal variance with pedigree 1.38, pedigree (1,1,5,1,1)
  (same comment as for Chromium VI)

## Sampling procedure
waste-specific calculation based on literature data

## Extrapolations
This dataset has been extrapolated from year 2000 to the year of the calculation (2021). The uncertainty has been adjusted accordingly.

## Review by Jürgen Sutter 2007-08-31
passed.
