# electricity production, oil

Dataset: EcoSpold 2, unit process
Geography: NO
Time period: 1980-01-01 to 2021-12-31
Technology level: current
Classification: EcoSpold01Categories: oil/power plants
Classification: ISIC rev.4 ecoinvent: 3510:Electric power generation, transmission and distribution
Synonyms: petroleum; heavy fuel oil
Tags: oil power; fossil fuels
Scenario: Business-as-Usual
System model: Allocation, cut-off by classification
Generated by: Karin Treyer
Published in: Jungbluth, N. 2007
Database: ecoinvent
isCopyrightProtected: true
accessRestrictedTo: 1

## General comment
This dataset represents the production of high voltage electricity at a grid-connected oil power plant with a capacity of 500 MW on the world in 2012.
Emissions are in general calculated/estimated based on the fuel oil type S, European quality. This dataset has been built on the basis of oil electricity production datasets in version 2 of the ecoinvent database which were elaborated by N. Jungbluth 2007 (see main publication in modelling and administrative). The values and emissions are a weighted average of emissions in all datasets in version 2 (which are considered as the global values) multiplied with an efficiency scaling factor. The datasets in version 2 were valid for the following countries: AT, BE, BR, GR, CN, CS, CZ, DE, DK, ES, FI, FR, GB, GR, HR, HU, IE, IT, JP, MK, NL, NO, PT, PL, SE, SI, SK. Weighting was made with electricity production data in those countries based on IEA/OECD 2010. The weighted averages are taken as global values and then scaled with a factor derived from the comparison of the global average efficiency and the efficiency valid for this dataset in order to account for a higher or lower fuel input for the production of 1 kWh, respectively. Nothing else than the efficiency has been adjusted in this dataset; besides that no new data collection has taken place
Comments:
- sulfur content of the oil is not adapted to local/average conditions.
- CO2 emissions are presented for the combustion and for the flue gas treatment
- Extensive comments on emissions can be found in Jungbluth 2007, on which this dataset is based on.
Emissions to the water are from flue gas treatment. Most of these data come from two power plants in Portugal (EDP 2001) and data from Slowakia
EDP (2001) Environmental Report 2000. Electricidade de Portugal, S.A., Lisboa, PT, retrieved from: www.edp.pt.
Slovenské elektrárne (2002) Environment Report 2001, Bratislave, SK, retrieved from: www.seas.sk.
IEA/OECD. 2010. Electricity Information 2010. International Energy Agency (IEA), Paris Cedex (FR). Part IV. Detailed OECD Electricity And Heat Data.

## Included activities start
From the constructed power plant ready to produce electricity and from the fuel ready to be used.

## Included activities end
This activity ends with 1kWh of high voltage electricity produced at the power plant and arrived at the busbar.

This dataset includes all energy use, use of chemicals, emissions to air and water including treatment of flue gasses and effluents. In an oil power plant, water is needed for cooling, feed water for the steam circuit, for the flue gas treatment, or other cleaning. This dataset only considers water use (evaporation) for cooling and steam circuit.

## Technology
Electricity production in a conventional oil power plant with a capacity of 500 MWe.

## Time period
The Annual Production Volume is valid for the year 2012.

## Parameters
- gross electricity production: 4.2e7 kWh; name gross_electricity; lognormal variance with pedigree 0.0012, pedigree (2,1,1,1,1)
  Literature value/statistics. For all OECD countries, gross electricity production 2012 with oil electricity only and CHP plants was taken from the IEA electricity information 2014, country tables 8 and 9. For all non-OECD countries, the values were found in the IEA energy balances of non-OECD countries 2014.
  IEA. 2014. Electricity Information 2014. ISBN 978-92-64-21692-1. International Energy Agency (IEA), Paris Cedex (FR).
  IEA/OECD. 2014. Energy balances of non-OECD countries 2014. International Energy Agency (IEA), Paris Cedex (FR).
  nan
- relation between the global and the country's efficiency of oil power plants: 1.22517 dimensionless; name relation_global_country; = efficiency_oil_global/ efficiency_oil_country; undefined min 1, max 1, standardDeviation95 0, pedigree (1,1,1,1,1)
  Parameter not needed in this dataset but present due to parent child relationship.
  nan
- water consumption, electricity production from oil, once-T and coolingP CS: 0.0005 m3/kWh; name WConsumption_EP_oil_onceT_andCP_CS; lognormal variance with pedigree 0.092025, pedigree (4,4,3,2,4)
  Estimated based on literature (Scown, 2011, Water Footprint of U.S. Transportation Fuels, SI).
  nan
- water withdrawal, electricity production from oil, recirculating CS: 0.0021 m3/kWh; name WWithdrawal_EP_oil_recirculating_CS; lognormal variance with pedigree 0.092025, pedigree (4,4,3,2,4)
  (same comment as for water consumption, electricity production from oil, once-T and cooling)
- fraction, process water, to air: 0.15 dimensionless; name fraction_PW_to_air; lognormal variance with pedigree 0.092025, pedigree (4,4,3,2,4)
  Literature value. In case when no industry/process specific data are available, default evaporation fraction value is used. This value is 15% and is based on literature (Statistics Canada, 2007 & Shaffer, K.H., 2008, Consumptive water use in the Great Lakes Basin, USGS & Shiklomanov, 2003, World Water Resources at the Beginning of the 21st Century) and has been approved by an expert.
  nan
- once-through and cooling pond cooling systems as a fraction of all cooling syste: 0.73 dimensionless; name once_through_andCP_CS_fractio_from_allCS; lognormal variance with pedigree 0.092025, pedigree (4,4,3,2,4)
  Calculated as an average of data available for Europe (Floerke, 2008, Future changes of freshwater needs in the electricity production sector) and USA (NERL, 2011, Estimating freshwater needs to meet future thermoelectric generation requirements).
  nan
- losses from gross electricity production: 0.07 dimensionless; name losses_gross_net; lognormal variance with pedigree 0.003525, pedigree (3,2,2,2,2)
  This value has been taken over from Denmark because the OECD statistics shows 0 losses for Norway, which is not realistic.
  nan
  Uncertainty: g
- average efficiency of oil power plants, country: 0.302 dimensionless; name efficiency_oil_country; lognormal variance with pedigree 0.0034, pedigree (3,2,1,3,2)
  Literature value/calculated value/Assumption. Net electrical efficiency based on the lower heating value (LHV).
  For all OECD countries, the IEA Electricity information 2014 provides data for the year 2012 on fuel input (TJ, Net calorific value NCV) and gross electricity production (GWh) as well as heat production (TJ) in tables 8 and 9 for each country for electricity only and Combined Heat and Power (CHP) plants each. Together with the information on own use (see parameter "losses"), the net electrical efficiency based on the NCV is calculated. However, the resulting value for Norway is 81.7%, which seems not to be realistic. Therefore, the efficiency value for Sweden is applied (similar producing conditions).
  For all non-OECD countries, data from the IEA Energy balances of non-OECD countries 2014 have been used. These tables do not always provide information on how much of the electricity has been produced in electricity only and in CHP plants, but often give the total value only.
  IEA. 2014. Electricity Information 2014. ISBN 978-92-64-21692-1. International Energy Agency (IEA), Paris Cedex (FR).
  IEA/OECD. 2014. Energy balances of non-OECD countries 2014. International Energy Agency (IEA), Paris Cedex (FR).
  nan
- recirculating cooling system as a fraction of all cooling systems: 0.27 dimensionless; name recirculating_CS_fraction_from_allCS; lognormal variance with pedigree 0.092025, pedigree (4,4,3,2,4)
  (same comment as for once-through and cooling pond cooling systems as a fraction of all coo)
- factor: input of MJ for the production of 1 kWh: 11.9205 MJ/kWh; name factor_MJ_kWh; = 1*3.6/efficiency_oil_country; lognormal variance with pedigree 0.0006, pedigree (1,1,1,1,1)
  Calculated value. 3.6 MJ = 1kWh.
  nan
- water consumption, electricity production from oil, recirculating CS: 0.0018 m3/kWh; name WConsumption_EP_oil_recirculatingCS; lognormal variance with pedigree 0.092025, pedigree (4,4,3,2,4)
  (same comment as for water consumption, electricity production from oil, once-T and cooling)
- fraction, water, completely softened, to air: 0.15 dimensionless; name fraction_WCS_to_air; = fraction_PW_to_air; lognormal variance with pedigree 0.092025, pedigree (4,4,3,2,4)
  Calculated value. See comment in the other parametres present in this dataset. Water, completely softened is considered to be always used as process water, thus process water fractions to air are applied to all water, completely softened input flows to calculate the amount of water consumed in the processes.
  nan
- fraction, cooling water, to air: 0.0118019 dimensionless; name fraction_CW_to_air; lognormal variance with pedigree 0.092025, pedigree (4,4,3,2,4)
  Calculated value
  nan
- fraction, water, decarbonised, to air: 0.0118019 dimensionless; name fraction_WDC_to_air; = fraction_CW_to_air; lognormal variance with pedigree 0.092025, pedigree (4,4,3,2,4)
  Calculated value. See comments in the other parametres present in this dataset. Decarbonised water is considered to be always used as cooling water, thus cooling water fractions to air are applied to all carbonised water input flows to calculate the amount of water consumed in the processes.
  nan
- water withdrawal, electricity production from oil, once-T and coolingP CS: 0.098 m3/kWh; name WWithdrawal_EP_oil_onceT_andCP_CS; lognormal variance with pedigree 0.092025, pedigree (4,4,3,2,4)
  (same comment as for water consumption, electricity production from oil, once-T and cooling)
- average efficiency of oil power plants, global: 0.37 dimensionless; name efficiency_oil_global; lognormal variance with pedigree 0.003325, pedigree (3,2,1,2,2)
  Literature value/calculated value. Net electrical efficiency based on the lower heating value (LHV).
  For all OECD countries, the IEA Electricity information 2014 provides data for the year 2012 on fuel input (TJ, Net calorific value NCV) and gross electricity production (GWh) as well as heat production (TJ) in tables 8 and 9 for each country for electricity only and Combined Heat and Power (CHP) plants each. Together with the information on own use (see parameter "losses"), the net electrical efficiency based on the NCV is calculated.
  For all non-OECD countries, data from the IEA Energy balances of non-OECD countries 2014 have been used. These tables do not always provide information on how much of the electricity has been produced in electricity only and in CHP plants, but often give the total value only.
  IEA. 2014. Electricity Information 2014. ISBN 978-92-64-21692-1. International Energy Agency (IEA), Paris Cedex (FR).
  IEA/OECD. 2014. Energy balances of non-OECD countries 2014. International Energy Agency (IEA), Paris Cedex (FR).
  nan

## Reference product
- electricity, high voltage: 1 kWh; name electricity; By-product classification allocatable product; CPC 17100: Electrical energy
  production volume 3.906e7 kWh; name apv_electricity; = gross_electricity* (1-losses_gross_net)
    Calculated value.
  property price 0.0977 EUR2005; name electricity_price_EUR2005
    Temporary price data. Calculated as 90% of purchasers price based on: 94% of the average price (to account for a 6% loss in transformation and transmission) for electricity for industrial consumersin 2005 (excluded taxes). From IEA.

## Inputs from technosphere
- waste mineral oil: -0.0002531 kg; name waste_oil; = (4.69E-05 * factor_MJ_kWh)*-1; source Jungbluth, N. 2007; lognormal variance with pedigree 0.0039, pedigree (2,3,3,3,1)
  Average of literature data
  Amount was scaled to the amount of reference product.
  production volume 21837.4 kg; = apv_electricity *waste_oil
    Calculated from the production volume of electricity produced in proportion to the respective output amounts.
  property price 0 EUR2005; name waste_oil_price_EUR2005
  properties: carbon content, fossil 0.864444, water content 0.111111, wet mass 1 kg, dry mass 0.9 kg, heating value, net 34.7 MJ
  note on carbon content, fossil: Tab A.6, ecoinvent v2.2 report 13_I. C content has been calculated after data in the tables, and then referred to 1 kg DM
  note on heating value, net: Value taken from the general comment of the treatment dataset.
- oil power plant, 500MW: 6.66963e-12 unit; = 1.2359E-12 * factor_MJ_kWh; source Jungbluth, N. 2007; lognormal variance with pedigree 0.3506, pedigree (2,5,5,5,1)
  Estimation based on case study
- limestone, crushed, washed: 0.00742677 kg; = 0.0013762 * factor_MJ_kWh; source Jungbluth, N. 2007, p. Tab. 12.11 p. 228; lognormal variance with pedigree 0.0147, pedigree (2,4,3,3,1)
  IPPC 2001 for flue gas treatment
  Amount was scaled to the amount of reference product.
  properties: water content 0.00200401, dry mass 0.998 kg, carbon content, fossil 0.117257, wet mass 1 kg
  note on carbon content, fossil: Table 3.1, ecoinvent v2.2 report 7, part VII, pg 3. MW CaCO3=100, MW MgCO3=84. C content of limestone is 0.117257 kg/kg DM
- bilge oil: -1.08633e-5 kg; name bilge_oil; = (2.013E-06 * factor_MJ_kWh)*-1; source Jungbluth, N. 2007; lognormal variance with pedigree 0.0033, pedigree (2,3,3,3,1)
  Average of literature data
  Amount was scaled to the amount of reference product.
  production volume 937.285 kg; = apv_electricity * bilge_oil
    (same comment as for waste mineral oil)
  property price 0 EUR2005; name bilge_oil_price_EUR2005
  properties: heating value, net 1.92 MJ, dry mass 0.1 kg, wet mass 1 kg, carbon content, fossil 0.84, water content 9
- water, decarbonised: 0.269829 kg; name water_decarbonised_input; = 0.05 * factor_MJ_kWh; source Jungbluth, N. 2007, p. Tab. 12.10 p. 228; lognormal variance with pedigree 0.0027, pedigree (2,2,3,1,1)
  Literature data for this country
  Amount was scaled to the amount of reference product.
  Literature data for this country
  Amount was scaled to the amount of reference product.
  properties: wet mass 1 kg
- oil power plant, 500MW: 0 unit; source Jungbluth, N. 2007
  Estimation based on case study
- heavy fuel oil: 0.130986 kg; = 0.024272 * factor_MJ_kWh; source Jungbluth, N. 2007; lognormal variance with pedigree 0.0027, pedigree (2,2,3,1,1)
  Literature data for heating value
  Amount was scaled to the amount of reference product.
  properties: heating value, net 41.2 MJ, carbon content, fossil 0.849, wet mass 1 kg, dry mass 1 kg
- lignite ash: -7.53417e-6 kg; name lignite_ash; = (1.3961E-06 * factor_MJ_kWh)*-1; source Jungbluth, N. 2007; lognormal variance with pedigree 0.0033, pedigree (2,3,3,3,1)
  Average of literature data
  Amount was scaled to the amount of reference product.
  production volume 650.046 kg; = apv_electricity * lignite_ash
    (same comment as for waste mineral oil)
  property price 0 EUR2005; name lignite_ash_price_EUR2005
  properties: wet mass 1 kg, dry mass 1 kg
- municipal solid waste: -8.51634e-5 kg; name municipal_waste; = (1.5781E-05 * factor_MJ_kWh)*-1; source Jungbluth, N. 2007; lognormal variance with pedigree 0.0039, pedigree (2,3,3,3,1)
  Average of literature data
  Amount was scaled to the amount of reference product.
  production volume 7347.88 kg; = apv_electricity * municipal_waste
    (same comment as for waste mineral oil)
  property price 0 EUR2005; name soild_waste_price_EUR2005
  properties: wet mass 1 kg, dry mass 0.771 kg, carbon content, non-fossil 0.261655, carbon content, fossil 0.171549, water content 0.297017, heating value, net 11.74 MJ
  note on carbon content, non-fossil: MSW composition in tab 4.1, ecoinvent v2.2 report 13_I. C content referred to 1 kg DM
- ammonia, anhydrous, liquid: 0.000341096 kg; = 6.3206E-05 * factor_MJ_kWh; source Jungbluth, N. 2007, p. Tab. 12.11 p. 228; lognormal variance with pedigree 0.0147, pedigree (2,4,3,3,1)
  IPPC 2001 for flue gas treatment
  Amount was scaled to the amount of reference product.
  properties: wet mass 1 kg, dry mass 1 kg
- fly ash and scrubber sludge: -1.37073e-5 kg; name fly_ash; = (2.54E-06 * factor_MJ_kWh)*-1; source Jungbluth, N. 2007, p. Tab. 12.27, p. 238; lognormal variance with pedigree 0.0033, pedigree (2,3,3,3,1)
  Average of literature data
  Amount was scaled to the amount of reference product.
  production volume 1182.66 kg; = apv_electricity * fly_ash
    (same comment as for waste mineral oil)
  property price 0 EUR2005; name fly_ash_price_EUR2005
  properties: water content 9, wet mass 1 kg, dry mass 0.1 kg, carbon content, fossil 0.167
- residue from cooling tower: -7.87793e-5 kg; name cooling_tower; = (1.4598E-05 * factor_MJ_kWh)*-1; source Jungbluth, N. 2007, p. Tab. 12.27, p. 238; lognormal variance with pedigree 0.0033, pedigree (2,3,3,3,1)
  Average of literature data
  Amount was scaled to the amount of reference product.
  production volume 6797.06 kg; = apv_electricity * cooling_tower
    (same comment as for waste mineral oil)
  property price 0 EUR2005; name cooling_tower_price_EUR2005
  properties: wet mass 1 kg, carbon content, fossil 0.0544233, water content 0.428571, dry mass 0.7 kg
- water, completely softened: 0.0539658 kg; name water_softened_input; = 0.01 * factor_MJ_kWh; source Jungbluth, N. 2007, p. Tab. 12.10 p. 228; lognormal variance with pedigree 0.0027, pedigree (2,2,3,1,1)
  (same comment as for water, decarbonised)
  properties: wet mass 1 kg

## Inputs from nature
- Water, cooling, unspecified natural origin [natural resource, in water]: 0.0432479 m3; name water_cooling_UNO_input; source Scown, C.D., et al. 2011, p. Tab. 12.10 p. 228; lognormal variance with pedigree 0.130025, pedigree (4,4,5,2,4)
  Estimation with literature data, basic uncertainty estimated = 3
  Amount was scaled to the amount of reference product.
  Calculated based on literature data. 9.7 MJ is calculated efficiency of the electricity production, average of all available regions.

## Emissions to nature
- Copper [air, urban air close to ground]: 3.57874e-7 kg; = 6.6315E-08 * factor_MJ_kWh; source Jungbluth, N. 2007, p. Tab. 12.23, Tab. 12.24; lognormal variance with pedigree 1.312, pedigree (1,1,3,1,1)
  Calculation based on particle emission. Deviation calculated from ranges
  Amount was scaled to the amount of reference product.
- Sulfide [water, surface water]: 2.90066e-7 kg; = 5.375E-08 * factor_MJ_kWh; source Jungbluth, N. 2007, p. Tab. 12.26, p. 238; lognormal variance with pedigree 0.272, pedigree (1,1,3,1,1)
  Mean of values for Europe, range of concentrations
  Amount was scaled to the amount of reference product.
- Manganese [air, urban air close to ground]: 8.37603e-8 kg; = 1.5521E-08 * factor_MJ_kWh; source Jungbluth, N. 2007, p. Tab. 12.23, Tab. 12.24; lognormal variance with pedigree 1.212, pedigree (1,1,3,1,1)
  (same comment as for Copper)
- Sulfite [water, surface water]: 9.73327e-6 kg; = 1.8036E-06 * factor_MJ_kWh; source Jungbluth, N. 2007, p. Tab. 12.26, p. 238; lognormal variance with pedigree 0.032, pedigree (1,1,3,1,1)
  (same comment as for Sulfide)
- Dinitrogen monoxide [air, urban air close to ground]: 2.15863e-5 kg; = 4E-06 * factor_MJ_kWh; source Jungbluth, N. 2007, p. Tab. 12.16 p. 232; lognormal variance with pedigree 0.352, pedigree (1,1,3,1,1)
  Calculation from ranges
  Amount was scaled to the amount of reference product.
- Chloride [water, surface water]: 0.000131882 kg; = 2.4438E-05 * factor_MJ_kWh; source Jungbluth, N. 2007, p. Tab. 12.26, p. 238; lognormal variance with pedigree 0.892, pedigree (1,1,3,1,1)
  (same comment as for Sulfide)
- Particulates, > 10 um [air, urban air close to ground]: 3.80718e-5 kg; = 7.0548E-06 * factor_MJ_kWh; source Jungbluth, N. 2007, p. Tab. 12.17 / Tab. 12.18; lognormal variance with pedigree 0.0427, pedigree (2,2,3,1,1)
  Literature data for this country
  Amount was scaled to the amount of reference product.
- Vanadium [air, urban air close to ground]: 7.61458e-6 kg; = 1.411E-06 * factor_MJ_kWh; source Jungbluth, N. 2007; lognormal variance with pedigree 1.392, pedigree (1,1,3,1,1)
  (same comment as for Copper)
- Vanadium, ion [water, surface water]: 1.94973e-7 kg; = 3.6129E-08 * factor_MJ_kWh; source Jungbluth, N. 2007, p. Tab. 12.26, p. 238; lognormal variance with pedigree 0.672, pedigree (1,1,3,1,1)
  (same comment as for Sulfide)
- Cadmium, ion [water, surface water]: 1.56852e-9 kg; = 2.9065E-10 * factor_MJ_kWh; source Jungbluth, N. 2007, p. Tab. 12.26, p. 238; lognormal variance with pedigree 0.422, pedigree (1,1,3,1,1)
  (same comment as for Sulfide)
- Calcium [air, urban air close to ground]: 1.61897e-7 kg; = 3E-08 * factor_MJ_kWh; source Jungbluth, N. 2007, p. Tab. 12.25; lognormal variance with pedigree 0.1007, pedigree (3,3,5,3,3)
  Literature
  Amount was scaled to the amount of reference product.
- Chromium, ion [water, surface water]: 1.65233e-8 kg; = 3.0618E-09 * factor_MJ_kWh; source Jungbluth, N. 2007, p. Tab. 12.26, p. 238; lognormal variance with pedigree 0.632, pedigree (1,1,3,1,1)
  (same comment as for Sulfide)
- Sulfur dioxide [air, urban air close to ground]: 0.00236413 kg; = 0.00043808 * factor_MJ_kWh; source Jungbluth, N. 2007, p. Tab. 12.14 p. 230; lognormal variance with pedigree 0.0027, pedigree (2,2,3,1,1)
  Literature data for this country
  Amount was scaled to the amount of reference product.
- Lead [air, urban air close to ground]: 2.5889e-7 kg; = 4.7973E-08 * factor_MJ_kWh; source Jungbluth, N. 2007; lognormal variance with pedigree 1.212, pedigree (1,1,3,1,1)
  (same comment as for Copper)
- Ethanol [air, urban air close to ground]: 2.8705e-6 kg; = 5.3191E-07 * factor_MJ_kWh; source Jungbluth, N. 2007; lognormal variance with pedigree 0.092, pedigree (1,1,3,1,1)
  Calculation based on VOC emission. Deviation calculated from ranges
  Amount was scaled to the amount of reference product.
- Beryllium [air, urban air close to ground]: 3.00978e-10 kg; = 5.5772E-11 * factor_MJ_kWh; source Jungbluth, N. 2007; lognormal variance with pedigree 0.6927, pedigree (3,3,5,3,1)
  Literature
  Amount was scaled to the amount of reference product.
- Iron [air, urban air close to ground]: 3.77761e-7 kg; = 7E-08 * factor_MJ_kWh; source Jungbluth, N. 2007; lognormal variance with pedigree 0.7107, pedigree (3,3,5,3,3)
  Literature
  Amount was scaled to the amount of reference product.
- Lead [water, surface water]: 2.69225e-8 kg; = 4.9888E-09 * factor_MJ_kWh; source Jungbluth, N. 2007, p. Tab. 12.26, p. 238; lognormal variance with pedigree 0.502, pedigree (1,1,3,1,1)
  (same comment as for Sulfide)
- Selenium [air, urban air close to ground]: 3.80718e-8 kg; = 7.0548E-09 * factor_MJ_kWh; source Jungbluth, N. 2007; lognormal variance with pedigree 1.212, pedigree (1,1,3,1,1)
  (same comment as for Copper)
- Water [water, unspecified]: 0.04305 m3; name water_to_water_unspecified; = (water_softened_input/1000)*(1-fraction_WCS_to_air)+(water_decarbonised_input/1000)*(1-fraction_WDC_to_air)+water_cooling_UNO_input*(1-fraction_CW_to_air); lognormal variance with pedigree 0.130025, pedigree (4,4,5,2,4)
  Calculated value based on literature values and expert opinion. See comments in the parametres" comment field.
  property fraction, origin: salt water 0; name fraction_origin_salt_water_Ww
  property fraction, origin: unspecified 0.99643; name fraction_origin_unspecified_Ww
  property fraction, origin: fresh water 0.00356966; name fraction_origin_fresh_water_Ww
- Hydrocarbons, aliphatic, alkanes, unspecified [air, urban air close to ground]: 5.74088e-6 kg; = 1.0638E-06 * factor_MJ_kWh; source Jungbluth, N. 2007; lognormal variance with pedigree 0.092, pedigree (1,1,3,1,1)
  (same comment as for Ethanol)
- Copper, ion [water, surface water]: 1.36868e-8 kg; = 2.5362E-09 * factor_MJ_kWh; source Jungbluth, N. 2007, p. Tab. 12.26, p. 238; lognormal variance with pedigree 0.722, pedigree (1,1,3,1,1)
  (same comment as for Sulfide)
- Cobalt [air, urban air close to ground]: 2.66505e-7 kg; = 4.9384E-08 * factor_MJ_kWh; source Jungbluth, N. 2007, p. Tab. 12.23, Tab. 12.24; lognormal variance with pedigree 1.212, pedigree (1,1,3,1,1)
  (same comment as for Copper)
- Carbon dioxide, fossil [air, unspecified]: 0.0033346 kg; = 0.00061791 * factor_MJ_kWh; source Jungbluth, N. 2007, p. Tab. 12.29, Tab. 12.30; lognormal variance with pedigree 0.0206, pedigree (2,5,3,1,1)
  Calculation for limestone use
  Amount was scaled to the amount of reference product.
- AOX, Adsorbable Organic Halogen as Cl [water, surface water]: 2.28831e-8 kg; = 4.2403E-09 * factor_MJ_kWh; source Jungbluth, N. 2007, p. Tab. 12.26, p. 238; lognormal variance with pedigree 0.002, pedigree (1,1,3,1,1)
  (same comment as for Sulfide)
- COD, Chemical Oxygen Demand [water, surface water]: 9.91622e-6 kg; = 1.8375E-06 * factor_MJ_kWh; source Jungbluth, N. 2007, p. Tab. 12.26, p. 238; lognormal variance with pedigree 0.482, pedigree (1,1,3,1,1)
  (same comment as for Sulfide)
- Tin, ion [water, surface water]: 6.44568e-10 kg; = 1.1944E-10 * factor_MJ_kWh; source Jungbluth, N. 2007, p. Tab. 12.26, p. 238; lognormal variance with pedigree 0.002, pedigree (1,1,3,1,1)
  (same comment as for Sulfide)
- Formaldehyde [air, urban air close to ground]: 4.30577e-6 kg; = 7.9787E-07 * factor_MJ_kWh; source Jungbluth, N. 2007, p. Tab. 12.19, Tab. 12.20; lognormal variance with pedigree 0.092, pedigree (1,1,3,1,1)
  (same comment as for Ethanol)
- Iron, ion [water, surface water]: 6.78134e-7 kg; = 1.2566E-07 * factor_MJ_kWh; source Jungbluth, N. 2007, p. Tab. 12.26, p. 238; lognormal variance with pedigree 0.242, pedigree (1,1,3,1,1)
  (same comment as for Sulfide)
- Zinc [air, urban air close to ground]: 1.82744e-7 kg; = 3.3863E-08 * factor_MJ_kWh; source Jungbluth, N. 2007; lognormal variance with pedigree 1.212, pedigree (1,1,3,1,1)
  (same comment as for Copper)
- Sodium [air, urban air close to ground]: 1.61897e-6 kg; = 3E-07 * factor_MJ_kWh; source Jungbluth, N. 2007, p. Tab. 12.25; lognormal variance with pedigree 0.1007, pedigree (3,3,5,3,3)
  Literature
  Amount was scaled to the amount of reference product.
- Cadmium [air, urban air close to ground]: 2.40612e-8 kg; = 4.4586E-09 * factor_MJ_kWh; source Jungbluth, N. 2007, p. Tab. 12.23, Tab. 12.24; lognormal variance with pedigree 1.212, pedigree (1,1,3,1,1)
  (same comment as for Copper)
- BOD5, Biological Oxygen Demand [water, surface water]: 9.06626e-6 kg; = 1.68E-06 * factor_MJ_kWh; source Jungbluth, N. 2007, p. Tab. 12.26, p. 238; lognormal variance with pedigree 0.292, pedigree (1,1,3,1,1)
  (same comment as for Sulfide)
- Hydrogen fluoride [air, urban air close to ground]: 1.62437e-7 kg; = 3.01E-08 * factor_MJ_kWh; source Jungbluth, N. 2007, p. Tab. 12.25; lognormal variance with pedigree 0.0612, pedigree (2,3,3,1,3)
  Literature
  Amount was scaled to the amount of reference product.
- Particulates, > 2.5 um, and < 10um [air, urban air close to ground]: 4.56864e-5 kg; = 8.4658E-06 * factor_MJ_kWh; source Jungbluth, N. 2007, p. Tab. 12.17 / Tab. 12.18; lognormal variance with pedigree 0.1227, pedigree (2,2,3,1,1)
  Literature data for this country
  Amount was scaled to the amount of reference product.
- Hypochlorite [water, ocean]: 1.99673e-6 kg; = 3.7E-07 * factor_MJ_kWh; source Jungbluth, N. 2007; lognormal variance with pedigree 0.1021, pedigree (3,4,5,3,3)
  Literature
  Amount was scaled to the amount of reference product.
- Mercury [air, urban air close to ground]: 8.09487e-10 kg; = 1.5E-10 * factor_MJ_kWh; source Jungbluth, N. 2007; lognormal variance with pedigree 1.632, pedigree (1,1,3,1,1)
  Calculation from ranges
  Amount was scaled to the amount of reference product.
- Hypochlorite [water, surface water]: 1.78087e-6 kg; = 3.3E-07 * factor_MJ_kWh; source Jungbluth, N. 2007; lognormal variance with pedigree 0.1021, pedigree (3,4,5,3,3)
  Literature
  Amount was scaled to the amount of reference product.
- Hydrocarbons, unspecified [water, surface water]: 2.00267e-7 kg; = 3.711E-08 * factor_MJ_kWh; source Jungbluth, N. 2007, p. Tab. 12.26, p. 238; lognormal variance with pedigree 0.042, pedigree (1,1,3,1,1)
  (same comment as for Sulfide)
- Water [air, unspecified]: 0.000521687 m3; name water_to_air_unspecified; = (water_softened_input/1000)*fraction_WCS_to_air+(water_decarbonised_input/1000)*fraction_WDC_to_air+water_cooling_UNO_input*fraction_CW_to_air; lognormal variance with pedigree 0.130025, pedigree (4,4,5,2,4)
  (same comment as for Water)
  property fraction, origin: fresh water 0.0107105; name fraction_origin_fresh_water
  property fraction, origin: salt water 0; name fraction_origin_salt_water
  property fraction, origin: unspecified 0.98929; name fraction_origin_unspecified
- Dioxins, measured as 2,3,7,8-tetrachlorodibenzo-p-dioxin [air, urban air close to ground]: 5.39658e-14 kg; = 1E-14 * factor_MJ_kWh; source Jungbluth, N. 2007, p. Tab. 12.22 p. 235; lognormal variance with pedigree 0.3147, pedigree (2,4,3,3,1)
  Literature
  Amount was scaled to the amount of reference product.
- Nitrogen oxides [air, urban air close to ground]: 0.000691194 kg; = 0.00012808 * factor_MJ_kWh; source Jungbluth, N. 2007, p. Tab. 12.15 p. 231; lognormal variance with pedigree 0.0427, pedigree (2,2,3,1,1)
  Literature data for this country
  Amount was scaled to the amount of reference product.
- Acetaldehyde [air, urban air close to ground]: 1.40597e-6 kg; = 2.6053E-07 * factor_MJ_kWh; source Jungbluth, N. 2007; lognormal variance with pedigree 0.092, pedigree (1,1,3,1,1)
  (same comment as for Ethanol)
- Chromium [air, urban air close to ground]: 8.74084e-8 kg; = 1.6197E-08 * factor_MJ_kWh; source Jungbluth, N. 2007, p. Tab. 12.23, Tab. 12.24; lognormal variance with pedigree 1.462, pedigree (1,1,3,1,1)
  (same comment as for Copper)
- Benzene [air, urban air close to ground]: 2.8705e-7 kg; = 5.3191E-08 * factor_MJ_kWh; source Jungbluth, N. 2007; lognormal variance with pedigree 0.092, pedigree (1,1,3,1,1)
  (same comment as for Ethanol)
- Ammonia [air, urban air close to ground]: 5.39658e-7 kg; = 1E-07 * factor_MJ_kWh; source Jungbluth, N. 2007, p. p.232; lognormal variance with pedigree 1.102, pedigree (1,1,3,1,1)
  Calculation from ranges
  Amount was scaled to the amount of reference product.
- Benzo(a)pyrene [air, urban air close to ground]: 8.09487e-11 kg; = 1.5E-11 * factor_MJ_kWh; source Jungbluth, N. 2007; lognormal variance with pedigree 0.3707, pedigree (3,3,5,3,3)
  Literature
  Amount was scaled to the amount of reference product.
- Arsenic [air, urban air close to ground]: 5.02546e-8 kg; = 9.3123E-09 * factor_MJ_kWh; source Jungbluth, N. 2007, p. Tab. 12.23, Tab. 12.24; lognormal variance with pedigree 1.212, pedigree (1,1,3,1,1)
  (same comment as for Copper)
- Arsenic, ion [water, surface water]: 6.44568e-10 kg; = 1.1944E-10 * factor_MJ_kWh; source Jungbluth, N. 2007, p. Tab. 12.26, p. 238; lognormal variance with pedigree 0.002, pedigree (1,1,3,1,1)
  (same comment as for Sulfide)
- Mercury [water, surface water]: 6.76839e-10 kg; = 1.2542E-10 * factor_MJ_kWh; source Jungbluth, N. 2007, p. Tab. 12.26, p. 238; lognormal variance with pedigree 0.562, pedigree (1,1,3,1,1)
  (same comment as for Sulfide)
- DOC, Dissolved Organic Carbon [water, surface water]: 5.54337e-6 kg; = 1.0272E-06 * factor_MJ_kWh; source Jungbluth, N. 2007; lognormal variance with pedigree 0.002, pedigree (1,1,3,1,1)
  Calculated as equal to TOC.
  Amount was scaled to the amount of reference product.
- Phosphorus [water, surface water]: 9.99123e-8 kg; = 1.8514E-08 * factor_MJ_kWh; source Jungbluth, N. 2007, p. Tab. 12.26, p. 238; lognormal variance with pedigree 0.002, pedigree (1,1,3,1,1)
  (same comment as for Sulfide)
- Acetone [air, urban air close to ground]: 1.40597e-6 kg; = 2.6053E-07 * factor_MJ_kWh; source Jungbluth, N. 2007; lognormal variance with pedigree 0.092, pedigree (1,1,3,1,1)
  (same comment as for Ethanol)
- Sulfate [water, surface water]: 0.00107807 kg; = 0.00019977 * factor_MJ_kWh; source Jungbluth, N. 2007, p. Tab. 12.26, p. 238; lognormal variance with pedigree 0.022, pedigree (1,1,3,1,1)
  (same comment as for Sulfide)
- Suspended solids, unspecified [water, surface water]: 8.20766e-6 kg; = 1.5209E-06 * factor_MJ_kWh; source Jungbluth, N. 2007, p. Tab. 12.26, p. 238; lognormal variance with pedigree 0.052, pedigree (1,1,3,1,1)
  (same comment as for Sulfide)
- Thallium [water, surface water]: 1.99825e-8 kg; = 3.7028E-09 * factor_MJ_kWh; source Jungbluth, N. 2007, p. Tab. 12.26, p. 238; lognormal variance with pedigree 0.002, pedigree (1,1,3,1,1)
  (same comment as for Sulfide)
- Molybdenum [air, urban air close to ground]: 5.78675e-8 kg; = 1.0723E-08 * factor_MJ_kWh; source Jungbluth, N. 2007; lognormal variance with pedigree 1.212, pedigree (1,1,3,1,1)
  (same comment as for Copper)
- Zinc, ion [water, surface water]: 3.40524e-8 kg; = 6.31E-09 * factor_MJ_kWh; source Jungbluth, N. 2007, p. Tab. 12.26, p. 238; lognormal variance with pedigree 0.262, pedigree (1,1,3,1,1)
  (same comment as for Sulfide)
- Hydrocarbons, aliphatic, unsaturated [air, urban air close to ground]: 2.8705e-7 kg; = 5.3191E-08 * factor_MJ_kWh; source Jungbluth, N. 2007; lognormal variance with pedigree 0.092, pedigree (1,1,3,1,1)
  (same comment as for Ethanol)
- PAH, polycyclic aromatic hydrocarbons [air, urban air close to ground]: 9.71385e-9 kg; = 1.8E-09 * factor_MJ_kWh; source Jungbluth, N. 2007, p. Tab. 12.21, p. 235; lognormal variance with pedigree 0.3147, pedigree (2,4,3,3,1)
  Literature
  Amount was scaled to the amount of reference product.
- Hydrocarbons, aromatic [air, urban air close to ground]: 5.74088e-8 kg; = 1.0638E-08 * factor_MJ_kWh; source Jungbluth, N. 2007; lognormal variance with pedigree 0.092, pedigree (1,1,3,1,1)
  (same comment as for Ethanol)
- Hydrogen chloride [air, urban air close to ground]: 2.43386e-7 kg; = 4.51E-08 * factor_MJ_kWh; source Jungbluth, N. 2007, p. Tab. 12.25; lognormal variance with pedigree 0.0612, pedigree (2,3,3,1,3)
  Literature
  Amount was scaled to the amount of reference product.
- Methane, fossil [air, urban air close to ground]: 2.8705e-5 kg; = 5.3191E-06 * factor_MJ_kWh; source Jungbluth, N. 2007, p. Tab. 12.19, Tab. 12.20; lognormal variance with pedigree 0.092, pedigree (1,1,3,1,1)
  (same comment as for Ethanol)
- Chromium VI [air, urban air close to ground]: 1.67947e-9 kg; = 3.1121E-10 * factor_MJ_kWh; source Jungbluth, N. 2007, p. Tab. 12.23, Tab. 12.24; lognormal variance with pedigree 2.2927, pedigree (3,3,5,3,1)
  Literature, basic uncertainity = 20
  Amount was scaled to the amount of reference product.
- Fluoride [water, surface water]: 1.09583e-6 kg; = 2.0306E-07 * factor_MJ_kWh; source Jungbluth, N. 2007, p. Tab. 12.26, p. 238; lognormal variance with pedigree 0.762, pedigree (1,1,3,1,1)
  (same comment as for Sulfide)
- Carbon monoxide, fossil [air, urban air close to ground]: 5.39658e-5 kg; = 1E-05 * factor_MJ_kWh; source Jungbluth, N. 2007, p. Tab. 12.13, p. 229; lognormal variance with pedigree 0.162, pedigree (1,1,3,1,1)
  Calculation from ranges
  Amount was scaled to the amount of reference product.
- Cobalt [water, surface water]: 1.28919e-9 kg; = 2.3889E-10 * factor_MJ_kWh; source Jungbluth, N. 2007, p. Tab. 12.26, p. 238; lognormal variance with pedigree 0.002, pedigree (1,1,3,1,1)
  (same comment as for Sulfide)
- TOC, Total Organic Carbon [water, surface water]: 5.54337e-6 kg; = 1.0272E-06 * factor_MJ_kWh; source Jungbluth, N. 2007, p. Tab. 12.26, p. 238; lognormal variance with pedigree 0.002, pedigree (1,1,3,1,1)
  (same comment as for Sulfide)
- Acetic acid [air, urban air close to ground]: 5.74088e-6 kg; = 1.0638E-06 * factor_MJ_kWh; source Jungbluth, N. 2007; lognormal variance with pedigree 0.092, pedigree (1,1,3,1,1)
  (same comment as for Ethanol)
- Nickel, ion [water, surface water]: 9.5363e-8 kg; = 1.7671E-08 * factor_MJ_kWh; source Jungbluth, N. 2007, p. Tab. 12.26, p. 238; lognormal variance with pedigree 0.342, pedigree (1,1,3,1,1)
  (same comment as for Sulfide)
- Nitrogen [water, surface water]: 4.40685e-5 kg; = 8.166E-06 * factor_MJ_kWh; source Jungbluth, N. 2007, p. Tab. 12.26, p. 238; lognormal variance with pedigree 0.032, pedigree (1,1,3,1,1)
  (same comment as for Sulfide)
- Methanol [air, urban air close to ground]: 2.8705e-6 kg; = 5.3191E-07 * factor_MJ_kWh; source Jungbluth, N. 2007; lognormal variance with pedigree 0.092, pedigree (1,1,3,1,1)
  (same comment as for Ethanol)
- Manganese [water, surface water]: 1.93376e-8 kg; = 3.5833E-09 * factor_MJ_kWh; source Jungbluth, N. 2007, p. Tab. 12.26, p. 238; lognormal variance with pedigree 0.002, pedigree (1,1,3,1,1)
  (same comment as for Sulfide)
- Carbon dioxide, fossil [air, urban air close to ground]: 0.411025 kg; = 0.076164 * factor_MJ_kWh; source Jungbluth, N. 2007, p. Tab. 12.12, p. 229; lognormal variance with pedigree 0.0027, pedigree (2,2,3,1,1)
  Literature data for this country
  Amount was scaled to the amount of reference product.
- Oils, unspecified [water, surface water]: 3.05846e-7 kg; = 5.6674E-08 * factor_MJ_kWh; source Jungbluth, N. 2007, p. Tab. 12.26, p. 238; lognormal variance with pedigree 0.032, pedigree (1,1,3,1,1)
  (same comment as for Sulfide)
- Propane [air, urban air close to ground]: 2.8705e-7 kg; = 5.3191E-08 * factor_MJ_kWh; source Jungbluth, N. 2007, p. Tab. 12.19, Tab. 12.20; lognormal variance with pedigree 0.092, pedigree (1,1,3,1,1)
  (same comment as for Ethanol)
- Nickel [air, urban air close to ground]: 2.10154e-6 kg; = 3.8942E-07 * factor_MJ_kWh; source Jungbluth, N. 2007; lognormal variance with pedigree 1.212, pedigree (1,1,3,1,1)
  (same comment as for Copper)
- Particulates, < 2.5 um [air, urban air close to ground]: 6.85312e-5 kg; = 1.2699E-05 * factor_MJ_kWh; source Jungbluth, N. 2007, p. Tab. 12.17 / Tab. 12.18; lognormal variance with pedigree 0.3027, pedigree (2,2,3,1,1)
  Literature data for this country
  Amount was scaled to the amount of reference product.

## Sampling procedure
Literature, environmental reports and questionnaires

## Extrapolations
This dataset has been extrapolated from year 2015 to the year of the calculation (2021). The uncertainty has been adjusted accordingly.

## Review by Carl Vadenbo 2015-07-23
The update of the whole electricity sector for the ecoinvent v3.2 database consist of hundreds of datasets. All these datasets have passed through a streamlined review processes where the underlying modelling of production volumes, technology shares and efficiencies was reviewed in detail prior to the datasets being submitted to the database.
