# rare earth oxides production, from rare earth carbonate concentrate

Dataset: EcoSpold 2, unit process
Geography: CN-FJ
Time period: 2017-01-01 to 2021-12-31
Technology level: current
Classification: ISIC rev.4 ecoinvent: 0729:Mining of other non-ferrous metal ores
Synonyms: ion-adsorption clays; REO; REE
Tags: combined production
Scenario: Business-as-Usual
System model: Allocation, cut-off by classification
Generated by: Efstathios Kakkos
Database: ecoinvent
isCopyrightProtected: true
accessRestrictedTo: 1

## General comment
For the processing of rare earth carbonates (extracted from ion-adsorption clays) to produce rare earth oxides in the Fujian region of China. This dataset is based on the following publication: Arshi, P. S., Vahidi, E., & Zhao, F. (2018). Behind the Scenes of Clean Energy: The Environmental Footprint of Rare Earth Products. ACS Sustainable Chemistry & Engineering, 6(3), 3311-3320. doi:10.1021/acssuschemeng.7b03484 and the critical materials life cycle assessment tool (CMLCAT) of Arshi et al. (2018), provided by F. Zhao from Purdue University. Specific modifications were made in order to make the dataset more transparent.
Background: Metals are produced as part of a complex, highly interconnected and interdependent system, with many desirable but scarce/critical metals recovered as by-products during the production of one or more ‘host’ metal(s). Currently, mining and processing of rare earth elements is predominantly carried out in China, where they are extracted mainly via open pit mining of bastnäsite and/or monazite deposits or the leaching of ion-adsorption clays.
Modelling approach: This dataset was created using the critical materials life cycle assessment tool (CMLCAT) of Arshi et al. (2018).

## Included activities start
The activity starts with the processing of rare earth carbonate concentrate.

## Included activities end
The activity ends with the production of individual rare earth oxides.

## Allocation
No allocation is applied.

## Geography
This dataset is valid for the whole corresponding region.

## Technology
This dataset refers to the extraction (calcination) and refining (solvent extraction) of individual rare earth oxides, obtained from mined rare earth carbonates. ""After drying and calcination, 90−92% mixed REOs are produced. The REO mixture from the leaching process undergoes a combined solvent extraction process at a facility in Southern China. The process inventory includes conversion to RE chlorides, repeated SX using organic solvents such as P204 and P507 and precipitation using oxalic acid. The high purity individual RE precipitate is further roasted to obtain separated pure oxides."" Source: Arshi, P. S., Vahidi, E., & Zhao, F. (2018). Behind the Scenes of Clean Energy: The Environmental Footprint of Rare Earth Products. ACS Sustainable Chemistry & Engineering, 6(3), 3311-3320. doi:10.1021/acssuschemeng.7b03484

## Time period
Data are considered representative of current production practices.

## Reference product
All rows: By-product classification allocatable product
- yttrium oxide: 0 kg; name Y2O3; CPC 34290: Compounds of rare earth metals, of yttrium or of scandium; CAS 1314-36-9
  production volume 2.1232e6 kg
    The production volume is expressed in kg. Its calculation is based on the fact that for the production of 0.2721 kg of lanthanum oxide from ion adsorption clays, 0.2278 kg of yttrium oxide is produced as a coproduct. The annual production of lanthanum oxide is 2536100 kg (see lanthanum oxide PV comment).
  property oxygen content 0.21256; name Y2O3_O_content
    oxygen content on a dry matter basis
  property yttrium content 0.78744; name Y2O3_Y_content
    yttrium content on a dry matter basis
  property price 2.62387 EUR2005; name Y2O3_price_EUR2005
    Average Chinese domestic prices for selected rare earth oxides as of January 2018, Source: https://www.statista.com/statistics/280038/chinese-domestic-and-export-prices-for-rare-earth-oxides/
  property carbon content 0
    carbon content on a dry matter basis (reserved; not for manual entry)
  property true value 0.597774; name Y2O3_true_value
    allocation property applied in "true value" allocation // value calculated from revenue
  properties: wet mass 1 kg, carbon content, fossil 0, water in wet mass 0 kg, carbon content, non-fossil 0, water content 0, dry mass 1 kg, carbon allocation 0 kg
- ytterbium oxide: 0 kg; name Yb2O3; CPC 34290: Compounds of rare earth metals, of yttrium or of scandium; CAS 1314-37-0
  production volume 0 kg
    The production volume is expressed in kg. Its calculation is based on the fact that for the production of 0.2721 kg of lanthanum oxide from ion adsorption clays, 0.0178 kg of ytterbium oxide is produced as a coproduct. The annual production of lanthanum oxide is 2536100 kg (see lanthanum oxide PV comment).
  property price 35.6 EUR2005; name Yb2O3_price_EUR2005
    Arithmetic mean of prices from manufacturers' listings on Alibaba (05/06/2020). Long term market data were not available.
  property oxygen content 0.121799; name Yb2O3_O_content
    oxygen content on a dry matter basis
  property ytterbium content 0.878201; name Yb2O3_Yb_content
    ytterbium content on a dry matter basis
  property carbon content 0
    carbon content on a dry matter basis (reserved; not for manual entry)
  properties: water in wet mass 0 kg, carbon content, non-fossil 0, carbon content, fossil 0, water content 0, wet mass 1 kg, dry mass 1 kg, carbon allocation 0 kg
- samarium oxide: 0 kg; name Sm2O3; CPC 34290: Compounds of rare earth metals, of yttrium or of scandium; CAS 12060-58-1
  production volume 0 kg
    The production volume is expressed in kg. Its calculation is based on the fact that for the production of 0.2721 kg of lanthanum oxide from ion adsorption clays, 0.048 kg of samarium oxide is produced as a coproduct. The annual production of lanthanum oxide is 2536100 kg (see lanthanum oxide PV comment).
  property price 1.70857 EUR2005; name Sm2O3_price_EUR2005
    (same comment as for yttrium oxide)
  property samarium content 0.862358; name Sm2O3_Sm_content
    samarium content on a dry matter basis
  property oxygen content 0.137642; name Sm2O3_O_content
    oxygen content on a dry matter basis
  property carbon content 0
    carbon content on a dry matter basis (reserved; not for manual entry)
  properties: water in wet mass 0 kg, water content 0, carbon content, fossil 0, wet mass 1 kg, dry mass 1 kg, carbon content, non-fossil 0, carbon allocation 0 kg
- neodymium oxide: 0 kg; name Nd2O3; CPC 3429: Compounds of rare earth metals, of yttrium or of scandium; CAS 1313-97-9
  production volume 0 kg
    The production volume is expressed in kg. Its calculation is based on the fact that for the production of 0.2721 kg of lanthanum oxide from ion adsorption clays, 0.2206 kg of neodymium oxide is produced as a coproduct. The annual production of lanthanum oxide is 2536100 kg (see lanthanum oxide PV comment).
  property oxygen content 0.142649; name Nd2O3_O_content
    oxygen content on a dry matter basis
  property neodymium content 0.857351; name Nd2O3_Nd_content
    neodymium content on a dry matter basis
  property price 11.4 EUR2005; name Nd2O3_price_EUR2005
    Temporary price data. Calculated as 90% of purchasers price based on: 2009 China FOB price according to http://www.metal-pages.com/metalprices
  property carbon content 0
    carbon content on a dry matter basis (reserved; not for manual entry)
  properties: wet mass 1 kg, dry mass 1 kg, carbon content, non-fossil 0, water content 0, carbon content, fossil 0, water in wet mass 0 kg, carbon allocation 0 kg
- cerium oxide: 0 kg; name CeO2; CPC 3429: Compounds of rare earth metals, of yttrium or of scandium; CAS 1306-38-3
  production volume 0 kg
    The production volume is expressed in kg. Its calculation is based on the fact that for the production of 0.2721 kg of lanthanum oxide from ion adsorption clays, 0.03 kg of cerium oxide is produced as a coproduct. The annual production of lanthanum oxide is 2536100 kg (see lanthanum oxide PV comment).
  property price 2.23 EUR2005; name CeO2_price_EUR2005
    Temporary price data. Calculated as 90% of purchasers price based on: 2004 import and export prices (total trades (USD) divided by total weight (kg) in EU27, USA, China, Japan and India) from UN data - 'Diethyl ether' (http://data.un.org/Data.aspx; accessed 2 July 10). Commodity: Cerium compounds.
  property cerium content 0.814085; name CeO2_Ce_content
    cerium content on a dry matter basis
  property oxygen content 0.185915; name CeO2_O_content
    oxygen content on a dry matter basis
  property carbon content 0
    carbon content on a dry matter basis (reserved; not for manual entry)
  properties: water in wet mass 0 kg, dry mass 1 kg, wet mass 1 kg, carbon content, fossil 0, carbon content, non-fossil 0, water content 0, carbon allocation 0 kg
- dysprosium oxide: 1 kg; = 0.035107221*CeO2/0.822296519+0.035107221*Eu2O3/0.822296519+0.035107221*La2O3/0.822296519+0.035107221*Nd2O3/0.822296519+0.035107221*Sm2O3/0.822296519+0.035107221*Yb2O3/0.822296519+0.035107221*Y2O3/0.822296519; CPC 34290: Compounds of rare earth metals, of yttrium or of scandium; CAS 1308-87-8; pedigree (1,1,1,1,1)
  Value taken from the critical materials life cycle assessment tool (CMLCAT) of Arshi et al. (2018), provided by F. Zhao from Purdue university (more information on the sampling procedure) and adjusted to correspond to the production of indi-vidual rare earth metals.
  production volume 327177 kg; = Ref('c10b69c6-3ca1-4114-8ea7-2df37f868f98', 'ProductionVolume') * (ABS(Ref('709ccc2c-1f59-4c8b-b1cb-99b7bbf70a78')) / ABS(Ref('c10b69c6-3ca1-4114-8ea7-2df37f868f98'))
    The production volume is expressed in kg. Its calculation is based on the fact that for the production of 0.2721 kg of lanthanum oxide from ion adsorption clays, 0.0351 kg of dysprosium oxide is produced as a coproduct. The annual production of lanthanum oxide is 2536100 kg (see lanthanum oxide PV comment).
  property price 0.144008 EUR2005
    (same comment as for yttrium oxide)
  property carbon content 0
    carbon content on a dry matter basis (reserved; not for manual entry)
  property true value 0.00140071
    allocation property applied in "true value" allocation // value calculated from revenue
  properties: carbon content, non-fossil 0, dysprosium content 0.871318, carbon content, fossil 0, wet mass 1 kg, oxygen content 0.128682, dry mass 1 kg, water content 0, water in wet mass 0 kg, carbon allocation 0 kg
- lanthanum oxide: 0 kg; name La2O3; CPC 3429: Compounds of rare earth metals, of yttrium or of scandium; CAS 1312-81-8
  production volume 0 kg
    The production volume of lanthanum oxide from ion adsorption clays is expressed in kg. The value is derived from the supporting information of Arshi et.al 2018 (Behind the scenes of clean energy - the environmental footprint of rare earth products) page S11, Figure S-1. The value represents the annual production of lanthanum oxide from the Fujian separation facility using ion-adsorption clays.
  property price 6.82 EUR2005; name La2O3_price_EUR2005
    Temporary price data. Calculated as 90% of purchasers price based on: 2005 import and export prices (total trades (USD) divided by total weight (kg) in biggest economies of the world: EU27, USA, Brasil, China, India, Japan and Russia) from UN Commodity Trade Statistics Database (http://data.un.org/Explorer.aspxDatabase [Accessed 2011.06.20]). Commodity: Rare-earth metals, scandium and yttrium
  property oxygen content 0.14732; name La2O3_O_content
    oxygen content on a dry matter basis
  property lanthanum content 0.85268; name La2O3_La_content
    lanthanum content on a dry matter basis
  property carbon content 0
    carbon content on a dry matter basis (reserved; not for manual entry)
  properties: water content 0, dry mass 1 kg, carbon content, non-fossil 0, carbon content, fossil 0, water in wet mass 0 kg, wet mass 1 kg, carbon allocation 0 kg
- europium oxide: 0 kg; name Eu2O3; CPC 34290: Compounds of rare earth metals, of yttrium or of scandium; CAS 1308-96-9
  production volume 0 kg
    The production volume is expressed in kg. Its calculation is based on the fact that for the production of 0.2721 kg of lanthanum oxide from ion adsorption clays, 0.0059 kg of europium oxide is produced as a coproduct. The annual production of lanthanum oxide is 2536100 kg (see lanthanum oxide PV comment).
  property oxygen content 0.136387; name Eu2O3_O_content
    oxygen content on a dry matter basis
  property price 0.051257 EUR2005; name Eu2O3_price_EUR2005
    (same comment as for yttrium oxide)
  property europium content 0.863613; name Eu2O3_Eu_content
    europium content on a dry matter basis
  property carbon content 0
    carbon content on a dry matter basis (reserved; not for manual entry)
  properties: wet mass 1 kg, carbon content, non-fossil 0, water in wet mass 0 kg, water content 0, carbon content, fossil 0, dry mass 1 kg, carbon allocation 0 kg

## By-products
All rows: By-product classification allocatable product; pedigree (1,1,1,1,1)
- erbium oxide: 0 kg; CPC 34290: Compounds of rare earth metals, of yttrium or of scandium; CAS 12061-16-4
  (same comment as for dysprosium oxide)
  production volume 46487.7 kg; = Ref('c10b69c6-3ca1-4114-8ea7-2df37f868f98', 'ProductionVolume') * (ABS(Ref('567178b7-4f28-4561-addd-86af323db9a9')) / ABS(Ref('c10b69c6-3ca1-4114-8ea7-2df37f868f98'))
    The production volume is expressed in kg. Its calculation is based on the fact that for the production of 0.2721 kg of lanthanum oxide from ion adsorption clays, 0.018 kg of erbium oxide is produced as a coproduct. The annual production of lanthanum oxide is 2536100 kg (see lanthanum oxide PV comment).
  property price 20.7469 EUR2005
    (same comment as for yttrium oxide)
  property carbon content 0
    carbon content on a dry matter basis (reserved; not for manual entry)
  property true value 0.103489
    allocation property applied in "true value" allocation // value calculated from revenue
  properties: oxygen content 0.12548, carbon content, non-fossil 0, dry mass 1 kg, erbium content 0.87452, wet mass 1 kg, water content 0, water in wet mass 0 kg, carbon content, fossil 0, carbon allocation 0 kg
- lutetium oxide: 0 kg; CPC 34290: Compounds of rare earth metals, of yttrium or of scandium; CAS 12032-20-1
  (same comment as for dysprosium oxide)
  production volume 5125.28 kg; = Ref('c10b69c6-3ca1-4114-8ea7-2df37f868f98', 'ProductionVolume') * (ABS(Ref('362f6011-841e-4731-b6f5-1881ea4aa8ed')) / ABS(Ref('c10b69c6-3ca1-4114-8ea7-2df37f868f98'))
    The production volume is expressed in kg. Its calculation is based on the fact that for the production of 0.2721 kg of lanthanum oxide from ion adsorption clays, 0.002 kg of lutetium oxide is produced as a coproduct. The annual production of lanthanum oxide is 2536100 kg (see lanthanum oxide PV comment).
  property price 619.06 EUR2005
    (same comment as for ytterbium oxide)
  property carbon content 0
    carbon content on a dry matter basis (reserved; not for manual entry)
  property true value 0.34045
    allocation property applied in "true value" allocation // value calculated from revenue
  properties: lutetium content 0.879381, oxygen content 0.120619, water content 0, carbon content, fossil 0, water in wet mass 0 kg, carbon content, non-fossil 0, wet mass 1 kg, dry mass 1 kg, carbon allocation 0 kg
- thulium oxide: 0 kg; CPC 34290: Compounds of rare earth metals, of yttrium or of scandium; CAS 12036-44-1
  (same comment as for dysprosium oxide)
  production volume 5152.99 kg; = Ref('c10b69c6-3ca1-4114-8ea7-2df37f868f98', 'ProductionVolume') * (ABS(Ref('66f1f292-9e89-4570-935b-989315879439')) / ABS(Ref('c10b69c6-3ca1-4114-8ea7-2df37f868f98'))
    The production volume is expressed in kg. Its calculation is based on the fact that for the production of 0.2721 kg of lanthanum oxide from ion adsorption clays, 0.002 kg of thulium oxide is produced as a coproduct. The annual production of lanthanum oxide is 2536100 kg (see lanthanum oxide PV comment).
  property price 165.4 EUR2005
    Arithmetic mean of prices from three manufacturers' listings on Alibaba (05/06/2020); long term market data were not available.
  property carbon content 0
    carbon content on a dry matter basis (reserved; not for manual entry)
  property true value 0.0914529
    allocation property applied in "true value" allocation // value calculated from revenue
  properties: carbon content, non-fossil 0, oxygen content 0.124391, water in wet mass 0 kg, dry mass 1 kg, thulium content 0.875609, carbon content, fossil 0, wet mass 1 kg, water content 0, carbon allocation 0 kg
- praseodymium oxide: 0 kg; CPC 3429: Compounds of rare earth metals, of yttrium or of scandium; CAS 12036-32-7
  (same comment as for dysprosium oxide)
  production volume 156529 kg; = Ref('c10b69c6-3ca1-4114-8ea7-2df37f868f98', 'ProductionVolume') * (ABS(Ref('8dd66d9c-1659-4e17-b681-6a62bf8bd7d9')) / ABS(Ref('c10b69c6-3ca1-4114-8ea7-2df37f868f98'))
    The production volume is expressed in kg. Its calculation is based on the fact that for the production of 0.2721 kg of lanthanum oxide from ion adsorption clays, 0.0606 kg of praseodymium oxide is produced as a coproduct. The annual production of lanthanum oxide is 2536100 kg (see lanthanum oxide PV comment).
  property price 10.7 EUR2005
    (same comment as for neodymium oxide)
  property carbon content 0
    carbon content on a dry matter basis (reserved; not for manual entry)
  property true value 0.179714
    allocation property applied in "true value" allocation // value calculated from revenue
  properties: water content 0, carbon content, non-fossil 0, wet mass 1 kg, dry mass 1 kg, water in wet mass 0 kg, carbon content, fossil 0, carbon allocation 0 kg
- holmium oxide: 0 kg; CPC 34290: Compounds of rare earth metals, of yttrium or of scandium; CAS 12055-62-8
  (same comment as for dysprosium oxide)
  production volume 18063.2 kg; = Ref('c10b69c6-3ca1-4114-8ea7-2df37f868f98', 'ProductionVolume') * (ABS(Ref('880edf0b-26bf-4b16-82de-626cf8d14f7e')) / ABS(Ref('c10b69c6-3ca1-4114-8ea7-2df37f868f98'))
    The production volume is expressed in kg. Its calculation is based on the fact that for the production of 0.2721 kg of lanthanum oxide from ion adsorption clays, 0.007 kg of holmium oxide is produced as a coproduct. The annual production of lanthanum oxide is 2536100 kg (see lanthanum oxide PV comment).
  property price 37.9 EUR2005
    Price in 2018; value taken from https://www.statista.com/statistics/450166/global-reo-holmium-oxide-price-forecast/
  property carbon content 0
    carbon content on a dry matter basis (reserved; not for manual entry)
  property true value 0.0734575
    allocation property applied in "true value" allocation // value calculated from revenue
  properties: oxygen content 0.127027, dry mass 1 kg, carbon content, fossil 0, wet mass 1 kg, water content 0, water in wet mass 0 kg, carbon content, non-fossil 0, holmium content 0.872973, carbon allocation 0 kg
- gadolinium oxide: 0 kg; CPC 34290: Compounds of rare earth metals, of yttrium or of scandium; CAS 12064-62-9
  (same comment as for dysprosium oxide)
  production volume 121345 kg; = Ref('c10b69c6-3ca1-4114-8ea7-2df37f868f98', 'ProductionVolume') * (ABS(Ref('2c9ff434-a904-4921-a3d4-2a4a48766758')) / ABS(Ref('c10b69c6-3ca1-4114-8ea7-2df37f868f98'))
    The production volume is expressed in kg. Its calculation is based on the fact that for the production of 0.2721 kg of lanthanum oxide from ion adsorption clays, 0.047 kg of gadolinium oxide is produced as a coproduct. The annual production of lanthanum oxide is 2536100 kg (see lanthanum oxide PV comment).
  property price 12.2041 EUR2005
    (same comment as for yttrium oxide)
  property carbon content 0
    carbon content on a dry matter basis (reserved; not for manual entry)
  property true value 0.158901
    allocation property applied in "true value" allocation // value calculated from revenue
  properties: water in wet mass 0 kg, oxygen content 0.132409, water content 0, carbon content, fossil 0, wet mass 1 kg, carbon content, non-fossil 0, dry mass 1 kg, gadolinium content 0.867591, carbon allocation 0 kg
- terbium oxide: 0 kg; CPC 34290: Compounds of rare earth metals, of yttrium or of scandium; CAS 12738-76-0
  (same comment as for dysprosium oxide)
  production volume 15486.7 kg; = Ref('c10b69c6-3ca1-4114-8ea7-2df37f868f98', 'ProductionVolume') * (ABS(Ref('8c7b47fd-d8a6-4f0d-a461-acdfe80c5072')) / ABS(Ref('c10b69c6-3ca1-4114-8ea7-2df37f868f98'))
    The production volume is expressed in kg. Its calculation is based on the fact that for the production of 0.2721 kg of lanthanum oxide from ion adsorption clays, 0.006 kg of terbium oxide is produced as a coproduct. The annual production of lanthanum oxide is 2536100 kg (see lanthanum oxide PV comment).
  property price 0.375275 EUR2005
    (same comment as for yttrium oxide)
  property carbon content 0
    carbon content on a dry matter basis (reserved; not for manual entry)
  property true value 0.000623606
    allocation property applied in "true value" allocation // value calculated from revenue
  properties: terbium content 0.850212, carbon content, non-fossil 0, wet mass 1 kg, carbon content, fossil 0, water in wet mass 0 kg, oxygen content 0.149788, water content 0, dry mass 1 kg, carbon allocation 0 kg

## Inputs from technosphere
- chemical factory, organics: 1.28128e-10 unit; = 6.90E-09*CeO2/0.822296519+6.90E-09*Eu2O3/0.822296519+6.90E-09*La2O3/0.822296519+6.90E-09*Nd2O3/0.822296519+6.90E-09*Sm2O3/0.822296519+6.90E-09*Yb2O3/0.822296519+6.90E-09*Y2O3/0.822296519; lognormal variance with pedigree 0.330825, pedigree (2,1,2,2,1)
  Input has been assumed for compliance with the Ecoinvent Guidelines. Value has been taken from the dataset ""rare earth oxides production from bastnäsite concentrate"" from the Ecoinvent database version 3.6.
- fatty alcohol: 0.000633588 kg; = 0.034120172*CeO2/0.822296519+0.034120172*Eu2O3/0.822296519+0.034120172*La2O3/0.822296519+0.034120172*Nd2O3/0.822296519+0.034120172*Sm2O3/0.822296519+0.034120172*Yb2O3/0.822296519+0.034120172*Y2O3/0.822296519; lognormal variance with pedigree 0.001425, pedigree (2,1,2,2,1)
  (same comment as for dysprosium oxide)
  properties: wet mass 1 kg, carbon content, non-fossil 0.743434, heating value, net 41.01 MJ, carbon content, fossil 0.0408973, dry mass 1 kg
- rare earth carbonate concentrate: 0.0293189 kg; = 1.578891846034*CeO2/0.822296519+1.578891846034*Eu2O3/0.822296519+1.578891846034*La2O3/0.822296519+1.578891846034*Nd2O3/0.822296519+1.578891846034*Sm2O3/0.822296519+1.578891846034*Yb2O3/0.822296519+1.578891846034*Y2O3/0.822296519; lognormal variance with pedigree 0.001425, pedigree (2,1,2,2,1)
  Value taken from the critical materials life cycle assessment tool (CMLCAT) of Arshi et al. (2018), provided by F. Zhao from Purdue university (more information on the sampling procedure) and adjusted to correspond to the production of individual rare earth metals.
  properties: ytterbium content 0.00802466, yttrium content 0.10252, lanthanum content 0.122451, dry mass 1 kg, praseodymium content 0.02728, neodymium content 0.0992702, cerium content 0.0135, gadolinium content 0.021148, erbium content 0.00810191, samarium content 0.0216019, wet mass 1 kg, dysprosium content 0.0157982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
  note on ytterbium content: The calculation of the individual rare earth element (REE) content of the carbonate concentrate is based on the fact that the concentrate contains 45% mixed REE and that the per kg production of refined RE oxides from the ion adsorption clays contain 0.0178 kg ytterbium oxide.
  note on yttrium content: The calculation of the individual rare earth element (REE) content of the carbonate concentrate is based on the fact that the concentrate contains 45% mixed REE and that the per kg production of refined RE oxides from the ion adsorption clays contain 0.2278 kg yttrium oxide.
  note on lanthanum content: The calculation of the individual rare earth element (REE) content of the carbonate concentrate is based on the fact that the concentrate contains 45% mixed REE and that the per kg production of refined RE oxides from the ion adsorption clays contain 0.2721 kg lanthanum oxide.
  note on praseodymium content: The calculation of the individual rare earth element (REE) content of the carbonate concentrate is based on the fact that the concentrate contains 45% mixed REE and that the per kg production of refined RE oxides from the ion adsorption clays contain 0.0606 kg praseodymium oxide.
  note on neodymium content: The calculation of the individual rare earth element (REE) content of the carbonate concentrate is based on the fact that the concentrate contains 45% mixed REE and that the per kg production of refined RE oxides from the ion adsorption clays contain 0.2206 kg neodymium oxide.
  note on cerium content: The calculation of the individual rare earth element (REE) content of the carbonate concentrate is based on the fact that the concentrate contains 45% mixed REE and that the per kg production of refined RE oxides from the ion adsorption clays contain 0.03 kg cerium oxide.
  note on gadolinium content: The calculation of the individual rare earth element (REE) content of the carbonate concentrate is based on the fact that the concentrate contains 45% mixed REE and that the per kg production of refined RE oxides from the ion adsorption clays contain 0.047 gadolinium oxide.
  note on erbium content: The calculation of the individual rare earth element (REE) content of the carbonate concentrate is based on the fact that the concentrate contains 45% mixed REE and that the per kg production of refined RE oxides from the ion adsorption clays contain 0.018 kg erbium oxide.
  note on samarium content: The calculation of the individual rare earth element (REE) content of the carbonate concentrate is based on the fact that the concentrate contains 45% mixed REE and that the per kg production of refined RE oxides from the ion adsorption clays contain 0.048 kg samarium oxide.
  note on dysprosium content: The calculation of the individual rare earth element (REE) content of the carbonate concentrate is based on the fact that the concentrate contains 45% mixed REE and that the per kg production of refined RE oxides from the ion adsorption clays contain 0.0351 dysprosium oxide.
- wastewater, average: -0.00100831 m3; = (0.0543*CeO2/0.822296519+0.0543*Eu2O3/0.822296519+0.0543*La2O3/0.822296519+0.0543*Nd2O3/0.822296519+0.0543*Sm2O3/0.822296519+0.0543*Yb2O3/0.822296519+0.0543*Y2O3/0.822296519)*-1; lognormal variance with pedigree 0.001425, pedigree (2,1,2,2,1)
  Value calculated from simplified mass balance and assumed here for completeness purposes. The value was not contained originally in the critical materials life cycle assessment tool (CMLCAT) of Arshi et al. (2018), provided by F. Zhao from Purdue university.
  production volume 501441 m3
    The production volume is expressed in m3. Its calculation is based on the fact that for the production of 0.2721 kg of lanthanum oxide from ion adsorption clays, 0.0543 m3 of wastewater, average is produced as a byproduct. The annual production of lanthanum oxide is 2536100 kg (see lanthanum oxide PV comment).
  properties: dry mass 0.34684 kg, wet mass 1000 kg, water content 2882.17, carbon content, non-fossil 0.19404
- sodium hydroxide, without water, in 50% solution state: 0.0495711 kg; = 2.669517*CeO2/0.822296519+2.669517*Eu2O3/0.822296519+2.669517*La2O3/0.822296519+2.669517*Nd2O3/0.822296519+2.669517*Sm2O3/0.822296519+2.669517*Yb2O3/0.822296519+2.669517*Y2O3/0.822296519; lognormal variance with pedigree 0.001425, pedigree (2,1,2,2,1)
  (same comment as for dysprosium oxide)
  properties: heating value, net 3.03 MJ, wet mass 1 kg, dry mass 1 kg
- hazardous waste, for underground deposit: -4.97658e-5 kg; = (0.00268*CeO2/0.822296519+0.00268*Eu2O3/0.822296519+0.00268*La2O3/0.822296519+0.00268*Nd2O3/0.822296519+0.00268*Sm2O3/0.822296519+0.00268*Yb2O3/0.822296519+0.00268*Y2O3/0.822296519)*-1; lognormal variance with pedigree 0.001425, pedigree (2,1,2,2,1)
  (same comment as for dysprosium oxide)
  production volume 24978.9 kg
    The production volume is expressed in kg. Its calculation is based on the fact that for the production of 0.2721 kg of lanthanum oxide from ion adsorption clays, 0.00268 kg of hazardous waste, for underground deposit is produced as a byproduct. The annual production of lanthanum oxide is 2536100 kg (see lanthanum oxide PV comment).
  properties: dry mass 1 kg, carbon content, fossil 0.55467, wet mass 1 kg
- citric acid: 0.0146883 kg; = 0.791*CeO2/0.822296519+0.791*Eu2O3/0.822296519+0.791*La2O3/0.822296519+0.791*Nd2O3/0.822296519+0.791*Sm2O3/0.822296519+0.791*Yb2O3/0.822296519+0.791*Y2O3/0.822296519; lognormal variance with pedigree 0.001425, pedigree (2,1,2,2,1)
  (same comment as for dysprosium oxide)
  properties: heating value, net 16.41 MJ, dry mass 1 kg, carbon content, fossil 0.375099, wet mass 1 kg
- electricity, medium voltage: 0.0137962 kWh; = 0.742957081666666*CeO2/0.822296519+0.742957081666666*Eu2O3/0.822296519+0.742957081666666*La2O3/0.822296519+0.742957081666666*Nd2O3/0.822296519+0.742957081666666*Sm2O3/0.822296519+0.742957081666666*Yb2O3/0.822296519+0.742957081666666*Y2O3/0.822296519; lognormal variance with pedigree 0.001425, pedigree (2,1,2,2,1)
  (same comment as for dysprosium oxide)
- soda ash, dense: 0.00535362 kg; = 0.288304721*CeO2/0.822296519+0.288304721*Eu2O3/0.822296519+0.288304721*La2O3/0.822296519+0.288304721*Nd2O3/0.822296519+0.288304721*Sm2O3/0.822296519+0.288304721*Yb2O3/0.822296519+0.288304721*Y2O3/0.822296519; lognormal variance with pedigree 0.001425, pedigree (2,1,2,2,1)
  (same comment as for dysprosium oxide)
  properties: dry mass 1 kg, heating value, net 3.43 MJ, wet mass 1 kg, carbon content, fossil 0.113208
- natural gas, unprocessed, at extraction: 0.0308347 m3; = 1.660518455504*CeO2/0.822296519+1.660518455504*Eu2O3/0.822296519+1.660518455504*La2O3/0.822296519+1.660518455504*Nd2O3/0.822296519+1.660518455504*Sm2O3/0.822296519+1.660518455504*Yb2O3/0.822296519+1.660518455504*Y2O3/0.822296519; lognormal variance with pedigree 0.001425, pedigree (2,1,2,2,1)
  (same comment as for dysprosium oxide)
  properties: heating value, net 39 MJ, dry mass 0.84 kg, carbon content, fossil 0.602381, wet mass 0.84 kg
  note on heating value, net: Literature value, Source: United Nations Statistics Division (2018) International Recommendations for Energy Statistics (IRES). Available at: http://unstats.un.org/unsd/statcom/doc11/BG-IRES.pdf.
- esters of versatic acid: 0.0002889 kg; = 0.01555794*CeO2/0.822296519+0.01555794*Eu2O3/0.822296519+0.01555794*La2O3/0.822296519+0.01555794*Nd2O3/0.822296519+0.01555794*Sm2O3/0.822296519+0.01555794*Yb2O3/0.822296519+0.01555794*Y2O3/0.822296519; lognormal variance with pedigree 0.001425, pedigree (2,1,2,2,1)
  (same comment as for dysprosium oxide)
  properties: dry mass 1 kg, wet mass 1 kg, carbon content, fossil 0.727273, heating value, net 22.04 MJ
- DTPA, diethylenetriaminepentaacetic acid: 0.00047021 kg; = 0.025321888*CeO2/0.822296519+0.025321888*Eu2O3/0.822296519+0.025321888*La2O3/0.822296519+0.025321888*Nd2O3/0.822296519+0.025321888*Sm2O3/0.822296519+0.025321888*Yb2O3/0.822296519+0.025321888*Y2O3/0.822296519; lognormal variance with pedigree 0.001425, pedigree (2,1,2,2,1)
  (same comment as for dysprosium oxide)
  properties: carbon content, fossil 0.427481, wet mass 1 kg, dry mass 1 kg, heating value, net 12.95 MJ
- barium hydroxide: 0.00195854 kg; = 0.105472103*CeO2/0.822296519+0.105472103*Eu2O3/0.822296519+0.105472103*La2O3/0.822296519+0.105472103*Nd2O3/0.822296519+0.105472103*Sm2O3/0.822296519+0.105472103*Yb2O3/0.822296519+0.105472103*Y2O3/0.822296519; lognormal variance with pedigree 0.001425, pedigree (2,1,2,2,1)
  (same comment as for dysprosium oxide)
- refinery sludge: -3.9924e-5 kg; = (0.00215*CeO2/0.822296519+0.00215*Eu2O3/0.822296519+0.00215*La2O3/0.822296519+0.00215*Nd2O3/0.822296519+0.00215*Sm2O3/0.822296519+0.00215*Yb2O3/0.822296519+0.00215*Y2O3/0.822296519)*-1; lognormal variance with pedigree 0.001425, pedigree (2,1,2,2,1)
  (same comment as for dysprosium oxide)
  production volume 20039 kg
    The production volume is expressed in kg. Its calculation is based on the fact that for the production of 0.2721 kg of lanthanum oxide from ion adsorption clays, 0.00215 kg of refinery sludge is produced as a byproduct. The annual production of lanthanum oxide is 2536100 kg (see lanthanum oxide PV comment).
  properties: carbon content, fossil 0.76786, wet mass 1 kg, dry mass 0.105 kg, heating value, net 2.45 MJ, water content 8.5238
  note on heating value, net: Value taken from the general comment of the treatment dataset.
- natural gas, high pressure: 0.0035226 m3; = 0.1897*CeO2/0.822296519+0.1897*Eu2O3/0.822296519+0.1897*La2O3/0.822296519+0.1897*Nd2O3/0.822296519+0.1897*Sm2O3/0.822296519+0.1897*Yb2O3/0.822296519+0.1897*Y2O3/0.822296519; lognormal variance with pedigree 0.001425, pedigree (2,1,2,2,1)
  (same comment as for dysprosium oxide)
  properties: carbon content, fossil 0.602381, heating value, net 39 MJ, wet mass 0.84 kg, dry mass 0.84 kg
  note on carbon content, fossil: An average C content of 0.506 kg C/ m3 has been assumed (this average has been calculated using data in Tab 3.5, ecoinvent v2.2 report 6_V
- kerosene: 0.000633588 kg; = 0.034120172*CeO2/0.822296519+0.034120172*Eu2O3/0.822296519+0.034120172*La2O3/0.822296519+0.034120172*Nd2O3/0.822296519+0.034120172*Sm2O3/0.822296519+0.034120172*Yb2O3/0.822296519+0.034120172*Y2O3/0.822296519; lognormal variance with pedigree 0.001425, pedigree (2,1,2,2,1)
  (same comment as for rare earth carbonate concentrate)
  properties: heating value, net 43 MJ, dry mass 1 kg, wet mass 1 kg, carbon content, fossil 0.85
- hydrochloric acid, without water, in 30% solution state: 0.0599434 kg; = 3.22809*CeO2/0.822296519+3.22809*Eu2O3/0.822296519+3.22809*La2O3/0.822296519+3.22809*Nd2O3/0.822296519+3.22809*Sm2O3/0.822296519+3.22809*Yb2O3/0.822296519+3.22809*Y2O3/0.822296519; lognormal variance with pedigree 0.001425, pedigree (2,1,2,2,1)
  (same comment as for dysprosium oxide)
  properties: dry mass 1 kg, wet mass 1 kg, heating value, net 3.32 MJ
- spent solvent mixture: -0.0557079 kg; = (3*CeO2/0.822296519+3*Eu2O3/0.822296519+3*La2O3/0.822296519+3*Nd2O3/0.822296519+3*Sm2O3/0.822296519+3*Yb2O3/0.822296519+3*Y2O3/0.822296519)*-1; lognormal variance with pedigree 0.001425, pedigree (2,1,2,2,1)
  (same comment as for wastewater, average)
  production volume 2.79601e7 kg
    The production volume is expressed in m3. Its calculation is based on the fact that for the production of 0.2721 kg of lanthanum oxide from ion adsorption clays, 3 kg of spent solvent mixture is produced as a byproduct. The annual production of lanthanum oxide is 2536100 kg (see lanthanum oxide PV comment).
  properties: dry mass 0.835 kg, heating value, net 21.7 MJ, wet mass 1 kg, carbon content, fossil 0.167313, water content 0.197605
  note on carbon content, fossil: Tab A.7, ecoinvent v2.2 report 13_I. C content has been calculated after data in the tables, and then referred to 1 kg DM
- sulfidic tailings, generic: -0.0964445 kg; = (5.193754739*CeO2/0.822296519+5.193754739*Eu2O3/0.822296519+5.193754739 *La2O3/0.822296519+5.193754739*Nd2O3/0.822296519+5.193754739 *Sm2O3/0.822296519+5.193754739*Yb2O3/0.822296519+5.193754739*Y2O3/0.822296519)*-1; lognormal variance with pedigree 0.001425, pedigree (2,1,2,2,1)
  (same comment as for wastewater, average)
  production volume 4.84059e7 kg
    The production volume is expressed in m3. Its calculation is based on the fact that for the production of 0.2721 kg of lanthanum oxide from ion adsorption clays, 5.1938 kg of sulfidic tailings is produced as a byproduct. The annual production of lanthanum oxide is 2536100 kg (see lanthanum oxide PV comment).
  properties: potassium content 0.0025181, water content 0.42857, dry mass 0.7 kg, oxygen content 0.89157, silicon content 0.053273, magnesium content 0.0022359, wet mass 1 kg, iron content 0.015374, aluminium content 0.014738, carbon content, fossil 0.0087785, calcium content 0.0045972, sodium content 0.0014472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
- municipal solid waste: -9.86031e-5 kg; = (0.00531*CeO2/0.822296519+0.00531*Eu2O3/0.822296519+0.00531*La2O3/0.822296519+0.00531*Nd2O3/0.822296519+0.00531*Sm2O3/0.822296519+0.00531*Yb2O3/0.822296519+0.00531*Y2O3/0.822296519)*-1; lognormal variance with pedigree 0.001425, pedigree (2,1,2,2,1)
  (same comment as for dysprosium oxide)
  production volume 49491.7 kg
    The production volume is expressed in kg. Its calculation is based on the fact that for the production of 0.2721 kg of lanthanum oxide from ion adsorption clays, 0.00531 kg of municipal solid waste is produced as a byproduct. The annual production of lanthanum oxide is 2536100 kg (see lanthanum oxide PV comment).
  properties: water content 0.29702, dry mass 0.771 kg, wet mass 1 kg, carbon content, non-fossil 0.26165, heating value, net 11.74 MJ, carbon content, fossil 0.17155
- soda ash, light, crystalline, heptahydrate: 0.00535362 kg; = 0.288304721*CeO2/0.822296519+0.288304721*Eu2O3/0.822296519+0.288304721*La2O3/0.822296519+0.288304721*Nd2O3/0.822296519+0.288304721*Sm2O3/0.822296519+0.288304721*Yb2O3/0.822296519+0.288304721*Y2O3/0.822296519; lognormal variance with pedigree 0.001425, pedigree (2,1,2,2,1)
  (same comment as for dysprosium oxide)
  properties: carbon content, fossil 0.0517241, heating value, net 3.43 MJ, wet mass 1 kg, dry mass 1 kg
- low level radioactive waste: -8.02194e-7 m3; = (4.32E-05*CeO2/0.822296519+4.32E-05*Eu2O3/0.822296519+4.32E-05*La2O3/0.822296519+4.32E-05*Nd2O3/0.822296519+4.32E-05*Sm2O3/0.822296519+4.32E-05*Yb2O3/0.822296519+4.32E-05*Y2O3/0.822296519)*-1; lognormal variance with pedigree 0.001425, pedigree (2,1,2,2,1)
  (same comment as for dysprosium oxide)
  production volume 253610 m3
    The production volume is expressed in m3. Its calculation is based on the fact that for the production of 0.2721 kg of lanthanum oxide from ion adsorption clays, 4.32E-05 m3 of low level radioactive waste is produced as a byproduct. The annual production of lanthanum oxide is 253610 kg (see lanthanum oxide PV comment).
  properties: wet mass 2500 kg, dry mass 2500 kg

## Inputs from nature
- Water, unspecified natural origin [natural resource, in water]: 0.00104602 m3; = 0.056330472*CeO2/0.822296519+0.056330472*Eu2O3/0.822296519+0.056330472*La2O3/0.822296519+0.056330472*Nd2O3/0.822296519+0.056330472*Sm2O3/0.822296519+0.056330472*Yb2O3/0.822296519+0.056330472*Y2O3/0.822296519; lognormal variance with pedigree 0.001425, pedigree (2,1,2,2,1)
  (same comment as for dysprosium oxide)

## Emissions to nature
- Hydrocarbons, aliphatic, alkanes, unspecified [air, low population density, long-term]: 4.38332e-7 kg; = 0.0000236052*CeO2/0.822296519+0.0000236052*Eu2O3/0.822296519+0.0000236052*La2O3/0.822296519+0.0000236052*Nd2O3/0.822296519+0.0000236052*Sm2O3/0.822296519+0.0000236052*Yb2O3/0.822296519+0.0000236052*Y2O3/0.822296519; lognormal variance with pedigree 0.120825, pedigree (2,1,2,2,1)
  (same comment as for dysprosium oxide)
- Chlorine [water, unspecified]: 0.00023583 kg; = 0.0127*CeO2/0.822296519+0.0127*Eu2O3/0.822296519+0.0127*La2O3/0.822296519+0.0127*Nd2O3/0.822296519+0.0127*Sm2O3/0.822296519+0.0127*Yb2O3/0.822296519+0.0127*Y2O3/0.822296519; lognormal variance with pedigree 0.040825, pedigree (2,1,2,2,1)
  (same comment as for dysprosium oxide)
- Nitrogen [water, unspecified]: 5.90504e-6 kg; = 0.000318*CeO2/0.822296519+0.000318*Eu2O3/0.822296519+0.000318*La2O3/0.822296519+0.000318*Nd2O3/0.822296519+0.000318*Sm2O3/0.822296519+0.000318*Yb2O3/0.822296519+0.000318*Y2O3/0.822296519; lognormal variance with pedigree 0.040825, pedigree (2,1,2,2,1)
  (same comment as for dysprosium oxide)
- Hydrogen chloride [air, low population density, long-term]: 2.59014e-7 kg; = 0.0000139485*CeO2/0.822296519+0.0000139485*Eu2O3/0.822296519+0.0000139485*La2O3/0.822296519+0.0000139485*Nd2O3/0.822296519+0.0000139485*Sm2O3/0.822296519+0.0000139485*Yb2O3/0.822296519+0.0000139485*Y2O3/0.822296519; lognormal variance with pedigree 0.040825, pedigree (2,1,2,2,1)
  (same comment as for dysprosium oxide)
- BOD5, Biological Oxygen Demand [water, unspecified]: 4.52163e-5 kg; name BOD; = 0.002435*CeO2/0.822296519+0.002435*Eu2O3/0.822296519+0.002435*La2O3/0.822296519+0.002435*Nd2O3/0.822296519+0.002435*Sm2O3/0.822296519+0.002435*Yb2O3/0.822296519+0.002435*Y2O3/0.822296519; lognormal variance with pedigree 0.040825, pedigree (2,1,2,2,1)
  Mathematical relation based on section 5.9.7 of the data quality guideline for the ecoinvent. (BOD5 = 0.5 * COD). The value was not contained originally in the critical materials life cycle assessment tool (CMLCAT) of Arshi et al. (2018), provided by F. Zhao from Purdue university.
- COD, Chemical Oxygen Demand [water, unspecified]: 9.04326e-5 kg; name COD; = 0.00487*CeO2/0.822296519+0.00487*Eu2O3/0.822296519+0.00487*La2O3/0.822296519+0.00487*Nd2O3/0.822296519+0.00487*Sm2O3/0.822296519+0.00487*Yb2O3/0.822296519+0.00487*Y2O3/0.822296519; lognormal variance with pedigree 0.040825, pedigree (2,1,2,2,1)
  (same comment as for dysprosium oxide)
- Nitrogen oxides [air, low population density, long-term]: 4.32155e-5 kg; = 0.002327253*CeO2/0.822296519+0.002327253*Eu2O3/0.822296519+0.002327253*La2O3/0.822296519+0.002327253*Nd2O3/0.822296519+0.002327253*Sm2O3/0.822296519+0.002327253*Yb2O3/0.822296519+0.002327253*Y2O3/0.822296519; lognormal variance with pedigree 0.040825, pedigree (2,1,2,2,1)
  (same comment as for dysprosium oxide)
- TOC, Total Organic Carbon [water, unspecified]: 3.34935e-5 kg; name TOC; = 0.001803704*CeO2/0.822296519+0.001803704*Eu2O3/0.822296519+0.001803704*La2O3/0.822296519+0.001803704*Nd2O3/0.822296519+0.001803704*Sm2O3/0.822296519+0.001803704*Yb2O3/0.822296519+0.001803704*Y2O3/0.822296519; lognormal variance with pedigree 0.040825, pedigree (2,1,2,2,1)
  Mathematical relation based on section 5.9.7 of the data quality guideline for the ecoinvent. (TOC = COD /2.7). The value was not contained originally in the critical materials life cycle assessment tool (CMLCAT) of Arshi et al. (2018), provided by F. Zhao from Purdue university.
- DOC, Dissolved Organic Carbon [water, unspecified]: 3.34935e-5 kg; name DOC; = 0.0018037037037037*CeO2/0.822296519+0.0018037037037037*Eu2O3/0.822296519+0.0018037037037037*La2O3/0.822296519+0.0018037037037037*Nd2O3/0.822296519+0.0018037037037037*Sm2O3/0.822296519+0.0018037037037037*Yb2O3/0.822296519+0.0018037037037037*Y2O3/0.822296519; lognormal variance with pedigree 0.040825, pedigree (2,1,2,2,1)
  Mathematical relation based on section 5.9.7 of the data quality guideline for the ecoinvent. (DOC = TOC). The value was not contained originally in the critical materials life cycle assessment tool (CMLCAT) of Arshi et al. (2018), provided by F. Zhao from Purdue university.
- Oils, unspecified [water, unspecified]: 6.295e-7 kg; = 0.0000339*CeO2/0.822296519+0.0000339*Eu2O3/0.822296519+0.0000339*La2O3/0.822296519+0.0000339*Nd2O3/0.822296519+0.0000339*Sm2O3/0.822296519+0.0000339*Yb2O3/0.822296519+0.0000339*Y2O3/0.822296519; lognormal variance with pedigree 0.040825, pedigree (2,1,2,2,1)
  (same comment as for dysprosium oxide)
- Chlorine [air, low population density, long-term]: 3.98483e-8 kg; = 0.00000214592*CeO2/0.822296519+0.00000214592*Eu2O3/0.822296519+0.00000214592*La2O3/0.822296519+0.00000214592*Nd2O3/0.822296519+0.00000214592*Sm2O3/0.822296519+0.00000214592*Yb2O3/0.822296519+0.00000214592*Y2O3/0.822296519; lognormal variance with pedigree 0.040825, pedigree (2,1,2,2,1)
  (same comment as for dysprosium oxide)
- Particulates, > 10 um [air, low population density, long-term]: 1.77325e-6 kg; = 0.0000954936*CeO2/0.822296519+0.0000954936*Eu2O3/0.822296519+0.0000954936*La2O3/0.822296519+0.0000954936*Nd2O3/0.822296519+0.0000954936*Sm2O3/0.822296519+0.0000954936*Yb2O3/0.822296519+0.0000954936*Y2O3/0.822296519; lognormal variance with pedigree 0.040825, pedigree (2,1,2,2,1)
  (same comment as for dysprosium oxide)
- Sulfur dioxide [air, low population density, long-term]: 2.98862e-7 kg; = 0.0000160944*CeO2/0.822296519+0.0000160944*Eu2O3/0.822296519+0.0000160944*La2O3/0.822296519+0.0000160944*Nd2O3/0.822296519+0.0000160944*Sm2O3/0.822296519+0.0000160944*Yb2O3/0.822296519+0.0000160944*Y2O3/0.822296519; lognormal variance with pedigree 0.001425, pedigree (2,1,2,2,1)
  (same comment as for dysprosium oxide)
- Carbon dioxide, fossil [air, low population density, long-term]: 0.0598454 kg; = 3.22281358467545*CeO2/0.822296519+3.22281358467545*Eu2O3/0.822296519+3.22281358467545*La2O3/0.822296519+3.22281358467545*Nd2O3/0.822296519+3.22281358467545*Sm2O3/0.822296519+3.22281358467545*Yb2O3/0.822296519+3.22281358467545*Y2O3/0.822296519; lognormal variance with pedigree 0.001425, pedigree (2,1,2,2,1)
  (same comment as for dysprosium oxide)
- Suspended solids, unspecified [water, unspecified]: 1.50969e-5 kg; = 0.000813*CeO2/0.822296519+0.000813*Eu2O3/0.822296519+0.000813*La2O3/0.822296519+0.000813*Nd2O3/0.822296519+0.000813*Sm2O3/0.822296519+0.000813*Yb2O3/0.822296519+0.000813*Y2O3/0.822296519; lognormal variance with pedigree 0.040825, pedigree (2,1,2,2,1)
  (same comment as for dysprosium oxide)

## Sampling procedure
This dataset is based on the following publication: Arshi, P. S., Vahidi, E., & Zhao, F. (2018). Behind the Scenes of Clean Energy: The Environmental Footprint of Rare Earth Products. ACS Sustainable Chemistry & Engineering, 6(3), 3311-3320. doi:10.1021/acssuschemeng.7b03484.
All exchanges from/ to the environment and from/to the technosphere were calculated using the critical materials life cycle assessment tool (CMLCAT) of Arshi et al. (2018), provided by F. Zhao from Purdue university. This excel-based software acts as a supporting tool to the abovementioned publication. Individual exchanges such as sulfidic tailings and wastewater which were not contained in the original datasets have been added for completness purposes and their calculation is based on mass balance.
