# transport, pipeline, offshore, petroleum

Dataset: EcoSpold 2, unit process
Geography: GLO
Time period: 1976-01-01 to 2021-12-31
Technology level: current
Classification: EcoSpold01Categories: oil/production
Classification: ISIC rev.4 ecoinvent: 4930:Transport via pipeline
Tags: ConvertedDataset
Scenario: Business-as-Usual
System model: Allocation, cut-off by classification
Generated by: Niels Jungbluth
Published in: Jungbluth, N. 2007
Database: ecoinvent
isCopyrightProtected: true
accessRestrictedTo: 1

## General comment
Calculation for energy use. There are differences depending on diameter and difference of height.
[This dataset was already contained in the ecoinvent database version 2. It was not individually updated during the transfer to ecoinvent version 3. Life Cycle Impact Assessment results may still have changed, as they are affected by changes in the supply chain, i.e. in other datasets. This dataset was generated following the ecoinvent quality guidelines for version 2. It may have been subject to central changes described in the ecoinvent version 3 change report (http://www.ecoinvent.org/database/ecoinvent-version-3/reports-of-changes/), and the results of the central updates were reviewed extensively. The changes added e.g. consistent water flows and other information throughout the database. The documentation of this dataset can be found in the ecoinvent reports of version 2, which are still available via the ecoinvent website. The change report linked above covers all central changes that were made during the conversion process.]

## Included activities end
Energy use for pumping and emissions of oil due to accidents.

## Geography
Data investigated in RER

## Technology
Operation of crude oil pipelines by diesel-electric generating set.

## Time period
Old publications for energy use. New study for oil losses.

## Reference product
- transport, pipeline, offshore, petroleum: 1 metric ton*km; CPC 65131: Transport services via pipeline of petroleum and natural gas; By-product classification allocatable product
  EcoSpold01Location=OCE
  production volume 1 metric ton*km
    108 mia tkm of transported crude oil and products in RER in 2000.
    Dummy value to be replaced by measured, estimated or calculated value
  property price 0.0156489 EUR2005
    Calculated based on inputs: The price of the product has been calculated as a sum of the values of the material and energy inputs for this product. This value is therefore a rough estimation. It may underestimate the real price since there are additional expenses when producing any product. These expences can include for example labour costs, treatment of waste materials and profit for the producer. Please consider carefully whether this level of data quality is acceptable for your application.

## Inputs from technosphere
- diesel, burned in diesel-electric generating set, 10MW: 0.45 MJ; lognormal variance with pedigree 0.08, pedigree (1,1,5,1,1)
  Range in literature and older data
  EcoSpold01Location=GLO
  properties: heating value, net 1 MJ
- pipeline, petroleum, offshore: 9.46e-9 km; lognormal variance with pedigree 0.16, pedigree (1,1,5,1,1)
  EcoSpold01Location=OCE
  Performance of European pipelines
  Uncertainty: Performance of European pipelines

## Emissions to nature
- DOC, Dissolved Organic Carbon [water, ocean]: 9.23e-6 kg; lognormal variance with pedigree 0.0901, pedigree (3,5,5,3,1)
  Extrapolation for sum parameter
  Uncertainty: Extrapolation for sum parameter
- COD, Chemical Oxygen Demand [water, ocean]: 3.36e-5 kg; lognormal variance with pedigree 0.0901, pedigree (3,5,5,3,1)
  Extrapolation for sum parameter
  Uncertainty: Extrapolation for sum parameter
- AOX, Adsorbable Organic Halogen as Cl [water, ocean]: 1.1e-10 kg; lognormal variance with pedigree 0.0901, pedigree (3,5,5,3,1)
  Extrapolation for sum parameter
  Uncertainty: Extrapolation for sum parameter
- BOD5, Biological Oxygen Demand [water, ocean]: 3.36e-5 kg; lognormal variance with pedigree 0.0901, pedigree (3,5,5,3,1)
  Extrapolation for sum parameter
  Uncertainty: Extrapolation for sum parameter
- Sulfur [water, ocean]: 2.86e-8 kg; lognormal variance with pedigree 0.0901, pedigree (3,5,5,3,1)
  Extrapolation for sum parameter
  Uncertainty: Extrapolation for sum parameter
- TOC, Total Organic Carbon [water, ocean]: 9.23e-6 kg; lognormal variance with pedigree 0.0901, pedigree (3,5,5,3,1)
  Extrapolation for sum parameter
  Uncertainty: Extrapolation for sum parameter
- Oils, unspecified [water, ocean]: 1.07e-5 kg; lognormal variance with pedigree 0.29, pedigree (1,1,5,1,5)
  Literature for onshore pipelines
  Uncertainty: Literature for onshore pipelines
- Nitrogen [water, ocean]: 8.24e-9 kg; lognormal variance with pedigree 0.0901, pedigree (3,5,5,3,1)
  Extrapolation for sum parameter
  Uncertainty: Extrapolation for sum parameter

## Sampling procedure
Literature.

## Extrapolations
This dataset has been extrapolated from year 2002 to the year of the calculation (2021). The uncertainty has been adjusted accordingly.

## Review by Michael Spielmann (obsolete) 2003-08-14
Passed.
