# clefting/splitting of energy wood

Dataset: EcoSpold 2, unit process
Geography: RoW
Time period: 2010-01-01 to 2021-12-31
Technology level: current
Classification: EcoSpold01Categories: wood energy/fuels
Classification: ISIC rev.4 ecoinvent: 0220:Logging
Scenario: Business-as-Usual
System model: Allocation, cut-off by classification
Generated by: [System]
Database: ecoinvent
isCopyrightProtected: true
accessRestrictedTo: 1

## General comment
The inventory refers to 1 productive machine hour (PMH) - referring to the operational time of the machine including breaks up to 15 minutes - for tractor powered clefting device with a diesel consumption of 7 l/PMH, and an engine power of 80 kW
Productivity depends on the specific circumstances of the harvesting operation and is specified in the respective datasets.
The following sources have been consulted for the elaboration and plausibilisation of the dataset:
Anonymous (2004): DIRECTIVE 2004/26/EC OF THE EUROPEAN PARLIAMENT AND OF THE COUNCIL of 21 April 2004 amending Directive 97/68/EC on the approximation of the laws of the Member States relating to measures against the emission of gaseous and particulate pollutants from internal combustion engines to be installed in non-road mobile machinery. Official Journal of the European Union: 30.4.2004
Lambrecht, U., H. Helms, K. Kuller and W. Knörr (2004): Entwicklung eines Modells zur Berechnung der Luftschadstoffemissionen und des Kraftstoffverbrauchs von Verbrennungsmotoren in mobilen Geräten und Maschinen; Endbericht. IFEU - Institut für Energie- und Umweltforschung Heidelberg GmbH, Heidelberg.
Spielmann, M., L. Barreto, V. Erni, F. Frutig and O. Thees (2007): Life cycle assessment of energy wood chip supply chains; a case study of near future supply of forest wood chips in Switzerland (unpublished). Paul Scherrer Institute (PSI), Swiss Federal Institute for Forest, Snow and Landscape Research (WSL), Villigen, Birmensdorf.

## Included activities start
Service beginning with the input of diesel into the tractor powering the clefting device, at forest road.

## Included activities end
Includes the input of machinery infrastructure, the input of diesel fuel, lubricants/greases as well as their disposal, and the emissions into air from diesel consumption. Wood is not included in the dataset.

## Geography
Emission profile according to European legislation

## Technology
Motormanual production with a mobile diesel powered clefting device.

For the production of cleft timber, residual wood (branches, small trees from tending or thinning or misbuilt large diameter trees) are cut into one meter long log pieces, loaded onto a tractor-driven trailer, and transported to the forest road. The logs are split along the grain with a mobile, tractor-powered clefting device; the resulting cleft timber is piled along the forest road for natural drying; small-diameter logs and branches are piled without splitting.

## Parameters
- share of EURO IIIa: 0.5 dimensionless; name EURO_IIIa
  emission class in EU legislation
- load factor: 0.5 dimensionless; name LF
  according to Lambrecht et al. 2004
- lifetime of machine, productive machine hours: 17600 hour; name total_PMH
  Oral personal communication, P. Wiss, Präsident des Verbandes Forstunternehmer Schweiz
- share of EURO IIIb: 0.5 dimensionless; name EURO_IIIb
  emission class in EU legislation
- engine power: 80 kW; name EP
  Oral personal communication, P. Wiss, Präsident des Verbandes Forstunternehmer Schweiz
- share of hardwood: 0.878 dimensionless; name share_hardwood
  Note that the hardwood and softwood shares do not add to 1. The difference is from industrial wood.
- yield, softwood: 0.909 dimensionless; name yield_softwood
  Yield of split logs relative to logs before splitting
- share of softwood: 0.083 dimensionless; name share_softwood
  (same comment as for share of hardwood)
- diesel consumption: 7 l/hour; name diesel_consumption
  Oral personal communication, P. Wiss, Präsident des Verbandes Forstunternehmer Schweiz
- yield, hardwood: 0.893 dimensionless; name yield_hardwood
  Yield of split logs relative to logs before splitting

## Reference product
- clefting of energy wood: 1 hour; CPC 8614: Support and operation services to forestry and logging; By-product classification allocatable product
  production volume 6.75778e6 hour; name p_clefting; = 5000*17600/10
    annual production of machinery: 5000 times total productive machine hours
  property price 3.87409 EUR2005
    Calculated based on inputs: The price of the product has been calculated as a sum of the values of the material and energy inputs for this product. This value is therefore a rough estimation. It may underestimate the real price since there are additional expenses when producing any product. These expences can include for example labour costs, treatment of waste materials and profit for the producer. Please consider carefully whether this level of data quality is acceptable for your application.

## Inputs from technosphere
- waste mineral oil: -0.579067 kg; name w_mineral_oil; = (m_lubricating_oil/ BP_dry_mass_1)*-1; source Klvac R. 2003
  hydraulic oil and engine oil/grease; adjusted for water content of waste oil
  production volume 3.91321e6 kg; = p_clefting*w_mineral_oil
    Calculated from production volume of reference product using the relative outputs.
  property price 0 EUR2005; name w_mineral_oil_price_EUR2005
  property dry mass 0.9 kg; name BP_dry_mass_1
  properties: carbon content, fossil 0.864444, water content 0.111111, wet mass 1 kg, heating value, net 34.7 MJ
  note on carbon content, fossil: Tab A.6, ecoinvent v2.2 report 13_I. C content has been calculated after data in the tables, and then referred to 1 kg DM
  note on heating value, net: Value taken from the general comment of the treatment dataset.
- diesel, low-sulfur: 0 kg; name m_diesel; source Jirsousek R. 2007; pedigree (1,1,1,1,1)
  Literature value: 7 l diesel fuel/machine hour at 0.19 man-hour/stere stacked wood, corresponding to 0.7 m3 solid wood.
  properties: wet mass 1 kg, dry mass 1 kg, carbon content, fossil 0.865, heating value, net 42.8 MJ
- lubricating oil: 0.52116 kg; name m_lubricating_oil; = (0.410+0.196)*0.86; source Klvac R. 2003; lognormal variance with pedigree 0.0362, pedigree (2,3,4,5,1)
  hydraulic oil and engine oil/grease; estimate based on Klvac et al. (2003); value per l converted to kg; values taken from dataset of small forwarder
  properties: carbon content, fossil 0.75, wet mass 1 kg, dry mass 1 kg, heating value, net 40.2 MJ
  note on carbon content, fossil: Lubricating oil is produced from diesel. C-content/dry mass of fats and oils considered 75%, from: ecoinvent v2.2 report, n 15a, pg 40
  note on heating value, net: Literature value, Source: IPCC 2006, 2006 IPCC Guidelines for National Greenhouse Gas Inventories, Prepared by the National Greenhouse Gas Inventories Programme, Eggleston H.S., Buendia L., Miwa K., Ngara T. and Tanabe K. (eds). Published: IGES, Japan
- tractor, 4-wheel, agricultural: 5.68182e-5 kg; = 1/total_PMH; lognormal variance with pedigree 0.5612, pedigree (2,3,4,5,1)
  calculated from total productive machine hours
- diesel, low-sulfur: 0.205248, 0.207203, 0.414267, 0.0137423, 0.0929554, 4.94658 kg (6 entries); source Jirsousek R. 2007; lognormal variance with pedigree 0.0362, pedigree (2,3,4,5,1)
  (same comment as for diesel, low-sulfur)

## Emissions to nature
- Dinitrogen monoxide [air, non-urban air or from high stacks]: 0.000704659 kg; = m_diesel*0.0000028*42.8; source Kellenberger D. 2007; lognormal variance with pedigree 0.2112, pedigree (2,3,4,5,1)
  value per MJ taken from ecoinvent 2.2 dataset *diesel in building machine" converted to input of diesel as mass (42.8 MJ/kg lower heating value)
- Nickel [air, non-urban air or from high stacks]: 4.12729e-7 kg; = m_diesel*0.00000000164*42.8; source Kellenberger D. 2007; lognormal variance with pedigree 0.8112, pedigree (2,3,4,5,1)
  (same comment as for Dinitrogen monoxide)
- Carbon monoxide, fossil [air, non-urban air or from high stacks]: 0.0654326 kg; = m_diesel*0.00026*42.8; source Kellenberger D. 2007; lognormal variance with pedigree 0.8112, pedigree (2,3,4,5,1)
  (same comment as for Dinitrogen monoxide)
- NMVOC, non-methane volatile organic compounds, unspecified origin [air, non-urban air or from high stacks]: 0.01346 kg; = (EURO_IIIa* EP* LF*(IF(EP>130;0.488;0.488))+EURO_IIIb* EP* LF*(IF(EP>130;0.185;0.185)))/1000; source Lambrecht U. 2004; lognormal variance with pedigree 0.2112, pedigree (2,3,4,5,1)
  emission model calculating hourly specific emissions as "engine power x load factor x base emission factor" as proposed by Lambrecht et al. (2004) and applied in Spielmann et al. (2007); values for base emission factors for VOC for vehicle classes EURO IIIa and EURO IIIb are taken from Guideline 97/68/EG, of which 97.6% are assumed to be NMVOC.
- Dioxins, measured as 2,3,7,8-tetrachlorodibenzo-p-dioxin [air, non-urban air or from high stacks]: 3.5233e-13 kg; = m_diesel*0.0000000000000014*42.8; source Kellenberger D. 2007; lognormal variance with pedigree 0.5612, pedigree (2,3,4,5,1)
  (same comment as for Dinitrogen monoxide)
- Nitrogen oxides [air, non-urban air or from high stacks]: 0.136 kg; = (EURO_IIIa* EP* LF*(IF(EP>130;3.5;3.5))+EURO_IIIb* EP* LF*(IF(EP>130;2;3.3)))/1000; source Lambrecht U. 2004; lognormal variance with pedigree 0.2112, pedigree (2,3,4,5,1)
  emission model calculating hourly specific emissions as "engine power x load factor x base emission factor" as proposed by Lambrecht et al. (2004) and applied in Spielmann et al. (2007); values for base emission factors for NOx for mobile machine class EUROIIIb are taken from the European Directive 2004/ 26/EC; for mobile machine class EURO IIIa values for base emission factors for NOx are calculated based on an assumed reduction of VOC emissions as compared to "Tier 2" limit for VOC of 1.0 g/kWh (following Spielmann et al. 2007).
- Methane, fossil [air, non-urban air or from high stacks]: 0.0003312 kg; = (EURO_IIIa* EP* LF*(IF(EP>130;0.012;0.012))+EURO_IIIb* EP* LF*(IF(EP>130;0.00456;0.00456)))/1000; source Lambrecht U. 2004; lognormal variance with pedigree 0.2112, pedigree (2,3,4,5,1)
  emission model calculating hourly specific emissions as "engine power x load factor x base emission factor" as proposed by Lambrecht et al. (2004) and applied in Spielmann et al. (2007); values for base emission factors for VOC for mobile machinery classes EURO IIIa and EURO IIIb are taken from European Directive 2004/ 26/EC, of which 2.4% are assumed to be methane.
- Copper [air, non-urban air or from high stacks]: 9.99106e-6 kg; = m_diesel*0.0000000397*42.8; source Kellenberger D. 2007; lognormal variance with pedigree 0.8112, pedigree (2,3,4,5,1)
  (same comment as for Dinitrogen monoxide)
- Particulates, > 10 um [air, non-urban air or from high stacks]: 0.000389615 kg; = (EURO_IIIa* EP* LF*(IF(EP>130;0.2;0.3))+EURO_IIIb* EP* LF*(IF(EP>130;0.025;0.025)))/1000/(0.0000943+0.00000628+0.00000419)*0.00000628; source Lambrecht U. 2004; lognormal variance with pedigree 0.3112, pedigree (2,3,4,5,1)
  emission model calculating hourly specific emissions as "engine power x load factor x base emission factor" as proposed by Lambrecht et al. (2004) and applied in Spielmann et al. (2007); values for base emission factors for particles for mobile machine classes EURO IIIa and EUROIIIb are taken from European Directive 2004/ 26/EC. The proportional distribution accross particle classes is made based on the ecoinvent v3 dataset "Diesel, burned in building machine/GLO".
- Cadmium [air, non-urban air or from high stacks]: 5.88894e-8 kg; = m_diesel*0.000000000234*42.8; source Kellenberger D. 2007; lognormal variance with pedigree 0.8112, pedigree (2,3,4,5,1)
  (same comment as for Dinitrogen monoxide)
- Particulates, < 2.5 um [air, non-urban air or from high stacks]: 0.00585043 kg; = (EURO_IIIa* EP* LF*(IF(EP>130;0.2;0.3))+EURO_IIIb* EP* LF*(IF(EP>130;0.025;0.025)))/1000/(0.0000943+0.00000628+0.00000419)*0.0000943; source Lambrecht U. 2004; lognormal variance with pedigree 0.5612, pedigree (2,3,4,5,1)
  (same comment as for Particulates, > 10 um)
- Benzo(a)pyrene [air, non-urban air or from high stacks]: 1.76416e-7 kg; = m_diesel*0.000000000701*42.8; source Kellenberger D. 2007; lognormal variance with pedigree 0.5712, pedigree (2,3,4,5,1)
  (same comment as for Dinitrogen monoxide)
- Zinc [air, non-urban air or from high stacks]: 5.88894e-6 kg; = m_diesel*0.0000000234*42.8; source Kellenberger D. 2007; lognormal variance with pedigree 0.8112, pedigree (2,3,4,5,1)
  (same comment as for Dinitrogen monoxide)
- Ammonia [air, non-urban air or from high stacks]: 0.000117527 kg; = m_diesel*0.000000467*42.8; source Kellenberger D. 2007; lognormal variance with pedigree 0.2112, pedigree (2,3,4,5,1)
  (same comment as for Dinitrogen monoxide)
- Selenium [air, non-urban air or from high stacks]: 5.88894e-8 kg; = m_diesel*0.000000000234*42.8; source Kellenberger D. 2007; lognormal variance with pedigree 0.8112, pedigree (2,3,4,5,1)
  (same comment as for Dinitrogen monoxide)
- Particulates, > 2.5 um, and < 10um [air, non-urban air or from high stacks]: 0.00025995 kg; = (EURO_IIIa* EP* LF*(IF(EP>130;0.2;0.3))+EURO_IIIb* EP* LF*(IF(EP>130;0.025;0.025)))/1000/(0.0000943+0.00000628+0.00000419)*0.00000419; source Lambrecht U. 2004; lognormal variance with pedigree 0.3612, pedigree (2,3,4,5,1)
  (same comment as for Particulates, > 10 um)
- PAH, polycyclic aromatic hydrocarbons [air, non-urban air or from high stacks]: 1.97556e-5 kg; = m_diesel*0.0000000785*42.8; source Kellenberger D. 2007; lognormal variance with pedigree 0.5612, pedigree (2,3,4,5,1)
  (same comment as for Dinitrogen monoxide)
- Carbon dioxide, fossil [air, non-urban air or from high stacks]: 18.3715 kg; = m_diesel*0.073*42.8; source Kellenberger D. 2007; lognormal variance with pedigree 0.0362, pedigree (2,3,4,5,1)
  (same comment as for Dinitrogen monoxide)

## Sampling procedure
Material and fuel input from literature sources (see general comments field); air-borne emissions taken from existing dataset on diesel consumption in building machines or - where emission levels beyond applicable European legislation - estimated with emissions model based on emission limits established in European Directive 2004/ 26/EC for non-road mobile machinery types EURO IIIa and IIIb (according to Lambrecht et al 2004 and e.g. applied in Spielmann et al. 2007).

## Extrapolations
see Geography This dataset has been derived from Swiss data in an original dataset covering the geography RER. The uncertainty has been adjusted accordingly.
