# transport, freight, lorry with refrigeration machine, 3.5-7.5 ton, EURO4, carbon dioxide, liquid refrigerant, freezing

Dataset: EcoSpold 2, unit process
Geography: GLO
Time period: 2010-01-01 to 2021-12-31
Technology level: modern
Classification: ISIC rev.4 ecoinvent: 4923:Freight transport by road
Synonyms: controlled atmosphere transport; refrigerated transport
Scenario: Business-as-Usual
System model: Allocation, cut-off by classification
Generated by: Tereza Levova
Published in: Keller, M. 2010
Database: ecoinvent
isCopyrightProtected: true
accessRestrictedTo: 1

## General comment
This dataset represents transport of goods in lorry with atmosphere controlled (temperature, humidity, etc.) storage space set up for freezing.
While the majority of the atmosphere controlled (cold chain, refrigerated transport) road transportation is conducted with truck with semi-trailer in the cities this goods is often transported by smaller rigid trucks with refrigeration machine.

## Included activities start
This activity starts with input of fuel, road and vehicle infrastructure including refrigeration machine. It includes also exhaust and non-exhaust emissions.

## Included activities end
This datasets combines the transport of 1 ton of goods over 1km by a lorry with refrigeration machine. The goods themselves are not included.

## Technology
The construction of the refrigeration machine does not change very much in time. What might be changing is the 1) type of refrigerant, 2) energy consumption - efficiency and 3) leakage of the refrigerant.
The datasets on transport, freight, lorry with refrigeration machine present in the ecoinvent database represent several scenarios with different type of refrigerant, energy consumption and leakage of the refrigerant.
The technology level is set reflecting the EURO classification, i.e. EURO3 is the oldest technology and EURO6 the newest. The R134a refrigerant is currently most widely used refrigerant, while the carbon dioxide, liquid is the newer more “environmentally friendly” solution. Therefore all the lorries using the carbon dioxide, liquid as refrigerant have higher level of technology than those using the R134a as refrigerant.

## Parameters
- average annual refrigerant leakage rate: 0.193 dimensionless; name refrigerant_leakage_rate; lognormal variance with pedigree 0.0166, pedigree (4,5,1,1,1)
  Estimated based on literature value.
  The literature suggest, that the annual leakage rate of the refrigerant is between 10% - 37% (Tassou, 2008, Food transport refrigeration - Approaches to reduce energy consumption and environmental impacts of road transport) and 20% (IPCC, 2005, Special Report: Safeguarding the Ozone Layer and the Global Climate System). The IPCC report also says, that the efficiency of the new systems is higher and the rate of the leakage is lower.
  The annual refrigerant leakage rate is expressed as a percentage of the total refrigerant tank volume. Older the car more leakage. The newest technology - EURO6 class of lorries - has estimated leakage of 10%. The estimated leakage for the other classes is;
  25% EURO3
  19.3% EURO4
  13.7% EURO5
  8% EURO6
- fraction, refrigeration energy to motive energy: 0.2 dimensionless; name fraction_refEnergy_motEnergy; lognormal variance with pedigree 0.0166, pedigree (4,5,1,1,1)
  Literature value (Tassou, S.A., 2008, Food transport refrigeration - Approaches to reduce energy consumption and environmental impacts of road transport, Applied Thermal Engineering).
  Literature (Tassou, S.A., 2008) states, that irrespective of the type of vehicle type the average fuel consumption of the refrigeration systems in the sample varied between 15% and 25% of the engine fuel consumption. The data did not distinguish between chilled, frozen or mixed temperature product transportation in multi-compartment vehicles or distribution type.
  It is decided, based on expert judgement, that in both operation modes - cooling and freezing - the power consumption is the same - 20%. In case of reefers (see 'operation, reefer ...' activity) there is an extensive discussion whether the power consumption of freezing is actually lower or higher than in case of cooling. It has been decided, that in case of reefers the freezing operation mode has slightly lower energy consumption than cooling. The difference between reefers and lorries which provide transport of goods in need of atmosphere control is the human behaviour. Reefers are usually loaded only once and unloaded only once. The reefer is not being opened during its transport. It is assumed, that in case of lorries the storage is opened and closed regularly resulting in higher heat loss and consequently energy consumption.
  This parametre should be updated once better data on energy consumption are available.
  It is assumed, that the refrigeration machine energy efficiency is increasing in the same rate as the energy efficiency of the lorries, thus this fraction is the same for all the EURO classes.
- initial refrigerant charge: 4.5 kg; name initial_refrigerant_charge; lognormal variance with pedigree 0.0166, pedigree (4,5,1,1,1)
  Literature value. Copied from the refrigerated machine production dataset.

## Reference product
- transport, freight, lorry with refrigeration machine, 3.5-7.5 ton, EURO4, carbon dioxide, liquid refrigerant, freezing: 1 metric ton*km; name transport_RP; CPC 65111: Road transport services of freight by refrigerator vehicles; By-product classification allocatable product
  production volume 5.15776e8 metric ton*km; name transport_RP_PV; = 112125260960.942*0.1*0.1*0.46
    Estimated value.
    The starting point of the calculation is the production volume of the corresponding GLO dataset (dataset name "for transport, freight, lorry x metric ton, EUROx", where size and EURO calss correspond to the ones reported in the activity name of this dataset).
    It is estimated, that the transport with lorries with refrigeration machine represents 10% of all the transport with lorries.
    Further it is estimated, that 10% of these lorries use carbon dioxide, liquid as refrigerant and remaining 90% use R134a as refrigerant.
    According to literature (Drawry, 2008, published in http://www.hamburg-sued.com/group/media/sharedmedia/dokumente/brochures/Reefer_guide.pdf, accessed 20141216) the type of food transported in reefers is following;
    31% fresh fruits and vegetables (excl. bananas)
    20% bananas
    24% meat and poultry
    19% fish and seafood
    6% various (medicine, flowers, etc.)
    The fruits and vegetables (54%) in general need to be cooled during its storage and transport and the meat and seafood (46%) need to be frozen. The various is divided half/half between cooling and freezing. While this literature source refers to transport in reefers it is assumed, that the ratio between cooling/freezing (0.54/0.46) is the same as for the transport in small lorries.
  property price 0.118308 EUR2005; name transport_RP_price_EUR2005
    Calculated based on inputs: The price of the product has been calculated as a sum of the values of the material and energy inputs for this product. This value is therefore a rough estimation. It may underestimate the real price since there are additional expenses when producing any product. These expences can include for example labour costs, treatment of waste materials and profit for the producer. Please consider carefully whether this level of data quality is acceptable for your application.

## Inputs from technosphere
- road wear emissions, lorry: -3.56e-5 kg; name road_emissions; = ((7.0e-9*4984)/0.98)*-1; source Ntziachristos, L. 2013; lognormal variance with pedigree 0.0419, pedigree (2,2,5,4,1)
  Road freight specific non-exhaust emissions.
  This dataset and the emission factors within it relate to 1kg of tyre wear. In order to use the treatment of non-exhaust emissions in a transport dataset the quantity of emissions per km must be calculated. Non-exhaust emissions are considered to be linearly scalable to gross vehicle weight (GVW). For road wear emissions due to lorries the specific quantity is 7.0E-9 kg/kg GVW*km.
  The GVW of the 3.5-7.5t lorries using an average load factor is 4984kg.
  The value calculated must then be devided by the average load to give the non-exhaust emissions per tkm.
  Uncertainty: N
  production volume 18361.6 kg; = road_emissions*transport_RP_PV
    Calculated from production volume of reference product using the relative outputs.
  properties: carbon content, fossil 0.75
  note on carbon content, fossil: The amount of carbon released due to road wear is not given in theEmissions Inventory Guidebook (Ntziachristos et al., 2013). For road wear there are no individual substances reported. Here we assume that 75% of the particle emissions are carbon, fossil in their nature due to the bitumen road surfacing.
- brake wear emissions, lorry: -4.13469e-5 kg; name brake_emissions; = ((8.13e-9*4984)/0.98)*-1; source Ntziachristos, L. 2013; lognormal variance with pedigree 0.0419, pedigree (2,2,5,4,1)
  Road freight specific non-exhaust emissions.
  This dataset and the emission factors within it relate to 1kg of tyre wear. In order to use the treatment of non-exhaust emissions in a transport dataset the quantity of emissions per km must be calculated. Non-exhaust emissions are considered to be linearly scalable to gross vehicle weight (GVW). For brake wear emissions from lorries the specific quantity is 8.13E-9 kg/kg GVW*km.
  The GVW of the 3.5-7.5t lorries using an average load factor is 4984kg.
  The value calculated must then be devided by the average load to give the non-exhaust emissions per tkm.
  Uncertainty: N
  production volume 21325.7 kg; = brake_emissions*transport_RP_PV
    Calculated from production volume of reference product using the relative outputs.
  properties: carbon content, fossil 0.149
  note on carbon content, fossil: This amount equates to the amout for organic carbon reported in the Emissions Inventory Guidebook (Ntziachristos et al., 2013).
- carbon dioxide, liquid: 0 kg; name refrigerant_recharge; pedigree (1,1,1,1,1)
  Calculated value.
  property carbon content, fossil 0.272727; name CC_carbon_dioxide_liquid
  properties: wet mass 1 kg, heating value, net 8.27 MJ, dry mass 1 kg
- lorry with refrigeration machine, carbon dioxide, liquid as refrigerant, 16 metric ton: 1.88e-6 unit; lognormal variance with pedigree 0.306, pedigree (3,1,3,5,1)
  Calculated value based on lifetime vkm (540 000 for all lorry sizes) and average load factors (see Activity Description).
  Uncertainty: o
  property lifetime 15 year; name lorry_lifetime
  property height, external 0 m; name lorry_cargo_height
  property width, external 0 m; name lorry_cargo_width
  property length, external 0 m; name lorry_cargo_length
  property lifetime capacity [metric ton*km] 540000 metric ton*km; name lorry_lifetime_capacity
- maintenance, lorry 16 metric ton: 0 unit; source Spielmann M. 2007; pedigree (1,1,1,1,1)
  (same comment as for lorry with refrigeration machine, carbon dioxide, liquid as refrigeran)
- road: 0.00195 m*year; source Spielmann M. 2007; lognormal variance with pedigree 0.306, pedigree (3,1,3,5,1)
  Calculated value based demand factors and underlying assumptions for European road transport services. Values are based on total tkm of all road transport services (RER) and the relative shares of each specific form (i.e. 3.5-7.5t lorry). The value per tkm is then based on the net vehicle weight plus averge load factor (see Activity Description). Transport performance data is derived from TREMOVE (2009).
  Uncertainty: o
- tyre wear emissions, lorry: -0.000409654 kg; name tyre_emissions; = ((8.055e-8*4984)/0.98)*-1; source Ntziachristos, L. 2013; lognormal variance with pedigree 0.0419, pedigree (2,2,5,4,1)
  Road freight specific non-exhaust emissions.
  This dataset and the emission factors within it relate to 1kg of tyre wear. In order to use the treatment of non-exhaust emissions in a transport dataset the quantity of emissions per km must be calculated. Non-exhaust emissions are considered to be linearly scalable to gross vehicle weight (GVW). For tyre wear emissions from lorries the specific quantity is 8.055E-8 kg/kg GVW*km.
  The GVW of the 3.5-7.5t lorries using an average load factor is 4984kg.
  The value calculated must then be devided by the average load to give the non-exhaust emissions per tkm.
  Uncertainty: N
  production volume 211290 kg; = tyre_emissions*transport_RP_PV
    Calculated from production volume of reference product using the relative outputs.
  properties: carbon content, fossil 0.675
- diesel, low-sulfur: 0.131472 kg; = 0.10956*(1+fraction_refEnergy_motEnergy); source Keller, M. 2010; lognormal variance with pedigree 0.0419, pedigree (2,2,5,4,1)
  Literature value. Derived from HBEFA database (Keller, 2010).
  Uncertainty: F
  properties: heating value, net 42.8 MJ, dry mass 1 kg, wet mass 1 kg, carbon content, fossil 0.865
  note on carbon content, fossil: C-content of diesel low-sulfur is 86.5% (ecoinvent v2.2 report 6_IV, Tab 3.14)
- road maintenance: 0 m*year; pedigree (1,1,1,1,1)
  Calculated value based demand factors and underlying assumptions for European road transport services. Values are based on total vkm of all road transport services (RER) and the relative shares of each specific form (e.g. 3.5-7.5t lorry). The value per tkm is then based on the average load factor (see Activity Description). Transport performance data is derived from TREMOVE (2009).
  Uncertainty: o
- carbon dioxide, liquid: 4.19527e-6, 1.99297e-5 kg (2 entries); lognormal variance with pedigree 0.0186, pedigree (4,5,3,1,1)
  Calculated value.
  properties: wet mass 1 kg, carbon content, fossil 0.272727, heating value, net 8.27 MJ, dry mass 1 kg
- maintenance, lorry 16 metric ton: 6.10831e-7, 1.26917e-6 unit (2 entries); source Spielmann M. 2007; lognormal variance with pedigree 0.306, pedigree (3,1,3,5,1)
  (same comment as for lorry with refrigeration machine, carbon dioxide, liquid as refrigeran)
- road maintenance: 2.97178e-5, 0.00128332 m*year (2 entries); lognormal variance with pedigree 0.306, pedigree (3,1,3,5,1)
  (same comment as for road maintenance)

## Emissions to nature
- Mercury [air, unspecified]: 6.96796e-10 kg; = 5.80663E-10*(1+fraction_refEnergy_motEnergy); source Ntziachristos, L. 2013; lognormal variance with pedigree 0.7413, pedigree (2,2,5,4,1)
  Literature value. Fuel dependant emissions - heavy metal in fuel. Literature value. EMEP/EEA (2013) Tab. 3-100.
  Uncertainty: T
- Particulates, < 2.5 um [air, unspecified]: 1.0045e-5 kg; = 8.37086E-06*(1+fraction_refEnergy_motEnergy); source Keller, M. 2010; lognormal variance with pedigree 0.0419, pedigree (2,2,5,4,1)
  Literature value. Derived from HBEFA database (Keller, 2010).
  Uncertainty: E
- Sulfur dioxide [air, unspecified]: 2.09882e-6 kg; = 1.74902E-06*(1+fraction_refEnergy_motEnergy); source Keller, M. 2010; lognormal variance with pedigree 0.0419, pedigree (2,2,5,4,1)
  Literature value. Derived from HBEFA database (Keller, 2010).
  Uncertainty: E
- Cadmium [air, unspecified]: 1.1438e-9 kg; = 9.53164E-10*(1+fraction_refEnergy_motEnergy); source Ntziachristos, L. 2013; lognormal variance with pedigree 0.7413, pedigree (2,2,5,4,1)
  (same comment as for Mercury)
- NMVOC, non-methane volatile organic compounds, unspecified origin [air, unspecified]: 1.04034e-5 kg; = 8.66949E-06*(1+fraction_refEnergy_motEnergy); source Keller, M. 2010; lognormal variance with pedigree 0.0419, pedigree (2,2,5,4,1)
  Literature value. Derived from HBEFA database (Keller, 2010) and emissions inventory guidebook (EMEP/EEA, 2013). Unspecified NMVOC's represent NMVOC's for which no elementary exchange exists in the ecoinvent database. Total NMVOC's are given by the HBEFA database with the split being provided by the EMEP/EEA (2013) guidebook.
  Uncertainty: N
- Zinc [air, unspecified]: 2.28497e-7 kg; = 1.90414E-07*(1+fraction_refEnergy_motEnergy); source Ntziachristos, L. 2013; lognormal variance with pedigree 0.7413, pedigree (2,2,5,4,1)
  (same comment as for Mercury)
- PAH, polycyclic aromatic hydrocarbons [air, unspecified]: 1.0281e-8 kg; = 8.56752E-09*(1+fraction_refEnergy_motEnergy); source Ntziachristos, L. 2013; lognormal variance with pedigree 0.7413, pedigree (2,2,5,4,1)
  Literature value. PAH's per kg fuel use provided by the EMEP/EEA (2013) guidebook.
  Uncertainty: D
- Acetaldehyde [air, unspecified]: 5.85295e-7 kg; = 4.87746E-07*(1+fraction_refEnergy_motEnergy); source Ntziachristos, L. 2013; lognormal variance with pedigree 0.0419, pedigree (2,2,5,4,1)
  Literature value. The NMVOC split is provided by the EMEP/EEA (2013) guidebook. All elementary NMVOC exchanges available in the ecoinvent database and quantified in the EMEP/EEA guidebook are provided. Total NMVOC's derived from HBEFA database (Keller, 2010)..
  Uncertainty: N
- Formaldehyde [air, unspecified]: 1.07582e-6 kg; = 8.96513E-07*(1+fraction_refEnergy_motEnergy); source Ntziachristos, L. 2013; lognormal variance with pedigree 0.0419, pedigree (2,2,5,4,1)
  (same comment as for Acetaldehyde)
- Propane [air, unspecified]: 1.28074e-8 kg; = 1.06728E-08*(1+fraction_refEnergy_motEnergy); source Ntziachristos, L. 2013; lognormal variance with pedigree 0.0419, pedigree (2,2,5,4,1)
  (same comment as for Acetaldehyde)
- Ammonia [air, unspecified]: 3.66022e-6 kg; = 3.05018E-06*(1+fraction_refEnergy_motEnergy); source Keller, M. 2010; lognormal variance with pedigree 0.0419, pedigree (2,2,5,4,1)
  Literature value. Derived from HBEFA database (Keller, 2010).
  Uncertainty: E
- Nickel [air, unspecified]: 1.15694e-9 kg; = 9.6412E-10*(1+fraction_refEnergy_motEnergy); source Ntziachristos, L. 2013; lognormal variance with pedigree 0.7413, pedigree (2,2,5,4,1)
  (same comment as for Mercury)
- Chromium VI [air, unspecified]: 7.88825e-12 kg; = 6.57354E-12*(1+fraction_refEnergy_motEnergy); source Ntziachristos, L. 2013; lognormal variance with pedigree 0.7413, pedigree (2,2,5,4,1)
  Estimated value. Fuel dependant emissions - heavy metal in fuel. Estimated using the underlying assumption that 0.2% of the emitted Cr is emitted as Cr(IV). Fuel dependant emissions - heavy metal in fuel. Literature value for Cr. EMEP/EEA (2013) Tab. 3-100.
  Uncertainty: T
- Acrolein [air, unspecified]: 2.2669e-7 kg; = 1.88908E-07*(1+fraction_refEnergy_motEnergy); source Ntziachristos, L. 2013; lognormal variance with pedigree 0.0419, pedigree (2,2,5,4,1)
  (same comment as for Acetaldehyde)
- Carbon monoxide, fossil [air, unspecified]: 0.000584826 kg; = 0.000487355*(1+fraction_refEnergy_motEnergy); source Keller, M. 2010; lognormal variance with pedigree 0.0419, pedigree (2,2,5,4,1)
  Literature value. Derived from HBEFA database (Keller, 2010).
  Uncertainty: E
- Heptane [air, unspecified]: 3.8422e-8 kg; = 3.20183E-08*(1+fraction_refEnergy_motEnergy); source Ntziachristos, L. 2013; lognormal variance with pedigree 0.0419, pedigree (2,2,5,4,1)
  (same comment as for Acetaldehyde)
- Copper [air, unspecified]: 2.78718e-9 kg; = 2.32265E-09*(1+fraction_refEnergy_motEnergy); source Ntziachristos, L. 2013; lognormal variance with pedigree 0.7413, pedigree (2,2,5,4,1)
  (same comment as for Mercury)
- Pentane [air, unspecified]: 7.68439e-9 kg; = 6.40366E-09*(1+fraction_refEnergy_motEnergy); source Ntziachristos, L. 2013; lognormal variance with pedigree 0.0419, pedigree (2,2,5,4,1)
  (same comment as for Acetaldehyde)
- Nitrogen oxides [air, unspecified]: 0.00171663 kg; = 0.001430527*(1+fraction_refEnergy_motEnergy); source Keller, M. 2010; lognormal variance with pedigree 0.0419, pedigree (2,2,5,4,1)
  Literature value. Derived from HBEFA database (Keller, 2010).
  Uncertainty: E
- Arsenic [air, unspecified]: 1.31471e-11 kg; = 1.09559E-11*(1+fraction_refEnergy_motEnergy); source Ntziachristos, L. 2013; lognormal variance with pedigree 0.0419, pedigree (2,2,5,4,1)
  Literature value. Fuel dependant emissions - heavy metal in fuel. Literature value. EMEP/EEA (2013) Tab. 3-100.
  Uncertainty: N
- Dinitrogen monoxide [air, unspecified]: 7.43234e-6 kg; = 6.19362E-06*(1+fraction_refEnergy_motEnergy); source Keller, M. 2010; lognormal variance with pedigree 0.0419, pedigree (2,2,5,4,1)
  Literature value. Derived from HBEFA database (Keller, 2010).
  Uncertainty: E
- Lead [air, unspecified]: 6.84964e-9 kg; = 5.70803E-09*(1+fraction_refEnergy_motEnergy); source Ntziachristos, L. 2013; lognormal variance with pedigree 0.7413, pedigree (2,2,5,4,1)
  (same comment as for Mercury)
- Methane, fossil [air, unspecified]: 3.14934e-7 kg; = 2.62445E-07*(1+fraction_refEnergy_motEnergy); source Keller, M. 2010; lognormal variance with pedigree 0.0419, pedigree (2,2,5,4,1)
  Literature value. Derived from HBEFA database (Keller, 2010).
  Uncertainty: E
- o-Xylene [air, unspecified]: 5.12293e-8 kg; = 4.26911E-08*(1+fraction_refEnergy_motEnergy); source Ntziachristos, L. 2013; lognormal variance with pedigree 0.0419, pedigree (2,2,5,4,1)
  (same comment as for Acetaldehyde)
- Benzaldehyde [air, unspecified]: 1.7546e-7 kg; = 1.46217E-07*(1+fraction_refEnergy_motEnergy); source Ntziachristos, L. 2013; lognormal variance with pedigree 0.0419, pedigree (2,2,5,4,1)
  (same comment as for Acetaldehyde)
- Benzene [air, unspecified]: 8.96513e-9 kg; = 7.47094E-09*(1+fraction_refEnergy_motEnergy); source Ntziachristos, L. 2013; lognormal variance with pedigree 0.0419, pedigree (2,2,5,4,1)
  (same comment as for Acetaldehyde)
- Ethane [air, unspecified]: 3.8422e-9 kg; = 3.20183E-09*(1+fraction_refEnergy_motEnergy); source Ntziachristos, L. 2013; lognormal variance with pedigree 0.0419, pedigree (2,2,5,4,1)
  (same comment as for Acetaldehyde)
- Styrene [air, unspecified]: 7.1721e-8 kg; = 5.97675E-08*(1+fraction_refEnergy_motEnergy); source Ntziachristos, L. 2013; lognormal variance with pedigree 0.0419, pedigree (2,2,5,4,1)
  (same comment as for Acetaldehyde)
- m-Xylene [air, unspecified]: 1.25512e-7 kg; = 1.04593E-07*(1+fraction_refEnergy_motEnergy); source Ntziachristos, L. 2013; lognormal variance with pedigree 0.0419, pedigree (2,2,5,4,1)
  (same comment as for Acetaldehyde)
- Butane [air, unspecified]: 1.9211e-8 kg; = 1.60092E-08*(1+fraction_refEnergy_motEnergy); source Ntziachristos, L. 2013; lognormal variance with pedigree 0.0419, pedigree (2,2,5,4,1)
  (same comment as for Acetaldehyde)
- Chromium [air, unspecified]: 3.94412e-9 kg; = 3.28677E-09*(1+fraction_refEnergy_motEnergy); source Ntziachristos, L. 2013; lognormal variance with pedigree 0.7413, pedigree (2,2,5,4,1)
  (same comment as for Mercury)
- Selenium [air, unspecified]: 1.31471e-11 kg; = 1.09559E-11*(1+fraction_refEnergy_motEnergy); source Ntziachristos, L. 2013; lognormal variance with pedigree 0.7413, pedigree (2,2,5,4,1)
  (same comment as for Mercury)
- Toluene [air, unspecified]: 1.28074e-9 kg; = 1.06728E-09*(1+fraction_refEnergy_motEnergy); source Ntziachristos, L. 2013; lognormal variance with pedigree 0.0419, pedigree (2,2,5,4,1)
  (same comment as for Acetaldehyde)
- Carbon dioxide, fossil [air, unspecified]: 0.417487 kg; = 0.3479*(1+fraction_refEnergy_motEnergy)+(refrigerant_recharge* CC_carbon_dioxide_liquid); source Keller, M. 2010; lognormal variance with pedigree 0.0419, pedigree (2,2,5,4,1)
  Literature value. Derived from HBEFA database (Keller, 2010). The value is the sum of CO2 emissions from the fuel burned to produce energy and from the leakage of carbon dioxide, liquid refrigerant.
  Uncertainty: E

## Extrapolations
This dataset has been extrapolated from year 2014 to the year of the calculation (2021). The uncertainty has been adjusted accordingly.
