# scandium oxide production, from rare earth tailings

Dataset: EcoSpold 2, unit process
Geography: CN-NM
Time period: 2020-01-01 to 2024-12-31
Technology level: current
Classification: ISIC rev.4 ecoinvent: 2420:Manufacture of basic precious and other non-ferrous metals
Synonyms: Discandium trioxide; Scandia
Scenario: Business-as-Usual
System model: Allocation, cut-off by classification
Share of production covered: 100 %
Generated by: Efstathios Kakkos
Database: ecoinvent
isCopyrightProtected: true
accessRestrictedTo: 1

## General comment
This dataset refers to the beneficiation and smelting activities in order to produce 1 kg of Scandium oxide (Sc2O3), with purity greater than 99.9% from rare earth tailings in the Bayan obo mines in the Baotou region of China. The rare earth tailings are produced as a byproduct from the mining and beneficiation activities of the REE-Nb-Fe ore at the same location. China is top producer of Scandium, being responsible for 90% of the global scandium production (Source: https://www.scandiummining.com/site/assets/files/5740/scandium-white-paperemc-website-june-2014-.pdf).
Today, scandium is produced either as a co-product of other primary metal projects or is extracted out of old tailings from depleted mining projects where the specific process happened to concentrate scandium levels. (Source: https://www.scandiummining.com/scandium/scandium-faq/). This dataset is based on the publication of Wang et al (2020) (reference 1). The boundaries of the system have been expanded in order to include the processing of fluorite coarse ore that is produced as a byproduct during the scandium oxide production, due to the fact that there was no available proxy for the ore in Ecoinvent, The processing produces fluorite concentrate which was represented as fluorspar which exists in Ecoinvent. The data for the processing of fluorite was taken from Wang et al 2019 (reference 2 – consult the respective exchange comment).
Due to lack of data regarding the data acquisition time, the dataset generator has relied on the previous work of the same author that dealt with the production of scandium concentrate from the Bayan Obo tailings (see reference 2 –data coverage until the beneficiation stage). Wang et al 2019 mentions that the data were acquired during 2014-2018. Therefore, because the data is recent, the dataset is assumed valid from 2018 until 2022 (5 years). Furthermore, the electricity is taken from the grid, meaning that all upstream inputs and outputs are already taken into account. Finally, the steam is generated from coal burning. For further information, consult the sampling procedure and the individual exchange comments.

Reference 1: Wang, L., Wang, P., Chen, W.-Q., Wang, Q.-Q., & Lu, H.-S. (2020). Environmental Impacts of Scandium Oxide Production from Rare Earths Tailings of Bayan Obo Mine. Journal of Cleaner Produc-tion, 122464. doi:https://doi.org/10.1016/j.jclepro.2020.122464

Reference 2: Wang, L., Jiao, G., Lu, H., & Wang, Q. (2019). Life cycle assessment of integrated exploitation technology for tailings in Bayan Obo Mine, China. Applied Ecology and Environmental Research, 17, 4343-4359. doi:10.15666/aeer/1702_43434359
This dataset includes the beneficiation stage and the smelting stage, including 5 major processes and 22 sub-processes. The first stage consists of 3 separation steps (i.e first separation, secondary separation, and final separation), during which scandium is separated and concentrated to produce Scandium (Sc) concentrate for the smelting stage. During the smelting stage – consisting of metallurgy and purification processes – Sc oxide is extracted from the concentrate to produce high-purity (>99.9%) Sc2O3.
Beneficiation stage: The beneficiation stage is comprised of the first, secondary and final separation. During the first separation, the remaining iron and rare earth elements (REEs) are separated from the REE tailings, through the sub-processes of iron separation, REE separation). Afterwards, bulk flotation is applied to the remaining tailings, dividing them into mixed foam and mixed grit, in order to separate easily flotating and iron-silicate minerals and reduce the difficulty of the next recycling. The mixed foam separates fluorite and the mixed grit, containing approximately 0.02-0.03% scandium. Then the mix grit goes to the secondary separation (including the sub-processes of sulfur flotation (I), iron separation (II), gravity concentration, sulfur flotation (II), and Fe separation (III) in order to separate the sulfur and the remaining iron (byproducts) and thus further enrich the scandium. Sulfur flotation (I) and further iron separation is necessary in order to decrease the difficulty of Niobium (Nb) separation. Then gravity separation is performed in order to isolate the gangue materials from the grit, and simplify the Nb separation. At this point, the original tailings have been reduced to concentrates and Scandium-enriched remaining tailings (with 0.02-0.03% Sc content). The concentrates undergo again sulfur flotation (I) and iron separation (II) to further separate iron and sulfur and -as a result- further enrich the scandium in the remaining tailings, reaching a content of 0.03-0.04% Sc. After the first and secondary separation, iron, sulfur and REEs have been completely separated and the remaining valuable elements to be extracted from the tailings contain Nb and Sc. Nb separation is performed first, because of the Sc existence in silicate materials. Pyroxene and amphibole (silicate minerals) are recycled by a strong magnetic separation process and divided from the Nb tailings and gravity concentration tailings, producing high-quality Sc concentrates (approximately 0.05% Sc content). The concentrates are then fed to the smelting stage for the production of high purity Sc2O3.
Smelting stage: The smelting stage consists of the metallurgy and the purification process. The metallurgy step incorporates the processes of concentration, ore grinding, and pressure filtration (physical extraction), normal acid leaching, pressure acid leaching, and extraction. The Sc concentrates produced from the beneficiation step are further concentrated and the residues are grinded (particle size reach 200-325 mesh) to the output rate. Pressure filtration separates the solid and liquid containing Scandium. After that, (normal and pressurized) acid leaching is applied to extract the Scandium-containing substance (20-30% Sc content) from the acid leaching solution, which goes to the purification process, which includes 6 sub-processes: Ti cleaning, Fe cleaning, back extraction, purification, oxalic acid precipitation, and calcination. At first, residual titanium and iron are removed first to avoid impacting the further purification sub-processes. The ideal cleaning rate can be attained by applying high number of washing steps (i.e. 20). However too much washing can potentially lead to significant scandium losses. Then, the addition of sodium hydroxide within the Sc-containing solution produces a soda cake, containing Nb and Sc. Subsequently, niobium and scandium oxide are produced from filter cake and filtrate respectively, which are created through purification of the soda cake, after the addition of hydrochloric acid solution. Excessive addition of oxalic acid to the filtrate produces scandium oxalate precipitates, which are later burned at a temperature of 800°C in order to produce high-purity (>99.9%) scandium oxide (Sc2O3).

## Included activities start
The activity starts with the separation of scandium from rare earth tailings.

## Included activities end
The activity ends with the production of scandium oxide, 99.9% pure. The activity includes the steps required to produce fluorite concentrate.

## Allocation
No allocation is applied.

## Geography
Baotou is known as the rare earth capital of China. The mined ore from the Bayan Obo mines (located also in the Baotou region) is transported to the Baotou's rare earth processing facilities, which are located approximately 150 km south of Bayan Obo mines, where the majority of RE metals are produced as a byproduct of iron ore mining. Bayan Obo and Baotou are connected both by rail and road. Baotou is home to rare earth processing facilities and iron and steel refineries and for the production of various RE products such as carbonates, oxides, chlorides and different alloy products. The five rare earth separation and refining facilities have a total capacity of 73,500 tonnes per year.

## Technology
See general comment.

## Time period
Data are considered representative of current production practices.

## Reference product
- rare earth tailings, from bastnaesite and monazite ore: 0 kg; CPC 39: Wastes or scraps; By-product classification Recyclable
  Amount taken from the following publication: Wang, L., Wang, P., Chen, W.-Q., Wang, Q.-Q., & Lu, H.-S. (2020). Environmental Impacts of Scandium Oxide Production from Rare Earths Tailings of Bayan Obo Mine. Journal of Cleaner Production, 122464. doi:10.1016/j.jclepro.2020.122464.
  production volume 0 kg; = scandium_oxide_PV*ABS(RE_tailings_amount/scandium_oxide_amount)
    Calculated from the production volume of scandium oxide based on the relative output amounts.
  property price 0.273593 EUR2005; name RE_tailings_amount_price_EUR2005
    Price roughly estimated based on amount of contained iron, fluorspar, niobium and scandium. As the tailings are classified as a recyclable product, the economic value plays no role in the allocation of environmental burdens.
  property aluminium content 0.0118563
    The composition of the rare earth tailings is taken from Table 2 of the following publication: Zhang, B., Xue, X., Huang, X., Yang, H., & Chen, G. (2019). Study on recycling and leaching valuable elements from Bayan Obo tailings. Metall. Res. Technol., 116(1), 114. doi:10.1051/metal/2018040. The calculation of the individual contents of each compound in the tailings is based on the subtotal masses of the elements in each compound. The subtotal masses are calculated using the molecular weight calculator. (Source: https://www.lenntech.com/calculators/molecular/molecular-weight-calculator.htm). The content of Al2O3 in the tailings is: 2.24%. The subtotal masses of Al2O3 are: Al:52.93%, O:47.08%. In the abovementioned publication, neither data on the water content of the tailings are available, nor specific water loss during roasting is reported. For that reason, the reported elemental contents of the rare earth tailings (i.e properties) refer to the dry mass of the tailings.
  property sulfur content 0.0215
    The composition of the rare earth tailings is taken from Table 2 of the following publication: Zhang, B., Xue, X., Huang, X., Yang, H., & Chen, G. (2019). Study on recycling and leaching valuable elements from Bayan Obo tailings. Metall. Res. Technol., 116(1), 114. doi:10.1051/metal/2018040. The calculation of the individual contents of each compound in the tailings is based on the subtotal masses of the elements in each compound. The subtotal masses are calculated using the molecular weight calculator. (Source: https://www.lenntech.com/calculators/molecular/molecular-weight-calculator.htm). The content of S in the tailings is: 2.15%. In the abovementioned publication, neither data on the water content of the tailings are available, nor specific water loss during roasting is reported. For that reason, the reported elemental contents of the rare earth tailings (i.e properties) refer to the dry mass of the tailings. In the abovementioned publication, neither data on the water content of the tailings are available, nor specific water loss during roasting is reported. For that reason, the reported elemental contents of the rare earth tailings (i.e properties) refer to the dry mass of the tailings.
  property silicon content 0.155491
    The composition of the rare earth tailings is taken from Table 2 of the following publication: Zhang, B., Xue, X., Huang, X., Yang, H., & Chen, G. (2019). Study on recycling and leaching valuable elements from Bayan Obo tailings. Metall. Res. Technol., 116(1), 114. doi:10.1051/metal/2018040. The calculation of the individual contents of each compound in the tailings is based on the subtotal masses of the elements in each compound. The subtotal masses are calculated using the molecular weight calculator. (Source: https://www.lenntech.com/calculators/molecular/molecular-weight-calculator.htm). The content of SiO2 in the tailings is: 33.26%. The subtotal masses of SiO2 are: Si:46.75%, O:53.26%. In the abovementioned publication, neither data on the water content of the tailings are available, nor specific water loss during roasting is reported. For that reason, the reported elemental contents of the rare earth tailings (i.e properties) refer to the dry mass of the tailings.
  property thorium content 0.000184548
    The composition of the rare earth tailings is taken from Table 2 of the following publication: Zhang, B., Xue, X., Huang, X., Yang, H., & Chen, G. (2019). Study on recycling and leaching valuable elements from Bayan Obo tailings. Metall. Res. Technol., 116(1), 114. doi:10.1051/metal/2018040. The calculation of the individual contents of each compound in the tailings is based on the subtotal masses of the elements in each compound. The subtotal masses are calculated using the molecular weight calculator. (Source: https://www.lenntech.com/calculators/molecular/molecular-weight-calculator.htm). The content of ThO2 in the tailings is: 0.021%. The subtotal masses of ThO2 are: Th:87.88%, O:12.12%. In the abovementioned publication, neither data on the water content of the tailings are available, nor specific water loss during roasting is reported. For that reason, the reported elemental contents of the rare earth tailings (i.e properties) refer to the dry mass of the tailings.
  property phosphorus content 0.00379668
    The composition of the rare earth tailings is taken from Table 2 of the following publication: Zhang, B., Xue, X., Huang, X., Yang, H., & Chen, G. (2019). Study on recycling and leaching valuable elements from Bayan Obo tailings. Metall. Res. Technol., 116(1), 114. doi:10.1051/metal/2018040. The calculation of the individual contents of each compound in the tailings is based on the subtotal masses of the elements in each compound. The subtotal masses are calculated using the molecular weight calculator. (Source: https://www.lenntech.com/calculators/molecular/molecular-weight-calculator.htm). The content of P2O5 in the tailings is: 0.87%. The subtotal masses of P2O5 are: P:43.64%, O:56.36%. In the abovementioned publication, neither data on the water content of the tailings are available, nor specific water loss during roasting is reported. For that reason, the reported elemental contents of the rare earth tailings (i.e properties) refer to the dry mass of the tailings.
  property fluorine content 0.0314
    The composition of the rare earth tailings is taken from Table 2 of the following publication: Zhang, B., Xue, X., Huang, X., Yang, H., & Chen, G. (2019). Study on recycling and leaching valuable elements from Bayan Obo tailings. Metall. Res. Technol., 116(1), 114. doi:10.1051/metal/2018040. The calculation of the individual contents of each compound in the tailings is based on the subtotal masses of the elements in each compound. The subtotal masses are calculated using the molecular weight calculator. (Source: https://www.lenntech.com/calculators/molecular/molecular-weight-calculator.htm). The content of F in the tailings is: 3.14%. In the abovementioned publication, neither data on the water content of the tailings are available, nor specific water loss during roasting is reported. For that reason, the reported elemental contents of the rare earth tailings (i.e properties) refer to the dry mass of the tailings.
  property scandium content 0.0001956
    The composition of the rare earth tailings is taken from Table 2 of the following publication: Zhang, B., Xue, X., Huang, X., Yang, H., & Chen, G. (2019). Study on recycling and leaching valuable elements from Bayan Obo tailings. Metall. Res. Technol., 116(1), 114. doi:10.1051/metal/2018040. The calculation of the individual contents of each compound in the tailings is based on the subtotal masses of the elements in each compound. The subtotal masses are calculated using the molecular weight calculator. (Source: https://www.lenntech.com/calculators/molecular/molecular-weight-calculator.htm). The content of Sc2O3 in the tailings is: 0.03%. The subtotal masses of Sc2O3 are: Sc:65.2%, O:34.8%. In the abovementioned publication, neither data on the water content of the tailings are available, nor specific water loss during roasting is reported. For that reason, the reported elemental contents of the rare earth tailings (i.e properties) refer to the dry mass of the tailings.
  property manganese content 0.011616
    The composition of the rare earth tailings is taken from Table 2 of the following publication: Zhang, B., Xue, X., Huang, X., Yang, H., & Chen, G. (2019). Study on recycling and leaching valuable elements from Bayan Obo tailings. Metall. Res. Technol., 116(1), 114. doi:10.1051/metal/2018040. The calculation of the individual contents of each compound in the tailings is based on the subtotal masses of the elements in each compound. The subtotal masses are calculated using the molecular weight calculator. (Source: https://www.lenntech.com/calculators/molecular/molecular-weight-calculator.htm). The content of MnO in the tailings is: 1.5%. The subtotal masses of MnO are: Mn:77.44%, O:22.55%. In the abovementioned publication, neither data on the water content of the tailings are available, nor specific water loss during roasting is reported. For that reason, the reported elemental contents of the rare earth tailings (i.e properties) refer to the dry mass of the tailings.
  property potassium content 0.00771993
    The composition of the rare earth tailings is taken from Table 2 of the following publication: Zhang, B., Xue, X., Huang, X., Yang, H., & Chen, G. (2019). Study on recycling and leaching valuable elements from Bayan Obo tailings. Metall. Res. Technol., 116(1), 114. doi:10.1051/metal/2018040. The calculation of the individual contents of each compound in the tailings is based on the subtotal masses of the elements in each compound. The subtotal masses are calculated using the molecular weight calculator. (Source: https://www.lenntech.com/calculators/molecular/molecular-weight-calculator.htm). The content of K2O in the tailings is: 0.93%. The subtotal masses of K2O are: K:83.01%, O:16.98%. In the abovementioned publication, neither data on the water content of the tailings are available, nor specific water loss during roasting is reported. For that reason, the reported elemental contents of the rare earth tailings (i.e properties) refer to the dry mass of the tailings.
  property iron content 0.1574
    The composition of the rare earth tailings is taken from Table 2 of the following publication: Zhang, B., Xue, X., Huang, X., Yang, H., & Chen, G. (2019). Study on recycling and leaching valuable elements from Bayan Obo tailings. Metall. Res. Technol., 116(1), 114. doi:10.1051/metal/2018040. The calculation of the individual contents of each compound in the tailings is based on the subtotal masses of the elements in each compound. The subtotal masses are calculated using the molecular weight calculator. (Source: https://www.lenntech.com/calculators/molecular/molecular-weight-calculator.htm). The total content of Fe in the tailings is: 15.74%. Only the total Fe in the tailings is considered here, meaning that the content of FeO in the tailings that is reported in the abovementioned publication (as one part of the total iron content) has been omitted to avoid double counting. However the oxygen content of the FeO has been considered in the calculation of oxygen content. FeO content in the tailings is 2.38%. Subtotal masses of FeO are: Fe:77.74%, O:22.27% (see property comment of oxygen). In the abovementioned publication, neither data on the water content of the tailings are available, nor specific water loss during roasting is reported. For that reason, the reported elemental contents of the rare earth tailings (i.e properties) refer to the dry mass of the tailings.
  property niobium content 0.0025164
    The composition of the rare earth tailings is taken from Table 2 of the following publication: Zhang, B., Xue, X., Huang, X., Yang, H., & Chen, G. (2019). Study on recycling and leaching valuable elements from Bayan Obo tailings. Metall. Res. Technol., 116(1), 114. doi:10.1051/metal/2018040. The calculation of the individual contents of each compound in the tailings is based on the subtotal masses of the elements in each compound. The subtotal masses are calculated using the molecular weight calculator. (Source: https://www.lenntech.com/calculators/molecular/molecular-weight-calculator.htm). The content of Nb2O5 in the tailings is: 0.36%. The subtotal masses of Nb2O5 are: Nb:69.9%, O:30.1%. In the abovementioned publication, neither data on the water content of the tailings are available, nor specific water loss during roasting is reported. For that reason, the reported elemental contents of the rare earth tailings (i.e properties) refer to the dry mass of the tailings.
  property titanium content 0.00647244
    The composition of the rare earth tailings is taken from Table 2 of the following publication: Zhang, B., Xue, X., Huang, X., Yang, H., & Chen, G. (2019). Study on recycling and leaching valuable elements from Bayan Obo tailings. Metall. Res. Technol., 116(1), 114. doi:10.1051/metal/2018040. The calculation of the individual contents of each compound in the tailings is based on the subtotal masses of the elements in each compound. The subtotal masses are calculated using the molecular weight calculator. (Source: https://www.lenntech.com/calculators/molecular/molecular-weight-calculator.htm). The content of TiO2 in the tailings is: 1.08%. The subtotal masses of TiO2 are: Ti:59.93%, O:40.06%. In the abovementioned publication, neither data on the water content of the tailings are available, nor specific water loss during roasting is reported. For that reason, the reported elemental contents of the rare earth tailings (i.e properties) refer to the dry mass of the tailings.
  property sodium content 0.0166905
    The composition of the rare earth tailings is taken from Table 2 of the following publication: Zhang, B., Xue, X., Huang, X., Yang, H., & Chen, G. (2019). Study on recycling and leaching valuable elements from Bayan Obo tailings. Metall. Res. Technol., 116(1), 114. doi:10.1051/metal/2018040. The calculation of the individual contents of each compound in the tailings is based on the subtotal masses of the elements in each compound. The subtotal masses are calculated using the molecular weight calculator. (Source: https://www.lenntech.com/calculators/molecular/molecular-weight-calculator.htm). The content of Na2O in the tailings is: 2.25%. The subtotal masses of Na2O are: Na:74.18%, O:25.81%. In the abovementioned publication, neither data on the water content of the tailings are available, nor specific water loss during roasting is reported. For that reason, the reported elemental contents of the rare earth tailings (i.e properties) refer to the dry mass of the tailings.
  property oxygen content 0.265915
    Oxygen content in the tailings is calculated as the sum of oxygen contents of each individual compound present in the rare earth tailings. The oxygen content in each compound is calculated by multiplying the amount of chemical compound content in the tailings with the subtotal mass of oxygen in the compound using the molecular weight calculator. (Source: <https://www.lenntech.com/calculators/molecular/molecular-weight-calculator.htm>). The oxygen content of each compound is provided on the properties comment field of the respective compound. For reasons explained in the comment section of the iron content, even though the iron content of FeO compound is not taken into account, the oxygen content is nevertheless considered. Feo content in the tailings is 2.38% and the subtotal mass of oxygen in that compound is 22.27%. In the abovementioned publication, neither data on the water content of the tailings are available, nor specific water loss during roasting is reported. For that reason, the reported elemental contents of the rare earth tailings (i.e properties) refer to the dry mass of the tailings.
  property calcium content 0.083477
    The composition of the rare earth tailings is taken from Table 2 of the following publication: Zhang, B., Xue, X., Huang, X., Yang, H., & Chen, G. (2019). Study on recycling and leaching valuable elements from Bayan Obo tailings. Metall. Res. Technol., 116(1), 114. doi:10.1051/metal/2018040. The calculation of the individual contents of each compound in the tailings is based on the subtotal masses of the elements in each compound. The subtotal masses are calculated using the molecular weight calculator. (Source: https://www.lenntech.com/calculators/molecular/molecular-weight-calculator.htm). The content of CaO in the tailings is: 11.68%. The subtotal masses of CaO are: Ca:71.47%, O:28.53%. In the abovementioned publication, neither data on the water content of the tailings are available, nor specific water loss during roasting is reported. For that reason, the reported elemental contents of the rare earth tailings (i.e properties) refer to the dry mass of the tailings.
  property magnesium content 0.0309993
    The composition of the rare earth tailings is taken from Table 2 of the following publication: Zhang, B., Xue, X., Huang, X., Yang, H., & Chen, G. (2019). Study on recycling and leaching valuable elements from Bayan Obo tailings. Metall. Res. Technol., 116(1), 114. doi:10.1051/metal/2018040. The calculation of the individual contents of each compound in the tailings is based on the subtotal masses of the elements in each compound. The subtotal masses are calculated using the molecular weight calculator. (Source: https://www.lenntech.com/calculators/molecular/molecular-weight-calculator.htm). The content of MgO in the tailings is: 5.14%. The subtotal masses of MgO are: Mg:60.31%, O:39.7%.In the abovementioned publication, neither data on the water content of the tailings are available, nor specific water loss during roasting is reported. For that reason, the reported elemental contents of the rare earth tailings (i.e properties) refer to the dry mass of the tailings.
  property barium content 0.0282114
    The composition of the rare earth tailings is taken from Table 2 of the following publication: Zhang, B., Xue, X., Huang, X., Yang, H., & Chen, G. (2019). Study on recycling and leaching valuable elements from Bayan Obo tailings. Metall. Res. Technol., 116(1), 114. doi:10.1051/metal/2018040. The calculation of the individual contents of each compound in the tailings is based on the subtotal masses of the elements in each compound. The subtotal masses are calculated using the molecular weight calculator. (Source: https://www.lenntech.com/calculators/molecular/molecular-weight-calculator.htm). The content of BaO in the tailings is: 3.15%. The subtotal masses of BaO are: Ba:89.56%, O:10.43%. In the abovementioned publication, neither data on the water content of the tailings are available, nor specific water loss during roasting is reported. For that reason, the reported elemental contents of the rare earth tailings (i.e properties) refer to the dry mass of the tailings.
  property carbon content 0
    carbon content on a dry matter basis (reserved; not for manual entry)
  properties: water in wet mass 0 kg, carbon content, non-fossil 0, carbon content, fossil 0, water content 0, wet mass 1 kg, dry mass 1 kg, carbon allocation 0 kg
- sulfur: 1 kg; name sulfur_amount; CPC 34520: Sulphur, except sublimed sulphur, precipitated sulphur and colloidal sulphur; By-product classification allocatable product; CAS 7704-34-9; pedigree (1,1,1,1,1)
  Sulfur concentrate as the byproduct of scandium production has been modelled as sulfur. Amount taken from the following publication: Wang, L., Wang, P., Chen, W.-Q., Wang, Q.-Q., & Lu, H.-S. (2020). Environmental Impacts of Scandium Oxide Production from Rare Earths Tailings of Bayan Obo Mine. Journal of Cleaner Production, 122464. doi:10.1016/j.jclepro.2020.122464.
  Uncertainty: U
  production volume 1.6065e7 kg; = scandium_oxide_PV*ABS(sulfur_amount/scandium_oxide_amount)
    Calculated from production volume of reference product using the relative outputs.
  property price 0.0551778 EUR2005; name sulfur_amount_price_EUR2005
    Price calculated based on price of elemental sulfur (f.o.b. mine or plant) reported in the USGS Minerals Yearbook for Sulfur from 2010 to 2019 (https://www.usgs.gov/centers/nmic/sulfur-statistics-and-information). The prices given in USD were converted to EUR based on the annual exchange rates published by the European Central Bank (https://sdw.ecb.europa.eu/quickview.do?SERIES_KEY=120.EXR.A.USD.EUR.SP00.A), and then adjusted for inflation relative to 2005 by using the Harmonised Index of Consumer Prices (HICP) of the euro area, published by eurostat (https://ec.europa.eu/eurostat/databrowser/view/PRC_HICP_AIND/default/table).
  property carbon content 0
    carbon content on a dry matter basis (reserved; not for manual entry)
  property true value 56.2813; name sulfur_amount_true_value
    allocation property applied in "true value" allocation // value calculated from revenue
  properties: carbon content, fossil 0, water content 0, wet mass 1 kg, carbon content, non-fossil 0, dry mass 1 kg, water in wet mass 0 kg, carbon allocation 0 kg
- fluorspar, 97% purity: 0 kg; name fluorspar_amount; By-product classification allocatable product; CPC 16190: Other chemical minerals; CAS 14542-23-5; pedigree (1,1,1,1,1)
  Amount calculated based on Wang et al. (2019). Represents the fluorite concentrate obtained after the fine grinding and concentration of the fluorite coarse ore. The fluorite concentrate is assumed to be 97% pure.
  production volume 1.68551e8 kg; = scandium_oxide_PV*ABS(fluorspar_amount/scandium_oxide_amount)
  property price 0.210378 EUR2005; name fluorspar_amount_price_EUR2005
  property true value 2251.4; name fluorspar_amount_true_value
  properties: dry mass 1 kg, carbon content, fossil 0, wet mass 1 kg, water content 0, water in wet mass 0 kg, carbon content, non-fossil 0, carbon content 0, carbon allocation 0 kg

## By-products
All rows: By-product classification allocatable product; pedigree (1,1,1,1,1)
- fluorspar, 97% purity: 0 kg; CPC 16190: Other chemical minerals; CAS 14542-23-5
  (same comment as for fluorspar, 97% purity)
  production volume 0 kg; = scandium_oxide_PV*ABS(fluorspar_amount/scandium_oxide_amount)
    Calculated from production volume of reference product using the relative outputs.
  property carbon content 0
    carbon content on a dry matter basis (reserved; not for manual entry)
  properties: dry mass 1 kg, carbon content, fossil 0, wet mass 1 kg, water content 0, water in wet mass 0 kg, carbon content, non-fossil 0, carbon allocation 0 kg
- pyrochlore concentrate: 0 kg; name pyrochlore_concentrate_amount; CPC 14290: Other non-ferrous metal ores and concentrates (other than uranium or thorium ores and concentrates)
  This exchange is used as a proxy for niobium concentrate. The original amount of this exchange is 796.67 kg and is taken from the following publication: Wang, L., Wang, P., Chen, W.-Q., Wang, Q.-Q., & Lu, H.-S. (2020). Environmental Impacts of Scandium Oxide Production from Rare Earths Tailings of Bayan Obo Mine. Journal of Cleaner Production, 122464. doi:10.1016/j.jclepro.2020.122464. The niobium concentrate produced as byproduct during scandium production contains 42.33% Nb2O5 (Source: Zhang, B., Xue, X., Huang, X., Yang, H., & Chen, G. (2019). Study on recycling and leaching valuable elements from Bayan Obo tailings. Metall. Res. Technol., 116(1), 114. doi:10.1051/metal/2018040). The pyrochlore concentrate considered as a proxy contains 63% Nb2O5. The amount of pyrochlore concentrate has been adjusted in order to ensure that the same amount of Niobium comes out of the process. Mass percentage of niobium in Nb2O5 is 69.9%. (Source: <https://www.lenntech.com/calculators/molecular/molecular-weight-calculator.htm>).
  production volume 8.43076e6 kg; = scandium_oxide_PV*ABS(pyrochlore_concentrate_amount/scandium_oxide_amount)
    Calculated from production volume of reference product using the relative outputs.
  property price 11.9042 EUR2005; name pyrochlore_concentrate_amo_price_EUR2005
    Price calculated based on the prices of imported and exported niobium ores and concentrates in the United States of America from 2011 to 2019, reported in the USGS Minerals Yearbooks for Niobium (https://www.usgs.gov/centers/nmic/niobium-columbium-and-tantalum-statistics-and-information). The prices given in USD were converted to EUR based on the annual exchange rates published by the European Central Bank (https://sdw.ecb.europa.eu/quickview.do?SERIES_KEY=120.EXR.A.USD.EUR.SP00.A), and then adjusted for inflation relative to 2005 by using the Harmonised Index of Consumer Prices (HICP) of the euro area, published by eurostat (https://ec.europa.eu/eurostat/databrowser/view/PRC_HICP_AIND/default/table).
  property carbon content 0
    carbon content on a dry matter basis (reserved; not for manual entry)
  property true value 6372.13; name pyrochlore_concentrate_amou_true_value_0
    allocation property applied in "true value" allocation // value calculated from revenue
  properties: carbon content, fossil 0, carbon content, non-fossil 0, water content 0, oxygen content 0.18963, wet mass 1 kg, niobium content 0.44037, water in wet mass 0 kg, dry mass 1 kg, carbon allocation 0 kg
- iron ore concentrate: 0 kg; name iron_ore_concentrate_amount; CPC 14100: Iron ores and concentrates, other than roasted iron pyrites
  Amount taken from the following publication: Wang, L., Wang, P., Chen, W.-Q., Wang, Q.-Q., & Lu, H.-S. (2020). Environmental Impacts of Scandium Oxide Production from Rare Earths Tailings of Bayan Obo Mine. Journal of Cleaner Production, 122464. doi:10.1016/j.jclepro.2020.122464. Original value was reported in GJ.
  production volume 1.74326e8 kg; = scandium_oxide_PV*ABS(iron_ore_concentrate_amount/scandium_oxide_amount)
    Calculated from production volume of reference product using the relative outputs.
  property price 0.0467 EUR2005; name iron_ore_concentrate_amoun_price_EUR2005
    Calculated based on literature value (UN Commodity Trade Statistics Database) using data on trade value and net weight (kg) for 5 reference countries/regions (EU-27, USA, JP, CN and IN) which weighted (by net weight) average is assumed to be a good approximation of the global price. The UN classification; 2601 Iron ores and concentrates, roasted iron pyrites (accessed 20140508). Data for the year 2005.
  property carbon content 0
    carbon content on a dry matter basis (reserved; not for manual entry)
  property true value 516.891; name iron_ore_concentrate_amount_true_value
    allocation property applied in "true value" allocation // value calculated from revenue
  properties: water content 0, dry mass 1 kg, carbon content, fossil 0, water in wet mass 0 kg, carbon content, non-fossil 0, iron content 0.65, wet mass 1 kg, carbon allocation 0 kg
- scandium oxide: 0 kg; name scandium_oxide_amount; CPC 34290: Compounds of rare earth metals, of yttrium or of scandium; CAS 12060-08-1
  99.9% SC2O3. Amount taken from the following publication: Wang, L., Wang, P., Chen, W.-Q., Wang, Q.-Q., & Lu, H.-S. (2020). Environmental Impacts of Scandium Oxide Production from Rare Earths Tailings of Bayan Obo Mine. Journal of Cleaner Production, 122464. doi:10.1016/j.jclepro.2020.122464.
  production volume 15750 kg; name scandium_oxide_PV
    The global production volume of scandium oxide is between 15000 - 20000 kg (Source: https://pubs.usgs.gov/periodicals/mcs2020/mcs2020-scandium.pdf). The average value of 17500 is considered here as representative amount of the global production. Furthermore, China is responsible for 90% of the global production of scandium (Source: https://www.scandiummining.com/site/assets/files/5740/scandium-white-paperemc-website-june-2014-.pdf). Therefore, the annual chinese production volume of scandium oxide is calculated by multiplying the percentage share of global scandium oxide production attributed to China (90%) with the aforementioned global average annual production of scandium oxide (17500 kg).
  property price 1536.09 EUR2005; name scandium_oxide_amount_price_EUR2005
    Price calculated based on scandium oxide yearly average price from 2010 to 2019 in P.R.C., taken from Table S3 in the Supporting Information for Wang et al. (2020). The prices are given in USD. They were converted to EUR based on the annual exchange rates published by the European Central Bank (https://sdw.ecb.europa.eu/quickview.do?SERIES_KEY=120.EXR.A.USD.EUR.SP00.A), and then adjusted for inflation relative to 2005 by using the Harmonised Index of Consumer Prices (HICP) of the euro area, published by eurostat (https://ec.europa.eu/eurostat/databrowser/view/PRC_HICP_AIND/default/table).
    Reference:
    Wang L, Wang P, Chen W-Q, Wang Q-Q, Lu H-S (2020). Supporting Information for: Environmental Impacts of Scandium Oxide Production from Rare Earths Tailings of Bayan Obo Mine. Journal of Cleaner Production, https://doi.org/10.1016/j.jclepro.2020.122464.
  property scandium content 0.651348; = 0.652*0.999
    The purity of Scandium oxide is greater than 99.9% but for the calculation of the scandium content of Sc2O3 the purity is assumed to be 99.9%. The subtotal masses of Sc2O3 are: Sc:65.2%, O:34.8%. (Source: https://www.lenntech.com/calculators/molecular/molecular-weight-calculator.htm).
  property oxygen content 0.347652; = 0.348*0.999
    The purity of Scandium oxide is greater than 99.9% but for the calculation of the oxygen content of Sc2O3 the purity is assumed to be 99.9%. The subtotal masses of Sc2O3 are: Sc:65.2%, O:34.8%. (Source: https://www.lenntech.com/calculators/molecular/molecular-weight-calculator.htm).
  property carbon content 0
    carbon content on a dry matter basis (reserved; not for manual entry)
  property true value 1536.09; name scandium_oxide_amount_true_value
    allocation property applied in "true value" allocation // value calculated from revenue
  properties: wet mass 1 kg, water content 0, carbon content, non-fossil 0, dry mass 1 kg, water in wet mass 0 kg, carbon content, fossil 0, carbon allocation 0 kg
- rare earth oxide concentrate, 50% REO: 0 kg; name RE_oxide_concentrate_amount; CPC 34290: Compounds of rare earth metals, of yttrium or of scandium
  The produced rare earth concentrate as a product of the Bayan Obo raw ore beneficiation contains 50% rare earth elements (REE). Due to lack of information regarding the producted REE oncentrate from rare earth tailings, it is assumed that this concentrate is 50% beneficiated. Amount taken from the following publication: Wang, L., Wang, P., Chen, W.-Q., Wang, Q.-Q., & Lu, H.-S. (2020). Environmental Impacts of Scandium Oxide Production from Rare Earths Tailings of Bayan Obo Mine. Journal of Cleaner Production, 122464. doi:10.1016/j.jclepro.2020.122464.
  Uncertainty: U
  production volume 3.86662e7 kg; = scandium_oxide_PV*ABS(RE_oxide_concentrate_amount/scandium_oxide_amount)
    Calculated from production volume of reference product using the relative outputs.
  property price 2.57 EUR2005; name RE_oxide_concentrate_amoun_price_EUR2005
    Price in 2016; value taken from USGS 2016 Minerals Yearbook, https://www.usgs.gov/centers/nmic/rare-earths-statistics-and-information
  property neodymium content 0.08
    The calculation of the rare earth element (REE) content of the hydroxide concentrate is based on the facts the concentrate contains 50% REE and that the per kg production of refined RE oxides from the monazite and bastnäsite mineral contains 0.5 kg cerium oxide, 0.27 kg lanthanum oxide, 0.16 kg neodymium oxide, 0.05 kg of praseodymium oxide and 0.02 kg of mixed samarium-europium-gadolinium concentrate.
  property praseodymium content 0.025
    (same comment as for rare earth oxide concentrate, 50% REO)
  property cerium content 0.25
    (same comment as for rare earth oxide concentrate, 50% REO)
  property europium content 0.00295
    (same comment as for rare earth oxide concentrate, 50% REO)
  property samarium content 0.00588
    (same comment as for rare earth oxide concentrate, 50% REO)
  property gadolinium content 0.00117
    (same comment as for rare earth oxide concentrate, 50% REO)
  property lanthanum content 0.135
    (same comment as for rare earth oxide concentrate, 50% REO)
  property carbon content 0
    carbon content on a dry matter basis (reserved; not for manual entry)
  property true value 6309.35; name RE_oxide_concentrate_amount_true_value
    allocation property applied in "true value" allocation // value calculated from revenue
  properties: water in wet mass 0 kg, carbon content, fossil 0, carbon content, non-fossil 0, wet mass 1 kg, water content 0, dry mass 1 kg, carbon allocation 0 kg

## Inputs from technosphere
- oxalic acid: 0.000162437 kg; lognormal variance with pedigree 0.001225, pedigree (2,1,1,2,1)
  (same comment as for rare earth tailings, from bastnaesite and monazite ore)
  properties: wet mass 1 kg, dry mass 1 kg, carbon content, fossil 0.2668, hydrogen content 0.0224, oxygen content 0.7108
  note on carbon content, fossil: Carbon content of Oxalic acid (C2H2O4) calculated based on the molecular structure. Mass contribution of each element to the total mass: C: 26.68% , H: 2.24% , O: 71.08%. Source: https://www.lenntech.com/calculators/molecular/molecular-weight-calculator.htm
  note on hydrogen content: Hydrogen content of Oxalic acid (C2H2O4) calculated based on the molecular structure. Mass contribution of each element to the total mass: C: 26.68% , H: 2.24% , O: 71.08%. Source: https://www.lenntech.com/calculators/molecular/molecular-weight-calculator.htm
  note on oxygen content: Oxygen content of Oxalic acid (C2H2O4) calculated based on the molecular structure. Mass contribution of each element to the total mass: C: 26.68% , H: 2.24% , O: 71.08%. Source: https://www.lenntech.com/calculators/molecular/molecular-weight-calculator.htm
- heat, from steam, in chemical industry: 0.420862 MJ; = 60500 + 69486.88333; lognormal variance with pedigree 0.001225, pedigree (2,1,1,2,1)
  The amount is the sum of steam reported for scandium oxide production (given in Wang et al. 2020) and the steam required for the concentration of fluorite (described in Wang et al. 2019). According to the supplemetary materials of Wang et al 2020, the steam stems from the burning of coal.
  References:
  Wang, L., Wang, P., Chen, W.-Q., Wang, Q.-Q., & Lu, H.-S. (2020). Environmental Impacts of Scandium Oxide Production from Rare Earths Tailings of Bayan Obo Mine. Journal of Cleaner Production, 122464. doi:10.1016/j.jclepro.2020.122464.
  Wang, L., Jiao, G. H., Lu, H. S., Wang, Q. Q. (2019). Life cycle assessment of integrated exploitation technology for tailings in Bayan Obo mine, China. APPLIED ECOLOGY AND ENVIRONMENTAL RESEARCH 17(2):4343-4359. DOI: http://dx.doi.org/10.15666/aeer/1702_43434359.
  Uncertainty: U
  properties: heating value, net 1 MJ
- ammonium chloride: 1.72571e-5 kg; lognormal variance with pedigree 0.001225, pedigree (2,1,1,2,1)
  Amount taken from the following publication: Wang, L., Wang, P., Chen, W.-Q., Wang, Q.-Q., & Lu, H.-S. (2020). Environmental Impacts of Scandium Oxide Production from Rare Earths Tailings of Bayan Obo Mine. Journal of Cleaner Production, 122464. doi:10.1016/j.jclepro.2020.122464.
  Uncertainty: U
  properties: dry mass 1 kg, wet mass 1 kg
- tap water: 0.245577 kg; lognormal variance with pedigree 0.001225, pedigree (2,1,1,2,1)
  The original amount of this exchange is 753955.18 kg and is taken from the following publication: Wang, L., Wang, P., Chen, W.-Q., Wang, Q.-Q., & Lu, H.-S. (2020). Environmental Impacts of Scandium Oxide Production from Rare Earths Tailings of Bayan Obo Mine. Journal of Cleaner Production, 122464. doi:10.1016/j.jclepro.2020.122464. However, the amount of water coming out of the system is 678106.66 kg, which is recycled according to the abovementioned publication. To ensure that the recyclability of water is taken into account, the amount of water coming out of the system (678106.66 kg) is subtracted from the original amount of water coming into the system (753955.18 kg).
  Uncertainty: U
  properties: dry mass 0.000337476 kg, carbon content, fossil 0.00178991, wet mass 1 kg, water content 2962.17
  note on carbon content, fossil: Bicarbonate content is 2.93 mol/m3. CO2 content is 0.1 mol/m3 (ecoinvent v2.2 report 8, Tab 93.1).
- wastewater, average: -0.000197698 m3; name wastewater_amount; lognormal variance with pedigree 0.001225, pedigree (2,1,1,2,1)
  The presence of wastewater is acknowledged by the publication, on which this dataset is based (Wang, L., Wang, P., Chen, W.-Q., Wang, Q.-Q., & Lu, H.-S. (2020). Environmental Impacts of Scandium Oxide Production from Rare Earths Tailings of Bayan Obo Mine. Journal of Cleaner Production, 122464. doi:10.1016/j.jclepro.2020.122464). Due to the water deficiency (water input: 753955.18 kg, (recycled) water output: 678106.66 kg, wastewater output: 3226.23 kg) and the absence of further data, it assumed that this water deficiency is covered from wastewater. Therefore, the wastewater amount is based on mass balance.
  Uncertainty: U
  production volume 961706 m3; = scandium_oxide_PV*ABS(wastewater_amount/scandium_oxide_amount)
    Calculated from production volume of reference product using the relative outputs.
  property price 0 EUR2005; name wastewater_amount_price_EUR2005
  properties: water content 2882.2, carbon content, non-fossil 0.194039, dry mass 0.346837 kg, wet mass 1000 kg
  note on carbon content, non-fossil: 0.0673 kg TOC/m3 (Tab A.17, ecoinvent v2.2 report 13_I). TOC was considered as Total Carbon.
- carboxymethyl cellulose, powder: 0.000557439 kg; = 2.17 + 170; lognormal variance with pedigree 0.001225, pedigree (2,1,1,2,1)
  Used as inhibitor. The amount is the sum of the amount reported for scandium oxide production (given in Wang et al. 2020) and the amount required for the concentration of fluorite (described in Wang et al. 2019).
  References:
  Wang, L., Wang, P., Chen, W.-Q., Wang, Q.-Q., & Lu, H.-S. (2020). Environmental Impacts of Scandium Oxide Production from Rare Earths Tailings of Bayan Obo Mine. Journal of Cleaner Production, 122464. doi:10.1016/j.jclepro.2020.122464.
  Wang, L., Jiao, G. H., Lu, H. S., Wang, Q. Q. (2019). Life cycle assessment of integrated exploitation technology for tailings in Bayan Obo mine, China. APPLIED ECOLOGY AND ENVIRONMENTAL RESEARCH 17(2):4343-4359. DOI: http://dx.doi.org/10.15666/aeer/1702_43434359.
  Uncertainty: U
  properties: wet mass 1 kg, carbon content, non-fossil 0.293878, dry mass 1 kg, carbon content, fossil 0.0979592, heating value, net 20.19 MJ
- chemical factory, organics: 2.23403e-14 unit; lognormal variance with pedigree 0.300625, pedigree (2,1,1,2,1)
  This infrastructural input has been assumed for compliance with the Ecoinvent Guidelines and was not originally present in the publication, on which this dataset was based (Wang, L., Wang, P., Chen, W.-Q., Wang, Q.-Q., & Lu, H.-S. (2020). Environmental Impacts of Scandium Oxide Production from Rare Earths Tailings of Bayan Obo Mine. Journal of Cleaner Production, 122464. doi:10.1016/j.jclepro.2020.122464). Value has been taken from the dataset ''rare earth oxides production from bastnäsite concentrate, CN'' from the Ecoinvent database version 3.6. Chemical plant used as a proxy.
  Uncertainty: U
- sodium hydroxide, without water, in 50% solution state: 6.42041e-5 kg; lognormal variance with pedigree 0.001225, pedigree (2,1,1,2,1)
  (same comment as for ammonium chloride)
  properties: dry mass 1 kg, wet mass 1 kg, heating value, net 3.03 MJ
- inert waste: -0.0210538 kg; name inert_waste_amount; lognormal variance with pedigree 0.001225, pedigree (2,1,1,2,1)
  Proxy considered for the residual waste. Amount taken from the following publication: Wang, L., Wang, P., Chen, W.-Q., Wang, Q.-Q., & Lu, H.-S. (2020). Environmental Impacts of Scandium Oxide Production from Rare Earths Tailings of Bayan Obo Mine. Journal of Cleaner Production, 122464. doi:10.1016/j.jclepro.2020.122464.
  production volume 1.02417e8 kg; = scandium_oxide_PV*ABS(inert_waste_amount/scandium_oxide_amount)
    Calculated from production volume of reference product using the relative outputs.
  property price 0 EUR2005; name inert_waste_amount_price_EUR2005
  properties: wet mass 1 kg, dry mass 1 kg
- hydrogen peroxide, without water, in 50% solution state: 6.96111e-5 kg; lognormal variance with pedigree 0.001225, pedigree (2,1,1,2,1)
  (same comment as for ammonium chloride)
  properties: wet mass 1 kg, heating value, net 7.13 MJ, dry mass 1 kg
- sulfidic tailings, generic: -0.159549 kg; name sulfidic_tailings_amount; lognormal variance with pedigree 0.001225, pedigree (2,1,1,2,1)
  Proxy used for the scandium tailings and fluorite tailings due to unknown compositions.
  This amount is meant to be the sum of the amount of scandium tailings reported for scandium oxide production (10546.67 kg - given in Wang et al. 2020) and the amount of fluorite tailings produced by the concentration of fluorite (21776.67 kg - described in Wang et al. 2019).
  The amount has been recalculated to ensure dry and wet mass leading to an overestimation of the reported amounts.
  References:
  Wang, L., Wang, P., Chen, W.-Q., Wang, Q.-Q., & Lu, H.-S. (2020). Environmental Impacts of Scandium Oxide Production from Rare Earths Tailings of Bayan Obo Mine. Journal of Cleaner Production, 122464. doi:10.1016/j.jclepro.2020.122464.
  Wang, L., Jiao, G. H., Lu, H. S., Wang, Q. Q. (2019). Life cycle assessment of integrated exploitation technology for tailings in Bayan Obo mine, China. APPLIED ECOLOGY AND ENVIRONMENTAL RESEARCH 17(2):4343-4359. DOI: http://dx.doi.org/10.15666/aeer/1702_43434359.
  production volume 7.76129e8 kg; = scandium_oxide_PV*ABS(sulfidic_tailings_amount/scandium_oxide_amount)
    Calculated from production volume of reference product using the relative outputs.
  property price 0 EUR2005; name sulfidic_tailings_amount_price_EUR2005
  properties: water content 0.42857, carbon content, fossil 0.0087785, oxygen content 0.89157, magnesium content 0.0022359, dry mass 0.7 kg, calcium content 0.0045972, sodium content 0.0014472, aluminium content 0.014738, silicon content 0.053273, wet mass 1 kg, potassium content 0.0025181, iron content 0.015374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
- hydrochloric acid, without water, in 30% solution state: 0.000249499 kg; lognormal variance with pedigree 0.001225, pedigree (2,1,1,2,1)
  (same comment as for ammonium chloride)
  properties: heating value, net 3.32 MJ, dry mass 1 kg, wet mass 1 kg
- fatty alcohol: 2.48333e-5 kg; lognormal variance with pedigree 0.001225, pedigree (2,1,1,2,1)
  This input has been considered as a proxy for fatty ester of polyglycolether and modified polyalcohol. Amount taken from the following publication: Wang, L., Wang, P., Chen, W.-Q., Wang, Q.-Q., & Lu, H.-S. (2020). Environmental Impacts of Scandium Oxide Production from Rare Earths Tailings of Bayan Obo Mine. Journal of Cleaner Production, 122464. doi:10.1016/j.jclepro.2020.122464.
  Uncertainty: U
  properties: carbon content, non-fossil 0.743434, dry mass 1 kg, wet mass 1 kg, carbon content, fossil 0.0408973, heating value, net 41.01 MJ
- sodium silicate, solid: 0.00226104 kg; = 650.01 + 48.33333333; lognormal variance with pedigree 0.001225, pedigree (2,1,1,2,1)
  Represents "water glass". The amount is the sum of the amount reported for scandium oxide production (given in Wang et al. 2020) and the amount required for the concentration of fluorite (described in Wang et al. 2019).
  References:
  Wang, L., Wang, P., Chen, W.-Q., Wang, Q.-Q., & Lu, H.-S. (2020). Environmental Impacts of Scandium Oxide Production from Rare Earths Tailings of Bayan Obo Mine. Journal of Cleaner Production, 122464. doi:10.1016/j.jclepro.2020.122464.
  Wang, L., Jiao, G. H., Lu, H. S., Wang, Q. Q. (2019). Life cycle assessment of integrated exploitation technology for tailings in Bayan Obo mine, China. APPLIED ECOLOGY AND ENVIRONMENTAL RESEARCH 17(2):4343-4359. DOI: http://dx.doi.org/10.15666/aeer/1702_43434359.
  Uncertainty: U
  properties: wet mass 1 kg, dry mass 1 kg
- waste mineral oil: -3.23772e-8 kg; name mineral_oil_amount; lognormal variance with pedigree 0.001225, pedigree (2,1,1,2,1)
  (same comment as for ammonium chloride)
  production volume 157.5 kg; = scandium_oxide_PV*ABS(mineral_oil_amount/scandium_oxide_amount)
    Calculated from production volume of reference product using the relative outputs.
  property price 0 EUR2005; name mineral_oil_amount_price_EUR2005
  properties: dry mass 0.9 kg, wet mass 1 kg, water content 0.111111, carbon content, fossil 0.864444, heating value, net 34.7 MJ
  note on carbon content, fossil: Tab A.6, ecoinvent v2.2 report 13_I. C content has been calculated after data in the tables, and then referred to 1 kg DM
  note on heating value, net: Value taken from the general comment of the treatment dataset.
- sulfuric acid: 0.00588023 kg; = 1767.83 + 48.33333333; lognormal variance with pedigree 0.001225, pedigree (2,1,1,2,1)
  The amount is the sum of the amount reported for scandium oxide production (given in Wang et al. 2020) and the amount required for the concentration of fluorite (described in Wang et al. 2019).
  References:
  Wang, L., Wang, P., Chen, W.-Q., Wang, Q.-Q., & Lu, H.-S. (2020). Environmental Impacts of Scandium Oxide Production from Rare Earths Tailings of Bayan Obo Mine. Journal of Cleaner Production, 122464. doi:10.1016/j.jclepro.2020.122464.
  Wang, L., Jiao, G. H., Lu, H. S., Wang, Q. Q. (2019). Life cycle assessment of integrated exploitation technology for tailings in Bayan Obo mine, China. APPLIED ECOLOGY AND ENVIRONMENTAL RESEARCH 17(2):4343-4359. DOI: http://dx.doi.org/10.15666/aeer/1702_43434359.
  Uncertainty: U
  properties: dry mass 1 kg, wet mass 1 kg
- phthalic anhydride: 0.00128868 kg; = 388.02 + 10; lognormal variance with pedigree 0.001225, pedigree (2,1,1,2,1)
  Used as collector. The amount is the sum of the amount reported for scandium oxide production (given in Wang et al. 2020) and the amount required for the concentration of fluorite (described in Wang et al. 2019).
  References:
  Wang, L., Wang, P., Chen, W.-Q., Wang, Q.-Q., & Lu, H.-S. (2020). Environmental Impacts of Scandium Oxide Production from Rare Earths Tailings of Bayan Obo Mine. Journal of Cleaner Production, 122464. doi:10.1016/j.jclepro.2020.122464.
  Wang, L., Jiao, G. H., Lu, H. S., Wang, Q. Q. (2019). Life cycle assessment of integrated exploitation technology for tailings in Bayan Obo mine, China. APPLIED ECOLOGY AND ENVIRONMENTAL RESEARCH 17(2):4343-4359. DOI: http://dx.doi.org/10.15666/aeer/1702_43434359.
  Uncertainty: U
  properties: dry mass 1 kg, carbon content, fossil 0.648649, wet mass 1 kg, heating value, net 22.93 MJ
- electricity, medium voltage: 0.00312282 kWh; = 871.78 + 92.73; lognormal variance with pedigree 0.001225, pedigree (2,1,1,2,1)
  The amount is the sum of electricity reported for scandium oxide production (given in Wang et al. 2020) and the electricity required for the concentration of fluorite (described in Wang et al. 2019). According to the supplemetary materials of Wang et al 2020, the electricity comes from the grid, which means that all upstreams inputs / outputs associated with the production of the electricity have indirectly been considered.
  References:
  Wang, L., Wang, P., Chen, W.-Q., Wang, Q.-Q., & Lu, H.-S. (2020). Environmental Impacts of Scandium Oxide Production from Rare Earths Tailings of Bayan Obo Mine. Journal of Cleaner Production, 122464. doi:10.1016/j.jclepro.2020.122464.
  Wang, L., Jiao, G. H., Lu, H. S., Wang, Q. Q. (2019). Life cycle assessment of integrated exploitation technology for tailings in Bayan Obo mine, China. APPLIED ECOLOGY AND ENVIRONMENTAL RESEARCH 17(2):4343-4359. DOI: http://dx.doi.org/10.15666/aeer/1702_43434359.
  Uncertainty: U
- kerosene: 2.10452e-5 kg; lognormal variance with pedigree 0.001225, pedigree (2,1,1,2,1)
  (same comment as for ammonium chloride)
  properties: dry mass 1 kg, heating value, net 43 MJ, carbon content, fossil 0.85, wet mass 1 kg
- chemical, organic: 3.83023e-5 kg; lognormal variance with pedigree 0.001225, pedigree (2,1,1,2,1)
  This input has been considered as a proxy for the tributyl phosphate (TBP), and the extractant P507. They account for 6.5 kg and 5.33 kg respectively. Both amounts are taken from the following publication: Wang, L., Wang, P., Chen, W.-Q., Wang, Q.-Q., & Lu, H.-S. (2020). Environmental Impacts of Scandium Oxide Production from Rare Earths Tailings of Bayan Obo Mine. Journal of Cleaner Production, 122464. doi:10.1016/j.jclepro.2020.122464.
  Uncertainty: U
  properties: carbon content, fossil 0.628, heating value, net 19.03 MJ, wet mass 1 kg, dry mass 1 kg
  note on carbon content, fossil: This dataset is an unweighted average of 20 organic substances (listed in Tab 88.1, ecoinvent v2.2 report 8, part II), being part of the top100 chemicals included in this database. The C-content has also been calculated as an unweighted average of the C content of the substances composing this dataset.
- rare earth tailings, from bastnaesite and monazite ore: 0.208391 kg
  (same comment as for rare earth tailings, from bastnaesite and monazite ore)
  production volume 1.01372e9 kg
  properties: aluminium content 0.0118563, sulfur content 0.0215, silicon content 0.155491, fluorine content 0.0314, iron content 0.1574, wet mass 1 kg, dry mass 1 kg, sodium content 0.0166905, oxygen content 0.265915, calcium content 0.083477, magnesium content 0.0309993, barium content 0.0282114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
  note on aluminium content: The composition of the rare earth tailings is taken from Table 2 of the following publication: Zhang, B., Xue, X., Huang, X., Yang, H., & Chen, G. (2019). Study on recycling and leaching valuable elements from Bayan Obo tailings. Metall. Res. Technol., 116(1), 114. doi:10.1051/metal/2018040. The calculation of the individual contents of each compound in the tailings is based on the subtotal masses of the elements in each compound. The subtotal masses are calculated using the molecular weight calculator. (Source: https://www.lenntech.com/calculators/molecular/molecular-weight-calculator.htm). The content of Al2O3 in the tailings is: 2.24%. The subtotal masses of Al2O3 are: Al:52.93%, O:47.08%. In the abovementioned publication, neither data on the water content of the tailings are available, nor specific water loss during roasting is reported. For that reason, the reported elemental contents of the rare earth tailings (i.e properties) refer to the dry mass of the tailings.
  note on sulfur content: The composition of the rare earth tailings is taken from Table 2 of the following publication: Zhang, B., Xue, X., Huang, X., Yang, H., & Chen, G. (2019). Study on recycling and leaching valuable elements from Bayan Obo tailings. Metall. Res. Technol., 116(1), 114. doi:10.1051/metal/2018040. The calculation of the individual contents of each compound in the tailings is based on the subtotal masses of the elements in each compound. The subtotal masses are calculated using the molecular weight calculator. (Source: https://www.lenntech.com/calculators/molecular/molecular-weight-calculator.htm). The content of S in the tailings is: 2.15%. In the abovementioned publication, neither data on the water content of the tailings are available, nor specific water loss during roasting is reported. For that reason, the reported elemental contents of the rare earth tailings (i.e properties) refer to the dry mass of the tailings. In the abovementioned publication, neither data on the water content of the tailings are available, nor specific water loss during roasting is reported. For that reason, the reported elemental contents of the rare earth tailings (i.e properties) refer to the dry mass of the tailings.
  note on silicon content: The composition of the rare earth tailings is taken from Table 2 of the following publication: Zhang, B., Xue, X., Huang, X., Yang, H., & Chen, G. (2019). Study on recycling and leaching valuable elements from Bayan Obo tailings. Metall. Res. Technol., 116(1), 114. doi:10.1051/metal/2018040. The calculation of the individual contents of each compound in the tailings is based on the subtotal masses of the elements in each compound. The subtotal masses are calculated using the molecular weight calculator. (Source: https://www.lenntech.com/calculators/molecular/molecular-weight-calculator.htm). The content of SiO2 in the tailings is: 33.26%. The subtotal masses of SiO2 are: Si:46.75%, O:53.26%. In the abovementioned publication, neither data on the water content of the tailings are available, nor specific water loss during roasting is reported. For that reason, the reported elemental contents of the rare earth tailings (i.e properties) refer to the dry mass of the tailings.
  note on fluorine content: The composition of the rare earth tailings is taken from Table 2 of the following publication: Zhang, B., Xue, X., Huang, X., Yang, H., & Chen, G. (2019). Study on recycling and leaching valuable elements from Bayan Obo tailings. Metall. Res. Technol., 116(1), 114. doi:10.1051/metal/2018040. The calculation of the individual contents of each compound in the tailings is based on the subtotal masses of the elements in each compound. The subtotal masses are calculated using the molecular weight calculator. (Source: https://www.lenntech.com/calculators/molecular/molecular-weight-calculator.htm). The content of F in the tailings is: 3.14%. In the abovementioned publication, neither data on the water content of the tailings are available, nor specific water loss during roasting is reported. For that reason, the reported elemental contents of the rare earth tailings (i.e properties) refer to the dry mass of the tailings.
  note on iron content: The composition of the rare earth tailings is taken from Table 2 of the following publication: Zhang, B., Xue, X., Huang, X., Yang, H., & Chen, G. (2019). Study on recycling and leaching valuable elements from Bayan Obo tailings. Metall. Res. Technol., 116(1), 114. doi:10.1051/metal/2018040. The calculation of the individual contents of each compound in the tailings is based on the subtotal masses of the elements in each compound. The subtotal masses are calculated using the molecular weight calculator. (Source: https://www.lenntech.com/calculators/molecular/molecular-weight-calculator.htm). The total content of Fe in the tailings is: 15.74%. Only the total Fe in the tailings is considered here, meaning that the content of FeO in the tailings that is reported in the abovementioned publication (as one part of the total iron content) has been omitted to avoid double counting. However the oxygen content of the FeO has been considered in the calculation of oxygen content. FeO content in the tailings is 2.38%. Subtotal masses of FeO are: Fe:77.74%, O:22.27% (see property comment of oxygen). In the abovementioned publication, neither data on the water content of the tailings are available, nor specific water loss during roasting is reported. For that reason, the reported elemental contents of the rare earth tailings (i.e properties) refer to the dry mass of the tailings.
  note on sodium content: The composition of the rare earth tailings is taken from Table 2 of the following publication: Zhang, B., Xue, X., Huang, X., Yang, H., & Chen, G. (2019). Study on recycling and leaching valuable elements from Bayan Obo tailings. Metall. Res. Technol., 116(1), 114. doi:10.1051/metal/2018040. The calculation of the individual contents of each compound in the tailings is based on the subtotal masses of the elements in each compound. The subtotal masses are calculated using the molecular weight calculator. (Source: https://www.lenntech.com/calculators/molecular/molecular-weight-calculator.htm). The content of Na2O in the tailings is: 2.25%. The subtotal masses of Na2O are: Na:74.18%, O:25.81%. In the abovementioned publication, neither data on the water content of the tailings are available, nor specific water loss during roasting is reported. For that reason, the reported elemental contents of the rare earth tailings (i.e properties) refer to the dry mass of the tailings.
  note on oxygen content: Oxygen content in the tailings is calculated as the sum of oxygen contents of each individual compound present in the rare earth tailings. The oxygen content in each compound is calculated by multiplying the amount of chemical compound content in the tailings with the subtotal mass of oxygen in the compound using the molecular weight calculator. (Source: <https://www.lenntech.com/calculators/molecular/molecular-weight-calculator.htm>). The oxygen content of each compound is provided on the properties comment field of the respective compound. For reasons explained in the comment section of the iron content, even though the iron content of FeO compound is not taken into account, the oxygen content is nevertheless considered. Feo content in the tailings is 2.38% and the subtotal mass of oxygen in that compound is 22.27%. In the abovementioned publication, neither data on the water content of the tailings are available, nor specific water loss during roasting is reported. For that reason, the reported elemental contents of the rare earth tailings (i.e properties) refer to the dry mass of the tailings.
  note on calcium content: The composition of the rare earth tailings is taken from Table 2 of the following publication: Zhang, B., Xue, X., Huang, X., Yang, H., & Chen, G. (2019). Study on recycling and leaching valuable elements from Bayan Obo tailings. Metall. Res. Technol., 116(1), 114. doi:10.1051/metal/2018040. The calculation of the individual contents of each compound in the tailings is based on the subtotal masses of the elements in each compound. The subtotal masses are calculated using the molecular weight calculator. (Source: https://www.lenntech.com/calculators/molecular/molecular-weight-calculator.htm). The content of CaO in the tailings is: 11.68%. The subtotal masses of CaO are: Ca:71.47%, O:28.53%. In the abovementioned publication, neither data on the water content of the tailings are available, nor specific water loss during roasting is reported. For that reason, the reported elemental contents of the rare earth tailings (i.e properties) refer to the dry mass of the tailings.
  note on magnesium content: The composition of the rare earth tailings is taken from Table 2 of the following publication: Zhang, B., Xue, X., Huang, X., Yang, H., & Chen, G. (2019). Study on recycling and leaching valuable elements from Bayan Obo tailings. Metall. Res. Technol., 116(1), 114. doi:10.1051/metal/2018040. The calculation of the individual contents of each compound in the tailings is based on the subtotal masses of the elements in each compound. The subtotal masses are calculated using the molecular weight calculator. (Source: https://www.lenntech.com/calculators/molecular/molecular-weight-calculator.htm). The content of MgO in the tailings is: 5.14%. The subtotal masses of MgO are: Mg:60.31%, O:39.7%.In the abovementioned publication, neither data on the water content of the tailings are available, nor specific water loss during roasting is reported. For that reason, the reported elemental contents of the rare earth tailings (i.e properties) refer to the dry mass of the tailings.
  note on barium content: The composition of the rare earth tailings is taken from Table 2 of the following publication: Zhang, B., Xue, X., Huang, X., Yang, H., & Chen, G. (2019). Study on recycling and leaching valuable elements from Bayan Obo tailings. Metall. Res. Technol., 116(1), 114. doi:10.1051/metal/2018040. The calculation of the individual contents of each compound in the tailings is based on the subtotal masses of the elements in each compound. The subtotal masses are calculated using the molecular weight calculator. (Source: https://www.lenntech.com/calculators/molecular/molecular-weight-calculator.htm). The content of BaO in the tailings is: 3.15%. The subtotal masses of BaO are: Ba:89.56%, O:10.43%. In the abovementioned publication, neither data on the water content of the tailings are available, nor specific water loss during roasting is reported. For that reason, the reported elemental contents of the rare earth tailings (i.e properties) refer to the dry mass of the tailings.

## Emissions to nature
- Sulfur dioxide [air, non-urban air or from high stacks]: 2.38944e-5 kg; lognormal variance with pedigree 0.001225, pedigree (2,1,1,2,1)
  (same comment as for ammonium chloride)
- Particulates, > 2.5 um, and < 10um [air, non-urban air or from high stacks]: 1.94263e-6 kg; = 0.44 + 0.16; lognormal variance with pedigree 0.120625, pedigree (2,1,1,2,1)
  The amount is the sum of particulates reported for scandium oxide production (given in Wang et al. 2020) and the particulates emitted during the concentration of fluorite (described in Wang et al. 2019).
  References:
  Wang, L., Wang, P., Chen, W.-Q., Wang, Q.-Q., & Lu, H.-S. (2020). Environmental Impacts of Scandium Oxide Production from Rare Earths Tailings of Bayan Obo Mine. Journal of Cleaner Production, 122464. doi:10.1016/j.jclepro.2020.122464.
  Wang, L., Jiao, G. H., Lu, H. S., Wang, Q. Q. (2019). Life cycle assessment of integrated exploitation technology for tailings in Bayan Obo mine, China. APPLIED ECOLOGY AND ENVIRONMENTAL RESEARCH 17(2):4343-4359. DOI: http://dx.doi.org/10.15666/aeer/1702_43434359.
  Uncertainty: U
- Nitrogen oxides [air, non-urban air or from high stacks]: 1.69657e-5 kg; lognormal variance with pedigree 0.040625, pedigree (2,1,1,2,1)
  (same comment as for ammonium chloride)
- Ammonia [air, non-urban air or from high stacks]: 8.41808e-7 kg; lognormal variance with pedigree 0.040625, pedigree (2,1,1,2,1)
  (same comment as for ammonium chloride)
- Thorium [air, non-urban air or from high stacks]: 3.187e-9 kg; = 0.000651 + 0.000333333; lognormal variance with pedigree 0.300625, pedigree (2,1,1,2,1)
  The amount is the sum of thorium reported for scandium oxide production (given in Wang et al. 2020) and the thorium emitted during the concentration of fluorite (described in Wang et al. 2019).
  References:
  Wang, L., Wang, P., Chen, W.-Q., Wang, Q.-Q., & Lu, H.-S. (2020). Environmental Impacts of Scandium Oxide Production from Rare Earths Tailings of Bayan Obo Mine. Journal of Cleaner Production, 122464. doi:10.1016/j.jclepro.2020.122464.
  Wang, L., Jiao, G. H., Lu, H. S., Wang, Q. Q. (2019). Life cycle assessment of integrated exploitation technology for tailings in Bayan Obo mine, China. APPLIED ECOLOGY AND ENVIRONMENTAL RESEARCH 17(2):4343-4359. DOI: http://dx.doi.org/10.15666/aeer/1702_43434359.
  Uncertainty: U
- NMVOC, non-methane volatile organic compounds, unspecified origin [air, non-urban air or from high stacks]: 2.23403e-6 kg; lognormal variance with pedigree 0.040625, pedigree (2,1,1,2,1)
  (same comment as for ammonium chloride)
- Carbon monoxide, fossil [air, non-urban air or from high stacks]: 1.07492e-5 kg; lognormal variance with pedigree 0.650625, pedigree (2,1,1,2,1)
  (same comment as for ammonium chloride)
- Carbon dioxide, fossil [air, non-urban air or from high stacks]: 0.00276213 kg; lognormal variance with pedigree 0.001225, pedigree (2,1,1,2,1)
  (same comment as for ammonium chloride)
- Methane, fossil [air, non-urban air or from high stacks]: 1.01665e-5 kg; lognormal variance with pedigree 0.040625, pedigree (2,1,1,2,1)
  (same comment as for ammonium chloride)

## Sampling procedure
This dataset is based on the following publication Wang, L., Wang, P., Chen, W.-Q., Wang, Q.-Q., & Lu, H.-S. (2020). Environmental Impacts of Scandium Oxide Production from Rare Earths Tailings of Bayan Obo Mine. Journal of Cleaner Production, 122464. doi:https://doi.org/10.1016/j.jclepro.2020.122464. The analytical dataset can also be found on the supplementary materials of the abovementioned publication (Table S4, pages S4 & S5). Individual exchanges that were not present within the Ecoinvent database have been modeled with assuming proxies.

Additionally, data concerning the production of fluorite concentrate, which is produced from a byproduct of the bulk flotation step, was taken from Wang, L., Jiao, G. H., Lu, H. S., Wang, Q. Q. (2019). Life cycle assessment of integrated exploitation technology for tailings in Bayan Obo mine, China. APPLIED ECOLOGY AND ENVIRONMENTAL RESEARCH 17(2):4343-4359. DOI: http://dx.doi.org/10.15666/aeer/1702_43434359. This was done to ensure the proper integration of the dataset to the database, as there was no suitable proxy for the fluorite coarse ore in the database (which is a byproduct of the scandium production process).

Unit conversion has been performed to some exchanges to match the unit of the foreground data with the unit of the representative process of Ecoinvent. More detailed info is provided on the individual general comment of each exchange. Infrastructural input (i.e chemical factory) has been introduced to take into account the type of infrastructure used in order to produce scandium oxide. This infrastructural input was not present on the original dataset and is added in order to comply with the requirements of the Ecoinvent database. Wastewater and tailings are calculated based on dry and wet mass balance, leading to an overestimation of the reported amounts. For more information, consult the individual exchange comments. Recycled water (byproduct of the production process) has also been considered (consult the tap water exchange comment). According to the supplementary materials of Wang et al (2020), the electricity originates from the grid, meaning that all upstream inputs and outputs are already taken into account and the steam is generated from coal burning.

## Extrapolations
Proxies were considered in the place of specific exchanges, which were not available in the Ecoinvent database. Furthermore, an infrastructure input was considered to comply with the Ecoinvent database guidelines (for more information see the comment section of each exchange). In addition, the composition of the rare earth tailings is taken from Table 2 of the following publication: Zhang, B., Xue, X., Huang, X., Yang, H., & Chen, G. (2019). In the abovementioned publication, neither data on the water content of the tailings are available, nor specific water loss during roasting is reported. For that reason, the reported elemental contents of the rare earth tailings (i.e properties) refer to the dry mass of the tailings and therefore it assumed that the water content of the rare earth tailings is zero.
