# rape seed production, organic

Dataset: EcoSpold 2, unit process
Geography: CH
Time period: 2000-01-01 to 2021-12-31
Technology level: current
Classification: ISIC rev.4 ecoinvent: 0111:Growing of cereals (except rice), leguminous crops and oil seeds
Scenario: Business-as-Usual
System model: Allocation, cut-off by classification
Generated by: Fredy Dinkel
Published in: Jungbluth N. 2007
Database: ecoinvent
isCopyrightProtected: true
accessRestrictedTo: 1

## General comment
This dataset represents the production of 1 kg of rape seed (fresh matter). The yield is 2023 kg/ha at a moisture content at storage of 6%.
[This dataset was already contained in the ecoinvent database version 2. It was not individually updated during the transfer to ecoinvent version 3. Life Cycle Impact Assessment results may still have changed, as they are affected by changes in the supply chain, i.e. in other datasets. This dataset was generated following the ecoinvent quality guidelines for version 2. It may have been subject to central changes described in the ecoinvent version 3 change report (http://www.ecoinvent.org/database/ecoinvent-version-3/reports-of-changes/), and the results of the central updates were reviewed extensively. The changes added e.g. consistent water flows and other information throughout the database. The documentation of this dataset can be found in the ecoinvent reports of version 2, which are still available via the ecoinvent website. The change report linked above covers all central changes that were made during the conversion process.]

## Included activities start
This activity starts after the harvest of the previous crop. The input of seeds is considered. Farm manure as an organic fertiliser is only accounted for in terms of direct field emissions; all pre-processes are included in the animal production systems.

## Included activities end
The dataset includes all machine operations and corresponding machine infrastructure and sheds. Machine operations are: soil cultivation, sowing, fertilisation, weed control, combine-harvest, transport from field to regional processing centre (10 km) and drying of seeds. Further, direct field emissions are included. This activity ends after drying of seeds at the regional processing centre.

## Geography
Refers to a production in the Swiss plateau (lowlands <700m).

## Technology
Intensive organic production.

## Parameters
- fraction, irrigation water, to air: 0.3353 dimensionless; name fraction_IW_to_air; lognormal variance with pedigree 0.0409, pedigree (2,2,2,1,1)
  Literature value (Siebert, 2010) (Vionnet, S., Quantis Water Database - Technical Report, 2012).
- LUC_crop_specific: 1 dimensionless
  This parameter allows to switch between a "crop specific" and a "country specific" approach when calculating the LUC of a crop. By default, the chosen approach is "crop specific", so the value of the parameter is 1. If you want to apply a "country specific" approach, turn the parameter to 0.
- fraction, irrigation water to surface water: 0.2 dimensionless; name fraction_IW_to_surface_water; lognormal variance with pedigree 0.0886, pedigree (4,3,1,1,4)
  Literature value (Döll, 2011) cross referenced with expert opinion.
- fraction, irrigation water, to ground water: 0.8 dimensionless; name fraction_IW_to_ground_water; lognormal variance with pedigree 0.0886, pedigree (4,3,1,1,4)
  Literature value (Döll, 2011) cross referenced with expert opinion.

## Reference product
- rape seed, organic: 1 kg; name REF_PRODUCT; By-product classification allocatable product; CPC 01443: Rape or colza seed
  production volume 113288 kg
    56 ha (Willer H, Yussefi M (Eds.) (2010). The World of Organic Agriculture. Statistics and Emerging Trends 2007. FiBL, IFOAM.) ; 2023 kg/ha at 6% water on a wet mass basis
  property carbon content, fossil 0; name REF_PRODUCT_C_content_fossil
    fossil carbon content on a dry matter basis
  property price 0.123163 EUR2005; name REF_PRODUCT_price_EUR2005
    Calculated based on inputs: The price of the product has been calculated as a sum of the values of the material and energy inputs for this product. This value is therefore a rough estimation. It may underestimate the real price since there are additional expenses when producing any product. These expences can include for example labour costs, treatment of waste materials and profit for the producer. Please consider carefully whether this level of data quality is acceptable for your application.
  property energy content 24.8912 MJ; name REF_PRODUCT_energy_content
    See chapter 'Product Properties' in '01_crop production - yields & inputs CH & Europe_v1.0.pdf', section 'AGRICULTURAL PRODUCTION IN SWITZERLAND' - pdf-document on the dedicated talk page of ecoinvent (www.ecoinvent.org/documentation)
  property water content 0.0638298; name REF_PRODUCT_water_content; = (1-REF_PRODUCT_DM)/REF_PRODUCT_DM
  property water in wet mass 0.06 kg; name REF_PRODUCT_WWM; = 1-REF_PRODUCT_DM
  property wet mass 1 kg; name REF_PRODUCT_WM
  property dry mass 0.94 kg; name REF_PRODUCT_DM
  property carbon content, non-fossil 0.574; name REF_PRODUCT_C_content_non_fossil
    biogene carbon content on a dry matter basis
    Composition data obtained from Table 2.1 in Utilization of canola seed fractions in ruminant feeds, Master thesis by Ravindra Guptha Heendeniya, University of Saskatchewan (Canada), 2008 (http://library2.usask.ca/theses/available/etd-06162008-141937/unrestricted/THESES_Ravindra_Heendeniya_17_june_2008.pdf). First, composition data were refered to 1 kg dry mass. Then, C-contents were calculated considering a C-content/dry mass of 46% in carbohydrates (including fibres), 53% in proteins and 75% in fats. All data from 'Evolutionary and Biochemical Aspects', A.D. Kay and T. Vrede (in Global Ecology, 2010, Elsevier B.V., S.E. Jørgensen Ed.).
  property carbon content 0.574
    carbon content on a dry matter basis (reserved; not for manual entry)
  properties: carbon allocation 0.53956 kg

## Inputs from technosphere
- tillage, ploughing: 0.00049432 ha; source Nemecek T. 2005; lognormal variance with pedigree 0.0407, pedigree (2,2,5,1,1)
  Soil cultivation as in FAL 58 (Nemecek et al., 2005)
  This exchange has an activity link directly to the producing activity because the product is primarily consumed in the same geographical area where it is produced.
- irrigation: 0.136516 m3; name water_irrigation_input; source Siebert, S. 2010; lognormal variance with pedigree 0.0427, pedigree (2,2,5,1,1)
  Calculated based on literature values (Döll, 2010) and partially modelled at ETH (Pfister, S.).
  property carbon content, fossil 0; name C_content_fossil
  property water content 9089.91; name water_content
  property carbon content, non-fossil 0; name C_content_non_fossil
  property wet mass 1000 kg; name WM
  property water in wet mass 999.89 kg; name WWM
  property dry mass 0.11 kg; name DM
- tillage, currying, by weeder: 0.00049432 ha; source Nemecek T. 2005; lognormal variance with pedigree 0.0407, pedigree (2,2,5,1,1)
  (same comment as for tillage, ploughing)
- liquid manure spreading, by vacuum tanker: 0.0098863 m3; source Nemecek T. 2005; lognormal variance with pedigree 0.0406, pedigree (2,1,5,1,1)
  Application of 20 m3 slurry in march as in FAL 58 (Nemecek et al., 2005). Dilution to 50 m3/ha.
  This exchange has an activity link directly to the producing activity because the product is primarily consumed in the same geographical area where it is produced.
- solid manure loading and spreading, by hydraulic loader and spreader: 14.829 kg; source Nemecek T. 2005; lognormal variance with pedigree 0.0406, pedigree (2,1,5,1,1)
  Application of 30 t manure in august as in FAL 58 (Nemecek et al., 2005).
  This exchange has an activity link directly to the producing activity because the product is primarily consumed in the same geographical area where it is produced.
- hoeing: 0.00049432 ha; source Nemecek T. 2005; lognormal variance with pedigree 0.0407, pedigree (2,2,5,1,1)
  (same comment as for tillage, ploughing)
- rape seed, organic, for sowing: 0.0027187 kg; name SEED; source Nemecek T. 2005; lognormal variance with pedigree 0.0407, pedigree (2,2,5,1,1)
  Seed as in FAL 58 (Nemecek et al., 2005)
  property carbon content, non-fossil 0.574; name SEED_C_content_non_fossil
  property dry mass 0.94 kg; name SEED_DM
  property energy content 24.8912 MJ; name SEED_energy_content
  properties: water content 0.0638298, wet mass 1 kg
  note on carbon content, non-fossil: biogene carbon content on a dry matter basis Composition data obtained from Table 2.1 in Utilization of canola seed fractions in ruminant feeds, Master thesis by Ravindra Guptha Heendeniya, University of Saskatchewan (Canada), 2008 (http://library2.usask.ca/theses/available/etd-06162008-141937/unrestricted/THESES_Ravindra_Heendeniya_17_june_2008.pdf). First, composition data were refered to 1 kg dry mass. Then, C-contents were calculated considering a C-content/dry mass of 46% in carbohydrates (including fibres), 53% in proteins and 75% in fats. All data from 'Evolutionary and Biochemical Aspects', A.D. Kay and T. Vrede (in Global Ecology, 2010, Elsevier B.V., S.E. Jørgensen Ed.).
  note on energy content: See chapter 'Product Properties' in '01_crop production - yields & inputs CH & Europe_v1.0.pdf', section 'AGRICULTURAL PRODUCTION IN SWITZERLAND' - pdf-document on the dedicated talk page of ecoinvent (www.ecoinvent.org/documentation)
- combine harvesting: 0.00049432 ha; source Nemecek, T. 2004; lognormal variance with pedigree 0.0587, pedigree (2,2,5,1,3)
  Harvest as for rape seed IP in Nemecek et al. (2004)
  This exchange has an activity link directly to the producing activity because the product is primarily consumed in the same geographical area where it is produced.
- sowing: 0.00049432 ha; source Nemecek T. 2005; lognormal variance with pedigree 0.04, pedigree (1,1,5,1,1)
  (same comment as for tillage, ploughing)
- tillage, harrowing, by spring tine harrow: 0.00098863 ha; source Nemecek T. 2005; lognormal variance with pedigree 0.0407, pedigree (2,2,5,1,1)
  (same comment as for tillage, ploughing)
- transport, tractor and trailer, agricultural: 0.010682 metric ton*km; lognormal variance with pedigree 0.178, pedigree (4,1,5,1,1)
  Calculation with 0.5 km transport distance to the farm.
- drying of bread grain, seed and legumes: 0.0681 l; source Nemecek, T. 2004; lognormal variance with pedigree 0.0587, pedigree (2,2,5,1,3)
  Drying from about 12% to 6% water content as for rape seed IP in Nemecek et al. (2004)
  This exchange has an activity link directly to the producing activity because the product is primarily consumed in the same geographical area where it is produced.

## Inputs from nature
- Energy, gross calorific value, in biomass [natural resource, biotic]: 29.501 MJ; lognormal variance with pedigree 0.0421551, pedigree (2,1,5,3,1)
- Transformation, from annual crop, non-irrigated, extensive [natural resource, land]: 3.9545 m2; lognormal variance with pedigree 0.0507, pedigree (2,2,5,1,1)
  Modelled, see chapter 'Land use' in '01_crop production_direct field emissions and natural resources_v1.0.pdf' - pdf-document on the dedicated talk page of ecoinvent (www.ecoinvent.org/documentation)
- Occupation, annual crop, non-irrigated, extensive [natural resource, land]: 4.3253 m2*year; lognormal variance with pedigree 0.0407, pedigree (2,2,5,1,1)
  (same comment as for Transformation, from annual crop, non-irrigated, extensive)
- Carbon dioxide, in air [natural resource, in air]: 1.97301 kg; = 44/12 * (REF_PRODUCT_C_content_non_fossil * REF_PRODUCT * REF_PRODUCT_DM - SEED_C_content_non_fossil * SEED * SEED_DM); lognormal variance with pedigree 0.0407, pedigree (2,1,5,3,1)
  Modelled,see chapter 'CO2 binding' in '01_crop production_direct field emissions and natural resources_v1.0.pdf' - pdf-document on the dedicated talk page of ecoinvent (www.ecoinvent.org/documentation)
- Transformation, from pasture, man made, intensive [natural resource, land]: 0.98863 m2; lognormal variance with pedigree 0.0507, pedigree (2,2,5,1,1)
  (same comment as for Transformation, from annual crop, non-irrigated, extensive)
- Transformation, to annual crop, non-irrigated, extensive [natural resource, land]: 4.9432 m2; lognormal variance with pedigree 0.0507, pedigree (2,1,5,3,1)
  (same comment as for Transformation, from annual crop, non-irrigated, extensive)

## Emissions to nature
- Phosphate [water, surface water]: 0.00031403 kg; lognormal variance with pedigree 0.1608, pedigree (2,2,5,3,4)
  Modelled, based on chapter 'Emissions of phosphorous to the water' in '01_crop production_direct field emissions and natural resources_v1.0.pdf' - pfd-document on the dedicated talk page of econinvent (www.ecoinvent.og/documentation)
- Zinc [soil, agricultural]: 0.0003353 kg; source Nemecek, T. 2004; lognormal variance with pedigree 0.1087, pedigree (2,1,5,3,3)
  Calculated as the difference between heavy metal input through fertilisers and output through the harvested product. Heavy metal contents of soybeans and mineral fertilizers according to Nemecek et al. (2004). Negative values represent a net export of heavy metals.
- Cadmium [soil, agricultural]: -9.6226e-7 kg; source Nemecek, T. 2004
  (same comment as for Zinc)
- Chromium [soil, agricultural]: 1.1677e-5 kg; source Nemecek, T. 2004; lognormal variance with pedigree 0.1087, pedigree (2,1,5,3,3)
  (same comment as for Zinc)
- Water [water, surface water]: 0.0181485 m3; name water_to_water_surface; = water_irrigation_input*(1-fraction_IW_to_air)*fraction_IW_to_surface_water; lognormal variance with pedigree 0.1286, pedigree (4,3,5,1,4)
  Calculated value. See the parameters and their comments to understand the calculation.
  property fraction, origin: salt water 0; name fraction_origin_salt_water_Wsw
  property fraction, origin: fresh water 1; name fraction_origin_fresh_water_Wsw
- Ammonia [air, non-urban air or from high stacks]: 0.0162878 kg; lognormal variance with pedigree 0.1208, pedigree (2,2,5,3,4)
  Modelled, based on the 'AGRAMMON model' in '01_crop production_direct field emissions and natural resources_v1.0.pdf' - pfd-document on the dedicated talk page of econinvent (www.ecoinvent.og/documentation)
- Nickel [soil, agricultural]: 1.0954e-5 kg; source Nemecek, T. 2004; lognormal variance with pedigree 0.1087, pedigree (2,1,5,3,3)
  (same comment as for Zinc)
- Water [water, ground-]: 0.0725938 m3; name water_to_water_ground; = water_irrigation_input*(1-fraction_IW_to_air)*fraction_IW_to_ground_water; lognormal variance with pedigree 0.1286, pedigree (4,3,5,1,4)
  Calculated value. See the parameters and their comments to understand the calculation.
  property fraction, origin: fresh water 1; name fraction_origin_fresh_water_Wgw
  property fraction, origin: salt water 0; name fraction_origin_salt_water_Wgw
  property fraction, origin: unspecified 0; name fraction_origin_unspecified_Wgw
- Mercury [soil, agricultural]: 1.1519e-6 kg; source Nemecek, T. 2004; lognormal variance with pedigree 0.1087, pedigree (2,1,5,3,3)
  (same comment as for Zinc)
- Water [air, unspecified]: 0.0457739 m3; name water_to_air_unspecified; = (water_irrigation_input*fraction_IW_to_air); lognormal variance with pedigree 0.0807, pedigree (2,2,5,1,1)
  Calculated value based on literature values and expert opinion. See comments in the parametres' comment field.
  property fraction, origin: unspecified 0; name fraction_origin_unspecified
  property fraction, origin: salt water 0; name fraction_origin_salt_water
  property fraction, origin: fresh water 1; name fraction_origin_fresh_water
- Phosphorus [water, surface water]: 9.113e-5 kg; lognormal variance with pedigree 0.1608, pedigree (2,2,5,3,4)
  (same comment as for Phosphate)
- Phosphate [water, ground-]: 8.1707e-5 kg; lognormal variance with pedigree 0.1608, pedigree (2,2,5,3,4)
  (same comment as for Phosphate)
- Copper [soil, agricultural]: 7.5239e-5 kg; source Nemecek, T. 2004; lognormal variance with pedigree 0.1087, pedigree (2,1,5,3,3)
  (same comment as for Zinc)
- Nitrogen oxides [air, non-urban air or from high stacks]: 0.0004683 kg; = 0.21 * N2O; lognormal variance with pedigree 0.1608, pedigree (2,2,5,3,4)
  Modelled, see chapter 'Emissions of NOx to the air' in '01_crop production_direct field emissions and natural resources_v1.0.pdf' - pdf-document on the dedicated talk page of ecoinvent (www.ecoinvent.org/documentation)
- Nitrate [water, ground-]: 0.147 kg; lognormal variance with pedigree 0.1608, pedigree (2,2,5,3,4)
  Modelled with the 'SALCA-NO3 model' described in '01_crop production_direct field emissions and natural resources_v1.0.pdf' - pdf-document on the dedicated talk page of ecoinvent (www.ecoinvent.org/documentation)
- Lead [soil, agricultural]: 6.8135e-6 kg; source Nemecek, T. 2004; lognormal variance with pedigree 0.1087, pedigree (2,1,5,3,3)
  (same comment as for Zinc)
- Dinitrogen monoxide [air, non-urban air or from high stacks]: 0.00223 kg; name N2O; lognormal variance with pedigree 0.1608, pedigree (2,2,5,3,4)
  Modelled, based on chapter 'Emissions of N2O to the air' in '01_crop production_direct field emissions and natural resources_v1.0.pdf' - pfd-document on the dedicated talk page of econinvent (www.ecoinvent.og/documentation)

## Sampling procedure
Data were compiled from study areas, statistics, fertilising recommendations, documents from extension services and expert knowledge.

## Extrapolations
This dataset has been extrapolated from year 2005 to the year of the calculation (2021). The uncertainty has been adjusted accordingly.

## Review by Niels Jungbluth 2007-08-13
Passed.
none
