# synthetic fuel production, from coal, high temperature Fisher-Tropsch operations

Dataset: EcoSpold 2, unit process
Geography: ZA
Time period: 2016-01-01 to 2021-12-31
Technology level: old
Classification: ISIC rev.4 ecoinvent: 1920:Manufacture of refined petroleum products
Synonyms: gasoline
Scenario: Business-as-Usual
System model: Allocation, cut-off by classification
Share of production covered: 100 %
Generated by: Russo
Published in: Russo, V. 2018
Database: ecoinvent
isCopyrightProtected: true
accessRestrictedTo: 1

## General comment
This dataset represents the synthetyc fuels production from coal in South Africa (ZA). These operations are supported by mining coal and converting it into synthetic fuels and chemicals through proprietary Fischer-Tropsch technology by Sasol, the biggest synfuels producer in ZA (and worldwide). Its productions accounts for 150 000 bbl/day of crude-equivalent.
High Temperature Fisher-Tropsch process makes use of an iron-based catalyst. However no information on catalyst supply or the amount used was available in the public reports.

## Included activities start
Activities start with receving the raw coal from the mining sites in the Secunda Complex and the natural gas from imports. Activity includes also on-site waste treatment: incineration of hazardous materials (with residual calorific value) integrated with energy recovery. The High Temperature Fisher-Tropsch process makes use of iron-based catalyst with no other heavy or precious metals included. The public avaible sources don't report informatoin on the amont nor composition of the catalyst.

## Included activities end
Acitivities end with the production of major synthetic fuels (petrol, diesel, LPG) via the Fisher-Tropsch technology and natural gas via gas reforming. A comprehensive list of by-products is also provided.

## Geography
SECUNDA SYFUEL OPERATIONS are bases in Secunda (South Africa); SSO receives coal from 5 mines in Mpumalanga province. SECUNDA CHEMICAL OPERATIONS operates production facilities in Secunda (SA). Attached figure show the Secunda complex (inclusive of the mining sites) and the operation based in Secunda and Sasolburg.

## Technology
SECUNDA SYNFUEL OPERATIONS: Secunda Synfuels Operations operates the world’s only commercial coal-based synthetic fuels manufacturing facility of its kind, producing synthesis gas (syngas) through coal gasification and natural gas reforming. They make use of their proprietary technology to convert syngas into synthetic fuel components, pipeline gas and chemical feedstock for the downstream production of solvents, polymers, comonomers and other chemicals. Primary internal customers are Sasol Chemicals Operations, Sasol Exploration and Production International and other chemical companies. Carbon is produced for the recarburiser, aluminium, electrode and cathodic production markets.
Secunda Synfuels Operations receives coal from five mines in Mpumalanga (see figure attached). After being crushed, the coal is blended to obtain an even quality distribution. Electricity is generated by both steam and gas and used to gasify the coal at a temperature of 1300°C. This produces syngas from which two types of reactor - circulating fluidised bed and Sasol Advanced SynthoTM reactors – produce components for making synthetic fuels as well as a number of downstream chemicals. Gas water and tar oil streams emanating from the gasification process are refined to produce ammonia and various grades of coke respectively.
SECUNDA CHEMICAL OPERATIONS: The Secunda Chemicals Operations hub forms part of the Southern African Operations and is the consolidation of all the chemical operating facilities in Secunda, along with Site Services activities. The Secunda Chemicals hub produces a diverse range of products that include industrial explosives, fertilisers; polypropylene, ethylene and propylene; solvents (acetone, methyl ethyl ketone (MEK), ethanol, n-Propanol, iso-propanol, SABUTOL-TM, PROPYLOL-TM, mixed C3 and C4 alcohols, mixed C5 and C6 alcohols, High Purity Ethanol, and Ethyl Acetate) as well as the co-monomers, 1-hexene, 1-pentene and 1-octene and detergent alcohol (SafolTM).

## Reference product
- petrol, unleaded: 0 kg; name RP_1; CPC 333: Petroleum oils and oils obtained from bituminous materials, other than crude; preparations n.e.c. containing by […]; By-product classification allocatable product; CAS 86290-81-5; pedigree (1,1,1,1,1)
  Petrol unleaded, low sulphur produced by the High Temperature Fisher-Tropsch technology (Fe catalyst); Sasol Integrated report (2017) and Sasol Production and Sales metrics (2017).
  production volume 2.82e9 kg; name APV_RP
    APV based on Sasol operational and sustainability reports 2017
  property heating value, net 43.2 MJ
    Assumed equal to "petroleum". LHV for petroleum: Based on literature, page 7, Report6, part 4
  property price 0.71 EUR2005; name RP_1_price_EUR2005
    Average calculated from All Grades, Areas and Formulations in USA for 2005. Source: http://www.eia.gov/oil_gas/petroleum/data_publications/wrgp/mogas_history.html
  property carbon content 0.865
    carbon content on a dry matter basis (reserved; not for manual entry)
  property true value 0.71; name RP_1_true_value
    allocation property applied in "true value" allocation // value calculated from revenue
  properties: carbon content, fossil 0.865, dry mass 1 kg, wet mass 1 kg, carbon content, non-fossil 0, water content 0, water in wet mass 0 kg, carbon allocation 0.865 kg
- sulfur: 1 kg; name ByP_12; CPC 34520: Sulphur, except sublimed sulphur, precipitated sulphur and colloidal sulphur; By-product classification allocatable product; CAS 7704-34-9; pedigree (1,1,1,1,1)
  The amount has been calculated by difference of sulfur in coal (0.92% as reported from Sasol Limeted Form 20-F, 2017) less sulfur in air pollution, less max sulphur in the diesel allowed by law (50mg/kg or 50 ppm) and allowing for a 10% of sulfur in coal ash.
  production volume 1.83272e8 kg; = ByP_12*APV_RP
    APV based on Sasol operational and sustainability reports 2017
  property price 0.0551778 EUR2005; name ByP_12_price_EUR2005
    Price calculated based on price of elemental sulfur (f.o.b. mine or plant) reported in the USGS Minerals Yearbook for Sulfur from 2010 to 2019 (https://www.usgs.gov/centers/nmic/sulfur-statistics-and-information). The prices given in USD were converted to EUR based on the annual exchange rates published by the European Central Bank (https://sdw.ecb.europa.eu/quickview.do?SERIES_KEY=120.EXR.A.USD.EUR.SP00.A), and then adjusted for inflation relative to 2005 by using the Harmonised Index of Consumer Prices (HICP) of the euro area, published by eurostat (https://ec.europa.eu/eurostat/databrowser/view/PRC_HICP_AIND/default/table).
  property carbon content 0
    carbon content on a dry matter basis (reserved; not for manual entry)
  property true value 0.003586; name ByP_12_true_value
    allocation property applied in "true value" allocation // value calculated from revenue
  properties: carbon content, fossil 0, wet mass 1 kg, water content 0, dry mass 1 kg, water in wet mass 0 kg, carbon content, non-fossil 0, carbon allocation 0 kg

## By-products
All rows: By-product classification allocatable product; pedigree (1,1,1,1,1)
- ethanol, without water, in 99.7% solution state, from ethylene: 0 kg; name ByP_09; CPC 34: Basic chemicals; CAS 64-17-5
  Ethanol produce; Sasol Limited, Form 20-F (2017).
  production volume 1.14013e8 kg; = ByP_09*APV_RP
    APV based on Sasol operational and sustainability reports 2017
  property heating value, net 31.58 MJ
    LHV is calculated based on the elemental composition of the substance. Based on the CAS number of the substance (000064-17-5), the chemical formula of the substance is found to be: C2H6O, (PubChem 2020).
    Reference: Kim, S., Chen, J., Cheng, T., Gindulyte, A., He, J., He, S., Li, Q., Shoemaker, B. A., Thiessen, P. A., Yu, B., Zaslavsky, L., Zhang, J., & Bolton, E. E. (2019). PubChem 2019 update: improved access to chemical data. Nucleic acids research, 47(D1), D1102–D1109. https://doi.org/10.1093/nar/gky1033
  property price 0.365 EUR2005; name ByP_09_price_EUR2005
    Using world prices in FAPRI2007, 2009. Agricultural outlook. The prices in 2003 and 2004 were assumed to be the same as the most recent year (2005). (http://www.fapri.missouri.edu/outreach/publications/ag_outlook.asp?current_page=outreach; accessed 22/06/10). Unit conversion from US gallon to kg - 1 gallon = 3.7856 liter * 0.789 kg/liter (ethanol density) = 2.9868 kg (from http://www.peteducation.com/category.cfm?c=0+1305 and http://en.wikipedia.org/wiki/Ethanol accessed 25/6/10).
  property carbon content 0.521739
    carbon content on a dry matter basis (reserved; not for manual entry)
  property true value 0.0147569; name ByP_09_true_value
    allocation property applied in "true value" allocation // value calculated from revenue
  properties: carbon content, fossil 0.521739, dry mass 1 kg, water content 0, carbon content, non-fossil 0, wet mass 1 kg, water in wet mass 0 kg, carbon allocation 0.521739 kg
- butyl acrylate: 0 kg; name ByP_14; CPC 341: Basic organic chemicals; CAS 141-32-2
  Butyl Acrylate produce; Sasol Limited, Form 20-F (2017).
  production volume 8.00034e7 kg; = ByP_14*APV_RP
    APV based on Sasol operational and sustainability reports 2017
  property price 1.6 EUR2005; name ByP_14_price_EUR2005
    From ICIS (http://www.icis.com/Articles/2004/03/04/560887/chemical-prices.html.). Commodity: '-Butyl acrylate tanks, frt. alld. E.'. Year 2004.
  property heating value, net 31.22 MJ
    LHV is calculated based on the elemental composition of the substance. Based on the CAS number of the substance (000141-32-2 ), which is found manually, the chemical formula of the substance is found to be: C7H12O2, (PubChem 2020).
    Reference: Kim, S., Chen, J., Cheng, T., Gindulyte, A., He, J., He, S., Li, Q., Shoemaker, B. A., Thiessen, P. A., Yu, B., Zaslavsky, L., Zhang, J., & Bolton, E. E. (2019). PubChem 2019 update: improved access to chemical data. Nucleic acids research, 47(D1), D1102–D1109. https://doi.org/10.1093/nar/gky1033
  property carbon content 0.756757
    carbon content on a dry matter basis (reserved; not for manual entry)
  property true value 0.045392; name ByP_14_true_value
    allocation property applied in "true value" allocation // value calculated from revenue
  properties: water in wet mass 0 kg, carbon content, non-fossil 0, dry mass 1 kg, water content 0, carbon content, fossil 0.756757, wet mass 1 kg, carbon allocation 0.756757 kg
- pitch: 0 kg; name ByP_20; CPC 34540: Oils and other products of the distillation of high temperature coal tar, and similar products; pitch and pitc[…]; CAS 61789-60-4
  This represents black products - tars and pitches - from High Temperature Fisher-Tropsch process as reported in the Additional Analyst Information, Sasol (2017).
  production volume 4.75424e8 kg; = ByP_20*APV_RP
    Calculated from production volume of reference product using the relative outputs.
  property price 0.233 EUR2005; name ByP_20_price_EUR2005
    2005 import and export prices (total trades (USD) divided by total weight (kg) in China, India, USA, Japan, Russia and Europe, major producers and consumers (http://www.cementchina.net/freport/showfre.asp?id=749) from UN Commodity Trade Statistics Database (http://data.un.org/Explorer.aspxDatabase [Accessed 2 July 2010]). Commodity: pitch
  property carbon content 0.83
    carbon content on a dry matter basis (reserved; not for manual entry)
  property true value 0.0392815; name ByP_20_true_value
    allocation property applied in "true value" allocation // value calculated from revenue
  properties: wet mass 1 kg, water content 0, water in wet mass 0 kg, dry mass 1 kg, carbon content, fossil 0.83, carbon content, non-fossil 0, heating value, net 28 MJ, carbon allocation 0.83 kg
- chemical, organic: 0 kg; name ByP_08; CPC 341: Basic organic chemicals
  Others organic chemicals; Sasol Limited, Form 20-F (2017).
  production volume 9.9687e7 kg; = ByP_08*APV_RP
    APV based on Sasol operational and sustainability reports 2017
  property price 1.57 EUR2005; name ByP_08_price_EUR2005
    Calculated from EU prices by use of exchange rates.
  property carbon content, fossil 0.628
    This dataset is an unweighted average of 20 organic substances (listed in Tab 88.1, ecoinvent v2.2 report 8, part II), being part of the top100 chemicals included in this database. The C-content has also been calculated as an unweighted average of the C content of the substances composing this dataset.
  property carbon content, non-fossil 0
    (same comment as for chemical, organic)
  property heating value, net 19.03 MJ
    LHV is calculated based on the Carbon content of the product. More details can be found on the respective documentation.
  property carbon content 0.628
    carbon content on a dry matter basis (reserved; not for manual entry)
  property true value 0.0554995; name ByP_08_true_value
    allocation property applied in "true value" allocation // value calculated from revenue
  properties: wet mass 1 kg, water in wet mass 0 kg, water content 0, dry mass 1 kg, carbon allocation 0.628 kg
- diesel, low-sulfur: 0 kg; name ByP_15; CPC 33360: Gas oil; CAS 68476-34-6
  Diesel, low-sulfur produced by the High Temperature Fisher-Tropsch technology (Fe catalyst); Sasol Integrated report (2017).
  production volume 9.39906e8 kg; = ByP_15*APV_RP
    APV based on Sasol operational and sustainability reports 2017
  property price 0.4 EUR2005; name ByP_15_price_EUR2005
    Assumed the same price as diesel, at refinery. According to the International Energy Agency (http://wds.iea.org/WDS/TableViewer/tableView.aspx downloaded 4 July 2009 for purchased data points). The prices are for Germany and excl. taxes, and they are the same for both industry and household. Applying diesel density of 0.844 kg/litre from IEA, Oil information, Documentation for beyond 2020 files.
  property sulfur content 5e-5
    Sulfur content on a dry matter basis: SA regulation allows a max of 50 mg/kg of sulphur (Petroleum Product Act 1977 (Act no 120 of 1977) revised and updated on 23 June 2006)
  property carbon content 0.865
    carbon content on a dry matter basis (reserved; not for manual entry)
  property true value 0.13332; name ByP_15_true_value
    allocation property applied in "true value" allocation // value calculated from revenue
  properties: wet mass 1 kg, water content 0, carbon content, non-fossil 0, carbon content, fossil 0.865, dry mass 1 kg, water in wet mass 0 kg, heating value, net 42.8 MJ, carbon allocation 0.865 kg
- ammonia, anhydrous, liquid: 0 kg; name ByP_19; CPC 34651: Ammonia, anhydrous; CAS 7664-41-7
  Ammonia by product has been calculated from the N content of coal (1,5%) and it accounts for the coal that goes in the High Temperature Fischer-Tropsch process only (no coal-to-electricity and no coal-to-steam).
  production volume 3.22664e8 kg; = ByP_19*APV_RP
    Calculated from production volume of reference product using the relative outputs.
  property price 0.333 EUR2005; name ByP_19_price_EUR2005
    Data related to the price of nitric acid were provided by Yara International (https://www.yara.com/)
  property carbon content 0
    carbon content on a dry matter basis (reserved; not for manual entry)
  property true value 0.0381019; name ByP_19_true_value
    allocation property applied in "true value" allocation // value calculated from revenue
  properties: dry mass 1 kg, water in wet mass 0 kg, carbon content, fossil 0, wet mass 1 kg, carbon content, non-fossil 0, water content 0, carbon allocation 0 kg
- propylene: 0 kg; name ByP_07; CPC 33421: Ethylene, propylene, butylene, butadiene; CAS 115-07-1
  Propylene produce; Sasol Limited, Form 20-F (2017).
  production volume 9.50002e8 kg; = ByP_07*APV_RP
    APV based on Sasol operational and sustainability reports 2017
  property price 0.754 EUR2005; name ByP_07_price_EUR2005
    Source: CMAI (2011) Monomers Market Report (http://www.cmaiglobal.com/Marketing/Samples/MMR_Summary.pdf). Price: approx. 0.9 USD/kg
  property heating value, net 43.22 MJ
    LHV is calculated based on the elemental composition of the substance. Based on the CAS number of the substance (000115-07-1), the chemical formula of the substance is found to be: C3H6, (PubChem 2020).
    Reference: Kim, S., Chen, J., Cheng, T., Gindulyte, A., He, J., He, S., Li, Q., Shoemaker, B. A., Thiessen, P. A., Yu, B., Zaslavsky, L., Zhang, J., & Bolton, E. E. (2019). PubChem 2019 update: improved access to chemical data. Nucleic acids research, 47(D1), D1102–D1109. https://doi.org/10.1093/nar/gky1033
  property carbon content 0.857143
    carbon content on a dry matter basis (reserved; not for manual entry)
  property true value 0.254008; name ByP_07_true_value
    allocation property applied in "true value" allocation // value calculated from revenue
  properties: carbon content, non-fossil 0, water in wet mass 0 kg, water content 0, dry mass 1 kg, carbon content, fossil 0.857143, wet mass 1 kg, carbon allocation 0.857143 kg
- isobutanol: 0 kg; name ByP_11; CPC 34139: Other alcohols, phenols, phenol-alcohols, and their halogenated, sulphonated, nitrated or nitrosated derivativ[…]; CAS 78-83-1
  isobuthanol produce; Sasol Limited, Form 20-F (2017).
  production volume 1.50024e7 kg; = ByP_11*APV_RP
    APV based on Sasol operational and sustainability reports 2017
  property heating value, net 35.99 MJ
    LHV is calculated based on the elemental composition of the substance. Based on the CAS number of the substance (000078-83-1), the chemical formula of the substance is found to be: C4H10O, (PubChem 2020).
    Reference: Kim, S., Chen, J., Cheng, T., Gindulyte, A., He, J., He, S., Li, Q., Shoemaker, B. A., Thiessen, P. A., Yu, B., Zaslavsky, L., Zhang, J., & Bolton, E. E. (2019). PubChem 2019 update: improved access to chemical data. Nucleic acids research, 47(D1), D1102–D1109. https://doi.org/10.1093/nar/gky1033
  property price 0.546 EUR2005; name ByP_11_price_EUR2005
    Temporary price data. Calculated as 90% of purchasers price based on: 2004 import and export prices (total trades (USD) divided by total weight (kg) in EU27, USA, China, Japan and India) from UN Commodity Trade Statistics Database (http://data.un.org/Explorer.aspxDatabase [Accessed 2 July 2010]). Commodity: 'Butanols nes'
  property carbon content 0.648649
    carbon content on a dry matter basis (reserved; not for manual entry)
  property true value 0.00290472; name ByP_11_true_value
    allocation property applied in "true value" allocation // value calculated from revenue
  properties: dry mass 1 kg, wet mass 1 kg, water content 0, carbon content, fossil 0.648649, carbon content, non-fossil 0, water in wet mass 0 kg, carbon allocation 0.648649 kg
- liquefied petroleum gas: 0 kg; name ByP_01; CPC 334: Petroleum gases and other gaseous hydrocarbons, except natural gas; CAS 68476-85-7
  LPG produced by the High Temperature Fisher-Tropsch technology (Fe catalyst); Sasol Integrated report (2017) and Sasol Production and Sales metrics (2017).
  production volume 1.36009e8 kg; = ByP_01*APV_RP
    APV based on Sasol operational and sustainability reports 2017
  property price 0.276 EUR2005; name ByP_01_price_EUR2005
    Temporary price data. Calculated as 90% of purchasers price based on: Average 2004 prices for EU27 from UN Commodity Trade Statistics Database - Average of Propane and butane (http://data.un.org/Data.aspx?q=Butanes+&d=ComTrade&f=_l1Code%3a28%3bcmdCode%3a271113 and http://data.un.org/Data.aspx?q=propane&d=ComTrade&f=_l1Code%3a28%3bcmdCode%3a271112; accessed 1 June 2010).
  property heating value, net 45.5 MJ
    Indicative value. Reference: Fuels - Higher and Lower Calorific Values, available at: https://www.engineeringtoolbox.com/fuels-higher-calorific-values-d_169.html
  property carbon content 0.821863
    carbon content on a dry matter basis (reserved; not for manual entry)
  property true value 0.0133115; name ByP_01_true_value
    allocation property applied in "true value" allocation // value calculated from revenue
  properties: wet mass 1 kg, water content 0, water in wet mass 0 kg, carbon content, non-fossil 0, carbon content, fossil 0.821863, dry mass 1 kg, carbon allocation 0.821863 kg
- 1-butanol: 0 kg; name ByP_05; CPC 34139: Other alcohols, phenols, phenol-alcohols, and their halogenated, sulphonated, nitrated or nitrosated derivativ[…]; CAS 71-36-3
  1-buthanol produce; Sasol Limited, Form 20-F (2017).
  production volume 1.49996e8 kg; = ByP_05*APV_RP
    APV based on Sasol operational and sustainability reports 2017
  property price 0.546 EUR2005; name ByP_05_price_EUR2005
    (same comment as for isobutanol)
  property heating value, net 35.99 MJ
    LHV is calculated based on the elemental composition of the substance. Based on the CAS number of the substance (000071-36-3), the chemical formula of the substance is found to be: C4H10O, (PubChem 2020).
    Reference: Kim, S., Chen, J., Cheng, T., Gindulyte, A., He, J., He, S., Li, Q., Shoemaker, B. A., Thiessen, P. A., Yu, B., Zaslavsky, L., Zhang, J., & Bolton, E. E. (2019). PubChem 2019 update: improved access to chemical data. Nucleic acids research, 47(D1), D1102–D1109. https://doi.org/10.1093/nar/gky1033
  property carbon content 0.648649
    carbon content on a dry matter basis (reserved; not for manual entry)
  property true value 0.0290417; name ByP_05_true_value
    allocation property applied in "true value" allocation // value calculated from revenue
  properties: dry mass 1 kg, water in wet mass 0 kg, carbon content, fossil 0.648649, wet mass 1 kg, carbon content, non-fossil 0, water content 0, carbon allocation 0.648649 kg
- heavy fuel oil: 0 kg; name ByP_17; CPC 33370: Fuel oils n.e.c.
  Heavy refinery fuels for the manufacture of fuel oils. Sasol Limited, Form 20-F (2017).
  production volume 6.83991e8 kg; = ByP_17*APV_RP
    Calculated from production volume of reference product using the relative outputs.
  property price 0.138 EUR2005; name ByP_17_price_EUR2005
    Temporary price data. Calculated as 90% of purchasers price based on: Source: International Energy Agency (http://wds.iea.org/WDS/TableViewer/tableView.aspx downloaded 4 July 2009) for Germany and excl. taxes, for low sulphur fuel oil.
  property carbon content 0.849
    carbon content on a dry matter basis (reserved; not for manual entry)
  property true value 0.0334719; name ByP_17_true_value
    allocation property applied in "true value" allocation // value calculated from revenue
  properties: carbon content, non-fossil 0, water in wet mass 0 kg, water content 0, dry mass 1 kg, wet mass 1 kg, carbon content, fossil 0.849, heating value, net 41.2 MJ, carbon allocation 0.849 kg
- ethylene: 0 kg; name ByP_06; CPC 33421: Ethylene, propylene, butylene, butadiene; CAS 74-85-1
  Ethylene produce; Sasol Limited, Form 20-F (2017).
  production volume 6.15014e8 kg; = ByP_06*APV_RP
    APV based on Sasol operational and sustainability reports 2017
  property heating value, net 43.22 MJ
    LHV is calculated based on the elemental composition of the substance. Based on the CAS number of the substance (000074-85-1), the chemical formula of the substance is found to be: C2H4, (PubChem 2020).
    Reference: Kim, S., Chen, J., Cheng, T., Gindulyte, A., He, J., He, S., Li, Q., Shoemaker, B. A., Thiessen, P. A., Yu, B., Zaslavsky, L., Zhang, J., & Bolton, E. E. (2019). PubChem 2019 update: improved access to chemical data. Nucleic acids research, 47(D1), D1102–D1109. https://doi.org/10.1093/nar/gky1033
  property price 0.754 EUR2005; name ByP_06_price_EUR2005
    (same comment as for propylene)
  property carbon content 0.857143
    carbon content on a dry matter basis (reserved; not for manual entry)
  property true value 0.16444; name ByP_06_true_value
    allocation property applied in "true value" allocation // value calculated from revenue
  properties: carbon content, non-fossil 0, water in wet mass 0 kg, dry mass 1 kg, wet mass 1 kg, water content 0, carbon content, fossil 0.857143, carbon allocation 0.857143 kg
- methanol: 0 kg; name ByP_13; CPC 34139: Other alcohols, phenols, phenol-alcohols, and their halogenated, sulphonated, nitrated or nitrosated derivativ[…]; CAS 67-56-1
  Methanol produce; Sasol Limited, Form 20-F (2017).
  production volume 1.40013e8 kg; = ByP_13*APV_RP
    APV based on Sasol operational and sustainability reports 2017
  property heating value, net 26.49 MJ
    LHV is calculated based on the elemental composition of the substance. Based on the CAS number of the substance (000067-56-1), the chemical formula of the substance is found to be: CH4O, (PubChem 2020).
    Reference: Kim, S., Chen, J., Cheng, T., Gindulyte, A., He, J., He, S., Li, Q., Shoemaker, B. A., Thiessen, P. A., Yu, B., Zaslavsky, L., Zhang, J., & Bolton, E. E. (2019). PubChem 2019 update: improved access to chemical data. Nucleic acids research, 47(D1), D1102–D1109. https://doi.org/10.1093/nar/gky1033
  property price 0.22 EUR2005; name ByP_13_price_EUR2005
    Calculated value based on data from United Nations Commodity Trade Statistics Database (comtrade.un.org). UN comtrade category: 290511 Methyl alcohol. Using exchange rate of 1EURO = 1.209 USD. Average of price of import into 5 main markets (EU, US, JP, IN and CN).
  property carbon content 0.375
    carbon content on a dry matter basis (reserved; not for manual entry)
  property true value 0.010923; name ByP_13_true_value
    allocation property applied in "true value" allocation // value calculated from revenue
  properties: dry mass 1 kg, wet mass 1 kg, water in wet mass 0 kg, carbon content, fossil 0.375, water content 0, carbon content, non-fossil 0, carbon allocation 0.375 kg
- 1-propanol: 0 kg; name ByP_04; CPC 34139: Other alcohols, phenols, phenol-alcohols, and their halogenated, sulphonated, nitrated or nitrosated derivativ[…]; CAS 71-23-8
  1-Propanol produce; Sasol Limited, Form 20-F (2017).
  production volume 6.99924e7 kg; = ByP_04*APV_RP
    APV based on Sasol operational and sustainability reports 2017
  property heating value, net 34.3 MJ
    LHV is calculated based on the elemental composition of the substance. Based on the CAS number of the substance (000071-23-8), the chemical formula of the substance is found to be: C3H8O, (PubChem 2020).
    Reference: Kim, S., Chen, J., Cheng, T., Gindulyte, A., He, J., He, S., Li, Q., Shoemaker, B. A., Thiessen, P. A., Yu, B., Zaslavsky, L., Zhang, J., & Bolton, E. E. (2019). PubChem 2019 update: improved access to chemical data. Nucleic acids research, 47(D1), D1102–D1109. https://doi.org/10.1093/nar/gky1033
  property price 0.83 EUR2005; name ByP_04_price_EUR2005
    Calculated value based on data from United Nations Commodity Trade Statistics Database (comtrade.un.org). UN comtrade category: 290512 Propyl alcohol and isopropyl alcohol. Year 2005. Using exchange rate of 1EURO = 1.209 USD. Average of price of import into 5 main markets (EU, US, JP, IN and CN).
  property carbon content 0.6
    carbon content on a dry matter basis (reserved; not for manual entry)
  property true value 0.0206006; name ByP_04_true_value
    allocation property applied in "true value" allocation // value calculated from revenue
  properties: carbon content, fossil 0.6, water in wet mass 0 kg, wet mass 1 kg, water content 0, dry mass 1 kg, carbon content, non-fossil 0, carbon allocation 0.6 kg
- acetone, liquid: 0 kg; name ByP_02; CPC 34170: Ethers, alcohol peroxides, ether peroxides, epoxides, acetals and hemiacetals, and their halogenated, sulphona[…]; CAS 67-64-1
  Acetone produce; Sasol Limited, Form 20-F (2017).
  production volume 1.75009e8 kg; = ByP_02*APV_RP
    APV based on Sasol operational and sustainability reports 2017
  property heating value, net 31.32 MJ
    LHV is calculated based on the elemental composition of the substance. Based on the CAS number of the substance (000067-64-1), the chemical formula of the substance is found to be: C3H6O, (PubChem 2020).
    Reference: Kim, S., Chen, J., Cheng, T., Gindulyte, A., He, J., He, S., Li, Q., Shoemaker, B. A., Thiessen, P. A., Yu, B., Zaslavsky, L., Zhang, J., & Bolton, E. E. (2019). PubChem 2019 update: improved access to chemical data. Nucleic acids research, 47(D1), D1102–D1109. https://doi.org/10.1093/nar/gky1033
  property price 0.58 EUR2005; name ByP_02_price_EUR2005
    Temporary price data. Calculated as 90% of purchasers price based on: 2004 import and export prices (total trades (USD) divided by total weight (kg) in EU27, USA, China, Japan and India) from UN Commodity Trade Statistics Database (http://data.un.org/Explorer.aspxDatabase [Accessed 2 July 2010]). Commodity: Acetone
  property carbon content 0.62069
    carbon content on a dry matter basis (reserved; not for manual entry)
  property true value 0.0359948; name ByP_02_true_value
    allocation property applied in "true value" allocation // value calculated from revenue
  properties: dry mass 1 kg, carbon content, non-fossil 0, wet mass 1 kg, carbon content, fossil 0.62069, water in wet mass 0 kg, water content 0, carbon allocation 0.62069 kg
- natural gas, high pressure: 0 m3; name ByP_10; CPC 12020: Natural gas, liquefied or in the gaseous state; CAS 14493-06-2
  Methane-rich gas produced by Sasol. Sasol Integrated report (2017), Sasol Production and Sales metrics (2017) and Sasol Limited, Form 20-F (2017). Additional information on the gas composition can be found at (www.sasol.com/products/gas/methane-rich-gas )
  production volume 4.31432e8 m3; = ByP_10*APV_RP
    APV based on Sasol operational and sustainability reports 2017
  property heating value, gross 35.735 MJ; = average(33.57;37.90)
  property price 0.166 EUR2005; name ByP_10_price_EUR2005
  property true value 0.0253963; name ByP_10_true_value
  properties: carbon content, fossil 0.602381, water content 0, heating value, net 35.735 MJ, wet mass 0.84 kg, water in wet mass 0 kg, dry mass 0.84 kg, carbon content, non-fossil 0, carbon content 0.602381, carbon allocation 0.506 kg
- methyl ethyl ketone: 0 kg; name ByP_03; CPC 34170: Ethers, alcohol peroxides, ether peroxides, epoxides, acetals and hemiacetals, and their halogenated, sulphona[…]; CAS 78-93-3
  MEK produce; Sasol Limited, Form 20-F (2017).
  production volume 6.00096e7 kg; = ByP_03*APV_RP
    APV based on Sasol operational and sustainability reports 2017
  property price 0.634 EUR2005; name ByP_03_price_EUR2005
    Temporary price data. Calculated as 90% of purchasers price based on: 2004 import and export prices (total trades (USD) divided by total weight (kg) in EU27, USA, China, Japan and India) from UN Commodity Trade Statistics Database (http://data.un.org/Explorer.aspxDatabase [Accessed 2 July 2010]). Commodity: Methanal (formaldehyde)
  property heating value, net 33.63 MJ
    LHV is calculated based on the elemental composition of the substance. Based on the CAS number of the substance (000078-93-3), the chemical formula of the substance is found to be: C4H8O, (PubChem 2020).
    Reference: Kim, S., Chen, J., Cheng, T., Gindulyte, A., He, J., He, S., Li, Q., Shoemaker, B. A., Thiessen, P. A., Yu, B., Zaslavsky, L., Zhang, J., & Bolton, E. E. (2019). PubChem 2019 update: improved access to chemical data. Nucleic acids research, 47(D1), D1102–D1109. https://doi.org/10.1093/nar/gky1033
  property carbon content 0.666667
    carbon content on a dry matter basis (reserved; not for manual entry)
  property true value 0.0134915; name ByP_03_true_value
    allocation property applied in "true value" allocation // value calculated from revenue
  properties: water content 0, wet mass 1 kg, carbon content, fossil 0.666667, carbon content, non-fossil 0, water in wet mass 0 kg, dry mass 1 kg, carbon allocation 0.666667 kg

## Inputs from technosphere
- electricity, medium voltage: 0.0869323 kWh; lognormal variance with pedigree 0.0027, pedigree (2,2,3,1,1)
  Electricy consumption from purchased electricity: 48% of the total electricy requirements (Additional Analyst Information, Sasol, 2017).
- chemical, inorganic: 0.0490856 kg; lognormal variance with pedigree 0.0027, pedigree (2,2,3,1,1)
  Classified as other inputs to the process: chemicals , feedstock in the Sasol Sustainability report (2017).
  properties: dry mass 1 kg, wet mass 1 kg, carbon content, fossil 0.003
  note on carbon content, fossil: This dataset is an unweighted average of 20 inorganic substances (listed in Tab 88.1, ecoinvent v2.2 report 8, part II), being part of the top100 chemicals included in this database. The C-content has also been calculated as an unweighted average of the C content of the substances composing this dataset.
- hard coal: 0.488117 kg; lognormal variance with pedigree 0.0027, pedigree (2,2,3,1,1)
  Total coal (41Mt/yr) used both in the processing of the synthetic fuels and to produce electricity (self-generated on site) and steam. Sasol mines underground only. APV 41Mt It include the coal-to-electricity (5,67Mt) and the coal-to-steam (18,48Mt). All the quantinty are on "As Received basis". Sources: Sasol Limited Sustainability report (2017), Sasol Limited, Additional Analyst Information (2017) and Sasolo Limited, Form 20-F (2017).
  property wet mass 1 kg; name WM
  property water in wet mass 0.0776 kg; name WWM
  properties: heating value, net 27.91 MJ, carbon content, fossil 0.554324, dry mass 0.9224 kg, sulfur content 0.009364, water content 0.0841284
  note on heating value, net: Based on the Characterization factor of Hard coal in the CED method
  note on carbon content, fossil: The carbon content of SA coal has been adjusted considering the heat value ("as received" basis) provided by Sasol Limeted, Form 20-F (2017). From that one can deduce that Sasol coal is classified either Bituminous (B-coal) and Sub-bituminous (SB-coal). http://www.africoal.co.za/coal-ranking/ and https://www.thebalance.com/all-types-of-coal-are-not-created-equal-1182543 provide the carbon content for the two type of coal based on the heat value and the classification between SB-coal and B-coal, which ranges from 71% to 77% for SB-coal and from 77% to 87% for B-coal. By using those ranges and the ash content of coal (28,6%) provided by Sasol, the resulting carbon content has been calculated as a weighted average considering a total of 11 mines of which 6 are providing SB coal and 5 B-coal.
  note on sulfur content: Average sulfur content of coal on as-recevied basis: (Table 3, pg 40 of Sasol Limited, Form 20-F, 2017).
- inert waste, for final disposal: -0.00183342 kg; name ByP_18; lognormal variance with pedigree 0.0027, pedigree (2,2,3,1,1)
  Non-hazardous waste to final disposal on a general waste landifll site (Sasol Sustainability report, 2017).
  production volume 1.54e8 kg; = ByP_18*APV_RP
    Calculated from production volume of reference product using the relative outputs.
  property price 0 EUR2005; name ByP_18_price_EUR2005
  properties: wet mass 1 kg, dry mass 0.995 kg, water content 0.00502513
- natural gas, high pressure: 0.0155567 m3; lognormal variance with pedigree 0.0027, pedigree (2,2,3,1,1)
  Gas consumption SA operation (1790 Kton/year from Additional Analyst Information Sasol, 2017). Additional information on the gas composition can be found at (www.sasol.com/products/gas/natural-gas
  properties: heating value, net 40.8 MJ, wet mass 0.84 kg, dry mass 0.84 kg, carbon content, fossil 0.602381, heating value, gross 40.8 MJ
  note on heating value, net: Value from Sasol website on the composition on the Methane-rich gas produced (www.sasol.com/products/gas/natural-gas )
  note on carbon content, fossil: An average C content of 0.506 kg C/ m3 has been assumed (this average has been calculated using data in Tab 3.5, ecoinvent v2.2 report 6_V
- petroleum refinery: 9.95772e-11 unit; lognormal variance with pedigree 0.0027, pedigree (2,2,3,1,1)
  It has been calculated from the year throughtput of the petroleum refinery dataset (1 Mton/year) and the trhoughtput of the Secunda Synfuel Operation (150000 bbl/day crude equivalent, from SAPIA report 2016).
  properties: lifetime capacity [kg] 3e10 kg
- hard coal ash: -0.139601 kg; name ByP_16; lognormal variance with pedigree 0.0041, pedigree (3,2,3,1,1)
  Calculated from the total input of hard coal which has an ash content of 28,6% (Sasol Limited, Form 20-F, June 2017); it accounts also for the co-disposal of salt with the quench ashes.
  production volume 1.1726e10 kg; = ByP_16*APV_RP
    Calculated from production volume of reference product using the relative outputs.
  property price 0 EUR2005; name ByP_16_price_EUR2005
  properties: wet mass 1 kg, dry mass 1 kg

## Inputs from nature
All rows: lognormal variance with pedigree 0.0027, pedigree (2,2,3,1,1)
- Transformation, to industrial area [natural resource, land]: 1.10791e-5 m2
  Area converted every year in to the industrial site of the Secunda Complex (established in the late '70s). Sasol Limited, Form 20-F (2017) and www.sasol.com/extras/sasol-facts-pres-2/
- Transformation, from unspecified [natural resource, land]: 1.10791e-5 m2
  (same comment as for Transformation, to industrial area)
- Water, river [natural resource, in water]: 0.00110824 m3; name water_in
  Secunda Synfuel raw water intake is approximately 240-270 Ml/day.
- Oxygen [natural resource, in air]: 0.153257 kg
  Accounted for in the Sasol Sustainability Report (2017) as Material Use.
- Occupation, industrial area [natural resource, land]: 0.000982343 m2*year
  Secunda complex: 82,5 km2 of which 8,35 km2 are for the operating plants. Sasol is operating by 1950's and have proved and probable of gross in situ coal reserve of 3,7 Bton and approximately 1,2 Bton of recoverable reserve. Years of occupancy 50. Sasol Limited, Form 20-F (2017)

## Emissions to nature
- Particulates, > 10 um [air, non-urban air or from high stacks]: 0.000119184 kg; lognormal variance with pedigree 0.0027, pedigree (2,2,3,1,1)
  fly-ash emissions: Sasol Sustainability report (2017).
- Nitrogen oxides [air, non-urban air or from high stacks]: 0.00180958 kg; lognormal variance with pedigree 0.0027, pedigree (2,2,3,1,1)
  NOx emissions: Sasol Sustainability report (2017).
- Hydrogen sulfide [air, non-urban air or from high stacks]: 0.000773855 kg; lognormal variance with pedigree 0.0027, pedigree (2,2,3,1,1)
  H2S emissions: Sasol Sustainability report (2017).
- Sulfur dioxide [air, non-urban air or from high stacks]: 0.00240483 kg; lognormal variance with pedigree 0.0106, pedigree (2,5,3,1,1)
  SOx emissions: Sasol Sustainability report (2017).
- VOC, volatile organic compounds, unspecified origin [air, unspecified]: 0.00048815 kg; lognormal variance with pedigree 0.0027, pedigree (2,2,3,1,1)
  VOC emissions: Sasol Sustainability report (2017).
- Water [air, non-urban air or from high stacks]: 0.000697781 m3; = average(160/240, 160/270)*water_in; lognormal variance with pedigree 0.0027, pedigree (2,2,3,1,1)
  Water evaporated through the processing and the utility cooling systems. Sasol Sustainability report (2017) and C. Ras MSc Thesis, An Industrail Ecology Approach to Salt-related Environmental Sustainability Issues in a Large Industrial Complex, University of Cape Town (2011).
- Methane, fossil [air, non-urban air or from high stacks]: 0.00132143 kg; lognormal variance with pedigree 0.0027, pedigree (2,2,3,1,1)
  CH4 emissions: Sasol Sustainability report (2017).
- Carbon dioxide, fossil [air, non-urban air or from high stacks]: 0.681946 kg; lognormal variance with pedigree 0.0027, pedigree (2,2,3,1,1)
  Scope 1 emission as from Sasol Sustainability Report (2017); it accounts for direct emission associated with the process and Sasol road tanker fleets.

## Sampling procedure
Data are from Sasol reports. Sasol is the biggest synfuels producer in ZA. Its productions accounts for 150 000 bbl/day of crude-equivalent. Data source are: Sasol Integrated Report (2017) Sasol Sustainability Report (2017) Sasol Performance and Sales metrics (2017) Sasol Additional Analyst information (2017) Sasol Limited, Form 20-F (2017)

## Extrapolations
Data for the APVs (annual production volumes) for the year 2017 have been found in the publics reports above mentioned. These are recordered in the APV specifid field. The RP and by-products have been calculated on the basis of the APVs and rescaled down to 1 kg of petrol, unleaded, low-sulphur.
