# chickpea production

Dataset: EcoSpold 2, unit process
Geography: RoW
Time period: 2015-01-01 to 2021-12-31
Technology level: current
Classification: ISIC rev.4 ecoinvent: 0111:Growing of cereals (except rice), leguminous crops and oil seeds
Scenario: Business-as-Usual
System model: Allocation, cut-off by classification
Generated by: Sanjeevan Bajaj
Database: ecoinvent
isCopyrightProtected: true
accessRestrictedTo: 1

## General comment
This dataset represents the production of 1 kg of fresh Chickpea during September, 2016- January, 2017 at a farm located in village Chandragadh, District Surendranagar of Gujarat. In this area, fields are irrigated using electric pump for surface irrigation. The farm has a yield of 2900 kg fresh matter per ha for this crop cycle. Sowing date for the crop is 02-October, 2016 and harvesting date is 09-January, 2017. Mineral NP fertilizer input is 77-51 kg/ha. Organic fertilizer applied amounts to 14,000 kg of compost from cattle dung. Insecticide used has active ingredient as Dimethoate 104g/ha, Chlorpyrifos 137.55g/ha, Monocrotophos 79.80g/ha. Machinery is used for soil cultivation, other work processes with fuel consumption of 72 kg/ha, and 6.40 kg/ha respectively.

## Included activities start
This activity starts about three weeks after the harvest of the previous crop. The soil is prepared for cultivation in third week of September and sowing of seeds started about 10 days after soil preparation. Thereafter the crop is mature for harvesting in about 3 months.

## Included activities end
The activity ends with the harvesting of the mature Chickpea (gram in local language) from the Chickpea plant. Thereafter the field is prepared for cultivation of the next crop.

## Geography
Village Chandragadh, District Surendranagar of Gujarat

## Technology
Cultivation of Chickpea follows conventional production standards

## Time period
Soil cultivating date for the main crop: 21-September, 2016; Harvesting date main crop: 09-January, 2017. The soil cultivation, sowing and harvesting dates are taken as the middle date of the week or fortnight told to the data collector by the farmer. Total time from date of sowing to date of harvesting comes to 100 days. The data is collected for one crop cycle. The cycle of one year is considered for entry in ecoeditor.

## Reference product
- chickpea: 1 kg; By-product classification allocatable product; CPC 01703: Chick peas, dry
  production volume 4.91295e9 kg; = 12092950*1000
    http://www.fao.org/faostat/en/#data/QC 2016 production volume in tonnes
  property price 0.524552 EUR2005
    Literature value. Price from FAOSTAT data Producer Prices - Annual (retrieved from: http://www.fao.org/faostat/en/#data/PP, accessed 15Feb2018). Data from 2005.
  property carbon content, non-fossil 0.475
    biogenic carbon content on a dry matter basis.
    Reference: http://www.fao.org/forestry/17111/en
  property carbon content 0.475
    carbon content on a dry matter basis (reserved; not for manual entry)
  properties: water in wet mass 0.7886 kg, carbon content, fossil 0, water content 3.73037, wet mass 1 kg, dry mass 0.2114 kg, carbon allocation 0.100415 kg

## Inputs from technosphere
- packaging, for fertilisers: 0.0882759 kg; lognormal variance with pedigree 0.0514, pedigree (4,3,2,5,4)
  Total amount of active substance/s of fertilisers needed for the production of 'chickpea' is calculated to be circa 4.41E-02 kg. Fertiliser/s used in this dataset is/are: 'nitrogen fertiliser, as N', 'phosphate fertiliser, as P2O5', 'urea, as N'. The total amount of active substance/s is doubled in order to account for the packaging of the dilluted product of fertiliser/s that is/are applied. Therefore, 8.83E-02 kg of packaging for fertilisers is justified with this exchange.
  properties: price 0.0642 EUR2005, heating value, net 25.01 MJ, carbon content, fossil 0.825301, dry mass 1 kg, wet mass 1 kg
  note on carbon content, fossil: Considering a chemical formula (C2H4)n for polyethylene, carbon content-fossil is calculated to be 0.856286 kg of Carbon per kg of dry mass.
- packaging, for pesticides: 0.000221621 kg; lognormal variance with pedigree 0.0514, pedigree (4,3,2,5,4)
  Total amount of active substance/s of pesticides needed for the production of chickpea is calculated to be circa 1.11E-04 kg. Pesticide/s used in this dataset is/are: 'organophosphorus-compound, unspecified', 'pesticide, unspecified'. The total amount of active substance/s is doubled in order to account for the packaging of the dilluted product of pesticide/s that is/are applied. Therefore, 2.22E-04 kg of packaging for pesticides is justified with this exchange.
  properties: heating value, net 25.97 MJ, dry mass 1 kg, carbon content, fossil 0.85714, price 0.0642 EUR2005, wet mass 1 kg
- urea: 0 kg; pedigree (1,1,1,1,1)
  The exchange has been updated from 'urea, as N' into 'urea' and therefore its amount has been scaled (multiplied) from 0.0196 kg by 2.1438 kg of 'urea' per kg of 'urea, as N'. Original comment of the exchange is: The data was collected for a hectare area through interview
  properties: carbon content, fossil 0.2, dry mass 1 kg, wet mass 1 kg
- inorganic phosphorus fertiliser, as P2O5: 0 kg; pedigree (1,1,1,1,1)
  The data was collected for a hectare area through interview
  properties: wet mass 1 kg, dry mass 1 kg
- organophosphorus-compound, unspecified: 8.32931e-5 kg; lognormal variance with pedigree 0.006, pedigree (3,3,2,5,2)
  This exchange is an aggregation of amounts:
  4.743103448275862E-5. Comment: used as a substitute of Used as a substitute for Quinalphos. Considering 7 pumps of 15 ml each multiplied with density
  3.586206896551724E-5. Comment: Considering 2 pumps of 20 ml each is sprayed two times, Multiplied by the density
  properties: carbon content, fossil 0.260898, dry mass 1 kg, wet mass 1 kg
- irrigation: 0 m3; pedigree (1,1,1,1,1)
  The data was collected for a hectare area through interview
  properties: dry mass 0.11 kg, wet mass 1000 kg, water content 9089.91
- pea seed, for sowing: 0.0213793 kg; lognormal variance with pedigree 0.006, pedigree (3,3,2,5,2)
  The data was collected for a hectare area through interview
  properties: wet mass 1 kg, carbon content, non-fossil 0.469421, dry mass 0.87 kg, water content 0.149425
- compost: 4.82759 kg; lognormal variance with pedigree 0.006, pedigree (3,3,2,5,2)
  The data was collected for a hectare area through interview
  property chromium content 2.23e-5; name Cr_content
  property copper content 5.77e-5; name Cu_content
  property dry mass 0.5 kg; name DM
  property phosphorus content 0.0035; name P_content
  property mercury content 1.2e-7; name Hg_content
  property potassium content 0.01; name K_content
  property lead content 4.9e-5; name Pb_content
  property cadmium content 3.6e-7; name Cd_content
  property nitrogen content 0.014; name N_content
  property nickel content 1.63e-5; name Ni_content
  property zinc content 0.000184; name Zn_content
  properties: wet mass 1 kg, water content 1, carbon content, non-fossil 0.183645
- inorganic nitrogen fertiliser, as N: 0 kg; pedigree (1,1,1,1,1)
  The data was collected for a hectare area through interview
  properties: dry mass 1 kg, wet mass 1 kg
- pesticide, unspecified: 2.75172e-5 kg; lognormal variance with pedigree 0.006, pedigree (3,3,2,5,2)
  consideing 2 pumps of 15 ml each multiplied with density
  properties: wet mass 1 kg, carbon content, fossil 0.486978, dry mass 1 kg
- tillage, ploughing: 0.000951249 ha; lognormal variance with pedigree 0.006, pedigree (3,3,2,5,2)
  The data was collected for a hectare area through interview
- transport, tractor and trailer, agricultural: 0.0506169 metric ton*km; lognormal variance with pedigree 0.1254, pedigree (3,3,2,5,2)
  The data was collected for a hectare area through interview
- urea: 0.03163, 0.00580734, 0.00468459 kg (3 entries); lognormal variance with pedigree 0.006, pedigree (3,3,2,5,2)
  (same comment as for urea)
- inorganic phosphorus fertiliser, as P2O5: 0.000134367, 0.00017433, 0.000139592, 0.001093, 0.000230307, 9.48951e-6, 2.50139e-5, 0.00258034, 4.65092e-5, 5.07529e-6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 kg (29 entries); lognormal variance with pedigree 0.006, pedigree (3,3,2,5,2)
  The data was collected for a hectare area through interview
- irrigation: 0.0108554, 0.00046078, 1.84312e-5, 0.0970403, 0.00159023, 7.95182e-5, 0.00451525, 0.000734939, 0.0035846, 0.00122513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 m3 (16 entries); lognormal variance with pedigree 0.006, pedigree (3,3,2,5,2)
  The data was collected for a hectare area through interview
- inorganic nitrogen fertiliser, as N: 3.61428e-5, 5.19504e-5, 4.64316e-5, 0.000163107, 9.74094e-5, 1.20737e-6, 7.22931e-6, 0.000915995, 1.71193e-5, 2.57125e-6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 kg (29 entries); lognormal variance with pedigree 0.006, pedigree (3,3,2,5,2)
  The data was collected for a hectare area through interview

## Inputs from nature
- Carbon dioxide, in air [natural resource, in air]: 1.33043 kg; lognormal variance with pedigree 0.006, pedigree (3,3,2,5,2)
  Calculated Value. This value has been calculated by using the ecoinvent LCI calculation tool for crop production.
- Occupation, annual crop, irrigated [natural resource, land]: 1.14943 m2*year; lognormal variance with pedigree 0.0074, pedigree (3,3,2,5,2)
  (same comment as for Carbon dioxide, in air)
- Energy, gross calorific value, in biomass [natural resource, biotic]: 15.2971 MJ; lognormal variance with pedigree 0.006, pedigree (3,3,2,5,2)
  The data was collected for a hectare area through interview
- Transformation, to annual crop, irrigated [natural resource, land]: 3.44828 m2; lognormal variance with pedigree 0.0134, pedigree (3,3,2,5,2)
  (same comment as for Carbon dioxide, in air)
- Transformation, from annual crop, irrigated [natural resource, land]: 3.44828 m2; lognormal variance with pedigree 0.0134, pedigree (3,3,2,5,2)
  (same comment as for Carbon dioxide, in air)

## Emissions to nature
- Mercury [water, ground-]: 1.46702e-10 kg; lognormal variance with pedigree 0.1088, pedigree (4,5,2,5,2)
  (same comment as for Carbon dioxide, in air)
- Chlorpyrifos [soil, agricultural]: 4.7431e-5 kg; lognormal variance with pedigree 0.0518, pedigree (4,5,2,5,2)
  used as a substitute of Used as a substitute for Quinalphos. Considering 7 pumps of 15 ml each multiplied with density
- Lead [water, ground-]: 6.77443e-8 kg; lognormal variance with pedigree 0.1088, pedigree (4,5,2,5,2)
  (same comment as for Carbon dioxide, in air)
- Lead [water, surface water]: 4.36384e-11 kg; lognormal variance with pedigree 0.1088, pedigree (4,5,2,5,2)
  (same comment as for Carbon dioxide, in air)
- Mercury [soil, agricultural]: 2.66884e-7 kg; lognormal variance with pedigree 0.0588, pedigree (4,5,2,5,2)
  (same comment as for Carbon dioxide, in air)
- Zinc, ion [water, surface water]: 1.105e-10 kg; lognormal variance with pedigree 0.1088, pedigree (4,5,2,5,2)
  (same comment as for Carbon dioxide, in air)
- Water [water, surface water]: 0.0537931 m3; lognormal variance with pedigree 0.0194, pedigree (4,5,2,5,2)
  (same comment as for Carbon dioxide, in air)
- Nickel, ion [water, surface water]: 5.16129e-11 kg; lognormal variance with pedigree 0.1088, pedigree (4,5,2,5,2)
  (same comment as for Carbon dioxide, in air)
- Dimethoate [soil, agricultural]: 3.58621e-5 kg; lognormal variance with pedigree 0.0518, pedigree (4,5,2,5,2)
  Considering 2 pumps of 20 ml each is sprayed two times, Multiplied by the density
- Nitrogen oxides [air, non-urban air or from high stacks]: 0.00370084 kg; lognormal variance with pedigree 0.0588, pedigree (4,5,2,5,2)
  (same comment as for Carbon dioxide, in air)
- Zinc, ion [water, ground-]: 3.7092e-6 kg; lognormal variance with pedigree 0.1088, pedigree (4,5,2,5,2)
  (same comment as for Carbon dioxide, in air)
- Phosphorus [water, surface water]: 4.68092e-9 kg; lognormal variance with pedigree 0.0588, pedigree (4,5,2,5,2)
  (same comment as for Carbon dioxide, in air)
- Water [water, ground-]: 0.209793 m3; lognormal variance with pedigree 0.0194, pedigree (4,5,2,5,2)
  (same comment as for Carbon dioxide, in air)
- Cadmium [soil, agricultural]: 1.60179e-6 kg; lognormal variance with pedigree 0.0588, pedigree (4,5,2,5,2)
  (same comment as for Carbon dioxide, in air)
- Water [air, non-urban air or from high stacks]: 0.274345 m3; lognormal variance with pedigree 0.0194, pedigree (4,5,2,5,2)
  (same comment as for Carbon dioxide, in air)
- Phosphate [water, surface water]: 6.95399e-5 kg; lognormal variance with pedigree 0.0588, pedigree (4,5,2,5,2)
  (same comment as for Carbon dioxide, in air)
- Ammonia [air, non-urban air or from high stacks]: 0.00741628 kg; lognormal variance with pedigree 0.0194, pedigree (4,5,2,5,2)
  (same comment as for Carbon dioxide, in air)
- Nitrate [water, ground-]: 0.0386948 kg; lognormal variance with pedigree 0.0588, pedigree (4,5,2,5,2)
  (same comment as for Carbon dioxide, in air)
- Dinitrogen monoxide [air, non-urban air or from high stacks]: 0.00116463 kg; lognormal variance with pedigree 0.0488, pedigree (4,5,2,5,2)
  (same comment as for Carbon dioxide, in air)
- Cadmium, ion [water, surface water]: 5.23081e-13 kg; lognormal variance with pedigree 0.1088, pedigree (4,5,2,5,2)
  (same comment as for Carbon dioxide, in air)
- Carbon dioxide, fossil [air, non-urban air or from high stacks]: 0.0308677 kg; lognormal variance with pedigree 0.0194, pedigree (4,5,2,5,2)
  (same comment as for Carbon dioxide, in air)
- Phosphate [water, ground-]: 2.46705e-5 kg; lognormal variance with pedigree 0.0588, pedigree (4,5,2,5,2)
  (same comment as for Carbon dioxide, in air)
- Chromium [soil, agricultural]: 6.10081e-5 kg; lognormal variance with pedigree 0.0588, pedigree (4,5,2,5,2)
  (same comment as for Carbon dioxide, in air)
- Chromium, ion [water, surface water]: 5.45491e-11 kg; lognormal variance with pedigree 0.1088, pedigree (4,5,2,5,2)
  (same comment as for Carbon dioxide, in air)
- Copper [soil, agricultural]: 0.000135149 kg; lognormal variance with pedigree 0.0588, pedigree (4,5,2,5,2)
  (same comment as for Carbon dioxide, in air)
- Copper, ion [water, surface water]: 4.57031e-11 kg; lognormal variance with pedigree 0.1088, pedigree (4,5,2,5,2)
  (same comment as for Carbon dioxide, in air)
- Lead [soil, agricultural]: 0.000116566 kg; lognormal variance with pedigree 0.0588, pedigree (4,5,2,5,2)
  (same comment as for Carbon dioxide, in air)
- Copper, ion [water, ground-]: 4.1299e-7 kg; lognormal variance with pedigree 0.1088, pedigree (4,5,2,5,2)
  (same comment as for Carbon dioxide, in air)
- Zinc [soil, agricultural]: 0.00041635 kg; lognormal variance with pedigree 0.0588, pedigree (4,5,2,5,2)
  (same comment as for Carbon dioxide, in air)
- Chromium, ion [water, ground-]: 2.421e-6 kg; lognormal variance with pedigree 0.1088, pedigree (4,5,2,5,2)
  (same comment as for Carbon dioxide, in air)
- Mercury [water, surface water]: 1.63278e-13 kg; lognormal variance with pedigree 0.1088, pedigree (4,5,2,5,2)
  (same comment as for Carbon dioxide, in air)
- Nickel [soil, agricultural]: 3.97613e-5 kg; lognormal variance with pedigree 0.0588, pedigree (4,5,2,5,2)
  (same comment as for Carbon dioxide, in air)
- Cadmium, ion [water, ground-]: 5.49813e-9 kg; lognormal variance with pedigree 0.1088, pedigree (4,5,2,5,2)
  (same comment as for Carbon dioxide, in air)

## Sampling procedure
The farmer was identified and contacted by agriculture science faculty familiar with the local farmers in the region. Data was collected directly from the farmer through semi-structured interview using a questionnaire based on the input requirements of the ecoinvent LCI calculation tool for crop production. The farmer does not maintain any written records and has provided the data from recent memory. In this region, typically farmers are unable to provide exact name of active ingredient in the pesticide they use and the same was noted from details given on the pesticide packet. Individual farmer is not able to calculate fuel consumption for his own farm alone and this information has been collected from farming community of the area.

## Extrapolations
Ecoinvent LCI calculation tool for crop production was used to calculate field emissions from the cultivation process.
