# wood pellet factory production

Dataset: EcoSpold 2, unit process
Geography: RER
Time period: 2011-01-01 to 2021-12-31
Technology level: modern
Classification: ISIC rev.4 ecoinvent: 2822:Manufacture of metal-forming machinery and machine tools
Synonyms: wood pellets plant construction; wood pellets factory construction
Tags: Swiss Brush-up completed; single enterprise data,
Scenario: Business-as-Usual
System model: Allocation, cut-off by classification
Generated by: Frank Werner
Database: ecoinvent
isCopyrightProtected: true
accessRestrictedTo: 1

## General comment
This dataset represent the components of wood pellets factory, which produce pellets from wood residue from sawmills (mainly sawdust) and from woodchips. The raw materials is firstly pre-treated and dryed, then comminuted and mixed. In the end it is pellettized, cooled and bagged. This dataset includes all the machineries and devices necessaries for these processes (buildings, dryer, hammermills, hoppers, vibrating screen, conditioner, screw conveyors, cup elevators, several electric motors, pellet presses, horizontal cooler, packaging machine, pallettizer robot, exhaust after treatment devices such as cyclone and electrostatic precipitator, monitors and computer for monitoring). The dataset includes also the tower silos and materials in the external area, necessaries for store and deliver the final product.
Machineries are assumed to be replaced 1,5 times during the lifetime of the factory (tower silos are replaced only once). All values of exchanges are already adjusted for the factory lifetime. The production capacity of the pellet factory modeled is 50.000.000 kg/year.

## Included activities start
From the manufacturing of the infrastructures

## Included activities end
This activity ends with the disposal of the pellet factory in the end of its lifetime.

## Technology
The choice of the machineries and their specific capacity were made basing on an existing Swiss wood pellets production factory. Machineries models are still available on the market (2012).

## Reference product
- wood pellet factory: 1 unit; By-product classification allocatable product; CPC 53269: Other constructions for manufacturing
  production volume 270 unit
    Estimated value. Total EU wood pellet production in 2014 was of 1.35E+10 kg. The capacity of the factory for this dataset is of 5.00E+07kg.
    Source: Dale, A. (2015) Production and Consumption of Wood Pellets in the European Union. WPAC conference November 2015. Halifax, Nova Scotia, Canada. Retrieved from: <http://www.pellet.org/images/2015/ArnoldDaleEkman.pdf>, accessed 6 May 2016
  property lifetime capacity [kg] 2.5e9 kg; name lifetime_capacity_kg; = ( capacity_kg_per_s*31556926)* lifetime
    measured annual production (kg) * lifetime factory (50 years)
  property price 5.06142e6 EUR2005
    Calculated based on inputs: The price of the product has been calculated as a sum of the values of the material and energy inputs for this product. This value is therefore a rough estimation. It may underestimate the real price since there are additional expenses when producing any product. These expences can include for example labour costs, treatment of waste materials and profit for the producer. Please consider carefully whether this level of data quality is acceptable for your application.
  property capacity [kg/s] 1.58444 kg/s; name capacity_kg_per_s; = 50000000/31556926
    measured annual capacity (50 000 000 kg wood pellets) divided by the number of seconds in a year (31 556 926 seconds)
  property lifetime 50 year; name lifetime

## By-products
- iron scrap, unsorted: 0 kg; CPC 39310: Slag, dross, scalings and other waste from the manufacture of iron or steel; By-product classification Recyclable; pedigree (1,1,1,1,1)
  calculated value
  production volume 0 kg
    Calculated from production volume of reference product using the relative outputs.
  property price 0.149 EUR2005
    Temporary price data. Calculated as 90% of purchasers price based on: estimated at 85% of sorted scrap
  property carbon content 0
    carbon content on a dry matter basis (reserved; not for manual entry)
  properties: wet mass 1 kg, carbon content, non-fossil 0, dry mass 1 kg, water content 0, carbon content, fossil 0, water in wet mass 0 kg, carbon allocation 0 kg

## Inputs from technosphere
- electronics, for control units: 101 kg; name electronics; source AEK Pellets AG 2011; lognormal variance with pedigree 0.0362, pedigree (2,3,4,5,1)
  literature value and calculated value. Value basically taken from questionnaire from an existing pellets factory and from several additional sources. Refer to supplementary information in the editors page
  properties: wet mass 1 kg, carbon content, non-fossil 0.00013442, dry mass 1 kg, UVEK_link_1 2021, UVEK_relative_amount_1 1, carbon content, fossil 0.337146
  note on carbon content, non-fossil: The control unit has a composition of 46% steel (housing), 32% plastics, 14% printed wiring boards and 8% cables (various types).;
  note on UVEK_link_1: to be used only in special submissions in coordination with ecoinvent and the Swiss FOEN
- scrap aluminium: 0 kg; pedigree (1,1,1,1,1)
  calculated value
  production volume 0 kg
    Calculated from production volume of reference product using the relative outputs.
  properties: wet mass 1 kg, lifetime 20 year, dry mass 1 kg
- flat glass, uncoated: 138 kg; name flat_glass; source AEK Pellets AG 2011; lognormal variance with pedigree 0.0362, pedigree (2,3,4,5,1)
  (same comment as for electronics, for control units)
  properties: UVEK_link_1 2159, UVEK_relative_amount_1 1, wet mass 1 kg, dry mass 1 kg
- cast iron: 573 kg; name cast_iron; source AEK Pellets AG 2011; lognormal variance with pedigree 0.0362, pedigree (2,3,4,5,1)
  (same comment as for electronics, for control units)
  properties: UVEK_relative_amount_1 1, UVEK_link_1 401, carbon content, fossil 0.04, wet mass 1 kg, dry mass 1 kg
  note on carbon content, fossil: Cast iron is made by remelting pig iron in small furnaces (e.g. cupola furnaces or electric arc furnaces) and poured into moulds to make castings. It usually contains 2% to 6% carbon (ecoinvent v2.2 report 10_partII). An average content of 4% was considered
- metal working, average for metal product manufacturing: 10532 kg; = cast_iron+reinforcing_steel; source AEK Pellets AG 2011; lognormal variance with pedigree 0.0356, pedigree (1,3,4,5,1)
  calculated value
  properties: UVEK_relative_amount_1 1, UVEK_link_1 2937
- aluminium, wrought alloy: 1566 kg; name aluminium; source AEK Pellets AG 2011; lognormal variance with pedigree 0.0362, pedigree (2,3,4,5,1)
  (same comment as for electronics, for control units)
  properties: UVEK_relative_amount_1 1, UVEK_relative_amount_8 0.255428, UVEK_relative_amount_9 0.159642, wet mass 1 kg, UVEK_link_1 163, dry mass 1 kg, UVEK_link_8 4417, UVEK_link_9 4433
  note on UVEK_relative_amount_8: Scaling factor = amount of transport in corresponding KBOB dataset/amount of this input from technosphere. Source for transport distance: Life Cycle Inventories of Wood as Fuel and Construction Material/2007/Werner F. To be used only in special submissions in coordination with ecoinvent and the Swiss FOEN
  note on UVEK_link_8: This link has been introduced to model transport specifically for the SAM model; to be used only in special submissions in coordination with ecoinvent and the Swiss FOEN.
- stone wool: 1375 kg; name rock_wool; source AEK Pellets AG 2011; lognormal variance with pedigree 0.0362, pedigree (2,3,4,5,1)
  (same comment as for electronics, for control units)
  properties: UVEK_relative_amount_1 1, UVEK_link_1 3836, wet mass 1 kg, carbon content, fossil 0.015401, dry mass 1 kg
  note on carbon content, fossil: The chemical composition of the glass fibres used in the rock wool production is similar to the composition of naturally cooled volcano basalt and has a composition listed in Tab. 3.1 and 3.2 in ecoinvent v2.2 report 16, part XIV. Rock wool contains: a minimum of 96% mineral fibres,between 0.5 and 3.0 weight percent of phenolic resin depending on the specific product characteristics, and about 0.2 percent mineral oil (ecoinvent v2.2 report 16, part XIV). An average composition of 1.8% phenolic resin, 0.2% mineral oil, and 98% mineral fibres has been assumed and used to calculate C content of the rock wool
- metal working, average for aluminium product manufacturing: 1566 kg; = aluminium; source AEK Pellets AG 2011; lognormal variance with pedigree 0.0356, pedigree (1,3,4,5,1)
  calculated value
  properties: UVEK_link_1 154, UVEK_relative_amount_1 1
- copper, cathode: 1810 kg; name copper; source AEK Pellets AG 2011; lognormal variance with pedigree 0.0362, pedigree (2,3,4,5,1)
  (same comment as for electronics, for control units)
  properties: UVEK_link_1 595, dry mass 1 kg, UVEK_relative_amount_1 1, wet mass 1 kg
- scrap copper: 0 kg; pedigree (1,1,1,1,1)
  calculated value
  production volume 0 kg
    Calculated from production volume of reference product using the relative outputs.
  properties: lifetime 20 year, wet mass 1 kg, dry mass 1 kg
- wire drawing, copper: 1810 kg; = copper; source AEK Pellets AG 2011; lognormal variance with pedigree 0.0356, pedigree (1,3,4,5,1)
  calculated value
  properties: UVEK_link_1 4895, UVEK_relative_amount_1 1
- scrap steel: 0 kg; pedigree (1,1,1,1,1)
  calculated value
  production volume 0 kg
    Calculated from production volume of reference product using the relative outputs.
  properties: wet mass 1 kg, lifetime 20 year, dry mass 1 kg
- polyethylene, high density, granulate: 78 kg; name polyethilene; source AEK Pellets AG 2011; lognormal variance with pedigree 0.0362, pedigree (2,3,4,5,1)
  (same comment as for electronics, for control units)
  properties: wet mass 1 kg, carbon content, fossil 0.857143, heating value, net 42.47 MJ, UVEK_link_1 3540, dry mass 1 kg, UVEK_relative_amount_1 1
  note on carbon content, fossil: Polyethylene is formed out of a huge amount of ethylene monomers (C2H4) (ecoinvent v2.2 report 11_II). MW=28 g/mol
- waste mineral wool: 0 kg; pedigree (1,1,1,1,1)
  calculated value
  production volume 0 kg
    Calculated from production volume of reference product using the relative outputs.
  properties: UVEK_link_1 1002, UVEK_relative_amount_1 -1, lifetime 20 year, wet mass 1 kg, dry mass 1 kg
- lubricating oil: 25 kg; name lubricating_oil; source AEK Pellets AG 2011; lognormal variance with pedigree 0.0362, pedigree (2,3,4,5,1)
  (same comment as for electronics, for control units)
  properties: dry mass 1 kg, wet mass 1 kg, UVEK_relative_amount_1 1, carbon content, fossil 0.75, heating value, net 40.2 MJ, UVEK_link_1 2866
  note on carbon content, fossil: Lubricating oil is produced from diesel. C-content/dry mass of fats and oils considered 75%, from: ecoinvent v2.2 report, n 15a, pg 40
  note on heating value, net: Literature value, Source: IPCC 2006, 2006 IPCC Guidelines for National Greenhouse Gas Inventories, Prepared by the National Greenhouse Gas Inventories Programme, Eggleston H.S., Buendia L., Miwa K., Ngara T. and Tanabe K. (eds). Published: IGES, Japan
- waste mineral oil: 0 kg; pedigree (1,1,1,1,1)
  calculated from input of lubricating oil
  production volume 0 kg
    Calculated from production volume of reference product using the relative outputs.
  properties: wet mass 1 kg, lifetime 20 year, UVEK_link_1 1113, carbon content, fossil 0.864444, dry mass 0.9 kg, UVEK_relative_amount_1 -1, heating value, net 34.7 MJ, water content 0.111111
  note on carbon content, fossil: Tab A.6, ecoinvent v2.2 report 13_I. C content has been calculated after data in the tables, and then referred to 1 kg DM
  note on heating value, net: Value taken from the general comment of the treatment dataset.
- tower silo, plastic: 12000 m3; source AEK Pellets AG 2011; lognormal variance with pedigree 0.5606, pedigree (1,3,4,5,1)
  estimation - value given from pellets company in the filled questionnaire (dimensions of the pellet silos in their factory). This dataset include its own disposal in the end of its lifetime.
  properties: UVEK_link_1 4336, UVEK_relative_amount_1 1
- waste glass: -138 kg; = (flat_glass)*-1; lognormal variance with pedigree 0.0342, pedigree (2,3,4,1,1)
  calculated value
  production volume 37260 kg
    Calculated from production volume of reference product using the relative outputs.
  properties: dry mass 1 kg, lifetime 20 year, wet mass 1 kg, heating value, net 0.05 MJ
  note on heating value, net: Value extracted from "treatment of waste glass, open dump, very wet infiltration class (1000mm)"
- steel, chromium steel 18/8: 127578 kg; name chromium_steel; source AEK Pellets AG 2011; lognormal variance with pedigree 0.0362, pedigree (2,3,4,5,1)
  (same comment as for electronics, for control units)
  properties: UVEK_relative_amount_1 1, wet mass 1 kg, dry mass 1 kg, UVEK_link_1 451, carbon content, fossil 0.0008
  note on carbon content, fossil: Stainless steel model is the grade 304 steel (18/8 stainless, 18% chromium 8% nickel; max. 0.08% C)
- waste polyethylene: -78 kg; = (polyethilene)*-1; lognormal variance with pedigree 0.0342, pedigree (2,3,4,1,1)
  calculated value
  production volume 21060 kg
    Calculated from production volume of reference product using the relative outputs.
  properties: water content 0.00401606, lifetime 20 year, wet mass 1 kg, heating value, net 42.47 MJ, carbon content, fossil 0.825301, UVEK_link_1 1040, UVEK_relative_amount_1 -1, dry mass 0.996 kg
  note on carbon content, fossil: C content in 1 kg DM was calculated using data in Tab A.1, ecoinvent v2.2 report 13_I
- metal working, average for steel product manufacturing: 159559 kg; = steel_low_alloyed; source AEK Pellets AG 2011; lognormal variance with pedigree 0.0356, pedigree (1,3,4,5,1)
  calculated value
  properties: UVEK_relative_amount_1 1, UVEK_link_1 4216
- building, hall, steel construction: 1000 m2; source AEK Pellets AG 2011; lognormal variance with pedigree 0.5606, pedigree (1,3,4,5,1)
  measured value - building for drying process in the pellet factory modeled (datset includes the disposal of the building in the end of its lifetime)
  properties: UVEK_relative_amount_1 1, UVEK_link_1 340
- steel, low-alloyed: 159559 kg; name steel_low_alloyed; source AEK Pellets AG 2011; lognormal variance with pedigree 0.0356, pedigree (1,3,4,5,1)
  (same comment as for electronics, for control units)
  properties: wet mass 1 kg, UVEK_relative_amount_1 1, UVEK_link_1 4222, carbon content, fossil 0.005, dry mass 1 kg
- electronics scrap from control units: -101 kg; = (electronics)*-1; lognormal variance with pedigree 0.0342, pedigree (2,3,4,1,1)
  calculated value
  production volume 27270 kg
    Calculated from production volume of reference product using the relative outputs.
  properties: carbon content, non-fossil 0.00013442, wet mass 1 kg, dry mass 1 kg, carbon content, fossil 0.337146, lifetime 20 year, UVEK_relative_amount_1 -1, UVEK_link_1 928
- metal working, average for chromium steel product manufacturing: 127578 kg; = chromium_steel; source AEK Pellets AG 2011; lognormal variance with pedigree 0.0356, pedigree (1,3,4,5,1)
  calculated value
  properties: UVEK_relative_amount_1 1, UVEK_link_1 452
- building, multi-storey: 7000 m3; source AEK Pellets AG 2011; lognormal variance with pedigree 0.5606, pedigree (1,3,4,5,1)
  measured value - building for pelletting process in the pellet factory modeled (datset includes the disposal of the building in the end of its lifetime)
  properties: UVEK_link_1 343, UVEK_relative_amount_1 1
- reinforcing steel: 9959 kg; name reinforcing_steel; source AEK Pellets AG 2011; lognormal variance with pedigree 0.0362, pedigree (2,3,4,5,1)
  (same comment as for electronics, for control units)
  properties: UVEK_link_1 3785, wet mass 1 kg, dry mass 1 kg, carbon content, fossil 0.004, UVEK_relative_amount_1 1
- iron scrap, unsorted: -573 kg; lognormal variance with pedigree 0.0342, pedigree (2,3,4,1,1)
  calculated value
  production volume 154710 kg
  properties: wet mass 1 kg, price 0.149 EUR2005, dry mass 1 kg
- scrap aluminium: -1495.82, -70.1804 kg (2 entries); lognormal variance with pedigree 0.0342, pedigree (2,3,4,1,1)
  calculated value
  production volume 422820 kg
- scrap copper: -1728.88, -81.1155 kg (2 entries); lognormal variance with pedigree 0.0342, pedigree (2,3,4,1,1)
  calculated value
  production volume 488700 kg
- scrap steel: -296720, -375.934 kg (2 entries); lognormal variance with pedigree 0.0342, pedigree (2,3,4,1,1)
  calculated value
  production volume 8.02159e7 kg
- waste mineral wool: -1359.49, -15.5128 kg (2 entries); lognormal variance with pedigree 0.0342, pedigree (2,3,4,1,1)
  calculated value
  production volume 371250 kg
- waste mineral oil: -24.3961, -0.603949 kg (2 entries); lognormal variance with pedigree 0.0342, pedigree (2,3,4,1,1)
  calculated from input of lubricating oil
  production volume 6750 kg

## Inputs from nature
- Occupation, industrial area [natural resource, land]: 550000 m2*year; = land_use* 50; source AEK Pellets AG 2011; lognormal variance with pedigree 0.2106, pedigree (1,3,4,5,1)
  calculated value (land_use * lifetime of the pellet factory) [lifetime of the pellet factory: 50 years]
- Transformation, from unspecified [natural resource, land]: 11000 m2; name land_use; source AEK Pellets AG 2011; lognormal variance with pedigree 0.3606, pedigree (1,3,4,5,1)
  estimation - value given from pellets company in the filled questionnaire (total surface of the real pellet production factory modelled: building for drying process, building for pellettizing, external area for parking places/storage etc.)
- Transformation, to industrial area [natural resource, land]: 11000 m2; source AEK Pellets AG 2011; lognormal variance with pedigree 0.3606, pedigree (1,3,4,5,1)
  (same comment as for Transformation, from unspecified)

## Sampling procedure
visit at the pellet production factory, answers to a technical questionnaire, verified estimations with materials producers, literature review of machineries and materials

## Extrapolations
This dataset has been extrapolated from year 2012 to the year of the calculation (2021). The uncertainty has been adjusted accordingly.
