# treatment of waste reinforcement steel, sorting plant

Dataset: EcoSpold 2, unit process
Geography: CH
Time period: 1994-01-01 to 2021-12-31
Technology level: current
Classification: ISIC rev.4 ecoinvent: 3830:Materials recovery
Classification: EcoSpold01Categories: waste management/building demolition
Tags: ConvertedDataset; Treatment
Scenario: Business-as-Usual
System model: Allocation, cut-off by classification
Generated by: Gabor Doka (obsolete)
Published in: Doka G. 2007
Database: ecoinvent
isCopyrightProtected: true
accessRestrictedTo: 1

## General comment
The waste contains 1kg steel (GSD=100%) Waste density is 7900 kg/m3.
[This dataset was already contained in the ecoinvent database version 2. It was not individually updated during the transfer to ecoinvent version 3. Life Cycle Impact Assessment results may still have changed, as they are affected by changes in the supply chain, i.e. in other datasets. This dataset was generated following the ecoinvent quality guidelines for version 2. It may have been subject to central changes described in the ecoinvent version 3 change report (http://www.ecoinvent.org/database/ecoinvent-version-3/reports-of-changes/), and the results of the central updates were reviewed extensively. The changes added e.g. consistent water flows and other information throughout the database. The documentation of this dataset can be found in the ecoinvent reports of version 2, which are still available via the ecoinvent website. The change report linked above covers all central changes that were made during the conversion process.]

## Included activities end
energy for dismantling, machines for handling in sorting plant, electricity demand for sorting plant, transport to dismantling facilities,

## Geography
Specific to the technology mix encountered in Switzerland in late 1990ies

## Technology
Building demolition with skid-steer loaders. Dry sorting plant for building wastes with pre-sorting of mixed waste, crushing and manual sorting.

## Reference product
- waste reinforcement steel: -1 kg; name RP; By-product classification Waste; CPC 39310: Slag, dross, scalings and other waste from the manufacture of iron or steel; CAS 7439-89-6
  production volume 8.736e6 kg; name RP_PV; = 2600000000*0.5*0.8*0.28*0.03
    Estimated value. In Switzerland 2.6 billion kg of waste concrete are produced each year (BAFU 2015). 50% of total waste is assumed to be concrete not reinforced and 50% concrete reinforced. For the dataset “building construction, multi-storey”, reinforcement concrete is modelled with an input of 0.0927m3 of concrete (2380kg/m3) and 7.17 kg input of reinforcement steel, hence it is estimated that 3% of waste reinforced concrete is reinforcement steel.
    Because of the number of assumption made to estimate the annual production volume of reinforcement steel the value was looked at in reference to the total consumption of the material steel, in 2014 in CH the domestic material consumption for iron and steel was of 845377 thousand tons (Swiss Federal Statistical Office). The estimated values for reinforcement steel is therefore a tiny fraction of the overall consumption. Additionally according to OFEFP (2000) total metal content of waste construction building is around 250000 tonnes, therefore the estimated values is 10% of the total.
    From Hincapié et al. (2015) concrete waste 0% is directly recycled (“Direct recycling refers to the waste that is immediately re-used on the demolition (construction) site.” page 19) or incinerated, 90% is recycled, and 10% goes to landfill.
    The percentage sent to recycling is divided between waste sent directly to recycling center and first sent to sorting using the ratio applied in previous version of the database, where 69% waste is sent for recycling and 31% is first sent for sorting.
    References:
    BAFU (2015) Bauabfälle in der Schweiz - Hochbau. Studie 2015. Schlussbericht Zürich, 28. September 2015.
    Swiss Federal Statistical Office. <https://www.pxweb.bfs.admin.ch/default.aspx?px_language=en>, accessed 4th May 2016
    OFEFP (2000) Statistique des déchets 2000. Avec données 2001 sur la planification des UIOM. DOCUMENTS ENVIRONNEMENT no 152
    Ingrid Hincapié, Alejandro Caballero-Guzmán, Bernd Nowack (2015) Nanomaterials in Landfills Module 3: Nanomaterials in Construction Waste. EMPA, Swiss Federal Laboratories for Materials Science and Technology. St. Gallen, Switzerland
  property price 0 EUR2005; name RP_price_EUR2005
    Waste products are assigned a price of zero as they are assumed to require further treatment.
  property carbon content 0
    carbon content on a dry matter basis (reserved; not for manual entry)
  properties: carbon content, fossil 0, water content 0, carbon content, non-fossil 0, water in wet mass 0 kg, wet mass 1 kg, dry mass 1 kg, carbon allocation 0 kg

## Inputs from technosphere
- electricity, low voltage: 0.0037 kWh; lognormal variance with pedigree 0.05, pedigree (1,1,5,1,1)
  demand in sorting plant. Uncertainty from range in literature
- diesel, burned in building machine: 0.626 MJ; lognormal variance with pedigree 0.11, pedigree (1,1,5,1,1)
  energy for demolition. Uncertainty from range in (DAFSTB 1996)
  properties: heating value, net 1 MJ
- excavation, hydraulic digger: 0.000141 m3; lognormal variance with pedigree 0.05, pedigree (1,1,5,1,1)
  handling in sorting plant. Uncertainty from range in literature
- sorting facility, for construction waste: 1e-10 unit; lognormal variance with pedigree 0.04, pedigree (1,1,5,1,1)
  Uncertainty heeded in exchanges, 1kg = 1kg
  This exchange has an activity link directly to the producing activity because the product is primarily consumed in the same geographical area where it is produced.

## Sampling procedure
waste-specific calculation based on literature data

## Extrapolations
This dataset has been extrapolated from year 2002 to the year of the calculation (2021). The uncertainty has been adjusted accordingly.

## Review by Niels Jungbluth 2003-05-22
Passed. Calculation for standard deviation 95 of infrastructure, land occupation, transport services and other services can differ from standard Pedigree approach used in this project and figures obtained by this procedure.
