# ferromanganese production, high-coal, 74.5% Mn

Dataset: EcoSpold 2, unit process
Geography: RoW
Time period: 1994-01-01 to 2021-12-31
Technology level: current
Classification: ISIC rev.4 ecoinvent: 2410:Manufacture of basic iron and steel
Classification: EcoSpold01Categories: metals/extraction
Tags: ConvertedDataset
Scenario: Business-as-Usual
System model: Allocation, cut-off by classification
Share of production covered: 100 %
Generated by: Mischa Classen
Published in: Althaus H.-J. 2000
Database: ecoinvent
isCopyrightProtected: true
accessRestrictedTo: 1

## General comment
The module describes the consumption of ferromanganese in Europe in 1995. It is designed for the use of the metal as alloying element. This module does not consider secondary sources of manganese. Process data is taken mainly from a material flow analysis for the consumption of chromium in Germany. Results are used as a proxy for the European situation. This module may be used as proxy for the silicomanganese production
[This dataset was already contained in the ecoinvent database version 2. It was not individually updated during the transfer to ecoinvent version 3. Life Cycle Impact Assessment results may still have changed, as they are affected by changes in the supply chain, i.e. in other datasets. This dataset was generated following the ecoinvent quality guidelines for version 2. It may have been subject to central changes described in the ecoinvent version 3 change report (http://www.ecoinvent.org/database/ecoinvent-version-3/reports-of-changes/), and the results of the central updates were reviewed extensively. The changes added e.g. consistent water flows and other information throughout the database. The documentation of this dataset can be found in the ecoinvent reports of version 2, which are still available via the ecoinvent website. The change report linked above covers all central changes that were made during the conversion process.]

## Included activities end
The module includes the reduction to high-carbon ferromanganese. No secondary production considered, since secondary manganese is recycled to the foundries and has to be inventoried in the respective module, i. e. when casting the final rawmaterial in the steel production.

## Geography
This module relates to the consumption in Europe, although the import mix for Germany is chosen.

## Technology
The ore is processed in blast furnaces (20%), electric arc furnaces without flux (27%), electric arc furnaces with calcareous flux (53%).

## Parameters
- fraction, cooling water, recirculating system, to air: 0.771 dimensionless; name fraction_CW_R_to_air; lognormal variance with pedigree 0.0413, pedigree (2,3,1,3,1)
  Calculated based on literature value (Scown, C.D., 2011, Water Footprint of U.S. Transportation Fuels and supplying information of the article) (Vionnet, S., Quantis Water Database - Technical Report, 2012).
- fraction, cooling water, to air: 0.3875 dimensionless; name fraction_CW_to_air; = (0.5*fraction_CW_OT_to_air)+(0.5*fraction_CW_R_to_air); lognormal variance with pedigree 0.092025, pedigree (4,4,3,2,4)
  Calculated value based on literature value (see comments of the other parametres present in this dataset) and expert opinion. In the case when no industry/literature data are available about the type of cooling or directly fraction, cooling water, to air specific for the process a default assumption is applied. It is assumed that the once-through cooling system is used in 50% of all cases and recirculating system is used in another 50% of all cases.
- fraction, cooling water, once-through system, to air: 0.004 dimensionless; name fraction_CW_OT_to_air; lognormal variance with pedigree 0.0413, pedigree (2,3,1,3,1)
  (same comment as for fraction, cooling water, recirculating system, to air)
- fraction, cooling water, cooling pond system, to air: 0.032 dimensionless; name fraction_CW_CP_to_air; lognormal variance with pedigree 0.0413, pedigree (2,3,1,3,1)
  (same comment as for fraction, cooling water, recirculating system, to air)
- fraction, process water, to air: 0.15 dimensionless; name fraction_PW_to_air; lognormal variance with pedigree 0.092025, pedigree (4,4,3,2,4)

## Reference product
- ferromanganese, high-coal, 74.5% Mn: 1 kg; name RP_amount_1; source Adelhardt W. 1998; CPC 41112: Ferro-manganese; By-product classification allocatable product
  A number of manganese-containing ferroalloys are manufactured which are used largely in the mild steel, foundry, and stainless steel industries. The principal manganese ferroalloys and their typical components are high-carbon ferromanganese (78% manganese, 7% carbon, balance mostly iron) and silicomanganese (66% manganese, 17% silicon, 2% carbon).
  Uses: See "ISIC 2420" - pdf-document on the dedicated talk page of ecoinvent (www.ecoinvent.org/documentation), in section "Manganese".
  This resulting amount was odelled, based on "ISIC 2420" - pdf-document on the dedicated talk page of ecoinvent (www.ecoinvent.org/documentation) (See part: Regarding "ferromanganese production, high-coal, 74.5% Mn, RER 2003" dataset).
  EcoSpold01Location=RER
  production volume 2.67763 kg; name RP_PV_1
    This is a placeholder value that does not reflect real-world production volumes. This dataset does not currently require a real-world production volume to work in the database framework, and no actual data were collected yet. This has no negative effect on the results of the ecoinvent database.
  property carbon content, fossil 0.075
    Typical composition of ferromanganese, high-carbon is given in Tab. 3.4 ecoinvent v2.2 report 20_part VII
  property heating value, net 2.27 MJ
    LHV is calculated based on the Carbon content of the product. More details can be found on the respective documentation.
  property price 1.15 EUR2005
    Literature value (USGS,http://minerals.usgs.gov/minerals/pubs/commodity/manganese/myb1-2009-manga.pdf, accessed 20160222). The price for high-carbon ferromanganese is reported to be 1208 USD per ton.
  property carbon content 0.075
    carbon content on a dry matter basis (reserved; not for manual entry)
  properties: water content 0, carbon content, non-fossil 0, wet mass 1 kg, water in wet mass 0 kg, dry mass 1 kg, carbon allocation 0.075 kg

## Inputs from technosphere
- manganese concentrate: 2.33 kg; source Adelhardt W. 1998; lognormal variance with pedigree 0.0427, pedigree (2,2,5,5,1)
  Modelled, based on "ISIC 2420" - pdf-document on the dedicated talk page of ecoinvent (www.ecoinvent.org/documentation).
  See part: Regarding "ferromanganese production, high-coal, 74.5% Mn, RER 2003" dataset.
  EcoSpold01Location=GLO
  Uncertainty: 4;
  properties: dry mass 1 kg, wet mass 1 kg
- electricity, medium voltage: 0 kWh; source Adelhardt W. 1998; pedigree (1,1,1,1,1)
  EcoSpold01Location=UCTE
  Modelled, based on "ISIC 2420" - pdf-document on the dedicated talk page of ecoinvent (www.ecoinvent.org/documentation).
  See part: Regarding "ferromanganese production, high-coal, 74.5% Mn, RER 2003" dataset.
  Uncertainty: 2; estimate based on reported value
- anode, for metal electrolysis: 0.0166 kg; source Adelhardt W. 1998; lognormal variance with pedigree 0.0427, pedigree (2,2,5,5,1)
  Modelled, based on "ISIC 2420" - pdf-document on the dedicated talk page of ecoinvent (www.ecoinvent.org/documentation).
  See part: Regarding "ferromanganese production, high-coal, 74.5% Mn, RER 2003" dataset.
  EcoSpold01Location=RER
  Uncertainty: 3;
  properties: dry mass 1 kg, carbon content, fossil 0.865971, wet mass 1 kg
  note on carbon content, fossil: The main component of the anode is carbon, coming from bitumen and petroleum coke (ecoinvent v2.2 report 10). The C content in those components of the anode has been taken into account to calculate the anode final C content.
- heat, district or industrial, other than natural gas: 10.296 MJ; = 0.45 * 28.6 * 0.8; lognormal variance with pedigree 0.0427, pedigree (2,2,5,5,1)
  The amount of coke required is 0.45 kg (Classen et al. 2009, Tab. 5.5 page 399). The net calorific value of hard coal coke is 28.6 MJ/kg. The scaling by 0.8 is to account for the fact that the inventory of the dataset supplying the heat was divided by 0.8 for the update to version 3.0 of the database.
  References:
  Classen M., Althaus H.-J., Blaser S., Tuchschmid M., Jungbluth N., Doka G., Faist Emmenegger M. and Scharnhorst W. (2009) Life Cycle Inventories of Metals. Final report ecoinvent data v2.1, No 10. EMPA Dübendorf, Swiss Centre for Life Cycle Inventories, Dübendorf, CH, Online-Version under: www.ecoinvent.ch
  Uncertainty: 3;
  properties: heating value, net 1 MJ, corresponding fuel use, propane, furnace >100kW 1.05263 MJ
  note on corresponding fuel use, propane, furnace >100kW: Lower heating value of the fuel input related to the heat/electricity output, taken directly from ecoinvent v3.0 dataset "heat production, natural gas, at industrial furnace >100kW, GLO 2000".
- electric arc furnace slag: 0 kg; name BP_amount_1; source Adelhardt W. 1998
  Proxy: "electric arc furnace slag" is used as a proxy for Slag.
  production volume 0 kg
    Calculated from production volume of reference product using the relative outputs.
  property price 0 EUR2005; name BP_amount_1_price_EUR2005
  property water content 0; name water_content
  properties: carbon content, fossil 0.00338635, dry mass 1 kg, wet mass 1 kg
- wastewater, unpolluted: -0.00745 m3; source IPPC 2001; lognormal variance with pedigree 0.0427, pedigree (2,2,5,5,1)
  Estimation: Average water use for European ferrochrome production of 20 m3 (10 m3 - 30 m3) per tonne is chosen as an approximation, resulting in 10 m3 of effluents (volume of process water). In order to be considered as unpolluted sewage, the effluent has to be treated in a communal waste-water treatment plant, a process whose burden is not accounted for in this dataset. Emissions to water are inventoried separately.
  EcoSpold01Location=CH
  production volume 0.02235 m3
    Calculated from the production volume of ferromanganese, high-coal, 74.5% Mn in proportion to the respective output amounts.
  properties: carbon content, fossil 0.00178991, water content 2962.17, carbon content, non-fossil 0.00178991, dry mass 0.337476 kg, wet mass 1000 kg
  note on carbon content, fossil: Assumed to be like in tap water. Bicarbonate content is 2.93 mol/m3. CO2 content is 0.1 mol/m3 (ecoinvent v2.2 report 8, Tab 93.1).
- non-ferrous metal smelter: 6.88e-12 unit; lognormal variance with pedigree 0.43, pedigree (5,5,5,5,1)
  EcoSpold01Location=GLO
  Estimation from dataset author.
  Proxy: The production infrastructure is aproximated by a non-ferrous metal smelter.
- dolomite: 0.0149 kg; source Adelhardt W. 1998; lognormal variance with pedigree 0.1121, pedigree (5,2,5,5,1)
  Modelled, based on "ISIC 2420" - pdf-document on the dedicated talk page of ecoinvent (www.ecoinvent.org/documentation).
  See part: Regarding "ferromanganese production, high-coal, 74.5% Mn, RER 2003" dataset.
  EcoSpold01Location=RER
  Uncertainty: 4; estimate
  properties: carbon content, fossil 0.130435, wet mass 1 kg, dry mass 1 kg, heating value, net 3.95 MJ
- lime, packed: 0.232 kg; source Adelhardt W. 1998; lognormal variance with pedigree 0.1121, pedigree (5,2,5,5,1)
  Modelled, based on "ISIC 2420" - pdf-document on the dedicated talk page of ecoinvent (www.ecoinvent.org/documentation).
  See part: Regarding "ferromanganese production, high-coal, 74.5% Mn, RER 2003" dataset.
  EcoSpold01Location=CH
  Uncertainty: 4; estimate
  properties: dry mass 0.998 kg, wet mass 1 kg, water content 0.00200401, carbon content, fossil 0.117492
  note on carbon content, fossil: Table 3.1, ecoinvent v2.2 report 7, part VII, pg 3. MW CaCO3=100, MW MgCO3=84
- inert waste, for final disposal: -0.325 kg; source IPPC 2001; lognormal variance with pedigree 0.062, pedigree (1,1,5,5,1)
  Calculated value: The total inert waste generation results from the addition of wet scrubber dust (0.0253 kg/t) and dry cake (0.3 kg/t).
  Wet scrubber dust is modelled, based on “ISIC 2420” - pdf-document on the dedicated talk page of ecoinvent (www.ecoinvent.org/documentation) (part: Regarding “ferromanganese production, high-coal, 74.5% Mn, RER 2003” dataset).
  Dry cake is Modelled, based on “ISIC 2420” - pdf-document on the dedicated talk page of ecoinvent (www.ecoinvent.org/documentation) (part: Regarding “ferromanganese production, high-coal, 74.5% Mn, RER 2003” dataset).
  Further references: Adelhardt W. and Saiger H. (1999) Stoffmengenflüsse und Energiebedarf bei der Gewinnung ausgewählter mineralischer Rohstoffe; Teilstudie Mangan. In: Geologisches Jahrbuch, Vol. Sonderhefte SH 8. Bundesanstalt für Geowissenschaften und Rohstoffe, Hannover. ISBN 3-510-95830-6.
  EcoSpold01Location=CH
  production volume 0.975 kg
    (same comment as for wastewater, unpolluted)
  properties: water content 0.00502513, dry mass 0.995 kg, wet mass 1 kg
- electricity, high voltage: 1.54 kWh; source Adelhardt W. 1998; lognormal variance with pedigree 0.0541, pedigree (3,2,5,5,1)
  Modelled, based on “ISIC 2420” - pdf-document on the dedicated talk page of ecoinvent (www.ecoinvent.org/documentation).
  See part: Regarding “ferromanganese production, high-coal, 74.5% Mn, RER 2003” dataset.
  Uncertainty: 2; estimate based on reported value
- electricity, medium voltage: 0.0129833, 0.00248965, 0.041796, 0.607885, 0.0856817, 0.279164 kWh (6 entries); source Adelhardt W. 1998; lognormal variance with pedigree 0.0541, pedigree (3,2,5,5,1)
  (same comment as for electricity, medium voltage)
- electric arc furnace slag: -0.0356105, -1.51439 kg (2 entries); source Adelhardt W. 1998
  Proxy: "electric arc furnace slag" is used as a proxy for Slag.
  production volume 4.15033 kg

## Inputs from nature
- Water, cooling, unspecified natural origin [natural resource, in water]: 0.00745 m3; name water_cooling_UNO_input; source IPPC 2001; lognormal variance with pedigree 0.0432, pedigree (2,3,5,5,1)
  Modelled, based on "ISIC 2420" - pdf-document on the dedicated talk page of ecoinvent (www.ecoinvent.org/documentation).
  See part: Regarding "ferromanganese production, high-coal, 74.5% Mn, RER 2003" dataset.
  Modelled, based on "ISIC 2420" - pdf-document on the dedicated talk page of ecoinvent (www.ecoinvent.org/documentation).
  See part: Regarding "ferromanganese production, high-coal, 74.5% Mn, RER 2003" dataset.
- Water, well, in ground [natural resource, in water]: 0.00745 m3; name water_well_in_ground_input; source IPPC 2001; lognormal variance with pedigree 0.0432, pedigree (2,3,5,5,1)
  (same comment as for Water, cooling, unspecified natural origin)
- Iron, in ground [natural resource, in ground]: 0.325919 kg; = (1-0.745-0.075-0.01)*1.42829/0.745
  46% Fe in siderite; 25% Fe in ore; Calculated value. The composition of the reference product is taken from version 2 report 10 “Life cycle inventory of metals” table 3.4 “types of ferromagnesium and their general composition” and assumed to be: 74.5% Mn, 7.5% C, 1% Si (assumed from value reported in table 3.4 is <1.25%). The remaining (17%) is assumed to be Fe. The required input of “Iron, 46% in ore, 25% in crude ore, in ground” is calculated in proportion to the input of manganese, which is of 0.613kg of manganese for 1 kg of manganese concentration. The input of magnesium concentrate to the dataset is of 2.33kg.

## Emissions to nature
- NMVOC, non-methane volatile organic compounds, unspecified origin [air, non-urban air or from high stacks]: 0.0017 kg; source EPA 1998; lognormal variance with pedigree 0.0832, pedigree (2,3,5,5,1)
  Calculated value: Value is the average of reported values, these being those corresponding to processes with and without abatement technologies.
  Uncertainty: 16;
- Dissolved solids [water, surface water]: 0.375 kg; source IPPC 2001; lognormal variance with pedigree 0.25, pedigree (5,5,5,5,5)
  Modelled, based on "ISIC 2420" - pdf-document on the dedicated talk page of ecoinvent (www.ecoinvent.org/documentation).
  See part: Regarding "ferromanganese production, high-coal, 74.5% Mn, RER 2003" dataset.
  Uncertainty: 33; reported values
- Water [water, unspecified]: 0.00344562 m3; name water_to_water_unspecified; = water_cooling_UNO_input*(1-fraction_CW_to_air)+water_well_in_ground_input*(1-fraction_PW_to_air)-0.00745; lognormal variance with pedigree 0.0827, pedigree (2,2,5,5,1)
  Calculated value based on literature values and expert opinion. See comments in the parametres' comment field.
  property carbon content, fossil 0; name C_content_fossil
  property fraction, origin: fresh water 0.581197; name fraction_origin_fresh_water_Ww
  property carbon content, non-fossil 0; name C_content_non_fossil
  property water in wet mass 1000 kg; name WWM
  property fraction, origin: salt water 0; name fraction_origin_salt_water_Ww
  property wet mass 1000 kg; name WM
  property dry mass 0 kg; name DM
  property fraction, origin: unspecified 0.418803; name fraction_origin_unspecified_Ww
- Sulfur dioxide [air, non-urban air or from high stacks]: 0.0003 kg; source IPPC 2001; lognormal variance with pedigree 0.592, pedigree (5,4,5,5,3)
  Calculated value: 10 m3 of effluents t of ferromanganese are generated. Based on that, 7.5 kg of dissolved solids / t (this being the average of reported values) are produced, which after wastewater treatment end up in 0.375 kg/t (see unpolluted sewage exchange for information regarding the wastewater treatment).
  Estimation: Data corresponds to ferrochromium production.
  Uncertainty: 15;
- Carbon monoxide, fossil [air, non-urban air or from high stacks]: 0.001 kg; source IPPC 2001; lognormal variance with pedigree 0.6932, pedigree (2,3,5,5,1)
  Estimation: Data corresponds to ferrosilicon production.
  Uncertainty: 17;
- Particulates, > 2.5 um, and < 10um [air, non-urban air or from high stacks]: 0.00358 kg; source IPPC 2001; lognormal variance with pedigree 0.28, pedigree (5,5,5,5,5)
  Calculated value: This is the average of reported values.
  Uncertainty: 26; based on reported values
- Water [air, unspecified]: 0.00400438 m3; name water_to_air_unspecified; lognormal variance with pedigree 0.0827, pedigree (2,2,5,5,1)
  (same comment as for Water)
  property fraction, origin: unspecified 0.72093; name fraction_origin_unspecified
  property fraction, origin: fresh water 0.27907; name fraction_origin_fresh_water
  property fraction, origin: salt water 0; name fraction_origin_salt_water
- Carbon dioxide, fossil [air, non-urban air or from high stacks]: 0.109 kg; lognormal variance with pedigree 0.06, pedigree (4,1,5,5,1)
  Calculated value: This amount results from the calcination of dolomite and lime.
  Uncertainty: 14;
- Particulates, < 2.5 um [air, non-urban air or from high stacks]: 0.00862 kg; source IPPC 2001; lognormal variance with pedigree 0.28, pedigree (5,5,5,5,5)
  Calculated value: 10 m3 of effluents t of ferromanganese are generated. Based on that, 650 mg of PAH / t (this being the average of reported values) are produced, which after wastewater treatment end up in 65 mg/t (see unpolluted sewage exchange for information regarding the wastewater treatment).
  Estimation: Data corresponds to ferrochromium production.
  Uncertainty: 27; based on reported values
- PAH, polycyclic aromatic hydrocarbons [water, surface water]: 6.5e-5 kg; source EPA 1998; lognormal variance with pedigree 0.51, pedigree (5,5,5,5,5)
  Calculated value: Value is the average of reported values, these being those corresponding to processes with and without abatement technologies.
  Uncertainty: 34; reported values
- Nitrogen oxides [air, non-urban air or from high stacks]: 0.00587 kg; source EPA 1998; lognormal variance with pedigree 0.28, pedigree (5,5,5,5,5)
  Calculated value: Value is the average of reported values, these being those corresponding to processes with and without abatement technologies.
  Uncertainty: 29; reported values
- Particulates, > 10 um [air, non-urban air or from high stacks]: 0.00204 kg; source IPPC 2001; lognormal variance with pedigree 0.28, pedigree (5,5,5,5,5)
  Literature value.
  Uncertainty: 25; based on reported values
- Dioxins, measured as 2,3,7,8-tetrachlorodibenzo-p-dioxin [air, non-urban air or from high stacks]: 1e-12 kg; source EC 2002; lognormal variance with pedigree 0.3432, pedigree (2,3,5,5,1)
  Literature value.
  Uncertainty: 21;

## Sampling procedure
literature

## Extrapolations
see Geography and Technology This dataset has been copied from an original dataset covering the geography RER. The uncertainty has been adjusted accordingly.

## Review by Roland Hischier 2003-07-07
Passed.

## Review by Bo Weidema 2012-10-01
replaced input of "electricity, high voltage, hydro, run-of-river" with "electricity, high voltage" with a direct activity link to "electricity production, high voltage, hydro, run-of-river".
