# sawing and planing, paraná pine, kiln dried

Dataset: EcoSpold 2, unit process
Geography: BR
Time period: 2000-01-01 to 2021-12-31
Technology level: current
Classification: ISIC rev.4 ecoinvent: 1610:Sawmilling and planing of wood
Synonyms: Araucaria angustifolia
Tags: Swiss brush-up completed
Scenario: Business-as-Usual
System model: Allocation, cut-off by classification
Generated by: Frank Werner
Published in: Althaus H.J. 2007
Database: ecoinvent
isCopyrightProtected: true
accessRestrictedTo: 1

## General comment
This dataset represents the sawing and planing of one m3 Paraná pine logs. The inventory stems from one well-documented, large, vertically integrated sawmill.
Data on debarking and sawmilling is only available from one of the two companies.
Due to a lack of detailed information technical drying is assumed using part of the residual wood as fuel. The energy requirements and respective wood inputs are calculated based on average European processes for softwood.
Data on sawing the timber stems from only one of the two companies.
[A direct activity link to forestry in BR and the transport requirements to the sawmill were added for the release of ecoinvent v3.5 to re-establish the linking found in v2.2

## Included activities start
Sawing and planing processes starting from debarked Paraná pine logs at sawmill in Brazil.

## Included activities end
This activity ends with sawn and planed Paraná pine at the sawmill. The dataset includes transportation to sawmill by lorry, sawing into timber and technical drying.

## Geography
wood consumption for technical drying is estimated based on European data

## Technology
The dataset represents average European technology regarding the energy requirements and respective wood inputs. 45% of the log input (including sapwood) is generated as a co-product partly used for technical drying and partly sold or used for energy recovery used outside this process.
Data may vary depending on the specific sawing and drying technology and the wood density of particular logs and types of sawn timber produced,

## Parameters
- input wood fuel: 766 MJ; name wood_fuel; lognormal variance with pedigree 0.0662, pedigree (1,3,1,4,4)
  input of wood fuel used in production, i.e. internal wood residues from processing sawnwood; expressed in MJ of absolutely dry mass (lower heating value at humidity u=0%).

## Reference product
- sawnwood, paraná pine, dried (u=10%): 0 m3; name sawnwood_paranapine_RP; By-product classification allocatable product; CPC 31101: Wood, sawn or chipped lengthwise, sliced or peeled, of a thickness exceeding 6 mm, of coniferous wood
  Reference product. Sawn and planed timber logs produced from parana pine trees by (close to) sustainable forest management in Brazil. The logs is subsequently shipped to Europe and used in wooden products.
  production volume 8.83285e6 m3; name p_sawnwood
    Calculated. Parana pine plantations in Brasil were 0.1 million ha in 2003 (link: http://www.worldforestinvestment.com/southern.pdf, accessed 20150929) the prentage of sustainable forest management is calculated to be 32.71% from : 'Instruments for sustainable private sector forestry in Brazil' Viana et al. 2002 (link: http://pubs.iied.org/pdfs/9131IIED.pdf, accessed 20150929). With an average of 270 m3/ha (link: https://books.google.ch/books?id=6yRz-MQdqDUC&pg=PA29&lpg=PA29&dq=1+ha+of+parana+pine+in+m3&source=bl&ots=v9hxuDMaYU&sig=gGQL8d5p1DWixhSj3v6Cjw_d2Oo&hl=de&sa=X&ved=0CCAQ6AEwAGoVChMIzrz36dSeyAIVwbUUCh0-FgZO#v=onepage&q=1%20ha%20of%20parana%20pine%20in%20m3&f=false, accessed 20150930)
  property price 160 EUR2005
    Expert judgement (Urs Luginbühl, Swiss Sawmilling industry, personal communication in June 2014). Cross-reference; FAOSTAT (accessed 20140428). The price is calculated by using data on total world import quantity (m3) and import value (1000 USD), year 2005. 109432798 m3 of Sawnwood (C) - coniferous was imported in the world in 2005. The import value was 22249842000 USD. The calculated price is thus (22249842000/109432798=203*0.8=) 164 Euro.
  property carbon content, non-fossil 0.494
    C content of dry mass is 0.494 kgC/kg dry wood (ecoinvent v2.2 report 21).
  property heating value, net 7300.06 MJ
    LHV is calculated based on the Carbon content of the product. More details can be found on the respective documentation.The property is based on a value of 12.7MJ/kg
  property carbon content 0.494
    carbon content on a dry matter basis (reserved; not for manual entry)
  property true value 160; name sawnwood_paranapine_RP_true_value
    allocation property applied in "true value" allocation // value calculated from revenue
  properties: wet mass 575 kg, water content 0.15, dry mass 500 kg, carbon content, fossil 0, water in wet mass 75 kg, carbon allocation 247 kg
- electricity, low voltage: 1 kWh; CPC 17100: Electrical energy; By-product classification allocatable product; pedigree (1,1,1,1,1)
  Estimation. 45% of log input (including sapwood) is generated as co-product that is partly used for technical drying and partly sold or used for energy recovery used outside this process.
  Further reference: Bauer (2003).
  production volume 2.82139e7 kWh
    Calculated from production volume of reference product using the relative outputs.
  property price 0.107 EUR2005
    Temporary price data. Calculated as 90% of purchasers price based on: IEA Key world energy statistics 2004 (www.iea.org/textbase/nppdf/free/2004/keyworld2004.pdf)
  property true value 0.341779
    allocation property applied in "true value" allocation // value calculated from revenue

## By-products
- residual wood, dry: 0 m3; source Werner F. 2007; CPC 39283: Non-agglomerated wood waste and scrap; By-product classification allocatable product; pedigree (1,1,1,1,1)
  Estimation. Wood input including bark subtracted sawn timber and wood required to produce energy. Assuming burner efficiency of 80%. Lower heating value = 18.265 MJ/kg.
  Stoichiometric calculation based on Source, which refers to Ressel, 1986.
  production volume 1.25232e7 m3
    Unknown
    Calculated from the production volume of sawnwood, paraná pine from sustainable forest management, kiln dried, 15% water on dry mass basis in proportion to the respective output amounts.
  property heating value, net 8030.06 MJ
    (same comment as for sawnwood, paraná pine, dried (u=10%))
  property carbon content, non-fossil 0.494
    C content of dry mass is 0.494 kgC/kg dry wood (ecoinvent v2.2 report 9)
  property price 26.9 EUR2005
    Temporary price data. Calculated as 90% of purchasers price based on: 2004 prices for World Import/Export (USD/cubicmeter) from FaoStat (http://faostat.fao.org/site/626/default.aspx#ancor, [accessed 10th June 2010]) Commodity: 'Chips and Particles' assuming this is for air-dry chips (10% water on a dry matter basis at 650 kg/m3) and no price difference for water content (i.e. assuming air-drying).
  property carbon content 0.494
    carbon content on a dry matter basis (reserved; not for manual entry)
  property true value 38.1388
    allocation property applied in "true value" allocation // value calculated from revenue
  properties: carbon content, fossil 0, water in wet mass 75 kg, water content 0.15, wet mass 575 kg, dry mass 500 kg, carbon allocation 247 kg

## Inputs from technosphere
- transport, freight, lorry, unspecified: 0.0937551 metric ton*km; = 90*roundwood_input*500*(1+0.5)/(1-0.15)/1000; source Werner F. 2007; lognormal variance with pedigree 0.5261, pedigree (4,5,5,3,5)
  90 km transport distance at 500 kg/m3 oven-dry matter, 50% moisture content and 15% of bark [up until v2.2, this input, representing transport to the saw mill, was supplied by 'lorry, >16 tonne, fleet average, RER']
  properties: UVEK_relative_amount_1 1, UVEK_link_1 4417
  note on UVEK_relative_amount_1: to be used only in special submissions in coordination with ecoinvent and the Swiss FOEN
- technical wood drying facility: 9.86545e-9 unit; lognormal variance with pedigree 0.5906, pedigree (2,1,5,1,1)
  data taken from ecoinvent 2.2
- electricity, medium voltage: 0.525618 kWh; source Alexandrido, S. 2000; lognormal variance with pedigree 0.065, pedigree (1,1,5,1,1)
  Estimation. Calculation based on given source.
  properties: UVEK_relative_amount_1 1, UVEK_link_1 1708
- sawmill: 2.15638e-10 unit; source Werner F. 2007; lognormal variance with pedigree 0.5941, pedigree (3,4,5,3,1)
  Estimation. No site-specific data available. Estimation from given (European) source.
- wood ash mixture, pure: -0.000262189 kg; name w_wood_ash; = (0.000666666666666667*wood_fuel/1.05)*-1; lognormal variance with pedigree 0.0656, pedigree (2,1,5,1,1)
  Emission factor from DS on heat generation from industrial residual wood mulitplied by the input of wood fuel (direct wood fuel plus production residues), scaled to convert wood input to resulting heat.
  production volume 4.29585e6 kg; = w_wood_ash*p_sawnwood
    Calculated from production volume of reference product using the relative outputs.
  properties: UVEK_relative_amount_1 -1, dry mass 1 kg, carbon content, non-fossil 0.012, wet mass 1 kg, UVEK_link_1 1129
- sawlog and veneer log, paraná pine, measured as solid wood under bark: 0.00118062 m3; name roundwood_input; source Alexandrido, S. 2000; lognormal variance with pedigree 0.0691, pedigree (3,4,5,3,1)
  Estimation. Volume under bark. Calculation based on given source. (link introduced in v3.5)
  properties: wet mass 882.353 kg, dry mass 588.235 kg, carbon content, non-fossil 0.494, heating value, net 6870.62 MJ, water content 0.5
  note on carbon content, non-fossil: C content of dry mass is 0.494 kgC/kg dry wood (ecoinvent v2.2 report 21).
- furnace, wood chips, with silo, 300kW: 9.10377e-9 unit; = 2.31481481481482E-08*wood_fuel/1.05; lognormal variance with pedigree 0.59, pedigree (1,1,5,1,1)
  Infrastructure factor from DS 'Heat, district or industrial, other than natural gas {CH}| heat production, wood chips from industry, at furnace 300kW | Cut-off, U', multiplied by the input of wood fuel (direct wood fuel plus production residues); correction for assumed efficiency as original value refers to heat output
  properties: UVEK_relative_amount_1 1, UVEK_link_1 999999

## Inputs from nature
- Carbon dioxide, non-fossil, resource correction [natural resource, in air]: -1.21643 kg; pedigree (1,1,1,1,1)
  This exchange has been added after economic allocation in order to re-balance the non-fossil carbon dioxide resource extraction.

## Emissions to nature
- Cadmium [air, unspecified]: 2.75298e-10 kg; = 7E-10*wood_fuel/1.05; lognormal variance with pedigree 0.8412, pedigree (2,3,5,1,1)
  Emission factor from DS 'Heat, district or industrial, other than natural gas {CH}| heat production, wood chips from industry, at furnace 300kW | Cut-off, U' on heat generation from industrial residual wood per MJ, multiplied by the input of wood fuel (direct wood fuel plus production residues ) scaled to reflect wood input per generated heat.
- Particulates, < 2.5 um [air, unspecified]: 9.83208e-7 kg; = 2.5E-06*wood_fuel/1.05; lognormal variance with pedigree 0.5912, pedigree (2,3,5,1,1)
  (same comment as for Cadmium)
- Benzene [air, unspecified]: 3.57888e-7 kg; = 9.1E-07*wood_fuel/1.05; lognormal variance with pedigree 0.2412, pedigree (2,3,5,1,1)
  (same comment as for Cadmium)
- NMVOC, non-methane volatile organic compounds, unspecified origin [air, unspecified]: 1.37649e-6 kg; name nmvoc; = 3.5E-06*wood_fuel/1.05; lognormal variance with pedigree 0.2412, pedigree (2,3,5,1,1)
  (same comment as for Cadmium)
- Chromium VI [air, unspecified]: 1.57313e-11 kg; = 4E-11*wood_fuel/1.05; lognormal variance with pedigree 0.8412, pedigree (2,3,5,1,1)
  (same comment as for Cadmium)
- Mercury [air, unspecified]: 1.17985e-10 kg; name mercury; = 3E-10*wood_fuel/1.05; lognormal variance with pedigree 0.8412, pedigree (2,3,5,1,1)
  (same comment as for Cadmium)
- Carbon monoxide, non-fossil [air, unspecified]: 7.86566e-5 kg; = 2E-04*wood_fuel/1.05; lognormal variance with pedigree 0.2412, pedigree (2,3,5,1,1)
  (same comment as for Cadmium)
- Particulates, > 2.5 um, and < 10um [air, unspecified]: 2.62189e-6 kg; = 6.66666666666667E-06*wood_fuel/1.05
  (same comment as for Cadmium)
- Nitrogen oxides [air, unspecified]: 4.7194e-5 kg; = 0.00012*wood_fuel/1.05; lognormal variance with pedigree 0.2412, pedigree (2,3,5,1,1)
  (same comment as for Cadmium)
- Magnesium [air, unspecified]: 1.41582e-7 kg; name magnesium; = 3.6E-07*wood_fuel/1.05; lognormal variance with pedigree 0.2412, pedigree (2,3,5,1,1)
  (same comment as for Cadmium)
- Toluene [air, unspecified]: 1.17985e-7 kg; = 3E-07*wood_fuel/1.05; lognormal variance with pedigree 0.3912, pedigree (2,3,5,1,1)
  (same comment as for Cadmium)
- Manganese [air, unspecified]: 6.68581e-8 kg; name manganese; = 1.7E-07*wood_fuel/1.05; lognormal variance with pedigree 0.2412, pedigree (2,3,5,1,1)
  (same comment as for Cadmium)
- Methane, non-fossil [air, unspecified]: 5.89925e-7 kg; = 1.5E-06*wood_fuel/1.05; lognormal variance with pedigree 0.2412, pedigree (2,3,5,1,1)
  (same comment as for Cadmium)
- Fluorine [air, unspecified]: 1.96642e-8 kg; = 5E-08*wood_fuel/1.05; lognormal variance with pedigree 0.2412, pedigree (2,3,5,1,1)
  (same comment as for Cadmium)
- Copper [air, unspecified]: 8.65223e-9 kg; = 2.2E-08*wood_fuel/1.05; lognormal variance with pedigree 0.2412, pedigree (2,3,5,1,1)
  (same comment as for Cadmium)
- Phenol, pentachloro- [air, unspecified]: 3.18559e-12 kg; = 8.1E-12*wood_fuel/1.05; lognormal variance with pedigree 0.3912, pedigree (2,3,5,1,1)
  (same comment as for Cadmium)
- Lead [air, unspecified]: 9.83208e-9 kg; = 2.5E-08*wood_fuel/1.05; lognormal variance with pedigree 0.8412, pedigree (2,3,5,1,1)
  (same comment as for Cadmium)
- Benzene, ethyl- [air, unspecified]: 1.17985e-8 kg; = 3E-08*wood_fuel/1.05; lognormal variance with pedigree 0.2412, pedigree (2,3,5,1,1)
  (same comment as for Cadmium)
- Potassium [air, unspecified]: 9.20282e-6 kg; = 2.34E-05*wood_fuel/1.05; lognormal variance with pedigree 0.2412, pedigree (2,3,5,1,1)
  (same comment as for Cadmium)
- Dinitrogen monoxide [air, unspecified]: 9.04551e-7 kg; = 2.3E-06*wood_fuel/1.05; lognormal variance with pedigree 0.2412, pedigree (2,3,5,1,1)
  (same comment as for Cadmium)
- Calcium [air, unspecified]: 2.30071e-6 kg; = 5.85E-06*wood_fuel/1.05; lognormal variance with pedigree 0.2412, pedigree (2,3,5,1,1)
  (same comment as for Cadmium)
- Zinc [air, unspecified]: 1.17985e-7 kg; = 3E-07*wood_fuel/1.05; lognormal variance with pedigree 0.8412, pedigree (2,3,5,1,1)
  (same comment as for Cadmium)
- Formaldehyde [air, unspecified]: 5.11268e-8 kg; = 1.3E-07*wood_fuel/1.05; lognormal variance with pedigree 0.2412, pedigree (2,3,5,1,1)
  (same comment as for Cadmium)
- Hydrocarbons, aliphatic, alkanes, unspecified [air, unspecified]: 3.57888e-7 kg; = 9.1E-07*wood_fuel/1.05; lognormal variance with pedigree 0.2412, pedigree (2,3,5,1,1)
  (same comment as for Cadmium)
- Phosphorus [air, unspecified]: 1.17985e-7 kg; = 3E-07*wood_fuel/1.05; lognormal variance with pedigree 0.2412, pedigree (2,3,5,1,1)
  (same comment as for Cadmium)
- Arsenic [air, unspecified]: 3.93283e-10 kg; = 1E-09*wood_fuel/1.05; lognormal variance with pedigree 0.2412, pedigree (2,3,5,1,1)
  (same comment as for Cadmium)
- Ammonia [air, unspecified]: 6.8038e-7 kg; = 1.73E-06*wood_fuel/1.05; lognormal variance with pedigree 0.2412, pedigree (2,3,5,1,1)
  (same comment as for Cadmium)
- Bromine [air, unspecified]: 2.3597e-8 kg; = 6E-08*wood_fuel/1.05; lognormal variance with pedigree 0.8412, pedigree (2,3,5,1,1)
  (same comment as for Cadmium)
- Acetaldehyde [air, unspecified]: 2.39903e-8 kg; = 6.1E-08*wood_fuel/1.05; lognormal variance with pedigree 0.2412, pedigree (2,3,5,1,1)
  (same comment as for Cadmium)
- Carbon dioxide, non-fossil [air, unspecified]: 0.0401149 kg; = 0.102*wood_fuel/1.05; lognormal variance with pedigree 0.0662, pedigree (2,3,5,1,1)
  (same comment as for Cadmium)
- Benzene, hexachloro- [air, unspecified]: 2.83164e-15 kg; = 7.2E-15*wood_fuel/1.05; lognormal variance with pedigree 0.2412, pedigree (2,3,5,1,1)
  (same comment as for Cadmium)
- Hydrocarbons, aliphatic, unsaturated [air, unspecified]: 1.21918e-6 kg; = 3.1E-06*wood_fuel/1.05; lognormal variance with pedigree 0.2412, pedigree (2,3,5,1,1)
  (same comment as for Cadmium)
- Sodium [air, unspecified]: 5.11268e-7 kg; = 1.3E-06*wood_fuel/1.05; lognormal variance with pedigree 0.2412, pedigree (2,3,5,1,1)
  (same comment as for Cadmium)
- Chromium [air, unspecified]: 1.5574e-9 kg; = 3.96E-09*wood_fuel/1.05; lognormal variance with pedigree 0.8412, pedigree (2,3,5,1,1)
  (same comment as for Cadmium)
- Nickel [air, unspecified]: 2.3597e-9 kg; name nickel; = 6E-09*wood_fuel/1.05; lognormal variance with pedigree 0.8412, pedigree (2,3,5,1,1)
  (same comment as for Cadmium)
- Chlorine [air, unspecified]: 7.07909e-8 kg; = 1.8E-07*wood_fuel/1.05; lognormal variance with pedigree 0.2412, pedigree (2,3,5,1,1)
  (same comment as for Cadmium)
- PAH, polycyclic aromatic hydrocarbons [air, unspecified]: 4.36544e-9 kg; name pah; = 1.11E-08*wood_fuel/1.05; lognormal variance with pedigree 0.5912, pedigree (2,3,5,1,1)
  (same comment as for Cadmium)
- Dioxins, measured as 2,3,7,8-tetrachlorodibenzo-p-dioxin [air, unspecified]: 1.17985e-14 kg; = 3E-14*wood_fuel/1.05; lognormal variance with pedigree 0.5912, pedigree (2,3,5,1,1)
  (same comment as for Cadmium)
- m-Xylene [air, unspecified]: 4.7194e-8 kg; name mxylene; = 1.2E-07*wood_fuel/1.05; lognormal variance with pedigree 0.3912, pedigree (2,3,5,1,1)
  (same comment as for Cadmium)
- Benzo(a)pyrene [air, unspecified]: 1.96642e-10 kg; = 5E-10*wood_fuel/1.05; lognormal variance with pedigree 0.5912, pedigree (2,3,5,1,1)
  (same comment as for Cadmium)
- Sulfur dioxide [air, unspecified]: 9.83208e-7 kg; = 2.5E-06*wood_fuel/1.05; lognormal variance with pedigree 0.0662, pedigree (2,3,5,1,1)
  (same comment as for Cadmium)

## Sampling procedure
literature

## Extrapolations
see Geography
