# malusil production

Dataset: EcoSpold 2, unit process
Geography: RoW
Time period: 2000-01-01 to 2021-12-31
Technology level: current
Classification: EcoSpold01Categories: chemicals/inorganics
Classification: ISIC rev.4 ecoinvent: 0810:Quarrying of stone, sand and clay
Tags: ConvertedDataset
Scenario: Business-as-Usual
System model: Allocation, cut-off by classification
Generated by: Roland Hischier
Published in: Hischier R. 2007
Database: ecoinvent
isCopyrightProtected: true
accessRestrictedTo: 1

## General comment
The functional unit represent 1 kg of malusil. Quite a large uncertainty of the process data due to weak data on the production process.
[This dataset was already contained in the ecoinvent database version 2. It was not individually updated during the transfer to ecoinvent version 3. Life Cycle Impact Assessment results may still have changed, as they are affected by changes in the supply chain, i.e. in other datasets. This dataset was generated following the ecoinvent quality guidelines for version 2. It may have been subject to central changes described in the ecoinvent version 3 change report (http://www.ecoinvent.org/database/ecoinvent-version-3/reports-of-changes/), and the results of the central updates were reviewed extensively. The changes added e.g. consistent water flows and other information throughout the database. The documentation of this dataset can be found in the ecoinvent reports of version 2, which are still available via the ecoinvent website. The change report linked above covers all central changes that were made during the conversion process.]

## Included activities end
Raw materials, machineries and energy consumption for production, estimated emissions to air from production and infrastructure of the site (approximation). No water emissions.

## Geography
Data are used here as European average.

## Technology
Data approximated with data from lime mining, crushing and milling.

## Parameters
- fraction, process water, to air: 0.205 dimensionless; name fraction_PW_to_air; lognormal variance with pedigree 0.092025, pedigree (4,4,3,2,4)

## Reference product
- malusil: 1 kg; CPC 16390: Other minerals n.e.c.; By-product classification allocatable product; CAS 14807-96-6
  EcoSpold01Location=RER
  production volume 2.67763 kg
    This is a placeholder value that does not reflect real-world production volumes. This dataset does not currently require a real-world production volume to work in the database framework, and no actual data were collected yet. This has no negative effect on the results of the ecoinvent database.
  property price 0.00479154 EUR2005
    Calculated based on inputs: The price of the product has been calculated as a sum of the values of the material and energy inputs for this product. This value is therefore a rough estimation. It may underestimate the real price since there are additional expenses when producing any product. These expences can include for example labour costs, treatment of waste materials and profit for the producer. Please consider carefully whether this level of data quality is acceptable for your application.
  property carbon content 0
    carbon content on a dry matter basis (reserved; not for manual entry)
  properties: water content 0, wet mass 1 kg, water in wet mass 0 kg, carbon content, non-fossil 0, carbon content, fossil 0, dry mass 1 kg, carbon allocation 0 kg

## Inputs from technosphere
- conveyor belt: 2.78e-8 m; lognormal variance with pedigree 0.3686, pedigree (4,3,5,5,3)
  EcoSpold01Location=RER
  Approximation with data from lime production
  Uncertainty: approximation with data from lime production
- limestone quarry infrastructure: 5.25e-11 unit; lognormal variance with pedigree 0.3686, pedigree (4,3,5,5,3)
  EcoSpold01Location=CH
  Approximation with data from lime production
  Uncertainty: approximation with data from lime production
- electricity, medium voltage: 0 kWh; pedigree (1,1,1,1,1)
  Approximation with data from lime production
  EcoSpold01Location=UCTE
  Uncertainty: approximation with data from lime production
- recultivation, limestone mine: 6.52e-6 m2; lognormal variance with pedigree 0.3686, pedigree (4,3,5,5,3)
  Approximation with data from lime production
  EcoSpold01Location=CH
  Uncertainty: approximation with data from lime production
- blasting: 7.73e-5 kg; lognormal variance with pedigree 0.0786, pedigree (4,3,5,5,3)
  (same comment as for conveyor belt)
- industrial machine, heavy, unspecified: 0.000231 kg; lognormal variance with pedigree 0.3686, pedigree (4,3,5,5,3)
  (same comment as for conveyor belt)
- heat, central or small-scale, other than natural gas: 0.0033746 MJ; lognormal variance with pedigree 0.0786, pedigree (4,3,5,5,3)
  (same comment as for recultivation, limestone mine)
  properties: heating value, net 1 MJ
- diesel, burned in building machine: 0.018 MJ; lognormal variance with pedigree 0.0786, pedigree (4,3,5,5,3)
  Approximation with data from lime production
  EcoSpold01Location=GLO
  Uncertainty: approximation with data from lime production
  properties: heating value, net 1 MJ
- heat, district or industrial, other than natural gas: 0 MJ; pedigree (1,1,1,1,1)
  Approximation with data from lime production
  EcoSpold01Location=RER
  Uncertainty: approximation with data from lime production
  properties: heating value, net 1 MJ
- electricity, medium voltage: 0.000409669, 7.85568e-5, 0.00131881, 0.0191808, 0.00270355, 0.00880857 kWh (6 entries); lognormal variance with pedigree 0.0786, pedigree (4,3,5,5,3)
  (same comment as for electricity, medium voltage)
- heat, district or industrial, other than natural gas: 3.64e-5, 0.0897636 MJ (2 entries); lognormal variance with pedigree 0.0786, pedigree (4,3,5,5,3)
  (same comment as for heat, district or industrial, other than natural gas)

## Inputs from nature
- Water, well, in ground [natural resource, in water]: 2.93e-5 m3; name water_well_in_ground_input; lognormal variance with pedigree 0.0786, pedigree (4,3,5,5,3)
  Approximation with data from lime production
  Uncertainty: approximation with data from lime production
- Talc, in ground [natural resource, in ground]: 1.11 kg; lognormal variance with pedigree 0.0786, pedigree (4,3,5,5,3)
  (same comment as for Water, well, in ground)
- Transformation, to mineral extraction site [natural resource, land]: 6.52e-6 m2; lognormal variance with pedigree 0.2086, pedigree (4,3,5,5,3)
  (same comment as for Water, well, in ground)
- Occupation, mineral extraction site [natural resource, land]: 8.48e-5 m2*year; lognormal variance with pedigree 0.1286, pedigree (4,3,5,5,3)
  (same comment as for Water, well, in ground)
- Transformation, from forest, unspecified [natural resource, land]: 6.52e-6 m2; lognormal variance with pedigree 0.2086, pedigree (4,3,5,5,3)
  (same comment as for Water, well, in ground)

## Emissions to nature
- Particulates, > 2.5 um, and < 10um [air, urban air close to ground]: 4e-5 kg; lognormal variance with pedigree 0.2086, pedigree (4,3,5,5,3)
  (same comment as for Water, well, in ground)
- Particulates, < 2.5 um [air, urban air close to ground]: 8e-6 kg; lognormal variance with pedigree 0.3686, pedigree (4,3,5,5,3)
  (same comment as for Water, well, in ground)
- Water [water, unspecified]: 2.32935e-5 m3; name water_to_water_unspecified; lognormal variance with pedigree 0.0827, pedigree (2,2,5,5,1)
  Calculated value based on literature values and expert opinion. See comments in the parametres' comment field.
  property fraction, origin: unspecified 0; name fraction_origin_unspecified_Ww
  property fraction, origin: fresh water 1; name fraction_origin_fresh_water_Ww
  property fraction, origin: salt water 0; name fraction_origin_salt_water_Ww
  property wet mass 1000 kg; name WM
  property carbon content, fossil 0; name C_content_fossil
  property carbon content, non-fossil 0; name C_content_non_fossil
  property dry mass 0 kg; name DM
  property water in wet mass 1000 kg; name WWM
- Particulates, > 10 um [air, urban air close to ground]: 0.000112 kg; lognormal variance with pedigree 0.1286, pedigree (4,3,5,5,3)
  (same comment as for Water, well, in ground)
- Water [air, unspecified]: 6.0065e-6 m3; name water_to_air_unspecified; lognormal variance with pedigree 0.0827, pedigree (2,2,5,5,1)
  (same comment as for Water)
  property fraction, origin: salt water 0; name fraction_origin_salt_water
  property fraction, origin: fresh water 1; name fraction_origin_fresh_water
  property fraction, origin: unspecified 0; name fraction_origin_unspecified

## Extrapolations
see technology This dataset has been copied from an original dataset covering the geography RER. The uncertainty has been adjusted accordingly.

## Review by Hans-Jörg Althaus 2007-11-09
passed
