# printed wiring board mounting facility construction

Dataset: EcoSpold 2, unit process
Geography: GLO
Time period: 2005-01-01 to 2021-12-31
Technology level: current
Classification: ISIC rev.4 ecoinvent: 4290:Construction of other civil engineering projects
Classification: EcoSpold01Categories: electronics/module
Tags: ConvertedDataset
Scenario: Business-as-Usual
System model: Allocation, cut-off by classification
Generated by: Roland Hischier
Published in: Hischier R. 2007
Database: ecoinvent
isCopyrightProtected: true
accessRestrictedTo: 1

## General comment
This dataset represents one unit of production site for the mounting of printed wiring boards, comprising 6 SMT lines and 5 THT lines.It is based on a combined SMT and THT mounting plant as in more complex PWB constructions (like e.g. for computer motherboards) with an assumed output of 60'000 m2 or 192’000 kg per year over a time span of 25 years. . Main data based on own estimations, using rough information about Asian plants, infrastructure of the printed wiring board mounting plant datasets for the construction and dismantling of the different buildings as well as the technical equipment are used.
[This dataset was already contained in the ecoinvent database version 2. It was not individually updated during the transfer to ecoinvent version 3. Life Cycle Impact Assessment results may still have changed, as they are affected by changes in the supply chain, i.e. in other datasets. This dataset was generated following the ecoinvent quality guidelines for version 2. It may have been subject to central changes described in the ecoinvent version 3 change report (http://www.ecoinvent.org/database/ecoinvent-version-3/reports-of-changes/), and the results of the central updates were reviewed extensively. The changes added e.g. consistent water flows and other information throughout the database. The documentation of this dataset can be found in the ecoinvent reports of version 2, which are still available via the ecoinvent website. The change report linked above covers all central changes that were made during the conversion process.]

## Included activities start
From unknown land use forseen for production site for printed wiring board mounting.

## Included activities end
This dataset includes land use, buildings and facilities (machinery, cables, etc.) as well as the respective disposal activities of a plant for printed wiring board mounting. Emissions and wastes are not included.

## Geography
This module relates to the global situation.

## Technology
Up-to-date SMT and THT mounting plant, based on information from literature and a plant visit in Switzerland

## Reference product
- printed wiring board mounting facility: 1 unit; By-product classification allocatable product; CPC 53269: Other constructions for manufacturing
  Mounting plant for the mounting equipment in the case of surface mount technology (SMT) and through-hole technology (THT).
  EcoSpold01Location=GLO
  production volume 1 unit
    Dummy value to be replaced by measured, estimated or calculated value
  property price 4.89669e7 EUR2005
    Convert from EU 27 price to the world by currency exchange rate.

## Inputs from technosphere
- building, hall: 5000 m2; source Hischier R. 2007; lognormal variance with pedigree 0.448, pedigree (4,5,5,5,5)
  EcoSpold01Location=CH
  Estimation, based on the description of several PC motherboard mounting facilities in China, assuming, based on literature, that it represents 50% of the overall surface of the production site and a life time of
  25 years.
  Uncertainty: rough estimation
- printed wiring board mounting facility, through-hole mounting line: 12.5 unit; lognormal variance with pedigree 0.3761, pedigree (4,5,5,3,1)
  EcoSpold01Location=GLO
  Estimation, based on the description of several PC motherboard mounting facilities in China, assuming a life-span of 10 years, 2.5 times are taken into account here.
  Uncertainty: estimation, based on Locascio (2000) and own plant visit
- road, company, internal: 50000 m2*year; lognormal variance with pedigree 0.448, pedigree (4,5,5,5,5)
  Proxy with estimation, to represent internal streets and parking areas, roads, company, internal is used, based on the assumption that it represents 20% of the overall surface of the production site and a life time of 25 years.
  EcoSpold01Location=CH
  Uncertainty: rough estimation
- building, multi-storey: 20000 m3; lognormal variance with pedigree 0.448, pedigree (4,5,5,5,5)
  Proxy with calculation, to represent administration buildings building, multi storey is used, based on the assumption that it represents 20% of the overall surface of the production site, an average height of 10 m and a life time of 25 years.
  EcoSpold01Location=RER
  Uncertainty: rough estimation
- printed wiring board mounting facility, surface mounting line: 15 unit; lognormal variance with pedigree 0.3761, pedigree (4,5,5,3,1)
  Estimation, based on the description of several PC motherboard mounting facilities in China, assuming a life-span of 10 years, 2.5 times are taken into account here.
  EcoSpold01Location=GLO
  Uncertainty: estimation, based on Locascio (2000) and own plant visit
- used industrial electronic device: 0 kg; pedigree (1,1,1,1,1)
  Calculated value, from input of equipment.
  EcoSpold01Location=CH
  Uncertainty: calculated from input of equipment
  production volume 0 kg
    Calculated from the production volume of printed wiring board mounting facility in proportion to the respective output amounts.
  properties: dry mass 1 kg, carbon content, non-fossil 3.07246e-5, carbon content, fossil 0.0818694, wet mass 1 kg
  note on carbon content, non-fossil: The composition of an average industrial device was extracted from Tab 4.38 (ecoinvent v2.2 report 18_V). 88% steel, that was considered to have a C content of 0.012 (C content was calculated out of emission factors published in Commission Decision of 18 July 2007 establishing guidelines for the monitoring and reporting of greenhouse gas emissions pursuant to Directive 2003/87/EC of the European Parliament and of the Council (notified under document number C(2007) 3416)); 8% plastics (plastics C content was calculated using data in Tab A.2, ecoinvent v2.2 report 13_I); 3.2% PWB & plugs (C content calculated using PWB composition)
- used industrial electronic device: -71185, -238315 kg (2 entries); lognormal variance with pedigree 0.3761, pedigree (4,5,5,3,1)
  (same comment as for used industrial electronic device)
  production volume 309500 kg

## Inputs from nature
- Transformation, to industrial area [natural resource, land]: 10000 m2; lognormal variance with pedigree 0.1961, pedigree (4,5,5,3,1)
  Estimation, based on the description of several PC motherboard mounting facilities in China and own estimation.
  Uncertainty: own estimation, based on overall information from several chinese producers
- Transformation, from unspecified [natural resource, land]: 10000 m2; lognormal variance with pedigree 0.1961, pedigree (4,5,5,3,1)
  Estimation, based on the description of several PC motherboard mounting facilities in China and own assumptions, 12 month used to construction and dismantling of the whole plant.
  Uncertainty: own estimation, based on overall information from several chinese producers
- Occupation, industrial area [natural resource, land]: 250000 m2*year; lognormal variance with pedigree 0.1161, pedigree (4,5,5,3,1)
  Estimation, based on the description of several PC motherboard mounting facilities in China and own assumptions.
  Uncertainty: own estimation, based on overall information from several chinese producers
- Occupation, construction site [natural resource, land]: 20000 m2*year; lognormal variance with pedigree 0.1161, pedigree (4,5,5,3,1)
  (same comment as for Occupation, industrial area)

## Sampling procedure
Literature & own estimations

## Extrapolations
This dataset has been extrapolated from year 2005 to the year of the calculation (2021). The uncertainty has been adjusted accordingly.

## Review by Rolf Frischknecht 2007-11-08
passed.

## Review by Roland Hischier 2011-09-21
Transfer of documentation done.
