# glyphosate production

Dataset: EcoSpold 2, unit process
Geography: RoW
Time period: 2000-01-01 to 2021-12-31
Technology level: current
Classification: EcoSpold01Categories: agricultural means of production/pesticides
Classification: ISIC rev.4 ecoinvent: 2021:Manufacture of pesticides and other agrochemical products
Tags: ConvertedDataset
Scenario: Business-as-Usual
System model: Allocation, cut-off by classification
Share of production covered: 100 %
Generated by: Jürgen Sutter
Published in: Nemecek, T. 2007
Database: ecoinvent
isCopyrightProtected: true
accessRestrictedTo: 1

## General comment
Production of glyphosate including materials, energy uses, infrastructure and emissions.
[This dataset was already contained in the ecoinvent database version 2. It was not individually updated during the transfer to ecoinvent version 3. Life Cycle Impact Assessment results may still have changed, as they are affected by changes in the supply chain, i.e. in other datasets. This dataset was generated following the ecoinvent quality guidelines for version 2. It may have been subject to central changes described in the ecoinvent version 3 change report (http://www.ecoinvent.org/database/ecoinvent-version-3/reports-of-changes/), and the results of the central updates were reviewed extensively. The changes added e.g. consistent water flows and other information throughout the database. The documentation of this dataset can be found in the ecoinvent reports of version 2, which are still available via the ecoinvent website. The change report linked above covers all central changes that were made during the conversion process.]

## Geography
The inventory is modelled for Europe.

## Technology
pesticides

## Time period
Time of publications

## Parameters
- fraction, cooling water, once-through system, to air: 0.004 dimensionless; name fraction_CW_OT_to_air; lognormal variance with pedigree 0.0413, pedigree (2,3,1,3,1)
  Calculated based on literature value (Scown, C.D., 2011, Water Footprint of U.S. Transportation Fuels and supplying information of the article) (Vionnet, S., Quantis Water Database - Technical Report, 2012).
- fraction, cooling water, to air: 0.3875 dimensionless; name fraction_CW_to_air; = (0.5*fraction_CW_OT_to_air)+(0.5*fraction_CW_R_to_air); lognormal variance with pedigree 0.092025, pedigree (4,4,3,2,4)
  Calculated value based on literature value (see comments of the other parametres present in this dataset) and expert opinion. In the case when no industry/literature data are available about the type of cooling or directly fraction, cooling water, to air specific for the process a default assumption is applied. It is assumed that the once-through cooling system is used in 50% of all cases and recirculating system is used in another 50% of all cases.
- fraction, cooling water, recirculating system, to air: 0.771 dimensionless; name fraction_CW_R_to_air; lognormal variance with pedigree 0.0413, pedigree (2,3,1,3,1)
  (same comment as for fraction, cooling water, once-through system, to air)
- fraction, cooling water, cooling pond system, to air: 0.032 dimensionless; name fraction_CW_CP_to_air; lognormal variance with pedigree 0.0413, pedigree (2,3,1,3,1)
  (same comment as for fraction, cooling water, once-through system, to air)
- fraction, water, decarbonised, to air: 0.3875 dimensionless; name fraction_WDC_to_air; lognormal variance with pedigree 0.092025, pedigree (4,4,3,2,4)

## Reference product
- glyphosate: 1 kg; CPC 34663: Herbicides, anti-sprouting products and plant-growth regulators; By-product classification allocatable product; CAS 1071-83-6
  EcoSpold01Location=RER
  production volume 2.98415e8 kg
    The consumption volume in the US in 2002 (from USGS, 2002 Pesticide use Maps) of glyphosate (Sutter, 2010) has been used to estimate the production volumes of this type of pesticide in the world. For that, it has been extrapolated to a Global production mix using the ha of Arable land and Permanent crops of US versus the ha of Arable land and Permanent crops in the world in 2002 (1514/179 million ha; FAOSTAT).
  property price 4.2 EUR2005
    Calculated after Alibaba. Source: http://www.alibaba.com/product-detail/Manufacturer-agrochemical-herbicide-glyphosate-95-_60215600617.html?spm=a2700.7724857.29.12.Hmjn6L&s=p
  property carbon content 0.214286
    carbon content on a dry matter basis (reserved; not for manual entry)
  properties: water content 0, dry mass 1 kg, carbon content, non-fossil 0, carbon content, fossil 0.214286, wet mass 1 kg, water in wet mass 0 kg, carbon allocation 0.214286 kg

## Inputs from technosphere
- ammonia, anhydrous, liquid: 0 kg; pedigree (1,1,1,1,1)
  EcoSpold01Location=RER
  Stoechiometric calculation
  Uncertainty: Stoechiometric calculation
  properties: wet mass 1 kg, dry mass 1 kg
- sodium hydroxide, without water, in 50% solution state: 1.2464 kg; lognormal variance with pedigree 0.046, pedigree (4,5,4,5,1)
  Stoechiometric calculation
  EcoSpold01Location=RER
  Uncertainty: Stoechiometric calculation
  properties: dry mass 1 kg, heating value, net 3.03 MJ, wet mass 1 kg
- chlorine, liquid: 0.55467 kg; lognormal variance with pedigree 0.046, pedigree (4,5,4,5,1)
  Stoechiometric calculation
  EcoSpold01Location=RER
  Uncertainty: Stoechiometric calculation
  properties: dry mass 1 kg, wet mass 1 kg
- phosphorous chloride: 0.9386 kg; lognormal variance with pedigree 0.046, pedigree (4,5,4,5,1)
  EcoSpold01Location=RER
  Stoechiometric calculation
  Uncertainty: Stoechiometric calculation
  properties: dry mass 1 kg, wet mass 1 kg
- heat, district or industrial, natural gas: 0 MJ; pedigree (1,1,1,1,1)
  Uncertainty: Estimation
  properties: heating value, net 1 MJ
- formaldehyde: 0.41409 kg; lognormal variance with pedigree 0.046, pedigree (4,5,4,5,1)
  EcoSpold01Location=RER
  Stoechiometric calculation
  Uncertainty: Stoechiometric calculation
  properties: wet mass 1 kg, dry mass 1 kg, carbon content, fossil 0.4, heating value, net 20.19 MJ
- chemical factory, organics: 1.5926e-9 unit; lognormal variance with pedigree 0.448, pedigree (4,5,5,5,5)
  EcoSpold01Location=RER
  Estimation
  Uncertainty: Estimation
- heat, district or industrial, other than natural gas: 0 MJ; pedigree (1,1,1,1,1)
  Uncertainty: Estimation
  properties: heating value, net 1 MJ
- electricity, medium voltage: 0 kWh; pedigree (1,1,1,1,1)
  EcoSpold01Location=UCTE
  Estimation
  Uncertainty: Estimation
- acetic anhydride: 0.63494 kg; lognormal variance with pedigree 0.046, pedigree (4,5,4,5,1)
  Stoechiometric calculation
  EcoSpold01Location=RER
  Uncertainty: Stoechiometric calculation
  properties: wet mass 1 kg, heating value, net 21.38 MJ, carbon content, fossil 0.470588, dry mass 1 kg
- water, decarbonised: 0 kg; name water_decarbonised_input; source Unger T A 1996; pedigree (1,1,1,1,1)
  EcoSpold01Location=RER
  Stoichiometric calculation, assuming an efficiency of 100%.
  Uncertainty: Stoechiometric calculation
  properties: wet mass 1 kg
- ammonia, anhydrous, liquid: 0.0233635, 0.00200837, 0.00312451, 0.00619076, 0.00606531, 0.000635709, 0.00284186, 0.06723 kg (8 entries); lognormal variance with pedigree 0.046, pedigree (4,5,4,5,1)
  EcoSpold01Location=RER
  Stoechiometric calculation
  Uncertainty: Stoechiometric calculation
- heat, district or industrial, natural gas: 0.11354, 7.36691 MJ (2 entries); lognormal variance with pedigree 0.046, pedigree (4,5,4,5,1)
  Uncertainty: Estimation
- heat, district or industrial, other than natural gas: 0.00169243, 4.17358 MJ (2 entries); lognormal variance with pedigree 0.046, pedigree (4,5,4,5,1)
  Uncertainty: Estimation
- electricity, medium voltage: 0.0151342, 0.00290208, 0.0487199, 0.708587, 0.0998757, 0.32541 kWh (6 entries); lognormal variance with pedigree 0.046, pedigree (4,5,4,5,1)
  EcoSpold01Location=UCTE
  Estimation
  Uncertainty: Estimation
- water, decarbonised: 0.00228442, 0.00594406, 0.0239738, 0.00305284, 0.0446074, 0.000291816, 0.0378657 kg (7 entries); source Unger T A 1996; lognormal variance with pedigree 0.046, pedigree (4,5,4,5,1)
  (same comment as for water, decarbonised)

## Inputs from nature
- Water, cooling, unspecified natural origin [natural resource, in water]: 0.095557 m3; name water_cooling_UNO_input; source Gendorf 2000; lognormal variance with pedigree 0.046, pedigree (4,5,4,5,1)
  Estimation (24 kg cooling water per kg produced chemical per step).
  Uncertainty: Estimation

## Emissions to nature
- Water [air, unspecified]: 0.0370741 m3; name water_to_air_unspecified; lognormal variance with pedigree 0.0507, pedigree (2,2,4,5,1)
  Calculated value based on literature values and expert opinion. See comments in the parametres' comment field.
  property fraction, origin: salt water 0; name fraction_origin_salt_water
  property fraction, origin: unspecified 0.998766; name fraction_origin_unspecified
  property fraction, origin: fresh water 0.00123355; name fraction_origin_fresh_water
- Formaldehyde [air, urban air close to ground]: 0.00082818 kg; lognormal variance with pedigree 0.188, pedigree (4,5,5,5,5)
  Estimation
  Uncertainty: Estimation
- Ammonia [air, urban air close to ground]: 0.00022292 kg; lognormal variance with pedigree 0.218, pedigree (4,5,5,5,5)
  Estimation
  Uncertainty: Estimation
- Water [water, unspecified]: 0.0586009 m3; name water_to_water_unspecified; lognormal variance with pedigree 0.0507, pedigree (2,2,4,5,1)
  (same comment as for Water)
  property fraction, origin: salt water 0; name fraction_origin_salt_water_Ww
  property fraction, origin: fresh water 0.00123355; name fraction_origin_fresh_water_Ww
  property fraction, origin: unspecified 0.998766; name fraction_origin_unspecified_Ww
  property wet mass 1000 kg; name WM
  property dry mass 0 kg; name DM
  property carbon content, fossil 0; name C_content_fossil
  property carbon content, non-fossil 0; name C_content_non_fossil
  property water in wet mass 1000 kg; name WWM
- Formaldehyde [water, surface water]: 0.0019876 kg; lognormal variance with pedigree 0.448, pedigree (4,5,5,5,5)
  Estimation
  Uncertainty: Estimation
- Carbon dioxide, fossil [air, urban air close to ground]: 0.39677 kg; lognormal variance with pedigree 0.1786, pedigree (4,5,5,5,5)
  Estimation
  Uncertainty: Estimation
- Phosphorus [water, surface water]: 0.010697 kg; lognormal variance with pedigree 0.188, pedigree (4,5,5,5,5)
  Estimation
  Uncertainty: Estimation
- Chloroacetic acid [air, urban air close to ground]: 0.0012326 kg; lognormal variance with pedigree 0.188, pedigree (4,5,5,5,5)
  Estimation
  Uncertainty: Estimation
- Ammonium, ion [water, surface water]: 0.0027865 kg; lognormal variance with pedigree 0.188, pedigree (4,5,5,5,5)
  Estimation
  Uncertainty: Estimation
- Chloride [water, surface water]: 1.269 kg; lognormal variance with pedigree 0.448, pedigree (4,5,5,5,5)
  Estimation
  Uncertainty: Estimation
- Chlorine [air, urban air close to ground]: 0.0011093 kg; lognormal variance with pedigree 0.188, pedigree (4,5,5,5,5)
  Estimation
  Uncertainty: Estimation
- Acetic acid [air, urban air close to ground]: 0.0012699 kg; lognormal variance with pedigree 0.188, pedigree (4,5,5,5,5)
  Estimation
  Uncertainty: Estimation
- Chloroacetic acid [water, surface water]: 0.0030815 kg; lognormal variance with pedigree 0.448, pedigree (4,5,5,5,5)
  Estimation
  Uncertainty: Estimation
- Sodium, ion [water, surface water]: 0.71666 kg; lognormal variance with pedigree 0.798, pedigree (4,5,5,5,5)
  Estimation
  Uncertainty: Estimation
- Acetic acid [water, surface water]: 0.0030477 kg; lognormal variance with pedigree 0.448, pedigree (4,5,5,5,5)
  Estimation
  Uncertainty: Estimation

## Sampling procedure
Literature data

## Extrapolations
Transports and emissions are modelled with standard methods. This dataset has been copied from an original dataset covering the geography RER. The uncertainty has been adjusted accordingly.

## Review by Thomas Nemecek 2010-03-11
Passed.
none
