# capacitor production, electrolyte type, > 2cm height

Dataset: EcoSpold 2, unit process
Geography: GLO
Time period: 1994-01-01 to 2021-12-31
Technology level: current
Classification: EcoSpold01Categories: electronics/component
Classification: ISIC rev.4 ecoinvent: 2610:Manufacture of electronic components and boards
Synonyms: electrolyt condenser
Scenario: Business-as-Usual
System model: Allocation, cut-off by classification
Generated by: Roland Hischier
Published in: Hischier R. 2007
Database: ecoinvent
isCopyrightProtected: true
accessRestrictedTo: 1

## General comment
This dataset represents the production of 1 kg of big (i.e. hight above 2, up to 8 cm) electrolyt capacitors. It is based on the assumption that a typical big electrolyt capacitor has an average weight of 50.5 g.The data represent a typical big electrolyt-capacitor, used in the information and communication technology. Material data are taken from datasheets of producers of such capacitors and from the literature. Infrastructure and production efforts are based on own assumptions. The production efforts represent not a specific capacitor type and have thus, accordingly higher uncertainties.

## Included activities start
From reception of metals and plastics at the factory gate.

## Included activities end
This dataset includes raw material input and production efforts for the production of currently used big (> 2 cm) electrolyt-capacitors.

## Geography
Data represent a global valuable composition of big electrolyt-capacitors.

## Technology
average production composed of: formulation; build-up process; cutting; bisquing; Pre-Firing; Firing; Tumbling; Termination (SMT) resp. metallization; slitting; winding; metal spray; heat treatment; sawing; lead welding; epoxy filling (THT)

## Reference product
- capacitor, electrolyte type, > 2cm height: 1 kg; source EPCOS 2006; By-product classification allocatable product; CPC 47110: Electrical capacitors
  EcoSpold01Location=GLO
  Electolyte capacitors are mainly out of aluminium, they are notable for their high capacitance per unit of volume (CV product) and excellent current handling capability. Therefore they are essential components in frequency converters, as DC link in traction, in electronic lamp ballasts, automotive and studio flash applications.The big electolyte capacitors have hight above 2, up to 8 cm.
  production volume 1 kg
    Dummy value to be replaced by measured, estimated or calculated value
  property price 12.6826 EUR2005
    Calculated based on inputs: The price of the product has been calculated as a sum of the values of the material and energy inputs for this product. This value is therefore a rough estimation. It may underestimate the real price since there are additional expenses when producing any product. These expences can include for example labour costs, treatment of waste materials and profit for the producer. Please consider carefully whether this level of data quality is acceptable for your application.
  property carbon content, fossil 0.16971
    Calculated as the addition of C contents in the product composition, and referred to 1 kg capacitors, and then to 1 kg DM
  property carbon content, non-fossil 0.0349727
    (same comment as for capacitor, electrolyte type, > 2cm height)
  property carbon content 0.204682
    carbon content on a dry matter basis (reserved; not for manual entry)
  properties: water content 0, water in wet mass 0 kg, wet mass 1 kg, dry mass 1 kg, carbon allocation 0.204682 kg

## Inputs from technosphere
- copper, cathode: 0.013616 kg; source Behrendt S 1998; lognormal variance with pedigree 0.042, pedigree (1,4,5,1,1)
  Calculated Value. The production of 1 kg of capacitors lead to a waste amount of 0.48 kg unused raw materials. Hence, this dataset here has an input of 1.48 kg of raw materials per kg of capacitor. The split to the different raw materials (metals, plastics, etc.) is based on the reported material specifications.
  Further references
  ZVEI (2006) Umbrella Specs. Download of December 21 from <http://www.zvei.org/index.php?id=1158>.
  EcoSpold01Location=RER
  Uncertainty: average from literature & company information
  properties: wet mass 1 kg, dry mass 1 kg
- capacitor, auxilliaries and energy use: 1 kg; lognormal variance with pedigree 0.134, pedigree (3,4,5,1,4)
  Estimation - details see this other activity dataset
  EcoSpold01Location=GLO
  Uncertainty: rough estimation
- nylon 6: 0 kg; source Behrendt S 1998; pedigree (1,1,1,1,1)
  EcoSpold01Location=RER
  Calculated Value. The production of 1 kg of capacitors lead to a waste amount of 0.48 kg unused raw materials. Hence, this dataset here has an input of 1.48 kg of raw materials per kg of capacitor. The split to the different raw materials (metals, plastics, etc.) is based on the reported material specifications.
  Further references
  ZVEI (2006) Umbrella Specs. Download of December 21 from <http://www.zvei.org/index.php?id=1158>.
  Uncertainty: average from literature & company information
  properties: wet mass 1 kg, carbon content, fossil 0.637168, dry mass 1 kg, heating value, net 30.9 MJ
  note on carbon content, fossil: It is a chain of caprolactam molecules, originating from aminocarboxylic acids - here caproic acid or caprolactam. The structure of nylon 6 is -(NH-(CH2)5-CO)n-, C6H11NO (ecoinvent v2.2 report 11_II). MW=113 g/mol
  note on heating value, net: Assumed equal to Nylon-66. Reference: Walters, R. N., Hackett, S. M. and Lyon, R. E. (2000) ‘Heats of combustion of high temperature polymers’, Fire and Materials, 24(5), pp. 245–252. doi: 10.1002/1099-1018(200009/10)24:5<245::AID-FAM744>3.0.CO;2-7.
- polyethylene terephthalate, granulate, amorphous: 0.05846 kg; source Behrendt S 1998; lognormal variance with pedigree 0.042, pedigree (1,4,5,1,1)
  (same comment as for nylon 6)
  properties: heating value, net 22.95 MJ, carbon content, fossil 0.625, wet mass 1 kg, dry mass 1 kg
  note on carbon content, fossil: Polymer of the ethylen terephtalate monomer (C10H8O4)n (ecoinvent v2.2 report 11_II), MW=192 g/mol
- ethylene glycol: 0.37 kg; source Behrendt S 1998; lognormal variance with pedigree 0.042, pedigree (1,4,5,1,1)
  (same comment as for copper, cathode)
  properties: heating value, net 23.44 MJ, carbon content, fossil 0.387097, dry mass 1 kg, wet mass 1 kg
- aluminium, wrought alloy: 0.75332 kg; source Behrendt S 1998; lognormal variance with pedigree 0.042, pedigree (1,4,5,1,1)
  (same comment as for copper, cathode)
  properties: dry mass 1 kg, wet mass 1 kg
- kraft paper: 0 kg; source Behrendt S 1998; pedigree (1,1,1,1,1)
  (same comment as for copper, cathode)
  properties: carbon content, fossil 0.0020219, water content 0.0582011, heating value, net 14.11 MJ, carbon content, non-fossil 0.41662, wet mass 1 kg, dry mass 0.945 kg
  note on carbon content, fossil: Fossil C content was calculated after fossil C contents of chemicals used in the production of the paper (in Tab 9.4 ecoinvent v2.2 report 11_III, part 9).
  note on carbon content, non-fossil: Biogenic C content was calculated after biogenic C contents of chemicals used in the production of the paper (in Tab 9.4 ecoinvent v2.2 report 11_III, part 9). The cellulose content in 1 kg of paper (on a wet mas basis) was estimated as (1-chemical content), C content of cellulose was considered 0.44 kgC/kg dry mass (ecoinvent v2.2 report, n 15a, pg 40)
- polyvinylchloride, emulsion polymerised: 0.00935237 kg; source Behrendt S 1998; lognormal variance with pedigree 0.042, pedigree (1,4,5,1,1)
  (same comment as for nylon 6)
  properties: dry mass 1 kg, wet mass 1 kg, carbon content, fossil 0.387097, heating value, net 21.5 MJ
  note on carbon content, fossil: Monomer is vynyl chloride, C2H3Cl (ecoinvent v2.2 report 11_II). MW=62 g/mol
- phenolic resin: 0 kg; source Behrendt S 1998; pedigree (1,1,1,1,1)
  (same comment as for nylon 6)
  properties: heating value, net 33.57 MJ, wet mass 1 kg, carbon content, fossil 0.772277, dry mass 1 kg
  note on carbon content, fossil: (C6H5OH)-CH2-(C6H5OH) was considered to be the basic structure in phenolic resin (ecoinvent v2.2 report 8-part 61). C13H14O2, MW=202 g/mol
- pig iron: 0 kg; source Behrendt S 1998; pedigree (1,1,1,1,1)
  Calculated Value. The production of 1 kg of capacitors lead to a waste amount of 0.48 kg unused raw materials. Hence, this dataset here has an input of 1.48 kg of raw materials per kg of capacitor. The split to the different raw materials (metals, plastics, etc.) is based on the reported material specifications.
  Further references
  ZVEI (2006) Umbrella Specs. Download of December 21 from <http://www.zvei.org/index.php?id=1158>.
  EcoSpold01Location=GLO
  Uncertainty: average from literature & company information
  properties: carbon content, fossil 0.045, wet mass 1 kg, dry mass 1 kg
  note on carbon content, fossil: Pig iron is the iron produced in the blast furnace. It is an alloy of 94% Fe and more than 2% C (world average 4.5%). (ecoinvent v2.2 report 10_partII)
- polyvinylchloride, suspension polymerised: 0.0639076 kg; source Behrendt S 1998; lognormal variance with pedigree 0.042, pedigree (1,4,5,1,1)
  (same comment as for copper, cathode)
  properties: heating value, net 21.5 MJ, carbon content, fossil 0.387097, wet mass 1 kg, dry mass 1 kg
- synthetic rubber: 0.03256 kg; source Behrendt S 1998; lognormal variance with pedigree 0.042, pedigree (1,4,5,1,1)
  (same comment as for nylon 6)
  properties: heating value, net 26.42 MJ, carbon content, fossil 0.871949, dry mass 1 kg, wet mass 1 kg
  note on carbon content, fossil: EPDM (Ethylene-propene-diene terpolymer) rubber is a terpolymer of ethylene, propene, and a diene with the residual unsaturated portion of the diene in the side chain (ecoinvent v2.2 report 7-part XX & Ullmann). Chemical formula (deduced from Evidences of Solvent-Induced Miscibility in Polychloroprene-co-Ethylene-Propene Diene Terpolymer Blends, Dubey et al., Journal of Applied Polymer Science, 2009, 111:1884–1891): C20H35
- tin: 0.0010804 kg; source Behrendt S 1998; lognormal variance with pedigree 0.042, pedigree (1,4,5,1,1)
  (same comment as for copper, cathode)
  properties: wet mass 1 kg, dry mass 1 kg
- nylon 6: 0.0031803, 0.0064397 kg (2 entries); source Behrendt S 1998; lognormal variance with pedigree 0.042, pedigree (1,4,5,1,1)
  (same comment as for nylon 6)
- kraft paper: 0.0154301, 0.11629 kg (2 entries); source Behrendt S 1998; lognormal variance with pedigree 0.042, pedigree (1,4,5,1,1)
  (same comment as for copper, cathode)
- phenolic resin: 0.00167388, 0.00794612 kg (2 entries); source Behrendt S 1998; lognormal variance with pedigree 0.042, pedigree (1,4,5,1,1)
  (same comment as for nylon 6)
- pig iron: 0.00250921, 0.0270908 kg (2 entries); source Behrendt S 1998; lognormal variance with pedigree 0.042, pedigree (1,4,5,1,1)
  (same comment as for pig iron)

## Sampling procedure
literature

## Extrapolations
This dataset has been extrapolated from year 2007 to the year of the calculation (2021). The uncertainty has been adjusted accordingly.

## Review by Rolf Frischknecht 2007-09-20
passed.
