# paper production, woodfree, coated, at integrated mill

Dataset: EcoSpold 2, unit process
Geography: RER
Time period: 2000-01-01 to 2021-12-31
Technology level: current
Classification: EcoSpold01Categories: paper & cardboard/graphic paper
Classification: ISIC rev.4 ecoinvent: 1701:Manufacture of pulp, paper and paperboard
Synonyms: coated fine paper
Tags: ConvertedDataset
Scenario: Business-as-Usual
System model: Allocation, cut-off by classification
Generated by: Roland Hischier
Published in: Hischier R. 2007
Database: ecoinvent
isCopyrightProtected: true
accessRestrictedTo: 1

## General comment
Wood free, coated paper (also called coated fine paper) is used for all kind of printing and other graphic purposes. Wood free paper is defined as containing at least 90% of the fibres in form of chemical pulp. Coated means that the paper is coated with a coating material like kaolin or calcium carbonate on one or two sides. This dataset represents the production at integrated mills with their own pulp production next to the paper machine.

The main sources for the dataset are the Finnish EcoData database from KCL (KCL (2002)) as well as several CER‘s of integrated and non-integrated paper mills (Äänekoski (2001); Grycksbo (2002); Kangas (2001); Kymi (2001); Nordland Papier (2001); Oulu (2002); Uetersen (2001))

An additional source is the European IPPC documentation for the paper and pulp industry (European Commission (2000)).

References
Äänekoski (2001) EMAS statement 2000. M-real Paper, Äänekoski (Finland)

Grycksbo (2002) Environmental Report 2001. StoraEnso, Grycksbo (Sweden) as pdf-File under: http://www.storaenso.com/CDAvgn/main/0,,1_-2395-2103-,00.html
Kangas (2001) EMAS statement 2000. M-real Paper, Jyväskylä (Finland)

KCL (2002) KCL EcoData - life cycle inventory database. The Finnish Pulp and Paper Research Institute (KCL), Espoo (Finnland)
Kymi (2001) Kymi Paper Oy Environmental Protection in 2000. UPM-Kymmene Kymi Paper Oy, Kuusankoski (Finland) as pdf-File under: http://www.paper.upm-kymmene.com

Nordland Papier (2001) Umwelterklärung 2001. UPM-Kymmene Nordland Papier AG, Dörpen (Germany) as pdf-File under: http://www.paper.upm-kymmene.com

Oulu (2002) Environmental Statement 2001. Stora Enso Oyj, Oulu (Finland) as pdf-File under: http://www.storaenso.com/CDAvgn/main/0,,1_-2393-2097-,00.html

Uetersen (2001) Vereinfachte Umwelterklärung 2000. StoraEnso Uetersen GmbH, Uetersen (Germany) as pdf-File under: http://www.storaenso.com/CDAvgn/main/0,,1_-2394-2102-,00.html

## Included activities start
This activity starts with the reception of the raw materials, such as pulpwood.

## Included activities end
This module includes the European production of coated woodfree paper in an integrated paper mill - including wood handling, chemical pulping and bleaching, paper production, energy production on-site, recovery cycles of chemicals and internal waste water treatment.

## Geography
Data from a finnish database and from several European fine paper producers used as European average data.

## Technology
Average of present used technology

## Time period
Data represent the average technology in the late 1990ies and early 2000s. The production volume is valid for 2018.

## Parameters
- fraction, cooling water, once-through system, to air: 0.004 dimensionless; name fraction_CW_OT_to_air; lognormal variance with pedigree 0.0413, pedigree (2,3,1,3,1)
  Calculated based on literature value (Scown, C.D., 2011, Water Footprint of U.S. Transportation Fuels and supplying information of the article) (Vionnet, S., Quantis Water Database - Technical Report, 2012).
- fraction, cooling water, cooling pond system, to air: 0.032 dimensionless; name fraction_CW_CP_to_air; lognormal variance with pedigree 0.0413, pedigree (2,3,1,3,1)
  (same comment as for fraction, cooling water, once-through system, to air)
- fraction, cooling water, to air: 0.3875 dimensionless; name fraction_CW_to_air; = (0.5*fraction_CW_OT_to_air)+(0.5*fraction_CW_R_to_air); lognormal variance with pedigree 0.092025, pedigree (4,4,3,2,4)
  Calculated value based on literature value (see comments of the other parametres present in this dataset) and expert opinion. In the case when no industry/literature data are available about the type of cooling or directly fraction, cooling water, to air specific for the process a default assumption is applied. It is assumed that the once-through cooling system is used in 50% of all cases and recirculating system is used in another 50% of all cases.
- fraction, process water, to air: 0.15 dimensionless; name fraction_PW_to_air; lognormal variance with pedigree 0.092025, pedigree (4,4,3,2,4)
  Literature value. In case when no industry/process specific data are available, default evaporation fraction value is used. This value is 15% and is based on literature (Statistics Canada, 2007 & Shaffer, K.H., 2008, Consumptive water use in the Great Lakes Basin, USGS & Shiklomanov, 2003, World Water Resources at the Beginning of the 21st Century) and has been approved by an expert.
- fraction, cooling water, recirculating system, to air: 0.771 dimensionless; name fraction_CW_R_to_air; lognormal variance with pedigree 0.0413, pedigree (2,3,1,3,1)
  (same comment as for fraction, cooling water, once-through system, to air)

## Reference product
- paper, woodfree, coated: 1 kg; name Amount_ref; CPC 32113: Mechanical wood pulp; semi-chemical wood pulp; pulps of fibrous cellulosic material other than wood; By-product classification allocatable product
  EcoSpold01Location=RER
  production volume 4.9696e9 kg; name PV_ref; = 6212000000 *0.8
    Kg/year, valid for 2018
    According to expert judgement 80 % of graphical paper is produced at integrated mills.
    Source: CEPI Key Statistics 2018, <http://www.cepi.org/system/files/public/documents/publications/Final%20Key%20Statistics%202018.pdf>
    <http://www.cepi.org/system/files/public/documents/publications/Final%20Key%20Statistics%202018.pdf>
  property carbon content, fossil 0.0590617
    Fossil C content was calculated after fossil C contents of chemicals used in the production of the paper (in Tab 8.72 & 8.73 ecoinvent v2.2 report 11_III, part 8).
  property carbon content, non-fossil 0.28
    Biogenic C content was calculated after biogenic C contents of chemicals used in the production of the paper (in Tab 8.72 & 8.73 ecoinvent v2.2 report 11_III, part 8). The cellulose content in 1 kg of paper (on a wet mas basis) was estimated as (1-chemical content), C content of cellulose was considered 0.44 kgC/kg dry mass (ecoinvent v2.2 report, n 15a, pg 40)
  property price 0.729 EUR2005
    Export prices for the World+ according to: http://faostat.fao.org/site/626/DesktopDefault.aspx?PageID=626#ancor downloaded 28 April 2009; calculated as export value divided by export volume.
  property carbon content 0.339062
    carbon content on a dry matter basis (reserved; not for manual entry)
  properties: heating value, net 14.11 MJ, wet mass 1 kg, water content 0.0582011, dry mass 0.945 kg, water in wet mass 0.055 kg, carbon allocation 0.320413 kg

## Inputs from technosphere
- sulfate pulp, unbleached: 0.00148 kg; = 0.0296*0.05; lognormal variance with pedigree 0.0407, pedigree (1,3,5,3,1)
  Average from several european fine paper producers. pulp input is 5% unbleached pulp and 95% bleached pulp
  Uncertainty: average from several european fine paper producers
  properties: water content 0.111111, heating value, net 13.23 MJ, carbon content, non-fossil 0.494, price 0.355 EUR2005, dry mass 0.9 kg, wet mass 1 kg
  note on carbon content, non-fossil: C content of dry mass of sulfate pulp is 0.494 kgC/kg dry wood (ecoinvent v2.2 report 6_IX & ecoinvent v2.2 report 9). No other C containing products in the formulation of the pulp.
- nitrogen, liquid: 0.00012 kg; lognormal variance with pedigree 0.0527, pedigree (2,4,5,3,1)
  Average data from finnish database
  EcoSpold01Location=RER
  Uncertainty: average data from finnish database
  properties: dry mass 1 kg, wet mass 1 kg
- sodium chloride, powder: 0.00022 kg; lognormal variance with pedigree 0.0527, pedigree (2,4,5,3,1)
  EcoSpold01Location=RER
  Average data from finnish database
  Uncertainty: average data from finnish database
  properties: wet mass 1 kg, dry mass 1 kg
- natural gas, high pressure: 0 m3; pedigree (1,1,1,1,1)
  Average from finnish database and several companies
  EcoSpold01Location=RER
  Uncertainty: average from finnish database and several companies
  properties: carbon content, fossil 0.602381, wet mass 0.84 kg, dry mass 0.84 kg, heating value, gross 39 MJ, heating value, net 39 MJ
  note on carbon content, fossil: An average C content of 0.506 kg C/ m3 has been assumed (this average has been calculated using data in Tab 3.5, ecoinvent v2.2 report 6_V
  note on heating value, net: Literature value, Source: United Nations Statistics Division (2018) International Recommendations for Energy Statistics (IRES). Available at: http://unstats.un.org/unsd/statcom/doc11/BG-IRES.pdf.
- residual softwood, wet: 0.0002052 m3; lognormal variance with pedigree 0.0407, pedigree (1,3,5,3,1)
  Average from several european fine paper producers
  EcoSpold01Location=RER
  Uncertainty: average from several european fine paper producers
  properties: carbon content, non-fossil 0.494, water content 0.7, heating value, net 5962.7 MJ, dry mass 450 kg, wet mass 765 kg
  note on carbon content, non-fossil: Biogenic C content was calculated after biogenic C contents of chemicals used in the production of the paper (in Tab 8.72 & 8.73 ecoinvent v2.2 report 11_III, part 8). The cellulose content in 1 kg of paper (on a wet mas basis) was estimated as (1-chemical content), C content of cellulose was considered 0.44 kgC/kg dry mass (ecoinvent v2.2 report, n 15a, pg 40) C content of dry mass is 0.494 kgC/kg dry wood (ecoinvent v2.2 report 9)
- municipal solid waste: -0.0304 kg; name Amount_BP3; lognormal variance with pedigree 0.0407, pedigree (1,3,5,3,1)
  EcoSpold01Location=CH
  Average from finnish database and several companies
  Uncertainty: average from finnish database and several companies
  production volume 1.51076e8 kg; = PV_ref*(Amount_BP3/ Amount_ref)
    Calculated from the production volume of paper, woodfree, coated in proportion to the respective output amounts.
  properties: wet mass 1 kg, carbon content, non-fossil 0.261655, dry mass 0.771 kg, water content 0.297017, carbon content, fossil 0.171549, heating value, net 11.74 MJ
  note on carbon content, non-fossil: Biogenic C content was calculated after biogenic C contents of chemicals used in the production of the paper (in Tab 8.72 & 8.73 ecoinvent v2.2 report 11_III, part 8). The cellulose content in 1 kg of paper (on a wet mas basis) was estimated as (1-chemical content), C content of cellulose was considered 0.44 kgC/kg dry mass (ecoinvent v2.2 report, n 15a, pg 40) MSW composition in tab 4.1, ecoinvent v2.2 report 13_I. C content referred to 1 kg DM
  note on carbon content, fossil: Fossil C content was calculated after fossil C contents of chemicals used in the production of the paper (in Tab 8.72 & 8.73 ecoinvent v2.2 report 11_III, part 8). MSW composition in tab 4.1, ecoinvent v2.2 report 13_I. C content referred to 1 kg DM
  note on heating value, net: Value taken from the general comment of the treatment dataset.
- magnesium sulfate: 0.00234 kg; lognormal variance with pedigree 0.0527, pedigree (2,4,5,3,1)
  (same comment as for nitrogen, liquid)
  properties: dry mass 1 kg, wet mass 1 kg
- paper mill, integrated: 5.44e-11 unit; lognormal variance with pedigree 0.448, pedigree (4,5,5,5,5)
  EcoSpold01Location=RER
  Own assumption
  Uncertainty: own assumption
- sodium hydroxide, without water, in 50% solution state: 0.0206 kg; lognormal variance with pedigree 0.0527, pedigree (2,4,5,3,1)
  (same comment as for sodium chloride, powder)
  properties: heating value, net 3.03 MJ, wet mass 1 kg, dry mass 1 kg
- latex: 0.041 kg; lognormal variance with pedigree 0.0527, pedigree (2,4,5,3,1)
  (same comment as for nitrogen, liquid)
  properties: wet mass 1 kg, dry mass 1 kg, carbon content, fossil 0.872983, heating value, net 26.45 MJ
  note on carbon content, fossil: Fossil C content was calculated after fossil C contents of chemicals used in the production of the paper (in Tab 8.72 & 8.73 ecoinvent v2.2 report 11_III, part 8). The Styrene-butadiene dispersion is based on styrene and 1,3-butadiene plus co-monomers like i.e. ac-rylonitrile or (meth-)acrylic acid (ecoinvent v2.2 report 11_III). Following specifications in US Patent 3,875,101 (1971), the dispersion was considered as: 52.5% 1.3-butadiene (0.8571 kg C/kg dry mass); 43% styrene (0.9231 kg C/kg dry mass); 2% acrylic acid (0.5 kg C/kg dry mass); 2.5% acrolein (C3H4O, MW=56; 0.6429 kg C/kg dry mass)
- hazardous waste, for underground deposit: -4e-5 kg; name Amount_BP1; lognormal variance with pedigree 0.0407, pedigree (1,3,5,3,1)
  Average from finnish database and several companies
  EcoSpold01Location=DE
  Uncertainty: average from finnish database and several companies
  production volume 198784 kg; = PV_ref*(Amount_BP1/ Amount_ref)
    (same comment as for municipal solid waste)
  property price 0 EUR2005; name Amount_BP1_price_EUR2005
  properties: wet mass 1 kg, carbon content, fossil 0.554667, dry mass 1 kg
  note on carbon content, fossil: Fossil C content was calculated after fossil C contents of chemicals used in the production of the paper (in Tab 8.72 & 8.73 ecoinvent v2.2 report 11_III, part 8). Tab A.6, ecoinvent v2.2 report 13_I, average hazardous waste composition was used, and referred to 0% water mass. No waste-specific emission are currently inventoried for underground deposits. Accordingly, no waste composition must be specified. For generic, average waste to underground deposit deposition in a 200 liter steel drum without cement solidification is assumed (ecoinvent v2.2 report 13_I).
- electricity, medium voltage: 0.3503 kWh; lognormal variance with pedigree 0.0407, pedigree (1,3,5,3,1)
  Average from finnish database and several companies
  EcoSpold01Location=NORDEL
  Uncertainty: average from finnish database and several companies
- pulpwood, softwood, measured as solid wood under bark: 0 m3; pedigree (1,1,1,1,1)
  EcoSpold01Location=RER
  Average from several european fine paper producers
  Uncertainty: average from several european fine paper producers
  properties: water content 1.4, carbon content, non-fossil 0.494, wet mass 929.28 kg, dry mass 387.2 kg, heating value, net 4483.78 MJ
  note on heating value, net: Value based on "softwood forestry, mixed species, sustainable forest management"The property is based on a value of 11.58MJ/kg
- carboxymethyl cellulose, powder: 0.0022 kg; lognormal variance with pedigree 0.0527, pedigree (2,4,5,3,1)
  (same comment as for nitrogen, liquid)
  properties: carbon content, fossil 0.0979592, wet mass 1 kg, heating value, net 20.19 MJ, dry mass 1 kg, carbon content, non-fossil 0.293878
  note on carbon content, fossil: Fossil C content was calculated after fossil C contents of chemicals used in the production of the paper (in Tab 8.72 & 8.73 ecoinvent v2.2 report 11_III, part 8). Chemical structure: Cellulose-O-CH2-COO-Na+. CMC is produced by the processing of alkaline cellulose with mono acetic acid (ecoinvent v2.2 report 12, pg 76 & 81). MW Acetic acid (CH3-COOH) is 60 g/mol. The degree of carboxymethyl substitution in CMC is variable. It was considered that every molecule of glucose (monomers of cellulose) had a carboxymethyl substitution. MW of glucose (C6H10O5) is 162 g/mol; cellulose is (C6H10O5)n. MW of Na is 23
  note on carbon content, non-fossil: Biogenic C content was calculated after biogenic C contents of chemicals used in the production of the paper (in Tab 8.72 & 8.73 ecoinvent v2.2 report 11_III, part 8). The cellulose content in 1 kg of paper (on a wet mas basis) was estimated as (1-chemical content), C content of cellulose was considered 0.44 kgC/kg dry mass (ecoinvent v2.2 report, n 15a, pg 40) Chemical structure: Cellulose-O-CH2-COO-Na+. CMC is produced by the processing of alkaline cellulose with mono acetic acid (ecoinvent v2.2 report 12, pg 76 & 81). MW Acetic acid is 60 g/mol. The degree of carboxymethyl substitution in CMC is variable. It was considered that every molecule of glucose (monomers of cellulose) had a carboxymethyl substitution. MW of glucose (C6H10O5) is 162 g/mol; cellulose is (C6H10O5)n.
- wood ash mixture, pure: 0 kg; name Amount_BP2; pedigree (1,1,1,1,1)
  Average from finnish database and several companies
  EcoSpold01Location=CH
  Uncertainty: average from finnish database and several companies
  production volume 0 kg
    (same comment as for municipal solid waste)
  property price 0 EUR2005; name Amount_BP2_price_EUR2005
  properties: carbon content, non-fossil 0.012, wet mass 1 kg, dry mass 1 kg
  note on carbon content, non-fossil: Biogenic C content was calculated after biogenic C contents of chemicals used in the production of the paper (in Tab 8.72 & 8.73 ecoinvent v2.2 report 11_III, part 8). The cellulose content in 1 kg of paper (on a wet mas basis) was estimated as (1-chemical content), C content of cellulose was considered 0.44 kgC/kg dry mass (ecoinvent v2.2 report, n 15a, pg 40) Tab A.9, ecoinvent v2.2 report 13_I.
- alkylketene dimer sizing agent, for paper production: 0.00213 kg; lognormal variance with pedigree 0.0527, pedigree (2,4,5,3,1)
  (same comment as for sodium chloride, powder)
  properties: dry mass 1 kg, wet mass 1 kg, heating value, net 16.31 MJ, carbon content, non-fossil 0.538229
  note on carbon content, non-fossil: Biogenic C content was calculated after biogenic C contents of chemicals used in the production of the paper (in Tab 8.72 & 8.73 ecoinvent v2.2 report 11_III, part 8). The cellulose content in 1 kg of paper (on a wet mas basis) was estimated as (1-chemical content), C content of cellulose was considered 0.44 kgC/kg dry mass (ecoinvent v2.2 report, n 15a, pg 40) Chemical formula of alkyl ketene dimer was considered as C38H72O20, and the molecular weight 848g/mol. It is produced from Fatty acids, from vegetarian oil
- oxygen, liquid: 0.0129 kg; lognormal variance with pedigree 0.0527, pedigree (2,4,5,3,1)
  (same comment as for nitrogen, liquid)
  properties: dry mass 1 kg, wet mass 1 kg
- lime: 0.172 kg; lognormal variance with pedigree 0.0407, pedigree (1,3,5,3,1)
  EcoSpold01Location=CH
  Average from several european fine paper producers
  Uncertainty: average from several european fine paper producers
  properties: dry mass 1 kg, wet mass 1 kg, carbon content, fossil 0.120005
  note on carbon content, fossil: Fossil C content was calculated after fossil C contents of chemicals used in the production of the paper (in Tab 8.72 & 8.73 ecoinvent v2.2 report 11_III, part 8). CaCO3 (MW=100)
- sulfuric acid: 0.0165 kg; lognormal variance with pedigree 0.0527, pedigree (2,4,5,3,1)
  (same comment as for sodium chloride, powder)
  properties: dry mass 1 kg, wet mass 1 kg
- pulpwood, hardwood, measured as solid wood under bark: 0 m3; pedigree (1,1,1,1,1)
  (same comment as for residual softwood, wet)
  properties: water content 0.8, carbon content, non-fossil 0.494, dry mass 563.2 kg, wet mass 1013.76 kg, heating value, net 6071.3 MJ
  note on heating value, net: Value based on "hardwood forestry, mixed species, sustainable forest management"The property is based on a value of 11.58MJ/kg
- hard coal: 0.00844 kg; lognormal variance with pedigree 0.0407, pedigree (1,3,5,3,1)
  Average from finnish database and several companies
  EcoSpold01Location=WEU
  Uncertainty: average from finnish database and several companies
  properties: wet mass 1 kg, dry mass 0.94 kg, carbon content, fossil 0.845, water content 0.0638298, heating value, net 27.91 MJ
  note on carbon content, fossil: Fossil C content was calculated after fossil C contents of chemicals used in the production of the paper (in Tab 8.72 & 8.73 ecoinvent v2.2 report 11_III, part 8). C content 75-94% (specified in Tab 1.1, report 6, part VI). A mean content of 0.845 kg C/ kg dry hard coal was considered
  note on heating value, net: Based on the Characterization factor of Hard coal in the CED method
- optical brighteners, for paper production: 0.002 kg; lognormal variance with pedigree 0.0527, pedigree (2,4,5,3,1)
  (same comment as for nitrogen, liquid)
  properties: carbon content, fossil 0.557859, wet mass 1 kg, dry mass 1 kg, heating value, net 16.9 MJ
  note on carbon content, fossil: Fossil C content was calculated after fossil C contents of chemicals used in the production of the paper (in Tab 8.72 & 8.73 ecoinvent v2.2 report 11_III, part 8). Mixture of two optical brighteners (DAS-1 and distyrylbiphenyl type), ecoinvent v2.2 report 11-III, pg 298
- chemical, organic: 0.00263 kg; lognormal variance with pedigree 0.0527, pedigree (2,4,5,3,1)
  Average data from finnish database
  EcoSpold01Location=GLO
  Uncertainty: average data from finnish database
  properties: wet mass 1 kg, dry mass 1 kg, carbon content, fossil 0.628, heating value, net 19.03 MJ
  note on carbon content, fossil: Fossil C content was calculated after fossil C contents of chemicals used in the production of the paper (in Tab 8.72 & 8.73 ecoinvent v2.2 report 11_III, part 8). This dataset is an unweighted average of 20 organic substances (listed in Tab 88.1, ecoinvent v2.2 report 8, part II), being part of the top100 chemicals included in this database. The C-content has also been calculated as an unweighted average of the C content of the substances composing this dataset.
- sodium chlorate, powder: 0.0137 kg; lognormal variance with pedigree 0.0527, pedigree (2,4,5,3,1)
  (same comment as for sodium chloride, powder)
  properties: wet mass 1 kg, dry mass 1 kg
- methanol: 0.00119 kg; lognormal variance with pedigree 0.0527, pedigree (2,4,5,3,1)
  (same comment as for chemical, organic)
  properties: heating value, net 26.49 MJ, wet mass 1 kg, dry mass 1 kg, carbon content, fossil 0.375
  note on carbon content, fossil: Fossil C content was calculated after fossil C contents of chemicals used in the production of the paper (in Tab 8.72 & 8.73 ecoinvent v2.2 report 11_III, part 8). CH3OH
- quicklime, milled, loose: 0.00472 kg; lognormal variance with pedigree 0.0527, pedigree (2,4,5,3,1)
  EcoSpold01Location=CH
  Average data from finnish database
  Uncertainty: average data from finnish database
  properties: wet mass 1 kg, water content 0.010101, dry mass 0.99 kg
- hydrogen peroxide, without water, in 50% solution state: 0.00401 kg; lognormal variance with pedigree 0.0527, pedigree (2,4,5,3,1)
  (same comment as for nitrogen, liquid)
  properties: heating value, net 7.13 MJ, wet mass 1 kg, dry mass 1 kg
- potato starch: 0.0152 kg; lognormal variance with pedigree 0.0527, pedigree (2,4,5,3,1)
  EcoSpold01Location=DE
  Average data from finnish database
  Uncertainty: average data from finnish database
  properties: heating value, net 10.66 MJ, water content 0.25, dry mass 0.8 kg, wet mass 1 kg, carbon content, non-fossil 0.46
  note on carbon content, non-fossil: Biogenic C content was calculated after biogenic C contents of chemicals used in the production of the paper (in Tab 8.72 & 8.73 ecoinvent v2.2 report 11_III, part 8). The cellulose content in 1 kg of paper (on a wet mas basis) was estimated as (1-chemical content), C content of cellulose was considered 0.44 kgC/kg dry mass (ecoinvent v2.2 report, n 15a, pg 40) C-content of starch is considered 46% on dry mass basis (from "Evolutionary and Biochemical Aspects", A.D. Kay and T. Vrede (in Global Ecology, 2010, Elsevier B.V., S.E. Jørgensen Ed.)).
- sulfate pulp, bleached: 0.02812 kg; = 0.0296*0.95; lognormal variance with pedigree 0.0407, pedigree (1,3,5,3,1)
  (same comment as for sulfate pulp, unbleached)
  properties: heating value, net 13.23 MJ, wet mass 1 kg, carbon content, non-fossil 0.494, dry mass 0.9 kg, water content 0.111111
- kaolin: 0.172 kg; lognormal variance with pedigree 0.0407, pedigree (1,3,5,3,1)
  (same comment as for pulpwood, softwood, measured as solid wood under bark)
  properties: wet mass 1 kg, dry mass 1 kg
- carbon dioxide, liquid: 0.00109 kg; lognormal variance with pedigree 0.0527, pedigree (2,4,5,3,1)
  (same comment as for sodium chloride, powder)
  properties: carbon content, fossil 0.272727, dry mass 1 kg, wet mass 1 kg, heating value, net 8.27 MJ
  note on carbon content, fossil: Fossil C content was calculated after fossil C contents of chemicals used in the production of the paper (in Tab 8.72 & 8.73 ecoinvent v2.2 report 11_III, part 8). CO2.
- lignite briquettes: 1.63 MJ; lognormal variance with pedigree 0.0407, pedigree (1,3,5,3,1)
  (same comment as for hazardous waste, for underground deposit)
  properties: heating value, net 8.8 MJ, carbon content, fossil 0.65679, water content 0.234568, dry mass 0.0415385 kg, wet mass 0.0512821 kg
  note on carbon content, fossil: Fossil C content was calculated after fossil C contents of chemicals used in the production of the paper (in Tab 8.72 & 8.73 ecoinvent v2.2 report 11_III, part 8). 53.2% C and 19% water in wet mass (ecoinvent v2.1 report 6_VI Table 7.1)
- sulfur dioxide, liquid: 0.00109 kg; lognormal variance with pedigree 0.0527, pedigree (2,4,5,3,1)
  (same comment as for sodium chloride, powder)
  properties: dry mass 1 kg, wet mass 1 kg
- heavy fuel oil: 0.0279 kg; lognormal variance with pedigree 0.0407, pedigree (1,3,5,3,1)
  (same comment as for natural gas, high pressure)
  properties: heating value, net 41.2 MJ, dry mass 1 kg, carbon content, fossil 0.849, wet mass 1 kg
  note on carbon content, fossil: Fossil C content was calculated after fossil C contents of chemicals used in the production of the paper (in Tab 8.72 & 8.73 ecoinvent v2.2 report 11_III, part 8). C-content is 84.9% (ecoinvent v2.2 report 6_IV, Tab 3.18)
- natural gas, high pressure: 0.0468768, 0.000302664 m3 (2 entries); lognormal variance with pedigree 0.0407, pedigree (1,3,5,3,1)
  (same comment as for natural gas, high pressure)
- pulpwood, softwood, measured as solid wood under bark: 0.0010314, 1.26028e-5 m3 (2 entries); lognormal variance with pedigree 0.0407, pedigree (1,3,5,3,1)
  (same comment as for pulpwood, softwood, measured as solid wood under bark)
- wood ash mixture, pure: -0.00338051, -6.94913e-5 kg (2 entries); lognormal variance with pedigree 0.0407, pedigree (1,3,5,3,1)
  (same comment as for wood ash mixture, pure)
  production volume 1.71451e7 kg
- pulpwood, hardwood, measured as solid wood under bark: 0.0015188, 4.21959e-5 m3 (2 entries); lognormal variance with pedigree 0.0407, pedigree (1,3,5,3,1)
  (same comment as for residual softwood, wet)

## Inputs from nature
- Water, cooling, unspecified natural origin [natural resource, in water]: 0.0563 m3; name water_cooling_UNO_input; lognormal variance with pedigree 0.0407, pedigree (1,3,5,3,1)
  Average from several european fine paper producers
  Uncertainty: average from several european fine paper producers
- Water, unspecified natural origin [natural resource, in water]: 0.0524 m3; name water_UNO_input; lognormal variance with pedigree 0.0407, pedigree (1,3,5,3,1)
  Average from finnish database and several companies
  Uncertainty: average from finnish database and several companies

## Emissions to nature
- Benzo(a)pyrene [air, urban air close to ground]: 3.92e-8 kg; lognormal variance with pedigree 0.1786, pedigree (2,5,5,1,4)
  Estimation - based on respective heating modules
  Uncertainty: estimation - based on respective heating modules
- Antimony [air, urban air close to ground]: 4.16e-8 kg; lognormal variance with pedigree 0.1786, pedigree (2,5,5,1,4)
  (same comment as for Benzo(a)pyrene)
- Calcium [air, urban air close to ground]: 0.000159 kg; lognormal variance with pedigree 0.4386, pedigree (2,5,5,1,4)
  (same comment as for Benzo(a)pyrene)
- Carbon monoxide, fossil [air, urban air close to ground]: 0.00656 kg; lognormal variance with pedigree 0.7786, pedigree (2,5,5,1,4)
  (same comment as for Benzo(a)pyrene)
- Methanol [air, urban air close to ground]: 5.86e-7 kg; lognormal variance with pedigree 0.1786, pedigree (2,5,5,1,4)
  (same comment as for Benzo(a)pyrene)
- Propane [air, urban air close to ground]: 1.69e-5 kg; lognormal variance with pedigree 0.1786, pedigree (2,5,5,1,4)
  (same comment as for Benzo(a)pyrene)
- Particulates, > 10 um [air, urban air close to ground]: 0.000242 kg; lognormal variance with pedigree 0.1786, pedigree (2,5,5,1,4)
  (same comment as for Benzo(a)pyrene)
- TOC, Total Organic Carbon [water, surface water]: 0.00492593 kg; lognormal variance with pedigree 0.0807, pedigree (1,3,5,3,1)
  Calculated by default as TOC (gC) = COD/2.7 (COD measured in g O2). Should more correctly be calculated from the carbon content of the specified emissions to water.
  Uncertainty: average from finnish database and several companies
- Lead-210 [air, urban air close to ground]: 0.000112 kBq; lognormal variance with pedigree 0.4386, pedigree (2,5,5,1,4)
  (same comment as for Benzo(a)pyrene)
- Potassium-40 [air, urban air close to ground]: 3.05e-5 kBq; lognormal variance with pedigree 0.4386, pedigree (2,5,5,1,4)
  (same comment as for Benzo(a)pyrene)
- Barium [air, urban air close to ground]: 4.43e-7 kg; lognormal variance with pedigree 0.7786, pedigree (2,5,5,1,4)
  (same comment as for Benzo(a)pyrene)
- Ammonia [air, urban air close to ground]: 2.26e-5 kg; lognormal variance with pedigree 0.1786, pedigree (2,5,5,1,4)
  (same comment as for Benzo(a)pyrene)
- Bromine [air, urban air close to ground]: 8.11e-7 kg; lognormal variance with pedigree 0.1786, pedigree (2,5,5,1,4)
  (same comment as for Benzo(a)pyrene)
- Ethanol [air, urban air close to ground]: 3.45e-7 kg; lognormal variance with pedigree 0.1786, pedigree (2,5,5,1,4)
  (same comment as for Benzo(a)pyrene)
- Hydrogen sulfide [air, urban air close to ground]: 1.63e-7 kg; lognormal variance with pedigree 0.1786, pedigree (2,5,5,1,4)
  (same comment as for Benzo(a)pyrene)
- Iron [air, urban air close to ground]: 2.35e-5 kg; lognormal variance with pedigree 0.7786, pedigree (2,5,5,1,4)
  (same comment as for Benzo(a)pyrene)
- Copper [air, urban air close to ground]: 3.91e-7 kg; lognormal variance with pedigree 0.7786, pedigree (2,5,5,1,4)
  (same comment as for Benzo(a)pyrene)
- Carbon dioxide, non-fossil [air, urban air close to ground]: 1.44 kg; lognormal variance with pedigree 0.0407, pedigree (1,3,5,3,1)
  (same comment as for Water, unspecified natural origin)
- Boron [air, urban air close to ground]: 1.87e-5 kg; lognormal variance with pedigree 0.7786, pedigree (2,5,5,1,4)
  (same comment as for Benzo(a)pyrene)
- Strontium [air, urban air close to ground]: 4.78e-7 kg; lognormal variance with pedigree 0.7786, pedigree (2,5,5,1,4)
  (same comment as for Benzo(a)pyrene)
- Water [water, unspecified]: 0.0790238 m3; name water_to_water_unspecified; = water_cooling_UNO_input*(1-fraction_CW_to_air)+water_UNO_input*(1-fraction_PW_to_air); lognormal variance with pedigree 0.0807, pedigree (2,2,5,1,1)
  Calculated value based on literature values and expert opinion. See comments in the parametres' comment field.
  property wet mass 1000 kg; name WM
  property fraction, origin: salt water 0; name fraction_origin_salt_water_Ww
  property fraction, origin: fresh water 0; name fraction_origin_fresh_water_Ww
  property dry mass 0 kg; name DM
  property water in wet mass 1000 kg; name WWM
  property carbon content, fossil 0; name C_content_fossil
  property fraction, origin: unspecified 1; name fraction_origin_unspecified_Ww
  property carbon content, non-fossil 0; name C_content_non_fossil
- Formaldehyde [air, urban air close to ground]: 2.58e-6 kg; lognormal variance with pedigree 0.1786, pedigree (2,5,5,1,4)
  (same comment as for Benzo(a)pyrene)
- Selenium [air, urban air close to ground]: 1.4e-7 kg; lognormal variance with pedigree 0.7786, pedigree (2,5,5,1,4)
  (same comment as for Benzo(a)pyrene)
- Acetaldehyde [air, urban air close to ground]: 9.71e-7 kg; lognormal variance with pedigree 0.1786, pedigree (2,5,5,1,4)
  (same comment as for Benzo(a)pyrene)
- Ethene [air, urban air close to ground]: 4.96e-5 kg; lognormal variance with pedigree 0.7786, pedigree (2,5,5,1,4)
  (same comment as for Benzo(a)pyrene)
- Methane, fossil [air, urban air close to ground]: 0.000499 kg; lognormal variance with pedigree 0.1786, pedigree (2,5,5,1,4)
  (same comment as for Benzo(a)pyrene)
- Thallium [air, urban air close to ground]: 5.91e-10 kg; lognormal variance with pedigree 0.7786, pedigree (2,5,5,1,4)
  (same comment as for Benzo(a)pyrene)
- Potassium [air, urban air close to ground]: 0.000308 kg; lognormal variance with pedigree 0.7786, pedigree (2,5,5,1,4)
  (same comment as for Benzo(a)pyrene)
- Hydrocarbons, aliphatic, unsaturated [air, urban air close to ground]: 4.88e-5 kg; lognormal variance with pedigree 0.1786, pedigree (2,5,5,1,4)
  (same comment as for Benzo(a)pyrene)
- Dioxins, measured as 2,3,7,8-tetrachlorodibenzo-p-dioxin [air, urban air close to ground]: 5.61e-12 kg; lognormal variance with pedigree 0.1786, pedigree (2,5,5,1,4)
  (same comment as for Benzo(a)pyrene)
- BOD5, Biological Oxygen Demand [water, surface water]: 0.00121 kg; lognormal variance with pedigree 0.0807, pedigree (1,3,5,3,1)
  (same comment as for Water, unspecified natural origin)
- Particulates, > 2.5 um, and < 10um [air, urban air close to ground]: 7.58e-5 kg; lognormal variance with pedigree 0.2586, pedigree (2,5,5,1,4)
  (same comment as for Benzo(a)pyrene)
- Butane [air, urban air close to ground]: 1.29e-6 kg; lognormal variance with pedigree 0.4386, pedigree (2,5,5,1,4)
  (same comment as for Benzo(a)pyrene)
- Particulates, < 2.5 um [air, urban air close to ground]: 0.000679 kg; lognormal variance with pedigree 0.4386, pedigree (2,5,5,1,4)
  (same comment as for Benzo(a)pyrene)
- m-Xylene [air, urban air close to ground]: 1.57e-6 kg; lognormal variance with pedigree 0.1786, pedigree (2,5,5,1,4)
  (same comment as for Benzo(a)pyrene)
- Chromium VI [air, urban air close to ground]: 2.54e-9 kg; lognormal variance with pedigree 0.7786, pedigree (2,5,5,1,4)
  (same comment as for Benzo(a)pyrene)
- Uranium [air, urban air close to ground]: 8.85e-9 kg; lognormal variance with pedigree 0.7786, pedigree (2,5,5,1,4)
  (same comment as for Benzo(a)pyrene)
- Manganese [air, urban air close to ground]: 2.27e-6 kg; lognormal variance with pedigree 0.7786, pedigree (2,5,5,1,4)
  (same comment as for Benzo(a)pyrene)
- Scandium [air, urban air close to ground]: 1.34e-9 kg; lognormal variance with pedigree 0.7786, pedigree (2,5,5,1,4)
  (same comment as for Benzo(a)pyrene)
- Mercury [air, urban air close to ground]: 2.34e-8 kg; lognormal variance with pedigree 0.7786, pedigree (2,5,5,1,4)
  (same comment as for Benzo(a)pyrene)
- Propionic acid [air, urban air close to ground]: 3.69e-8 kg; lognormal variance with pedigree 0.1786, pedigree (2,5,5,1,4)
  (same comment as for Benzo(a)pyrene)
- Tin [air, urban air close to ground]: 3.45e-9 kg; lognormal variance with pedigree 0.7786, pedigree (2,5,5,1,4)
  (same comment as for Benzo(a)pyrene)
- Fluorine [air, urban air close to ground]: 6.53e-7 kg; lognormal variance with pedigree 0.1786, pedigree (2,5,5,1,4)
  (same comment as for Benzo(a)pyrene)
- Thorium-228 [air, urban air close to ground]: 1.34e-5 kBq; lognormal variance with pedigree 0.4386, pedigree (2,5,5,1,4)
  (same comment as for Benzo(a)pyrene)
- Pentane [air, urban air close to ground]: 2.21e-6 kg; lognormal variance with pedigree 0.1786, pedigree (2,5,5,1,4)
  (same comment as for Benzo(a)pyrene)
- Phenol, pentachloro- [air, urban air close to ground]: 1.06e-10 kg; lognormal variance with pedigree 0.1786, pedigree (2,5,5,1,4)
  (same comment as for Benzo(a)pyrene)
- AOX, Adsorbable Organic Halogen as Cl [water, surface water]: 0.00011 kg; lognormal variance with pedigree 0.0807, pedigree (1,3,5,3,1)
  (same comment as for Water, unspecified natural origin)
- Radon-222 [air, urban air close to ground]: 6.76e-6 kBq; lognormal variance with pedigree 0.4386, pedigree (2,5,5,1,4)
  (same comment as for Benzo(a)pyrene)
- Thorium [air, urban air close to ground]: 5.4e-9 kg; lognormal variance with pedigree 0.7786, pedigree (2,5,5,1,4)
  (same comment as for Benzo(a)pyrene)
- Methane, non-fossil [air, urban air close to ground]: 5.22e-6 kg; lognormal variance with pedigree 0.1786, pedigree (2,5,5,1,4)
  (same comment as for Benzo(a)pyrene)
- Sulfur dioxide [air, urban air close to ground]: 0.00049 kg; lognormal variance with pedigree 0.0407, pedigree (1,3,5,3,1)
  (same comment as for Water, unspecified natural origin)
- Dinitrogen monoxide [air, urban air close to ground]: 3.57e-5 kg; lognormal variance with pedigree 0.1786, pedigree (2,5,5,1,4)
  (same comment as for Benzo(a)pyrene)
- Nitrogen oxides [air, urban air close to ground]: 0.00168 kg; lognormal variance with pedigree 0.0807, pedigree (1,3,5,3,1)
  (same comment as for Water, unspecified natural origin)
- Phenol [air, urban air close to ground]: 8.15e-7 kg; lognormal variance with pedigree 0.1786, pedigree (2,5,5,1,4)
  (same comment as for Benzo(a)pyrene)
- Benzene, ethyl- [air, urban air close to ground]: 3.92e-7 kg; lognormal variance with pedigree 0.1786, pedigree (2,5,5,1,4)
  (same comment as for Benzo(a)pyrene)
- Chromium [air, urban air close to ground]: 1.9e-7 kg; lognormal variance with pedigree 0.7786, pedigree (2,5,5,1,4)
  (same comment as for Benzo(a)pyrene)
- DOC, Dissolved Organic Carbon [water, surface water]: 0.00492593 kg; lognormal variance with pedigree 0.0807, pedigree (1,3,5,3,1)
  Calculated as equal to TOC.
  Uncertainty: average from finnish database and several companies
- Toluene [air, urban air close to ground]: 5.98e-6 kg; lognormal variance with pedigree 0.1786, pedigree (2,5,5,1,4)
  (same comment as for Benzo(a)pyrene)
- Ethyne [air, urban air close to ground]: 8.27e-6 kg; lognormal variance with pedigree 0.1786, pedigree (2,5,5,1,4)
  (same comment as for Benzo(a)pyrene)
- Beryllium [air, urban air close to ground]: 4.43e-9 kg; lognormal variance with pedigree 0.7786, pedigree (2,5,5,1,4)
  (same comment as for Benzo(a)pyrene)
- Cadmium [air, urban air close to ground]: 6e-8 kg; lognormal variance with pedigree 0.7786, pedigree (2,5,5,1,4)
  (same comment as for Benzo(a)pyrene)
- Nitrogen [water, surface water]: 0.00013 kg; lognormal variance with pedigree 0.0807, pedigree (1,3,5,3,1)
  (same comment as for Water, unspecified natural origin)
- Silicon [air, urban air close to ground]: 0.000201 kg; lognormal variance with pedigree 0.7786, pedigree (2,5,5,1,4)
  (same comment as for Benzo(a)pyrene)
- Carbon dioxide, fossil [air, urban air close to ground]: 0.374 kg; lognormal variance with pedigree 0.0407, pedigree (1,3,5,3,1)
  (same comment as for Water, unspecified natural origin)
- Aluminium [air, urban air close to ground]: 2.2e-5 kg; lognormal variance with pedigree 0.1786, pedigree (2,5,5,1,4)
  (same comment as for Benzo(a)pyrene)
- Arsenic [air, urban air close to ground]: 1.16e-7 kg; lognormal variance with pedigree 0.1786, pedigree (2,5,5,1,4)
  (same comment as for Benzo(a)pyrene)
- Hydrocarbons, aliphatic, alkanes, unspecified [air, urban air close to ground]: 2.08e-5 kg; lognormal variance with pedigree 0.1786, pedigree (2,5,5,1,4)
  (same comment as for Benzo(a)pyrene)
- Thorium-232 [air, urban air close to ground]: 8.35e-6 kBq; lognormal variance with pedigree 0.4386, pedigree (2,5,5,1,4)
  (same comment as for Benzo(a)pyrene)
- Zinc [air, urban air close to ground]: 3.98e-6 kg; lognormal variance with pedigree 0.7786, pedigree (2,5,5,1,4)
  (same comment as for Benzo(a)pyrene)
- Titanium [air, urban air close to ground]: 5.05e-7 kg; lognormal variance with pedigree 0.7786, pedigree (2,5,5,1,4)
  (same comment as for Benzo(a)pyrene)
- Phosphorus [air, urban air close to ground]: 4.1e-6 kg; lognormal variance with pedigree 0.1786, pedigree (2,5,5,1,4)
  (same comment as for Benzo(a)pyrene)
- Acetone [air, urban air close to ground]: 1.72e-7 kg; lognormal variance with pedigree 0.1786, pedigree (2,5,5,1,4)
  (same comment as for Benzo(a)pyrene)
- Suspended solids, unspecified [water, surface water]: 0.00119 kg; lognormal variance with pedigree 0.0807, pedigree (1,3,5,3,1)
  (same comment as for Water, unspecified natural origin)
- Hydrogen chloride [air, urban air close to ground]: 1.69e-5 kg; lognormal variance with pedigree 0.1786, pedigree (2,5,5,1,4)
  (same comment as for Benzo(a)pyrene)
- COD, Chemical Oxygen Demand [water, surface water]: 0.0133 kg; lognormal variance with pedigree 0.0807, pedigree (1,3,5,3,1)
  (same comment as for Water, unspecified natural origin)
- Radium-226 [air, urban air close to ground]: 2.9e-5 kBq; lognormal variance with pedigree 0.4386, pedigree (2,5,5,1,4)
  (same comment as for Benzo(a)pyrene)
- Molybdenum [air, urban air close to ground]: 9.16e-8 kg; lognormal variance with pedigree 0.7786, pedigree (2,5,5,1,4)
  (same comment as for Benzo(a)pyrene)
- Water [air, unspecified]: 0.0296763 m3; name water_to_air_unspecified; = (water_cooling_UNO_input*fraction_CW_to_air)+(water_UNO_input*fraction_PW_to_air); lognormal variance with pedigree 0.0807, pedigree (2,2,5,1,1)
  (same comment as for Water)
  property fraction, origin: salt water 0; name fraction_origin_salt_water
  property fraction, origin: unspecified 1; name fraction_origin_unspecified
  property fraction, origin: fresh water 0; name fraction_origin_fresh_water
- Acetic acid [air, urban air close to ground]: 9.66e-7 kg; lognormal variance with pedigree 0.1786, pedigree (2,5,5,1,4)
  (same comment as for Benzo(a)pyrene)
- Polonium-210 [air, urban air close to ground]: 0.000207 kBq; lognormal variance with pedigree 0.4386, pedigree (2,5,5,1,4)
  (same comment as for Benzo(a)pyrene)
- Nickel [air, urban air close to ground]: 9.23e-7 kg; lognormal variance with pedigree 0.7786, pedigree (2,5,5,1,4)
  (same comment as for Benzo(a)pyrene)
- Iodine [air, urban air close to ground]: 7.69e-8 kg; lognormal variance with pedigree 0.1786, pedigree (2,5,5,1,4)
  (same comment as for Benzo(a)pyrene)
- Lead [air, urban air close to ground]: 4.72e-7 kg; lognormal variance with pedigree 0.7786, pedigree (2,5,5,1,4)
  (same comment as for Benzo(a)pyrene)
- Radium-228 [air, urban air close to ground]: 2.99e-5 kBq; lognormal variance with pedigree 0.4386, pedigree (2,5,5,1,4)
  (same comment as for Benzo(a)pyrene)
- Cobalt [air, urban air close to ground]: 1e-7 kg; lognormal variance with pedigree 0.7786, pedigree (2,5,5,1,4)
  (same comment as for Benzo(a)pyrene)
- Phosphorus [water, surface water]: 1.3e-5 kg; lognormal variance with pedigree 0.0807, pedigree (1,3,5,3,1)
  (same comment as for Water, unspecified natural origin)
- Carbon monoxide, non-fossil [air, urban air close to ground]: 0.000627 kg; lognormal variance with pedigree 0.7786, pedigree (2,5,5,1,4)
  (same comment as for Benzo(a)pyrene)
- Xylene [air, urban air close to ground]: 5.4e-6 kg; lognormal variance with pedigree 0.1786, pedigree (2,5,5,1,4)
  (same comment as for Benzo(a)pyrene)
- Benzene [air, urban air close to ground]: 2.09e-5 kg; lognormal variance with pedigree 0.1786, pedigree (2,5,5,1,4)
  (same comment as for Benzo(a)pyrene)
- Hydrocarbons, aromatic [air, urban air close to ground]: 1.72e-7 kg; lognormal variance with pedigree 0.1786, pedigree (2,5,5,1,4)
  (same comment as for Benzo(a)pyrene)
- Sodium [air, urban air close to ground]: 2.17e-5 kg; lognormal variance with pedigree 0.7786, pedigree (2,5,5,1,4)
  (same comment as for Benzo(a)pyrene)
- Propene [air, urban air close to ground]: 8.27e-6 kg; lognormal variance with pedigree 0.1786, pedigree (2,5,5,1,4)
  (same comment as for Benzo(a)pyrene)
- NMVOC, non-methane volatile organic compounds, unspecified origin [air, urban air close to ground]: 3.66e-5 kg; lognormal variance with pedigree 0.1786, pedigree (2,5,5,1,4)
  (same comment as for Benzo(a)pyrene)
- Uranium-238 [air, urban air close to ground]: 2.43e-5 kBq; lognormal variance with pedigree 0.4386, pedigree (2,5,5,1,4)
  (same comment as for Benzo(a)pyrene)
- PAH, polycyclic aromatic hydrocarbons [air, urban air close to ground]: 1.64e-7 kg; lognormal variance with pedigree 0.1786, pedigree (2,5,5,1,4)
  (same comment as for Benzo(a)pyrene)
- Benzene, hexachloro- [air, urban air close to ground]: 9.4e-14 kg; lognormal variance with pedigree 0.1786, pedigree (2,5,5,1,4)
  (same comment as for Benzo(a)pyrene)
- Magnesium [air, urban air close to ground]: 1.8e-5 kg; lognormal variance with pedigree 0.7786, pedigree (2,5,5,1,4)
  (same comment as for Benzo(a)pyrene)
- Vanadium [air, urban air close to ground]: 3.21e-6 kg; lognormal variance with pedigree 0.7786, pedigree (2,5,5,1,4)
  (same comment as for Benzo(a)pyrene)
- Ethane [air, urban air close to ground]: 2.48e-5 kg; lognormal variance with pedigree 0.1786, pedigree (2,5,5,1,4)
  (same comment as for Benzo(a)pyrene)
- Chlorine [air, urban air close to ground]: 2.35e-6 kg; lognormal variance with pedigree 0.4386, pedigree (2,5,5,1,4)
  (same comment as for Benzo(a)pyrene)
- Radon-220 [air, urban air close to ground]: 6.76e-6 kBq; lognormal variance with pedigree 0.4386, pedigree (2,5,5,1,4)
  (same comment as for Benzo(a)pyrene)
- Hydrogen fluoride [air, urban air close to ground]: 6.75e-7 kg; lognormal variance with pedigree 0.1786, pedigree (2,5,5,1,4)
  (same comment as for Benzo(a)pyrene)

## Sampling procedure
Based on literature and statistics (see dataset field “Published Source”)

## Extrapolations
This dataset has been extrapolated from year 2000 to the year of the calculation (2021). The uncertainty has been adjusted accordingly.

## Review by Hans-Jörg Althaus 2003-08-26
passed
