# treatment of waste cement-fibre slab, municipal incineration

Dataset: EcoSpold 2, unit process
Geography: RoW
Time period: 2006-01-01 to 2021-12-31
Technology level: current
Classification: ISIC rev.4 ecoinvent: 3821:Treatment and disposal of non-hazardous waste
Synonyms: Siedlungsabfallverbrennung; Kehrichtverbrennung; municipal waste incineration
Scenario: Business-as-Usual
System model: Allocation, cut-off by classification
Share of production covered: 1.8 %
Generated by: Gabor Doka
Published in: Doka G. 2013
Database: ecoinvent
isCopyrightProtected: true
accessRestrictedTo: 1

## General comment
This dataset represents the activity of waste disposal of waste cement-fibre slab, dismantled in a municipal solid waste incinerator (MSWI) // Recommended use of this dataset: For disposal of bulk or small parts of cement-fibre slabs (waste building product) // Inventoried waste contains 36% natural wood; 64% cement hydrated; . // Waste composition (wet, in ppm): upper heating value 5.531 MJ/kg; lower heating value 5.036 MJ/kg; H2O 66489; O 564550; H 60725; C 144530; S 3205.8; N 355.31; P 187.68; B 0.75986; Cl 119.14; Br n.a.; F 7.5983; I n.a.; Ag n.a.; As 2.3252; Ba n.a.; Cd 0.46058; Co 1.1548; Cr 13.924; Cu 3.9646; Hg 0.12607; Mn 140.57; Mo 0.29887; Ni 10.737; Pb 28.83; Sb 0.056384; Se n.a.; Sn 0.85073; V 14.805; Zn 57.951; Be n.a.; Sc n.a.; Sr n.a.; Ti n.a.; Tl 0.12324; W n.a.; Si 24593; Fe 6434.8; Ca 117210; Al 8583.5; K 23.548; Mg 71.121; Na 2638.9; // Share of carbon in waste that is biogenic 100%. // Share of metals in waste not oxidised and bulk-recyclable (exclude very small or thin parts) Iron: 0%; Alu: 0%; Copper: 0%. // One kg of this waste produces 0.3593 kg of slag and 0.0008456 kg of residues, which are landfilled. Additional solidification with 0.0003382 kg of cement. // Net energy production: 0.64MJ/kg electric energy and 1.41MJ/kg thermal energy. // Recovery of metal scrap to recycling: 0g iron scrap, 0g aluminium scrap, 0g copper scrap.

## Included activities start
waste incineration from waste reception gate and delivery into waste bunker at incinerator plant site (without transports to the incinerator)

## Included activities end
Waste-specific short-term emissions to water from leachate. Long-term emissions from landfill to ground water.

## Geography
Specific to the technology mix encountered in Switzerland in 2010. Well applicable to modern incineration practices in Europe, North America or Japan.

## Technology
average Swiss MSWI plants in 2010 (grate incinerators) with electrostatic precipitator for fly ash (ESP), wet flue gas scrubber and 25% SNCR , 42.77% SCR-high dust , 32.68% SCR-low dust -DeNOx facilities and 0% without Denox (weighted according to mass of burnt waste, representing Swiss average). Efficiency of iron scrap separation from slag : 58%. Efficiency of non-ferrous scrap separation from slag : 31%. Gross electric efficiency technology mix 15.84% and Gross thermal efficiency technology mix 28.51%

## Time period
Waste composition as given in literature reference, theoretical data or other source. Transfer coefficients for modern MSWI.

## Reference product
- waste cement-fibre slab, dismantled: -1 kg; By-product classification Waste; CPC 39: Wastes or scraps
  Main reference product of this activity (supply of disposal service).
  production volume 5.4115e8 kg
    based on estimate on MSW in WTE globally and share of building products in Swiss MSW based on an unqualified estimate of building demand of Swiss population.
  property price 0 EUR2005
    Waste products are assigned a price of zero as they are assumed to require further treatment.
  property carbon content 0.144
    carbon content on a dry matter basis (reserved; not for manual entry)
  properties: water in wet mass 0 kg, water content 0, wet mass 1 kg, carbon content, fossil 0, dry mass 1 kg, carbon content, non-fossil 0.144, carbon allocation 0.144 kg

## By-products
- electricity, for reuse in municipal waste incineration only: 0 kWh; name E_el_prod_MSWI; CPC 17100: Electrical energy; By-product classification allocatable product; pedigree (1,1,1,1,1)
  Net electricity generated from this waste and used in internal MSWI plant energy redistribution.
  Uncertainty: uncertainty is calculated from uncertainties in waste composition and uncertainties in energy efficiency and the uncertainty in internal energy demand
  production volume 9.6114e7 kWh
    calculated in proportion to reference product waste input to incinerator
  property exergy 3.6 MJ; name E_el_prod_MSWI_exergy
    This exergy property is based on the exergy content of the product.
  property true value relation 3.6; name E_el_prod_MSWI_true_value_relation
    property to calculate "true value" from
  property price 0.1 EUR2005; name E_el_prod_MSWI_price_EUR2005
    Estimated to be the same price as in case of electricity, medium voltage.
- heat, for reuse in municipal waste incineration only: 0 MJ; name E_th_prod_MSWI; By-product classification allocatable product; CPC 17300: Steam and hot water; pedigree (1,1,1,1,1)
  (same comment as for electricity, for reuse in municipal waste incineration only)
  production volume 7.6308e8 MJ
    calculated in proportion to reference product waste input to incinerator
  property exergy 0.1842 MJ; name E_th_prod_MSWI_exergy
    This exergy property is based on the exergy content of the product.
  property true value relation 0.1842; name E_th_prod_MSWI_true_value_relation
    property to calculate "true value" from
  property price 0.0106 EUR2005; name E_th_prod_MSWI_price_EUR2005
    Average European district heat price from Ecoheatcool and Euroheat 2005-2006, Ecoheat Work package 1: The European heat market. Final report. 10.6 EUR/GJ i s the price of district heat. http://www.solarthermalworld.org/files/Ecoheatcool%20WP1%20Web.pdf?download

## Inputs from technosphere
- transport, freight, lorry, unspecified: 0 metric ton*km; pedigree (1,1,1,1,1)
  Transport services to transport incineration residues to landfills.
  Uncertainty: uncertainty calculated from uncertainty of the waste composition of this waste, uncertainty of transfer coefficients and the uncertainty in generic transportation distances
- waste cement, hydrated: 0 kg; pedigree (1,1,1,1,1)
  Hydrated cement output for solidification of landfilled residual material.
  Uncertainty: Uncertainty calculated from uncertainty of the waste composition of this waste and transfer coefficients in the incinerator and of the solidification recipe.
  production volume 0 kg
    calculated in proportion to reference product waste input to incinerator
  properties: wet mass 1 kg, dry mass 1 kg
- chemical, organic: 1.9245e-6 kg; lognormal variance with pedigree 1.8271, pedigree (1,1,4,1,1)
  Auxilliary inputs for the wastewater treatment stage of the incinerator plant. Proxy for (pure) Trisodium-trimercapto-s-triazine (CAS 17766-26-6), used as 15% diluted solution, aka TMT15.
  Uncertainty: uncertainty calculated from uncertainty in average TMT15 input, of transfer coefficients in the incinerator, and the uncertainty of the waste composition of this waste
  properties: dry mass 1 kg, heating value, net 19.03 MJ, carbon content, fossil 0.628, wet mass 1 kg
- municipal waste incineration facility: 2.5e-10 unit
  Demands per kilogram waste.
- titanium dioxide: 3.582e-6 kg; lognormal variance with pedigree 1.5695, pedigree (1,1,4,1,1)
  Input to DeNOx stage (TiO2 catalyst carrier)
  Uncertainty: uncertainty calculated from uncertainty in average DeNOx input, uncertainty in the share of thermal NOx, uncertainty of nitrogen content in average municipal waste and the uncertainty in nitrogen content in *this* waste.
  properties: dry mass 1 kg, wet mass 1 kg
- water, decarbonised: 0 kg; pedigree (1,1,1,1,1)
  Incinerator process water used in flue gas scrubber stage.
  Uncertainty: uncertainty calculated from uncertainty in average water input, and the uncertainty of the waste composition of this waste
  properties: wet mass 1 kg
- heat, district or industrial, natural gas: 0 MJ; pedigree (1,1,1,1,1)
  Input to DeNOx stage, to heat up flue gas in low-dust SCR.
  Uncertainty: uncertainty calculated from uncertainty in average DeNOx input, uncertainty in the share of thermal NOx, uncertainty of nitrogen content in average municipal waste and the uncertainty in nitrogen content in *this* waste.
  properties: heating value, net 1 MJ
- cement, unspecified: 0 kg; pedigree (1,1,1,1,1)
  Cement required for solidification of landfilled residual material.
  Uncertainty: Uncertainty calculated from uncertainty of the waste composition of this waste, of transfer coefficients in the incinerator and of the solidification recipe.
  properties: wet mass 1 kg, dry mass 1 kg
- residual material landfill: 1.7616e-12 unit; lognormal variance with pedigree 0.025893, pedigree (1,1,4,1,1)
  Landfill infrastructure required for landfilling of incineration residues.
  Uncertainty: uncertainty is calculated from uncertainties in waste composition and transfer coefficients in incinerator
- hydrochloric acid, without water, in 30% solution state: 2.7211e-6 kg; lognormal variance with pedigree 0.14294, pedigree (1,1,4,1,1)
  Auxilliary inputs for the wastewater treatment stage of the incinerator plant.
  Uncertainty: uncertainty calculated from uncertainty in average HCl input, of transfer coefficients in the incinerator, and the uncertainty of the waste composition of this waste
  properties: heating value, net 3.32 MJ, wet mass 1 kg, dry mass 1 kg
- quicklime, milled, packed: 6.5649e-5 kg; lognormal variance with pedigree 0.90681, pedigree (1,1,4,1,1)
  Auxilliary inputs for the flue gas treatment stage of the incinerator plant.
  Uncertainty: uncertainty calculated from uncertainty in average CaO input, of transfer coefficients in the incinerator, and the uncertainty of the waste composition of this waste
  properties: dry mass 0.99 kg, wet mass 1 kg, water content 0.010101
- slag landfill: 6.3832e-10 unit; lognormal variance with pedigree 0.028648, pedigree (1,1,4,1,1)
  Landfill infrastructure required for landfilling of bottom ash.
  Uncertainty: uncertainty is calculated from uncertainties in waste composition and transfer coefficients in incinerator
- process-specific burdens, slag landfill: 0 kg; pedigree (1,1,1,1,1)
  Mass-specific expenditures required for landfilling of bottom ash.
  Uncertainty: uncertainty is calculated from uncertainties in waste composition and transfer coefficients in incinerator
- ammonia, anhydrous, liquid: 0 kg; pedigree (1,1,1,1,1)
  Input to DeNOx stage (100% NH3).
  Uncertainty: uncertainty calculated from uncertainty in average DeNOx input, uncertainty in the share of thermal NOx, uncertainty of nitrogen content in average municipal waste and the uncertainty in nitrogen content in *this* waste.
  properties: dry mass 1 kg, wet mass 1 kg
- sodium hydroxide, without water, in 50% solution state: 2.8165e-5 kg; lognormal variance with pedigree 0.40074, pedigree (1,1,4,1,1)
  Auxilliary inputs for the flue gas treatment stage of the incinerator plant.
  Uncertainty: uncertainty calculated from uncertainty in average NaOH input, of transfer coefficients in the incinerator, and the uncertainty of the waste composition of this waste
  properties: dry mass 1 kg, heating value, net 3.03 MJ, wet mass 1 kg
- process-specific burdens, residual material landfill: 0 kg; pedigree (1,1,1,1,1)
  Mass-specific expenditures required for landfilling of incineration residues.
  Uncertainty: uncertainty is calculated from uncertainties in waste composition and transfer coefficients in incinerator
- iron (III) chloride, without water, in 40% solution state: 7.8796e-7 kg; lognormal variance with pedigree 0.54147, pedigree (1,1,4,1,1)
  Auxilliary inputs for the wastewater treatment stage of the incinerator plant.
  Uncertainty: uncertainty calculated from uncertainty in average FeCl3 input, of transfer coefficients in the incinerator, and the uncertainty of the waste composition of this waste
  properties: dry mass 1 kg, wet mass 1 kg
- chromium oxide, flakes: 7.3103e-8 kg; lognormal variance with pedigree 1.5695, pedigree (1,1,4,1,1)
  Input to DeNOx stage.
  Uncertainty: uncertainty calculated from uncertainty in average DeNOx input, uncertainty in the share of thermal NOx, uncertainty of nitrogen content in average municipal waste and the uncertainty in nitrogen content in *this* waste.
  properties: dry mass 1 kg, wet mass 1 kg
- chemical, inorganic: 1.0352e-5 kg; lognormal variance with pedigree 0.14294, pedigree (1,1,4,1,1)
  Auxilliary inputs for the wastewater treatment stage of the incinerator plant. Proxy for Polyelectrolyte.
  Uncertainty: uncertainty calculated from uncertainty in average Polyelectrolyte input, of transfer coefficients in the incinerator, and the uncertainty of the waste composition of this waste
  properties: carbon content, fossil 0.003, wet mass 1 kg, dry mass 1 kg
- transport, freight, lorry, unspecified: 0.00164749, 0.000257936, 0.0124906 metric ton*km (3 entries); lognormal variance with pedigree 0.028552, pedigree (1,1,4,1,1)
  (same comment as for transport, freight, lorry, unspecified)
- waste cement, hydrated: -0.000239193, -0.000606387 kg (2 entries); lognormal variance with pedigree 0.034977, pedigree (1,1,4,1,1)
  (same comment as for waste cement, hydrated)
  production volume 457580 kg
- water, decarbonised: 0.00110663, 0.00287945, 0.0116135, 0.00283595, 0.000571714, 0.0018799, 0.000103782, 0.00147887, 0.0034449, 0.0216089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 kg (12 entries); lognormal variance with pedigree 0.54147, pedigree (1,1,4,1,1)
  (same comment as for water, decarbonised)
- heat, district or industrial, natural gas: 0.000118992, 0.00285129, 0.00772072 MJ (3 entries); lognormal variance with pedigree 1.1787, pedigree (1,1,4,1,1)
  (same comment as for heat, district or industrial, natural gas)
- cement, unspecified: 4.8839e-5, 1.01619e-5, 7.44292e-7, 2.12148e-6, 4.79779e-5, 1.41213e-6, 1.55094e-5, 1.87646e-6, 0.000209587 kg (9 entries); lognormal variance with pedigree 0.034977, pedigree (1,1,4,1,1)
  (same comment as for cement, unspecified)
- process-specific burdens, slag landfill: 0.101569, 0.257491 kg (2 entries); lognormal variance with pedigree 0.028648, pedigree (1,1,4,1,1)
  (same comment as for process-specific burdens, slag landfill)
- ammonia, anhydrous, liquid: 1.19842e-5, 1.03019e-6, 1.6027e-6, 3.17553e-6, 3.11118e-6, 3.26085e-7, 1.45772e-6, 3.44854e-5 kg (8 entries); lognormal variance with pedigree 1.1787, pedigree (1,1,4,1,1)
  (same comment as for ammonia, anhydrous, liquid)
- process-specific burdens, residual material landfill: 0.000239193, 0.000606387 kg (2 entries); lognormal variance with pedigree 0.025893, pedigree (1,1,4,1,1)
  (same comment as for process-specific burdens, residual material landfill)

## Inputs from nature
- Oxygen [natural resource, in air]: 0.6213 kg; lognormal variance with pedigree 0.053057, pedigree (1,1,4,1,1)
  Oxygen from ambient air needed to combust and oxidise this waste. Net demand, i.e. without O2 leaving the plant in flue gas uncombusted.
  Uncertainty: uncertainty is calculated from uncertainties in waste composition and transfer coefficients to flue gas and soild residues in incinerator

## Emissions to nature
- Lead [water, ground-, long-term]: 2.3648e-5 kg; lognormal variance with pedigree 1.9034, pedigree (1,1,4,1,1)
  Long-term emissions from landfilling of incineration residues.
  Uncertainty: uncertainty is calculated from uncertainties in waste composition and transfer coefficients in incinerator and landfills.
- DOC, Dissolved Organic Carbon [water, ground-, long-term]: 0.00042948 kg; lognormal variance with pedigree 0.067834, pedigree (1,1,4,1,1)
  (same comment as for Lead)
- TOC, Total Organic Carbon [water, ground-, long-term]: 0.00042948 kg; lognormal variance with pedigree 0.067834, pedigree (1,1,4,1,1)
  (same comment as for Lead)
- Carbon dioxide, non-fossil [air, urban air close to ground]: 0.52662 kg; lognormal variance with pedigree 0.098072, pedigree (1,1,4,1,1)
  Emission to air from waste composition and transfer coefficients.
  Uncertainty: uncertainty is calculated from uncertainties in waste composition and transfer coefficients in incinerator
- Cadmium, ion [water, surface water]: 2.0675e-10 kg; lognormal variance with pedigree 2.3851, pedigree (1,1,4,1,1)
  Emissions to water from waste composition and transfer coefficients in incinerator and landfills.
  Uncertainty: uncertainty is calculated from uncertainties in waste composition and transfer coefficients in incinerator and landfills
- Zinc [air, urban air close to ground]: 4.2967e-9 kg; lognormal variance with pedigree 1.0755, pedigree (1,1,4,1,1)
  (same comment as for Carbon dioxide, non-fossil)
- Magnesium [air, urban air close to ground]: 7.5016e-8 kg; lognormal variance with pedigree 1.0387, pedigree (1,1,4,1,1)
  (same comment as for Carbon dioxide, non-fossil)
- Antimony [water, surface water]: 3.8022e-11 kg; lognormal variance with pedigree 2.6339, pedigree (1,1,4,1,1)
  (same comment as for Cadmium, ion)
- Magnesium [water, ground-, long-term]: 6.2984e-5 kg; lognormal variance with pedigree 0.98549, pedigree (1,1,4,1,1)
  (same comment as for Lead)
- Boron [water, surface water]: 5.9536e-9 kg; lognormal variance with pedigree 1.8284, pedigree (1,1,4,1,1)
  (same comment as for Cadmium, ion)
- Ammonia [air, urban air close to ground]: 6.7221e-8 kg; lognormal variance with pedigree 1.2404, pedigree (1,1,4,1,1)
  Nitrogen species emitted to air after DeNOx stage.
  Uncertainty: uncertainty calculated from uncertainty in average N-emissions and uncertainty in the share of thermal NOx and the uncertainty in nitrogen content in *this* waste.
- Manganese [air, urban air close to ground]: 3.652e-9 kg; lognormal variance with pedigree 0.96512, pedigree (1,1,4,1,1)
  (same comment as for Carbon dioxide, non-fossil)
- BOD5, Biological Oxygen Demand [water, ground-, long-term]: 0.00035502 kg; lognormal variance with pedigree 0.067834, pedigree (1,1,4,1,1)
  (same comment as for Lead)
- Fluoride [water, ground-, long-term]: 6.8125e-6 kg; lognormal variance with pedigree 0.79995, pedigree (1,1,4,1,1)
  (same comment as for Lead)
- Nitrate [water, surface water]: 4.5294e-6 kg; lognormal variance with pedigree 0.56599, pedigree (1,1,4,1,1)
  (same comment as for Cadmium, ion)
- Boron [water, ground-, long-term]: 6.4618e-7 kg; lognormal variance with pedigree 1.4316, pedigree (1,1,4,1,1)
  (same comment as for Lead)
- Phenol, pentachloro- [air, urban air close to ground]: 2.0989e-11 kg; lognormal variance with pedigree 0.13397, pedigree (1,1,4,1,1)
  Incomplete combustion product emitted to air.
  Uncertainty: uncertainty calculated from uncertainty in average operation emissions, and the uncertainty of the flue gas volume from this waste.
- Molybdenum [air, urban air close to ground]: 3.9325e-10 kg; lognormal variance with pedigree 1.748, pedigree (1,1,4,1,1)
  (same comment as for Carbon dioxide, non-fossil)
- Phosphate [water, ground-, long-term]: 1.1262e-5 kg; lognormal variance with pedigree 5.4527, pedigree (1,1,4,1,1)
  (same comment as for Lead)
- Chloride [water, ground-, long-term]: 2.7608e-5 kg; lognormal variance with pedigree 0.94118, pedigree (1,1,4,1,1)
  (same comment as for Lead)
- Particulates, < 2.5 um [air, urban air close to ground]: 5.7542e-6 kg; lognormal variance with pedigree 0.50009, pedigree (1,1,4,1,1)
  (same comment as for Phenol, pentachloro-)
- Sulfur dioxide [air, urban air close to ground]: 4.8052e-7 kg; lognormal variance with pedigree 0.55175, pedigree (1,1,4,1,1)
  (same comment as for Carbon dioxide, non-fossil)
- Aluminium [air, urban air close to ground]: 1.8586e-12 kg; lognormal variance with pedigree 0.55141, pedigree (1,1,4,1,1)
  (same comment as for Carbon dioxide, non-fossil)
- Heat, waste [water, surface water]: 0.97605 MJ; lognormal variance with pedigree 0.21095, pedigree (1,1,4,1,1)
  Waste heat generated from heating value of this waste plus any electricity required to process it.
  Uncertainty: uncertainty is calculated from uncertainties in waste composition and uncertainties in energy efficiency and the uncertainty in internal energy demand
- Manganese [water, surface water]: 9.1924e-9 kg; lognormal variance with pedigree 1.6492, pedigree (1,1,4,1,1)
  (same comment as for Cadmium, ion)
- Potassium [air, urban air close to ground]: 1.1634e-7 kg; lognormal variance with pedigree 1.171, pedigree (1,1,4,1,1)
  (same comment as for Carbon dioxide, non-fossil)
- Cobalt [water, ground-, long-term]: 1.1488e-6 kg; lognormal variance with pedigree 1.5568, pedigree (1,1,4,1,1)
  (same comment as for Lead)
- Thallium [water, ground-, long-term]: 1.2316e-7 kg; lognormal variance with pedigree 1.8455, pedigree (1,1,4,1,1)
  (same comment as for Lead)
- Tin, ion [water, ground-, long-term]: 8.4599e-7 kg; lognormal variance with pedigree 1.5983, pedigree (1,1,4,1,1)
  (same comment as for Lead)
- Cyanide [air, urban air close to ground]: 1.1385e-6 kg; lognormal variance with pedigree 1.5757, pedigree (1,1,4,1,1)
  (same comment as for Ammonia)
- Water [air, urban air close to ground]: 0.0010808 m3; lognormal variance with pedigree 2.1077, pedigree (1,1,4,1,1)
  Water vapour from waste humidity, hydrogen oxidation and part of the process water.
  Uncertainty: Uncertainty calculated from uncertainty in waste composition, process water input and the uncertainty of fraction to air.
- Nickel [air, urban air close to ground]: 2.5136e-10 kg; lognormal variance with pedigree 1.31, pedigree (1,1,4,1,1)
  (same comment as for Carbon dioxide, non-fossil)
- Iron, ion [water, surface water]: 5.3941e-8 kg; lognormal variance with pedigree 1.7104, pedigree (1,1,4,1,1)
  (same comment as for Cadmium, ion)
- Benzene [air, urban air close to ground]: 4.8196e-8 kg; lognormal variance with pedigree 0.13397, pedigree (1,1,4,1,1)
  (same comment as for Phenol, pentachloro-)
- Aluminium [water, surface water]: 1.13e-7 kg; lognormal variance with pedigree 1.6154, pedigree (1,1,4,1,1)
  (same comment as for Cadmium, ion)
- Arsenic [air, urban air close to ground]: 1.1904e-9 kg; lognormal variance with pedigree 1.4912, pedigree (1,1,4,1,1)
  (same comment as for Carbon dioxide, non-fossil)
- Sodium, ion [water, surface water]: 0.0003228 kg; lognormal variance with pedigree 0.64062, pedigree (1,1,4,1,1)
  (same comment as for Cadmium, ion)
- Arsenic, ion [water, ground-, long-term]: 2.2155e-6 kg; lognormal variance with pedigree 1.4676, pedigree (1,1,4,1,1)
  (same comment as for Lead)
- Phosphate [water, surface water]: 3.208e-8 kg; lognormal variance with pedigree 1.0754, pedigree (1,1,4,1,1)
  (same comment as for Cadmium, ion)
- Copper [air, urban air close to ground]: 1.3678e-10 kg; lognormal variance with pedigree 1.4407, pedigree (1,1,4,1,1)
  (same comment as for Carbon dioxide, non-fossil)
- DOC, Dissolved Organic Carbon [water, surface water]: 7.3832e-5 kg; lognormal variance with pedigree 0.11748, pedigree (1,1,4,1,1)
  (same comment as for Cadmium, ion)
- Arsenic, ion [water, surface water]: 1.0854e-7 kg; lognormal variance with pedigree 1.2992, pedigree (1,1,4,1,1)
  (same comment as for Cadmium, ion)
- Cadmium, ion [water, ground-, long-term]: 3.9346e-7 kg; lognormal variance with pedigree 1.9292, pedigree (1,1,4,1,1)
  (same comment as for Lead)
- Phosphorus [air, urban air close to ground]: 3.9865e-8 kg; lognormal variance with pedigree 0.91365, pedigree (1,1,4,1,1)
  (same comment as for Carbon dioxide, non-fossil)
- Silicon [water, ground-, long-term]: 0.00021042 kg; lognormal variance with pedigree 5.9383, pedigree (1,1,4,1,1)
  (same comment as for Lead)
- Tin, ion [water, surface water]: 1.3608e-11 kg; lognormal variance with pedigree 2.7963, pedigree (1,1,4,1,1)
  (same comment as for Cadmium, ion)
- Chloride [water, surface water]: 9.1468e-5 kg; lognormal variance with pedigree 0.79234, pedigree (1,1,4,1,1)
  (same comment as for Cadmium, ion)
- Cadmium [air, urban air close to ground]: 3.6793e-11 kg; lognormal variance with pedigree 1.7127, pedigree (1,1,4,1,1)
  (same comment as for Carbon dioxide, non-fossil)
- Carbon monoxide, non-fossil [air, urban air close to ground]: 8.1928e-5 kg; lognormal variance with pedigree 0.92367, pedigree (1,1,4,1,1)
  (same comment as for Phenol, pentachloro-)
- Calcium [air, urban air close to ground]: 3.7083e-7 kg; lognormal variance with pedigree 0.17783, pedigree (1,1,4,1,1)
  (same comment as for Carbon dioxide, non-fossil)
- Chromium, ion [water, surface water]: 1.8388e-11 kg; lognormal variance with pedigree 1.3001, pedigree (1,1,4,1,1)
  (same comment as for Cadmium, ion)
- Cobalt [air, urban air close to ground]: 5.6812e-11 kg; lognormal variance with pedigree 1.5989, pedigree (1,1,4,1,1)
  (same comment as for Carbon dioxide, non-fossil)
- Chromium [air, urban air close to ground]: 2.0679e-10 kg; lognormal variance with pedigree 1.2808, pedigree (1,1,4,1,1)
  (same comment as for Carbon dioxide, non-fossil)
- Copper, ion [water, ground-, long-term]: 3.8051e-6 kg; lognormal variance with pedigree 1.3889, pedigree (1,1,4,1,1)
  (same comment as for Lead)
- TOC, Total Organic Carbon [water, surface water]: 7.3832e-5 kg; lognormal variance with pedigree 0.11748, pedigree (1,1,4,1,1)
  (same comment as for Cadmium, ion)
- Iron [air, urban air close to ground]: 9.9865e-12 kg; lognormal variance with pedigree 0.56554, pedigree (1,1,4,1,1)
  (same comment as for Carbon dioxide, non-fossil)
- Toluene [air, urban air close to ground]: 9.6392e-8 kg; lognormal variance with pedigree 0.13397, pedigree (1,1,4,1,1)
  (same comment as for Phenol, pentachloro-)
- COD, Chemical Oxygen Demand [water, ground-, long-term]: 0.0010854 kg; lognormal variance with pedigree 0.067834, pedigree (1,1,4,1,1)
  (same comment as for Lead)
- Mercury [air, urban air close to ground]: 3.2639e-9 kg; lognormal variance with pedigree 1.8463, pedigree (1,1,4,1,1)
  (same comment as for Carbon dioxide, non-fossil)
- Mercury [water, surface water]: 4.1198e-10 kg; lognormal variance with pedigree 1.8331, pedigree (1,1,4,1,1)
  (same comment as for Cadmium, ion)
- Water [water, surface water]: 0.00045582 m3; lognormal variance with pedigree 2.2393, pedigree (1,1,4,1,1)
  Process water released to surface water.
  Uncertainty: uncertainty calculated from uncertainty in process water input and the uncertainty of fraction to surface water.
- Nickel, ion [water, surface water]: 6.7696e-9 kg; lognormal variance with pedigree 1.9764, pedigree (1,1,4,1,1)
  (same comment as for Cadmium, ion)
- Magnesium [water, surface water]: 3.3185e-7 kg; lognormal variance with pedigree 1.1292, pedigree (1,1,4,1,1)
  (same comment as for Cadmium, ion)
- COD, Chemical Oxygen Demand [water, surface water]: 0.00016907 kg; lognormal variance with pedigree 0.11706, pedigree (1,1,4,1,1)
  (same comment as for Cadmium, ion)
- Zinc, ion [water, surface water]: 2.1126e-9 kg; lognormal variance with pedigree 1.8275, pedigree (1,1,4,1,1)
  (same comment as for Cadmium, ion)
- Potassium, ion [water, surface water]: 5.126e-6 kg; lognormal variance with pedigree 0.73301, pedigree (1,1,4,1,1)
  (same comment as for Cadmium, ion)
- Molybdenum [water, ground-, long-term]: 2.1685e-7 kg; lognormal variance with pedigree 1.7309, pedigree (1,1,4,1,1)
  (same comment as for Lead)
- Antimony [water, ground-, long-term]: 8.1592e-9 kg; lognormal variance with pedigree 2.8639, pedigree (1,1,4,1,1)
  (same comment as for Lead)
- Sodium [air, urban air close to ground]: 4.1591e-8 kg; lognormal variance with pedigree 0.58683, pedigree (1,1,4,1,1)
  (same comment as for Carbon dioxide, non-fossil)
- Benzene, hexachloro- [air, urban air close to ground]: 1.0078e-10 kg; lognormal variance with pedigree 0.13397, pedigree (1,1,4,1,1)
  (same comment as for Phenol, pentachloro-)
- Vanadium, ion [water, ground-, long-term]: 1.447e-6 kg; lognormal variance with pedigree 2.5758, pedigree (1,1,4,1,1)
  (same comment as for Lead)
- Lead [air, urban air close to ground]: 8.2652e-10 kg; lognormal variance with pedigree 1.1783, pedigree (1,1,4,1,1)
  (same comment as for Carbon dioxide, non-fossil)
- Benzo(a)pyrene [air, urban air close to ground]: 1.0725e-12 kg; lognormal variance with pedigree 0.50009, pedigree (1,1,4,1,1)
  (same comment as for Phenol, pentachloro-)
- Fluoride [water, surface water]: 5.8099e-7 kg; lognormal variance with pedigree 0.85855, pedigree (1,1,4,1,1)
  (same comment as for Cadmium, ion)
- BOD5, Biological Oxygen Demand [water, surface water]: 0.0001669 kg; lognormal variance with pedigree 0.12025, pedigree (1,1,4,1,1)
  (same comment as for Cadmium, ion)
- Dinitrogen monoxide [air, urban air close to ground]: 5.2994e-6 kg; lognormal variance with pedigree 1.5757, pedigree (1,1,4,1,1)
  (same comment as for Ammonia)
- Nickel, ion [water, ground-, long-term]: 1.0722e-5 kg; lognormal variance with pedigree 1.266, pedigree (1,1,4,1,1)
  (same comment as for Lead)
- Nitrate [water, ground-, long-term]: 1.278e-5 kg; lognormal variance with pedigree 0.8063, pedigree (1,1,4,1,1)
  (same comment as for Lead)
- Sodium, ion [water, ground-, long-term]: 0.002316 kg; lognormal variance with pedigree 0.54085, pedigree (1,1,4,1,1)
  (same comment as for Lead)
- Sulfate [water, ground-, long-term]: 0.008729 kg; lognormal variance with pedigree 0.51252, pedigree (1,1,4,1,1)
  (same comment as for Lead)
- Chromium VI [water, ground-, long-term]: 1.1129e-7 kg; lognormal variance with pedigree 4.4679, pedigree (1,1,4,1,1)
  (same comment as for Lead)
- Manganese [water, ground-, long-term]: 0.00013324 kg; lognormal variance with pedigree 0.93195, pedigree (1,1,4,1,1)
  (same comment as for Lead)
- Sulfate [water, surface water]: 0.00088761 kg; lognormal variance with pedigree 0.62805, pedigree (1,1,4,1,1)
  (same comment as for Cadmium, ion)
- Dioxins, measured as 2,3,7,8-tetrachlorodibenzo-p-dioxin [air, urban air close to ground]: 9.6386e-14 kg; lognormal variance with pedigree 0.50009, pedigree (1,1,4,1,1)
  (same comment as for Phenol, pentachloro-)
- Mercury [water, ground-, long-term]: 1.7999e-8 kg; lognormal variance with pedigree 2.4657, pedigree (1,1,4,1,1)
  (same comment as for Lead)
- Chromium VI [water, surface water]: 7.01e-9 kg; lognormal variance with pedigree 1.2041, pedigree (1,1,4,1,1)
  (same comment as for Cadmium, ion)
- Hydrogen chloride [air, urban air close to ground]: 6.7989e-8 kg; lognormal variance with pedigree 0.97002, pedigree (1,1,4,1,1)
  (same comment as for Carbon dioxide, non-fossil)
- Silicon [water, surface water]: 9.0743e-7 kg; lognormal variance with pedigree 1.3589, pedigree (1,1,4,1,1)
  (same comment as for Cadmium, ion)
- Copper, ion [water, surface water]: 2.793e-10 kg; lognormal variance with pedigree 1.6749, pedigree (1,1,4,1,1)
  (same comment as for Cadmium, ion)
- Iron, ion [water, ground-, long-term]: 0.0033472 kg; lognormal variance with pedigree 0.53563, pedigree (1,1,4,1,1)
  (same comment as for Lead)
- Zinc, ion [water, ground-, long-term]: 5.3488e-5 kg; lognormal variance with pedigree 1.0445, pedigree (1,1,4,1,1)
  (same comment as for Lead)
- Particulates, > 2.5 um, and < 10um [air, urban air close to ground]: 2.8916e-8 kg; lognormal variance with pedigree 0.25676, pedigree (1,1,4,1,1)
  (same comment as for Phenol, pentachloro-)
- Molybdenum [water, surface water]: 8.1628e-8 kg; lognormal variance with pedigree 1.2502, pedigree (1,1,4,1,1)
  (same comment as for Cadmium, ion)
- Aluminium [water, ground-, long-term]: 0.0070113 kg; lognormal variance with pedigree 0.40398, pedigree (1,1,4,1,1)
  (same comment as for Lead)
- Hydrogen fluoride [air, urban air close to ground]: 5.1263e-8 kg; lognormal variance with pedigree 1.3233, pedigree (1,1,4,1,1)
  (same comment as for Carbon dioxide, non-fossil)
- Thallium [water, surface water]: 7.7607e-11 kg; lognormal variance with pedigree 2.5585, pedigree (1,1,4,1,1)
  (same comment as for Cadmium, ion)
- Lead [water, surface water]: 1.3028e-9 kg; lognormal variance with pedigree 1.2462, pedigree (1,1,4,1,1)
  (same comment as for Cadmium, ion)
- Benzene, pentachloro- [air, urban air close to ground]: 2.5464e-10 kg; lognormal variance with pedigree 0.13397, pedigree (1,1,4,1,1)
  (same comment as for Phenol, pentachloro-)
- Vanadium, ion [water, surface water]: 6.5679e-9 kg; lognormal variance with pedigree 1.9829, pedigree (1,1,4,1,1)
  (same comment as for Cadmium, ion)
- Potassium, ion [water, ground-, long-term]: 1.8306e-5 kg; lognormal variance with pedigree 0.67273, pedigree (1,1,4,1,1)
  (same comment as for Lead)
- Methane, non-fossil [air, urban air close to ground]: 7.2294e-7 kg; lognormal variance with pedigree 0.13397, pedigree (1,1,4,1,1)
  (same comment as for Phenol, pentachloro-)
- Calcium, ion [water, surface water]: 0.00051173 kg; lognormal variance with pedigree 0.58033, pedigree (1,1,4,1,1)
  (same comment as for Cadmium, ion)
- Calcium, ion [water, ground-, long-term]: 0.11668 kg; lognormal variance with pedigree 0.11546, pedigree (1,1,4,1,1)
  (same comment as for Lead)
- NMVOC, non-methane volatile organic compounds, unspecified origin [air, urban air close to ground]: 2.1934e-6 kg; lognormal variance with pedigree 0.13397, pedigree (1,1,4,1,1)
  (same comment as for Phenol, pentachloro-)
- Nitrogen oxides [air, urban air close to ground]: 2.1287e-5 kg; lognormal variance with pedigree 1.2404, pedigree (1,1,4,1,1)
  Sum of fuel-Nox and thermal-NOx emitted to air after DeNOx stage.
  Uncertainty: uncertainty calculated from uncertainty in average N-emissions and uncertainty in the share of thermal NOx and the uncertainty in nitrogen content in *this* waste.
- Heat, waste [air, urban air close to ground]: 4.0741 MJ; lognormal variance with pedigree 0.21095, pedigree (1,1,4,1,1)
  (same comment as for Heat, waste)
- Cobalt [water, surface water]: 1.6197e-10 kg; lognormal variance with pedigree 2.4504, pedigree (1,1,4,1,1)
  (same comment as for Cadmium, ion)
