# treatment of sulfidic tailings, from silver mine operation, tailings impoundment

Dataset: EcoSpold 2, unit process
Geography: RoW
Time period: 2015-01-01 to 2021-12-31
Technology level: current
Classification: ISIC rev.4 ecoinvent: 3822:Treatment and disposal of hazardous waste
Synonyms: sulphidic; tails; pond; tailing
Scenario: Business-as-Usual
System model: Allocation, cut-off by classification
Share of production covered: 80 %
Generated by: David Turner
Database: ecoinvent
isCopyrightProtected: true
accessRestrictedTo: 1

## General comment
This dataset represents the activity of waste disposal of sulfidic tailings, from silver mine operation in a tailings impoundment.
Background: Tailings, a waste material produced during mineral concentration (beneficiation), often contain significant quantities of mobile toxic metals and are typically produced in large quantities. To manage these wastes, tailings are commonly stored behind dammed impoundments, known as tailings ponds. These ponds pose a significant long-term pollution risk as metals may leach out into the surrounding environment, potentially over very long timeframes.
Modelling approach: This dataset was produced using a model developed specifically for assessing the long-term emissions of tailings disposal (see Doka, 2017). The tailings disposal model is based on the modelling framework applied in existing landfill process models used in ecoinvent and is based on a top-down approach. Literature data on measurements of deposited tailings compositions (solids) and measured current concentrations in leachate (liquid) form the basis of the model and are used to characterise pollutant mobility and calculate the currently occurring rate of emissions of the landfill. Heeding chief parameters, such as hydrology, pH development and elemental chemistry, these emissions are then projected into the future. Tailings composition is based on the typical composition of tailings at silver mine sites worldwide; i.e. composition is not region-specific. Land use was calculated following the approach described by Doka (2008). Based on an assumed generic final height of a tailings impoundment of 60 m and an assumed tailings density of 2200 kg/m3, a land area of 7.58E-06 m2 is required per kilogram of sulfidic tailings. The land is assumed to be converted from unknown origin to a disposal site. After an operational phase of 30 years, spontaneous restoration of a consolidated state is assumed to be reached after one hundred years. The total occupation time is therefore 130 years and the land occupation per kilogram tailings is 9.85E-04 m2.
Waste composition (wet, in ppm): H2O 300000; O 621950; H na; C 6145; S 272.23; N 5.0454; P 216.46; B 54.583; Cl 102.61; Br 0.22894; F 772.88; I na; Ag 10.076; As 74.238; Ba 355.2; Cd 4.6448; Co 10.164; Cr 49.843; Cu 590.65; Hg 0.43347; Mn 156.64; Mo 11.524; Ni 14.943; Pb 222.48; Sb 37.083; Se 4.0116; Sn 27.477; V 137.22; Zn 251.39; Be 1.0483; Sc 13.26; Sr 98.041; Ti 114.74; Tl 2.3266; W 9.2739; Si 39024; Fe 9774.1; Ca 2626.4; Al 12044; K 2278.2; Mg 1457.8; Na 1075.8. // Share of carbon in waste that is biogenic 0%.
Activity extent: The dataset includes all potential emissions to the environment and land use changes. Input exchanges of infrastructure, materials, energy, and water are not included here but are accounted for in the activity, silver mine operation.
References
Doka, G. (2008). Life Cycle Inventory data of mining waste: Emissions from sulfidic tailings disposal. Zürich, Switzerland: Doka Life Cycle Assessments.
Doka, G. (2017). A model for waste-specific and climate-specific life cycle inventories of tailings impoundments. Zürich, Switzerland: Doka Life Cycle Assessments.

## Included activities start
The activity starts at the point of waste deposition in the impoundment. All upstream activities, including the pumping of tailings to the site, any dewatering or treatment, or other transport-related activities are excluded.

## Included activities end
Waste-specific short- and long-term emissions to the environment via impoundment leachate; land transformation and occupation. Note that the structural integrity of the site is assumed to be unwavering during the entie modelled time horizon; i.e. accidental releases of leachate (due to impoundment failure) are not considered.

## Geography
Given name of site is 'Silver deposits; Global'. Impoundment site with mean annual temperature (MAT) of 17.9549894846337 degC, mean annual precipitation (MAP) of 1231.60268952488 mm/year, mean annual actual evaporation (EAT) of 801.644260292104 mm/year, and net infiltration of 830.780559378826 mm/year (using half of natural surface evapotranspiration).

## Technology
This is an inventory for an impoundment of copper ore beneficiation tailings waste. The following assumptions were made concerning technology: final impoundment height is 60 meters; operation phase duration is 30 years; and impoundment leachates are released into the environment untreated.

## Time period
'Data on average composition of tailings and tailings-derived leachates from literature sources published between 1994 and 2017 (mean publication date: 2009±6). Mean annual temperature and precipitation data for 1970-2000 (source: Fick and Hijmans, 2017); mean annual evapotranspiration for 1950-2000 (source: Fekete et al., 2002). Production volume based on world mine production data from the USGS Minerals Yearbook 2015. Transfer coefficients from prospective, tailings-specific model.
References:
Fekete, B. M., Vorosmarty, C. J. & Grabs, W. (2002). High-resolution fields of global runoff combining observed river discharge and simulated water balances. Global Biogeochemical Cycles, 16, 15-1 - 15-10.
Fick, S. E. & Hijmans, R. J. (2017). Worldclim 2: New 1-km spatial resolution climate surfaces for global land areas. International Journal of Climatology, 37, 4302-4315.'

## Reference product
- sulfidic tailings, from silver mine operation: -1 kg; By-product classification Waste
  main reference product of this activity (supply of disposal service).
  production volume 3.808e10 kg
    Estimate of the national tailings production volume from the mining and concentration of sulfidic silver ores, based on world mine production of silver from sulfide mineral deposits (kg) multiplied by an estimated tailings generation rate per kg of mined silver (1999 kg per kg silver).
  property price 0 EUR2005
    Waste products are assigned a price of zero as they are assumed to require further treatment.
  property carbon content 0.0087785
    carbon content on a dry matter basis (reserved; not for manual entry)
  properties: mercury content 6.1925e-7, lead content 0.00031783, nitrogen content 7.2076e-6, sulfur content 0.00038891, silver content 1.4394e-5, nickel content 2.1346e-5, phosphorus content 0.00030923, copper content 0.00084378, chlorine content 0.00014659, bromine content 3.2706e-7, fluorine content 0.0011041, chromium content 7.1205e-5, barium content 0.00050742, carbon content, non-fossil 0, strontium content 0.00014006, wet mass 1 kg, arsenic content 0.00010605, oxygen content 0.88851, selenium content 5.7309e-6, cobalt content 1.452e-5, beryllium content 1.4976e-6, iron content 0.013963, manganese content 0.00022377, water in wet mass 0.3 kg, vanadium content 0.00019603, boron content 7.7976e-5, calcium content 0.003752, aluminium content 0.017206, tin content 3.9253e-5, antimony content 5.2976e-5, water content 0.42857, molybdenum content 1.6462e-5, thallium content 3.3238e-6, dry mass 0.7 kg, magnesium content 0.0020826, tungsten content 1.3248e-5, titanium content 0.00016391, silicon content 0.055749, zinc content 0.00035913, sodium content 0.0015368, potassium content 0.0032546, carbon content, fossil 0.0087785, scandium content 1.8943e-5, cadmium content 6.6354e-6, carbon allocation 0.00614495 kg

## Inputs from nature
- Occupation, dump site [natural resource, land]: 0.00098485 m2*year; lognormal variance with pedigree 0.14986, pedigree (1,1,2,1,1)
  for impoundment operation phase and 100 year renaturation phase.
  Uncertainty: U
- Transformation, to dump site [natural resource, land]: 7.5758e-6 m2; lognormal variance with pedigree 0.030796, pedigree (1,1,2,1,1)
  conversion to impoundment area.
  Uncertainty: U
- Transformation, from unspecified [natural resource, land]: 7.5758e-6 m2; lognormal variance with pedigree 0.030796, pedigree (1,1,2,1,1)
  conversion of impoundment area.
  Uncertainty: U

## Emissions to nature
- Strontium [water, ground-]: 2.5372e-7 kg; lognormal variance with pedigree 0.37409, pedigree (1,1,2,1,1)
  burden from short-term leachate to groundwater in uncontrolled impoundment in moist cimate.
  Uncertainty: U
- Cobalt [water, ground-]: 1.7649e-7 kg; lognormal variance with pedigree 0.39168, pedigree (1,1,2,1,1)
  (same comment as for Strontium)
- Sodium, ion [water, ground-, long-term]: 0.0010567 kg; lognormal variance with pedigree 0.16223, pedigree (1,1,2,1,1)
  Emissions from long-term leachate (>100a) directly from tailings impoundment.
  Uncertainty: U
- Chromium VI [water, ground-, long-term]: 4.1003e-7 kg; lognormal variance with pedigree 1.7041, pedigree (1,1,2,1,1)
  (same comment as for Sodium, ion)
- Silver, ion [water, ground-, long-term]: 1.0073e-5 kg; lognormal variance with pedigree 0.31693, pedigree (1,1,2,1,1)
  (same comment as for Sodium, ion)
- Cobalt [water, ground-, long-term]: 9.9872e-6 kg; lognormal variance with pedigree 0.31665, pedigree (1,1,2,1,1)
  (same comment as for Sodium, ion)
- Sodium, ion [water, ground-]: 1.9043e-5 kg; lognormal variance with pedigree 0.23672, pedigree (1,1,2,1,1)
  (same comment as for Strontium)
- Chromium VI [water, ground-]: 1.3613e-8 kg; lognormal variance with pedigree 0.46957, pedigree (1,1,2,1,1)
  (same comment as for Strontium)
- Silicon [water, ground-]: 7.085e-6 kg; lognormal variance with pedigree 0.27268, pedigree (1,1,2,1,1)
  (same comment as for Strontium)
- Chloride [water, ground-]: 3.0832e-5 kg; lognormal variance with pedigree 0.24944, pedigree (1,1,2,1,1)
  (same comment as for Strontium)
- Silicon [water, ground-, long-term]: 0.00021431 kg; lognormal variance with pedigree 1.7464, pedigree (1,1,2,1,1)
  (same comment as for Sodium, ion)
- Chloride [water, ground-, long-term]: 7.1778e-5 kg; lognormal variance with pedigree 0.24091, pedigree (1,1,2,1,1)
  (same comment as for Sodium, ion)
- Silver, ion [water, ground-]: 2.1893e-9 kg; lognormal variance with pedigree 0.53016, pedigree (1,1,2,1,1)
  (same comment as for Strontium)
- Calcium, ion [water, ground-]: 8.4046e-5 kg; lognormal variance with pedigree 0.19158, pedigree (1,1,2,1,1)
  (same comment as for Strontium)
- Selenium [water, ground-, long-term]: 1.7466e-7 kg; lognormal variance with pedigree 0.96105, pedigree (1,1,2,1,1)
  (same comment as for Sodium, ion)
- Calcium, ion [water, ground-, long-term]: 0.0025423 kg; lognormal variance with pedigree 0.13348, pedigree (1,1,2,1,1)
  (same comment as for Sodium, ion)
- Scandium [water, ground-, long-term]: 1.3185e-5 kg; lognormal variance with pedigree 0.30784, pedigree (1,1,2,1,1)
  (same comment as for Sodium, ion)
- Cadmium, ion [water, ground-, long-term]: 4.6149e-6 kg; lognormal variance with pedigree 0.34245, pedigree (1,1,2,1,1)
  (same comment as for Sodium, ion)
- Selenium [water, ground-]: 5.9081e-9 kg; lognormal variance with pedigree 0.49797, pedigree (1,1,2,1,1)
  (same comment as for Strontium)
- Boron [water, ground-, long-term]: 1.0678e-6 kg; lognormal variance with pedigree 1.2281, pedigree (1,1,2,1,1)
  (same comment as for Sodium, ion)
- Scandium [water, ground-]: 7.4823e-8 kg; lognormal variance with pedigree 0.41626, pedigree (1,1,2,1,1)
  (same comment as for Strontium)
- Cadmium, ion [water, ground-]: 2.9891e-8 kg; lognormal variance with pedigree 0.44684, pedigree (1,1,2,1,1)
  (same comment as for Strontium)
- Potassium, ion [water, ground-, long-term]: 0.00071496 kg; lognormal variance with pedigree 0.22192, pedigree (1,1,2,1,1)
  (same comment as for Sodium, ion)
- Bromine [water, ground-, long-term]: 1.6099e-7 kg; lognormal variance with pedigree 0.44765, pedigree (1,1,2,1,1)
  (same comment as for Sodium, ion)
- Bromine [water, ground-]: 4.6561e-10 kg; lognormal variance with pedigree 0.5803, pedigree (1,1,2,1,1)
  (same comment as for Strontium)
- Phosphate [water, ground-]: 6.9421e-5 kg; lognormal variance with pedigree 0.24409, pedigree (1,1,2,1,1)
  (same comment as for Strontium)
- BOD5, Biological Oxygen Demand [water, ground-]: 3.4569e-9 kg; lognormal variance with pedigree 0.30847, pedigree (1,1,2,1,1)
  (same comment as for Strontium)
- Potassium, ion [water, ground-]: 1.4331e-6 kg; lognormal variance with pedigree 0.31629, pedigree (1,1,2,1,1)
  (same comment as for Strontium)
- BOD5, Biological Oxygen Demand [water, ground-, long-term]: 2.0707e-6 kg; lognormal variance with pedigree 0.28481, pedigree (1,1,2,1,1)
  (same comment as for Sodium, ion)
- Phosphate [water, ground-, long-term]: 0.00059394 kg; lognormal variance with pedigree 0.21523, pedigree (1,1,2,1,1)
  (same comment as for Sodium, ion)
- Beryllium [water, ground-, long-term]: 1.0433e-6 kg; lognormal variance with pedigree 0.39103, pedigree (1,1,2,1,1)
  (same comment as for Sodium, ion)
- Nickel, ion [water, ground-]: 8.5485e-8 kg; lognormal variance with pedigree 0.41188, pedigree (1,1,2,1,1)
  (same comment as for Strontium)
- Boron [water, ground-]: 3.5662e-8 kg; lognormal variance with pedigree 0.43792, pedigree (1,1,2,1,1)
  (same comment as for Strontium)
- Nickel, ion [water, ground-, long-term]: 1.4857e-5 kg; lognormal variance with pedigree 0.30389, pedigree (1,1,2,1,1)
  (same comment as for Sodium, ion)
- Barium [water, ground-, long-term]: 0.00035519 kg; lognormal variance with pedigree 0.19862, pedigree (1,1,2,1,1)
  (same comment as for Sodium, ion)
- Molybdenum [water, ground-, long-term]: 5.1537e-6 kg; lognormal variance with pedigree 0.35227, pedigree (1,1,2,1,1)
  (same comment as for Sodium, ion)
- Beryllium [water, ground-]: 5.0339e-9 kg; lognormal variance with pedigree 0.50441, pedigree (1,1,2,1,1)
  (same comment as for Strontium)
- Mercury [water, ground-, long-term]: 4.3273e-7 kg; lognormal variance with pedigree 0.4195, pedigree (1,1,2,1,1)
  (same comment as for Sodium, ion)
- Antimony [water, ground-]: 2.8153e-8 kg; lognormal variance with pedigree 0.44588, pedigree (1,1,2,1,1)
  (same comment as for Strontium)
- Molybdenum [water, ground-]: 2.2984e-7 kg; lognormal variance with pedigree 0.38361, pedigree (1,1,2,1,1)
  (same comment as for Strontium)
- Vanadium, ion [water, ground-, long-term]: 1.8115e-7 kg; lognormal variance with pedigree 2.9775, pedigree (1,1,2,1,1)
  (same comment as for Sodium, ion)
- Antimony [water, ground-, long-term]: 8.4156e-7 kg; lognormal variance with pedigree 1.1693, pedigree (1,1,2,1,1)
  (same comment as for Sodium, ion)
- Manganese [water, ground-]: 1.9705e-6 kg; lognormal variance with pedigree 0.31013, pedigree (1,1,2,1,1)
  (same comment as for Strontium)
- Zinc, ion [water, ground-, long-term]: 0.00024936 kg; lognormal variance with pedigree 0.21007, pedigree (1,1,2,1,1)
  (same comment as for Sodium, ion)
- Barium [water, ground-]: 3.9022e-9 kg; lognormal variance with pedigree 0.51049, pedigree (1,1,2,1,1)
  (same comment as for Strontium)
- Magnesium [water, ground-, long-term]: 0.0014103 kg; lognormal variance with pedigree 0.15238, pedigree (1,1,2,1,1)
  (same comment as for Sodium, ion)
- Zinc, ion [water, ground-]: 2.0323e-6 kg; lognormal variance with pedigree 0.30755, pedigree (1,1,2,1,1)
  (same comment as for Strontium)
- Nitrate [water, ground-]: 1.0248e-5 kg; lognormal variance with pedigree 0.34221, pedigree (1,1,2,1,1)
  (same comment as for Strontium)
- Manganese [water, ground-, long-term]: 0.00015467 kg; lognormal variance with pedigree 0.22578, pedigree (1,1,2,1,1)
  (same comment as for Sodium, ion)
- Tungsten [water, ground-, long-term]: 1.0186e-6 kg; lognormal variance with pedigree 0.62432, pedigree (1,1,2,1,1)
  (same comment as for Sodium, ion)
- Nitrate [water, ground-, long-term]: 8.0935e-6 kg; lognormal variance with pedigree 0.34238, pedigree (1,1,2,1,1)
  (same comment as for Sodium, ion)
- Mercury [water, ground-]: 7.4863e-10 kg; lognormal variance with pedigree 0.56511, pedigree (1,1,2,1,1)
  (same comment as for Strontium)
- Tungsten [water, ground-]: 3.5749e-8 kg; lognormal variance with pedigree 0.43987, pedigree (1,1,2,1,1)
  (same comment as for Strontium)
- Aluminium [water, ground-, long-term]: 0.012029 kg; lognormal variance with pedigree 0.086521, pedigree (1,1,2,1,1)
  (same comment as for Sodium, ion)
- Lead [water, ground-, long-term]: 0.00022244 kg; lognormal variance with pedigree 0.21412, pedigree (1,1,2,1,1)
  (same comment as for Sodium, ion)
- Vanadium, ion [water, ground-]: 5.9928e-9 kg; lognormal variance with pedigree 0.49649, pedigree (1,1,2,1,1)
  (same comment as for Strontium)
- Aluminium [water, ground-]: 1.4792e-5 kg; lognormal variance with pedigree 0.24308, pedigree (1,1,2,1,1)
  (same comment as for Strontium)
- Lead [water, ground-]: 4.5461e-8 kg; lognormal variance with pedigree 0.42938, pedigree (1,1,2,1,1)
  (same comment as for Strontium)
- TOC, Total Organic Carbon [water, ground-]: 1.8976e-6 kg; lognormal variance with pedigree 0.30847, pedigree (1,1,2,1,1)
  (same comment as for Strontium)
- Arsenic, ion [water, ground-, long-term]: 1.0621e-6 kg; lognormal variance with pedigree 1.3779, pedigree (1,1,2,1,1)
  (same comment as for Sodium, ion)
- Magnesium [water, ground-]: 4.7473e-5 kg; lognormal variance with pedigree 0.21001, pedigree (1,1,2,1,1)
  (same comment as for Strontium)
- Arsenic, ion [water, ground-]: 3.5376e-8 kg; lognormal variance with pedigree 0.43801, pedigree (1,1,2,1,1)
  (same comment as for Strontium)
- Iron, ion [water, ground-, long-term]: 0.0097654 kg; lognormal variance with pedigree 0.092734, pedigree (1,1,2,1,1)
  (same comment as for Sodium, ion)
- TOC, Total Organic Carbon [water, ground-, long-term]: 0.0011366 kg; lognormal variance with pedigree 0.28481, pedigree (1,1,2,1,1)
  (same comment as for Sodium, ion)
- Ammonium, ion [water, ground-, long-term]: 5.1275e-7 kg; lognormal variance with pedigree 0.34238, pedigree (1,1,2,1,1)
  (same comment as for Sodium, ion)
- Iron, ion [water, ground-]: 8.6378e-6 kg; lognormal variance with pedigree 0.25996, pedigree (1,1,2,1,1)
  (same comment as for Strontium)
- Ammonium, ion [water, ground-]: 6.4924e-7 kg; lognormal variance with pedigree 0.34221, pedigree (1,1,2,1,1)
  (same comment as for Strontium)
- Hydrogen sulfide [water, ground-]: 5.5143e-5 kg; lognormal variance with pedigree 0.20774, pedigree (1,1,2,1,1)
  (same comment as for Strontium)
- Titanium, ion [water, ground-]: 8.0303e-9 kg; lognormal variance with pedigree 0.48683, pedigree (1,1,2,1,1)
  (same comment as for Strontium)
- Fluoride [water, ground-, long-term]: 0.00054347 kg; lognormal variance with pedigree 0.18075, pedigree (1,1,2,1,1)
  (same comment as for Sodium, ion)
- Tin, ion [water, ground-, long-term]: 2.7424e-5 kg; lognormal variance with pedigree 0.28368, pedigree (1,1,2,1,1)
  (same comment as for Sodium, ion)
- Fluoride [water, ground-]: 1.5718e-6 kg; lognormal variance with pedigree 0.3134, pedigree (1,1,2,1,1)
  (same comment as for Strontium)
- Titanium, ion [water, ground-, long-term]: 0.00011473 kg; lognormal variance with pedigree 0.23613, pedigree (1,1,2,1,1)
  (same comment as for Sodium, ion)
- Hydrogen sulfide [water, ground-, long-term]: 1.2261e-5 kg; lognormal variance with pedigree 0.21194, pedigree (1,1,2,1,1)
  (same comment as for Sodium, ion)
- Tin, ion [water, ground-]: 5.283e-8 kg; lognormal variance with pedigree 0.42585, pedigree (1,1,2,1,1)
  (same comment as for Strontium)
- DOC, Dissolved Organic Carbon [water, ground-]: 1.8976e-6 kg; lognormal variance with pedigree 0.30847, pedigree (1,1,2,1,1)
  (same comment as for Strontium)
- Thallium [water, ground-, long-term]: 2.3258e-6 kg; lognormal variance with pedigree 0.36509, pedigree (1,1,2,1,1)
  (same comment as for Sodium, ion)
- Copper, ion [water, ground-, long-term]: 0.00059012 kg; lognormal variance with pedigree 0.18185, pedigree (1,1,2,1,1)
  (same comment as for Sodium, ion)
- Sulfate [water, ground-, long-term]: 0.00011394 kg; lognormal variance with pedigree 0.21194, pedigree (1,1,2,1,1)
  (same comment as for Sodium, ion)
- DOC, Dissolved Organic Carbon [water, ground-, long-term]: 0.0011366 kg; lognormal variance with pedigree 0.28481, pedigree (1,1,2,1,1)
  (same comment as for Sodium, ion)
- Sulfate [water, ground-]: 0.00051244 kg; lognormal variance with pedigree 0.20774, pedigree (1,1,2,1,1)
  (same comment as for Strontium)
- Copper, ion [water, ground-]: 5.2614e-7 kg; lognormal variance with pedigree 0.34881, pedigree (1,1,2,1,1)
  (same comment as for Strontium)
- Thallium [water, ground-]: 7.9872e-10 kg; lognormal variance with pedigree 0.56325, pedigree (1,1,2,1,1)
  (same comment as for Strontium)
- COD, Chemical Oxygen Demand [water, ground-]: 1.7284e-7 kg; lognormal variance with pedigree 0.30847, pedigree (1,1,2,1,1)
  (same comment as for Strontium)
- Strontium [water, ground-, long-term]: 9.7787e-5 kg; lognormal variance with pedigree 0.24137, pedigree (1,1,2,1,1)
  (same comment as for Sodium, ion)
- COD, Chemical Oxygen Demand [water, ground-, long-term]: 0.00010353 kg; lognormal variance with pedigree 0.28481, pedigree (1,1,2,1,1)
  (same comment as for Sodium, ion)

## Sampling procedure
Tailings model based on observed leachate concentrations in literature. Extrapolated to 60'000 years heeding chemical characteristics. Initial waste composition from various literature sources. Climate information for national copper deposits (identified from the USGS Major Mineral Deposits database) from literature as follows: global mean annual temperature and precipitation data from Fick and Hijmans (2017); global mean annual evapotranspiration data from Fekete et al. (2002).

References:
Fekete, B. M., Vorosmarty, C. J. & Grabs, W. (2002). High-resolution fields of global runoff combining observed river discharge and simulated water balances. Global Biogeochemical Cycles, 16, 15-1 - 15-10.
Fick, S. E. & Hijmans, R. J. (2017). Worldclim 2: New 1-km spatial resolution climate surfaces for global land areas. International Journal of Climatology, 37, 4302-4315.

## Extrapolations
Climate data collected for silver deposits globally and aggregated to reflect average climatic conditions of silver deposits worldwide. Initial tailings composition based on global average silver tailings composition, derived from literature data. Initial leachate concentration based on generic global average data also obtained from the literature.
