# aluminium alloy production, AlMg3

Dataset: EcoSpold 2, unit process
Geography: RER
Time period: 1998-01-01 to 2021-12-31
Technology level: current
Classification: ISIC rev.4 ecoinvent: 2420:Manufacture of basic precious and other non-ferrous metals
Classification: EcoSpold01Categories: metals/extraction
Synonyms: EN AW-5754; AA 5754
Tags: ConvertedDataset
Scenario: Business-as-Usual
System model: Allocation, cut-off by classification
Generated by: Niels Jungbluth
Published in: Althaus H.-J. 2000
Database: ecoinvent
isCopyrightProtected: true
accessRestrictedTo: 1

## General comment
The production of AlMg3 is investigated with the content of different metals used for the alloy. This aluminium alloy contains 3% of magnesium.
[This dataset was already contained in the ecoinvent database version 2. It was not individually updated during the transfer to ecoinvent version 3. Life Cycle Impact Assessment results may still have changed, as they are affected by changes in the supply chain, i.e. in other datasets. This dataset was generated following the ecoinvent quality guidelines for version 2. It may have been subject to central changes described in the ecoinvent version 3 change report (http://www.ecoinvent.org/database/ecoinvent-version-3/reports-of-changes/), and the results of the central updates were reviewed extensively. The changes added e.g. consistent water flows and other information throughout the database. The documentation of this dataset can be found in the ecoinvent reports of version 2, which are still available via the ecoinvent website. The change report linked above covers all central changes that were made during the conversion process.]

## Included activities end
Production of alloy from primary metals, no extra infrastructure.

## Geography
Data for 1 producer

## Technology
Production of aluminium-magnesium alloy from primary metals, no recycling of input materials.

## Time period
Environmental report

## Reference product
- aluminium alloy, AlMg3: 1 kg; CPC 41431: Unwrought aluminium; By-product classification allocatable product
  EcoSpold01Location=RER
  production volume 1.32237 kg
    This is a placeholder value that does not reflect real-world production volumes. This dataset does not currently require a real-world production volume to work in the database framework, and no actual data were collected yet. This has no negative effect on the results of the ecoinvent database. The placeholder value of this activity was scaled according to the nominal GDP of 2005 (source: United Nations, http://data.un.org/Glossary.aspx?q=GDP+%28current+US%24%29, accessed 20130726) to reflect an appropriate share of the global production volume, which is also a placeholder value.
  property price 1.66 EUR2005
    Calculated value based on data from United Nations Commodity Trade Statistics Database (comtrade.un.org). UN comtrade category: 760120 Aluminium unwrought, alloyed. Year 2005. Using exchange rate of 1EURO = 1.209 USD. Average of price of import into 5 main markets (EU, US, JP, IN and CN).
  property carbon content 0
    carbon content on a dry matter basis (reserved; not for manual entry)
  properties: water content 0, water in wet mass 0 kg, dry mass 1 kg, wet mass 1 kg, carbon content, non-fossil 0, carbon content, fossil 0, carbon allocation 0 kg

## Inputs from technosphere
- silicon, metallurgical grade: 0.00406 kg; lognormal variance with pedigree 0.0507, pedigree (2,2,5,1,1)
  EcoSpold01Location=NO
  Literature
  Uncertainty: Literature
  properties: dry mass 1 kg, wet mass 1 kg
- copper, cathode: 0.00102 kg; lognormal variance with pedigree 0.0507, pedigree (2,2,5,1,1)
  EcoSpold01Location=RER
  Literature
  Uncertainty: Literature
  properties: wet mass 1 kg, dry mass 1 kg
- cast iron: 0.00406 kg; lognormal variance with pedigree 0.0507, pedigree (2,2,5,1,1)
  EcoSpold01Location=RER
  Literature
  Uncertainty: Literature
  properties: wet mass 1 kg, dry mass 1 kg, carbon content, fossil 0.04
  note on carbon content, fossil: Cast iron is made by remelting pig iron in small furnaces (e.g. cupola furnaces or electric arc furnaces) and poured into moulds to make castings. It usually contains 2% to 6% carbon (ecoinvent v2.2 report 10_partII). An average content of 4% was considered
- magnesium: 0.0305 kg; lognormal variance with pedigree 0.0507, pedigree (2,2,5,1,1)
  EcoSpold01Location=RER
  Literature
  Uncertainty: Literature
  properties: dry mass 1 kg, wet mass 1 kg
- electricity, medium voltage: 1.59 kWh; lognormal variance with pedigree 0.0581, pedigree (4,2,5,1,1)
  Literature disaggregated
  Uncertainty: Literature disaggregated
- zinc: 0.00203 kg; lognormal variance with pedigree 0.0507, pedigree (2,2,5,1,1)
  Literature
  EcoSpold01Location=RER
  Uncertainty: Literature
  properties: wet mass 1 kg, dry mass 1 kg
- manganese: 0.00508 kg; lognormal variance with pedigree 0.0507, pedigree (2,2,5,1,1)
  Literature
  EcoSpold01Location=RER
  Uncertainty: Literature
  properties: wet mass 1 kg, dry mass 1 kg
- aluminium, cast alloy: 0.965 kg; lognormal variance with pedigree 0.0507, pedigree (2,2,5,1,1)
  EcoSpold01Location=RER
  Literature
  Uncertainty: Literature
  properties: wet mass 1 kg, dry mass 1 kg
- chromium: 0.00305 kg; lognormal variance with pedigree 0.0507, pedigree (2,2,5,1,1)
  EcoSpold01Location=RER
  Literature
  Uncertainty: Literature
  properties: dry mass 1 kg, wet mass 1 kg

## Sampling procedure
Environmental data for an important producer

## Extrapolations
This dataset has been extrapolated from year 1998 to the year of the calculation (2021). The uncertainty has been adjusted accordingly.

## Review by Mischa Classen 2003-06-13
passed
