# limestone production, crushed, for mill

Dataset: EcoSpold 2, unit process
Geography: CH
Time period: 2000-01-01 to 2021-12-31
Technology level: current
Classification: ISIC rev.4 ecoinvent: 0810:Quarrying of stone, sand and clay
Classification: EcoSpold01Categories: construction materials/others
Tags: ConvertedDataset
Scenario: Business-as-Usual
System model: Allocation, cut-off by classification
Generated by: [System]
Published in: Kellenberger D. 2007
Database: ecoinvent
isCopyrightProtected: true
accessRestrictedTo: 1

## General comment
This dataset represents the production of 1 kg of crushed limestone for mill. Infrastructure data are estimated based on a tour and sketches of the process. The value of the infrastructure is normalized with a annual production capacity of about 145'000 tons of product per year.
This dataset represents the production of 1 kg of crushed limestone for mill. Infrastructure data is estimated based on a tour and sketches of the process, and then normalized with a annual production capacity of about 145'000 tons of product per year.

## Included activities start
From the reception of mined limestone, at the factory gate.

## Included activities end
The activity ends with the crushed limestone. The dataset includes the different production processes (primary crushing, washing, and transportation by conveyor belt), the energy consumption for buildings heating and the infratructure of the production process. The dataset doesn't include the infrastructure for electricity transportation from power plant to company.

## Geography
Data is based on a Swiss company.

## Technology
The current Swiss technology is considered. The company works on a technically high level; heavy machines (excl. building machines) are operated electrically; air is recirculated in closed loop to avoid dust emissions

## Parameters
- fraction, process water, to air: 0.291902 dimensionless; name fraction_PW_to_air; lognormal variance with pedigree 0.092025, pedigree (4,4,3,2,4)
  Calculated based on literature value (IPPC, 2010) (Vionnet, S., Quantis Water Database - Technical Report, 2012).

## Reference product
- limestone, crushed, for mill: 1 kg; source Oates T. 1997; By-product classification allocatable product; CPC 15200: Gypsum; anhydrite; limestone flux; limestone and other calcareous stone, of a kind used for the manufacture of[…]; CAS 1317-65-3
  Limestone is a naturally occurring mineral that consists principally of calcium carbonate but may also contain magnesium carbonate as a secondary component. It is found in many forms and is classified in terms of its origin, chemical composition, structure, and geological formation. Limestone occurs widely throughout the world and is an essential raw material for many industries.
  Limestone is generally used for construction, cement, quicklime, agriculture, metal refining and flue gas desulphurisation:
  Construction: Limestone is the most widely used crushed rock, although it is generally sold in form of sand and gravel.
  Cement: The production of cement is the main use for chalk, and a major use for dense, high-calcium limestone. Approximately 1.1 t of limestone is required for 1 t of cement.
  Quicklime: Approximately 1.8 t of limestone is required per 1.0 t of quicklime.
  Agriculture: Many crops grow best under neutral to slightly acid conditions (i.e., pH between 6 and 7). Thus soils which are more acidic than pH 6 generally benefit from the application of limestone.
  Metal refining: When limestone is used in metal refining it is initially converted to quicklime, which reacts with acidic oxides (e.g., SiO2, Al2O, and Fe2O3) to produce molten slag.
  Flue gas desulphurisation: A growing use of limestone is in the treatment of flue gas from combustion processes to remove sulphur dioxide.
  EcoSpold01Location=CH
  production volume 6.2519e8 kg; = 7.4277E+10*0.008417
    Estimated. The swiss production volume is extrapolated from the global production volume using the nominal GDP of 2005 (source: United Nations, http://data.un.org/Glossary.aspx?q=GDP+%28current+US%24%29, accessed 20130726 and 20130312).
    Gross domestic product (GDP) at current prices is GDP at prices of the current reporting period. Also known as nominal GDP.
  property price 0.0141398 EUR2005
    Calculated based on inputs: The price of the product has been calculated as a sum of the values of the material and energy inputs for this product. This value is therefore a rough estimation. It may underestimate the real price since there are additional expenses when producing any product. These expences can include for example labour costs, treatment of waste materials and profit for the producer. Please consider carefully whether this level of data quality is acceptable for your application.
  property carbon content, fossil 0.117492
    Table 3.1, ecoinvent v2.2 report 7, part VII, pg 3. MW CaCO3=100, MW MgCO3=84
  property carbon content 0.117492
    carbon content on a dry matter basis (reserved; not for manual entry)
  properties: heating value, net 0 MJ, water in wet mass 0.002 kg, carbon content, non-fossil 0, water content 0.00200401, dry mass 0.998 kg, wet mass 1 kg, carbon allocation 0.117257 kg

## Inputs from technosphere
- limestone, unprocessed: 1 kg; lognormal variance with pedigree 0.0606, pedigree (3,3,5,1,3)
  EcoSpold01Location=CH
  Estimation, based on company data. The total amount of limestone used in 2001 was 143.888t. Losses due to dust emissions were neglected.
  properties: carbon content, fossil 0.117257, water content 0.00200401, dry mass 0.998 kg, wet mass 1 kg
  note on carbon content, fossil: Table 3.1, ecoinvent v2.2 report 7, part VII, pg 3. MW CaCO3=100, MW MgCO3=84. C content of limestone is 0.117257 kg/kg DM
- electricity, high voltage: 0.000255 kWh; lognormal variance with pedigree 0.0401, pedigree (1,2,5,1,1)
  Estimation, based on company data. It is assumed that the 50% of the electricity consumption is covered by the grid and 50% by a hydropower plant nearby.
- industrial machine, heavy, unspecified: 6.12e-6 kg; lognormal variance with pedigree 0.3686, pedigree (4,3,5,1,1)
  EcoSpold01Location=RER
  Estimation. The equipment included in the infrastructure are 1 crusher, 1 sieve and 1 small silo. The total weight is 22t. The lifetime considered is 25 years.
- electricity, medium voltage: 0.000255 kWh; lognormal variance with pedigree 0.0401, pedigree (1,2,5,1,1)
  EcoSpold01Location=CH
  Estimation, based on company data. It is assumed that the 50% of the electricity consumption is covered by the grid and 50% by a hydropower plant nearby.
- conveyor belt: 2.78e-8 m; lognormal variance with pedigree 0.3686, pedigree (4,3,5,1,1)
  EcoSpold01Location=RER
  Estimation. It is assumed that the conveyor belt has a length of 100 m and a life time of 25 years.
- heat, central or small-scale, other than natural gas: 0.00141 MJ; lognormal variance with pedigree 0.0401, pedigree (1,2,5,1,1)
  EcoSpold01Location=CH
  Estimation, based on company data. The total amount of fuel used for heating the administrative buildings is considered.
  properties: heating value, net 1 MJ

## Inputs from nature
- Water, well, in ground [natural resource, in water]: 0.0001875 m3; name water_well_in_ground_input; source IPPC - Integrated Pollution Prevention a 2010; lognormal variance with pedigree 0.052625, pedigree (3,3,5,2,1)
  Estimation, based on company data. The total water consumption for hydratation by 2001 was 11.010 m3 and the total pumped water was 19.450 m3. Half of this amount is assumed that is used for the process and the rest for limestone crushing (for kiln).
  Calculated based on literature(IPPC, 2010, Cement, Lime and Magnesium Oxide Manufacturing Industries; Byers, W., 2003, Industrial Water Management), (Vionnet, S., Quantis Water Database - Technical Report, 2012). Assumed to have the same or very similar water use as "limestone, crushed, washed". It includes the process of crushing, but there is no water use during crushing. The amount of water used during washing varies depending on the amount of inpurities.
  Estimation, based on company data. The total water consumption for hydratation by 2001 was 11.010 m3 and the total pumped water was 19.450 m3. Half of this amount is assumed that is used for the process and the rest for limestone crushing (for kiln).
  Calculated based on literature(IPPC, 2010, Cement, Lime and Magnesium Oxide Manufacturing Industries; Byers, W., 2003, Industrial Water Management), (Vionnet, S., Quantis Water Database - Technical Report, 2012). Assumed to have the same or very similar water use as "limestone, crushed, washed". It includes the process of crushing, but there is no water use during crushing. The amount of water used during washing varies depending on the amount of inpurities.

## Emissions to nature
- Particulates, > 2.5 um, and < 10um [air, non-urban air or from high stacks]: 7.84e-6 kg; source EPA 1998; lognormal variance with pedigree 0.25, pedigree (1,5,5,5,4)
  Estimation, based on literature values. The assumed size partition of dust emissions for crushing, screening and transport processes: 50% >10µm (PM10), 45% between 10 µm and 2.5 µm, 5%<2.5 µm.
- Water [air, unspecified]: 5.47316e-5 m3; name water_to_air_unspecified; = (water_well_in_ground_input*fraction_PW_to_air); lognormal variance with pedigree 0.0807, pedigree (2,2,5,1,1)
  Calculated value based on literature values and expert opinion. See comments in the parametres' comment field.
  property fraction, origin: unspecified 0; name fraction_origin_unspecified
  property fraction, origin: salt water 0; name fraction_origin_salt_water
  property fraction, origin: fresh water 1; name fraction_origin_fresh_water
- Particulates, < 2.5 um [air, non-urban air or from high stacks]: 8.71e-7 kg; source EPA 1998; lognormal variance with pedigree 0.25, pedigree (1,5,5,5,4)
  (same comment as for Particulates, > 2.5 um, and < 10um)
- Water [water, unspecified]: 0.000132768 m3; name water_to_water_unspecified; = water_well_in_ground_input*(1-fraction_PW_to_air); lognormal variance with pedigree 0.0807, pedigree (2,2,5,1,1)
  (same comment as for Water)
  property water in wet mass 1000 kg; name WWM
  property carbon content, non-fossil 0; name C_content_non_fossil
  property fraction, origin: fresh water 1; name fraction_origin_fresh_water_Ww
  property fraction, origin: unspecified 0; name fraction_origin_unspecified_Ww
  property wet mass 1000 kg; name WM
  property fraction, origin: salt water 0; name fraction_origin_salt_water_Ww
  property carbon content, fossil 0; name C_content_fossil
  property dry mass 0 kg; name DM
- Particulates, > 10 um [air, non-urban air or from high stacks]: 8.71e-6 kg; source EPA 1998; lognormal variance with pedigree 0.25, pedigree (1,5,5,5,4)
  (same comment as for Particulates, > 2.5 um, and < 10um)

## Sampling procedure
Data is based on a Swiss company, for the year 2001.

## Extrapolations
This dataset has been extrapolated from year 2002 to the year of the calculation (2021). The uncertainty has been adjusted accordingly.

## Review by Bo Weidema 2012-09-28
replaced "electricity, high voltage, hydro, run-of-river" with "electricity, high voltage" + activity link to "electricity production, hydro, run-of-river"

## Review by Roberto Dones 2006-02-16
Passed

## Review by Roland Hischier 2011-09-22
Transfer of documentation done.
