# shed construction, large, wood, non-insulated, fire-unprotected

Dataset: EcoSpold 2, unit process
Geography: RoW
Time period: 2009-01-01 to 2021-12-31
Technology level: current
Classification: ISIC rev.4 ecoinvent: 4100:Construction of buildings
Tags: WFLDB
Scenario: Business-as-Usual
System model: Allocation, cut-off by classification
Generated by: [System]
Database: ecoinvent
isCopyrightProtected: true
accessRestrictedTo: 1

## General comment
This global dataset is a copy of the regional CH dataset, except for the following modifications.
The production volume represents the global annual production.
The geographicalCorrelation score of every pedigree matrix of was changed to '5'.
The comments below were part of the CH regional dataset.
This dataset represents the construction material of 1 m2 useable surface of a not flame resistant shed, not to be used as a garage for motor vehicles.
Features of the model used: Building volume: 1478 m3; Useable space: 264 m2; Service life span: 50 years. Fire-unprotected: Ceiling with flammable material, thus not to be used as a garage for combustion engine; non-insulated: simple construction of wooden walls without insulation material; light basement with concrete.
This dataset refers to an average situation; for specific situations exchanges might differ substantially due to site specific parameters.

## Included activities start
The activity starts with the construction of the building.

## Included activities end
Elements included are: 3-sided closed shed, not flame-resistant, concrete floor, non insulated wood construction. Not included: flame-resistant garage component. The activity ends with the disposal of the building material.

## Technology
The calculation of the construction materials employed is based on Agroscope PBK+ (Modular Construction Standards for Farm Building Costs +) System (Dux 2004). Based on construction variants for model buildings, the necessary building materials for construction, repair and replacement are calculated with the aid of the PBK+ database. In addition, the consumption of energy and auxiliary materials during operation of the building can be determined.

## Reference product
- shed, large, wood, non-insulated, fire-unprotected: 1 m2; CPC 53121: Industrial buildings; By-product classification allocatable product
  production volume 3.39551e7 m2
    Assumption: one shed (264m2) per farm, 50 years lifetime, 58'323 farms in CH. Extrapolated to GLO with GDP Factor CH/GLO
  property price 117.521 EUR2005
    Calculated based on inputs: The price of the product has been calculated as a sum of the values of the material and energy inputs for this product. This value is therefore a rough estimation. It may underestimate the real price since there are additional expenses when producing any product. These expences can include for example labour costs, treatment of waste materials and profit for the producer. Please consider carefully whether this level of data quality is acceptable for your application.
  properties: Surface 264 m2, lifetime 50 year

## Inputs from technosphere
- waste concrete, not reinforced: 0 kg; pedigree (1,1,1,1,1)
  Corresponds to 205'220.4kg from the whole building with 50 years life time, 264 m2 usable space and 1478 m3 volume.
  production volume 0 kg
    Calculated from reference product production volume, reference product amount and byproduct amount.
  properties: wet mass 1 kg, dry mass 1 kg
- lean concrete: 0.0070667 m3; lognormal variance with pedigree 0.0461216, pedigree (1,2,4,5,1)
  properties: wet mass 2190 kg, water content 0.0528846, dry mass 2080 kg
- waste brick: 0 kg; pedigree (1,1,1,1,1)
  Corresponds to 595'029.6kg from the whole building with 50 years life time, 264 m2 usable space and 1478 m3 volume.
  production volume 0 kg
    (same comment as for waste concrete, not reinforced)
  properties: dry mass 1 kg, wet mass 1 kg
- electricity, low voltage: 0 kWh; pedigree (1,1,1,1,1)
  Corresponds to 31'874.04kWh for the whole building with 50 years life time, 264 m2 usable space and 1478 m3 volume.
- waste polyethylene: 0 kg; pedigree (1,1,1,1,1)
  production volume 0 kg
    (same comment as for waste concrete, not reinforced)
  properties: carbon content, fossil 0.825301, water content 0.00401606, heating value, net 42.47 MJ, wet mass 1 kg, dry mass 0.996 kg
  note on heating value, net: Value taken from the general comment of the treatment dataset.
- reinforcing steel: 7.5568 kg; lognormal variance with pedigree 0.0461216, pedigree (1,2,4,5,1)
  Corresponds to 99'749.76kg for the whole building with 50 years life time, 264 m2 usable space and 1478 m3 volume.
  properties: dry mass 1 kg, carbon content, fossil 0.004, wet mass 1 kg
- excavation, hydraulic digger: 0.34871 m3; lognormal variance with pedigree 0.0461216, pedigree (1,2,4,5,1)
  Corresponds to 4'602.97m3 for the whole building with 50 years life time, 264 m2 usable space and 1478 m3 volume.
- waste reinforced concrete: 0 kg; pedigree (1,1,1,1,1)
  Corresponds to 8'432'535.84kg from the whole building with 50 years life time, 264 m2 usable space and 1478 m3 volume.
  production volume 0 kg
    (same comment as for waste concrete, not reinforced)
  properties: dry mass 0.99418 kg, water content 0.00585407, wet mass 1 kg
- sheet rolling, copper: 0.62058 kg; lognormal variance with pedigree 0.0461216, pedigree (1,2,4,5,1)
  Corresponds to 8'191.66kg for the whole building with 50 years life time, 264 m2 usable space and 1478 m3 volume.
- fibre cement facing tile: 38.346 kg; lognormal variance with pedigree 0.0461216, pedigree (1,2,4,5,1)
  Corresponds to 506'167.2kg for the whole building with 50 years life time, 264 m2 usable space and 1478 m3 volume.
  properties: dry mass 1 kg, carbon content, non-fossil 0.0115, carbon content, fossil 0.0201818, wet mass 1 kg
- waste building wood, chrome preserved: -33.177 kg; lognormal variance with pedigree 0.0461216, pedigree (1,2,4,5,1)
  Corresponds to 437'936.4kg from the whole building with 50 years life time, 264 m2 usable space and 1478 m3 volume.
  production volume 0 kg
    (same comment as for waste concrete, not reinforced)
  properties: carbon content, non-fossil 0.5, heating value, net 11.63 MJ, water content 0.25, wet mass 1 kg, dry mass 0.8 kg
- sawnwood, softwood, dried (u=20%), planed: 0.16644 m3; lognormal variance with pedigree 0.0461216, pedigree (1,2,4,5,1)
  Corresponds to 2'197m3 for the whole building with 50 years life time, 264 m2 usable space and 1478 m3 volume.
  properties: dry mass 450 kg, carbon content, non-fossil 0.494, wet mass 540 kg, water content 0.2, heating value, net 6514.84 MJ
- extrusion, plastic pipes: 0.026802 kg; lognormal variance with pedigree 0.0461216, pedigree (1,2,4,5,1)
- waste wood, untreated: 0 kg; pedigree (1,1,1,1,1)
  Corresponds to 748'447.92kg from the whole building with 50 years life time, 264 m2 usable space and 1478 m3 volume.
  production volume 0 kg
    Calculated from the reference product amount and production volume
  properties: heating value, net 13.99 MJ, dry mass 0.8 kg, wet mass 1 kg, carbon content, non-fossil 0.48632, water content 0.25
- cast iron: 0.49245 kg; lognormal variance with pedigree 0.0461216, pedigree (1,2,4,5,1)
  Corresponds to 6'500.34kg for the whole building with 50 years life time, 264 m2 usable space and 1478 m3 volume.
  properties: wet mass 1 kg, dry mass 1 kg, carbon content, fossil 0.04
- zinc coat, pieces: 0.034213 m2; lognormal variance with pedigree 0.0461216, pedigree (1,2,4,5,1)
  Corresponds to 451.61m2 for the whole building with 50 years life time, 264 m2 usable space and 1478 m3 volume.
- fibre cement roof slate: 6.732 kg; lognormal variance with pedigree 0.0461216, pedigree (1,2,4,5,1)
  Corresponds to 88'862.4kg for the whole building with 50 years life time, 264 m2 usable space and 1478 m3 volume.
  properties: carbon content, non-fossil 0.01288, dry mass 1 kg, wet mass 1 kg, carbon content, fossil 0.0141818
- scrap copper: 0 kg
  Corresponds to 8191.66kg from the whole building with 50 years life time, 264 m2 usable space and 1478 m3 volume.
  production volume 0 kg
    Calculated from production volume of reference product using the relative outputs.
  properties: wet mass 1 kg, dry mass 1 kg
- concrete, normal: 0 m3; pedigree (1,1,1,1,1)
  Corresponds to 3'501.56m3 for the whole building with 50 years life time, 264 m2 usable space and 1478 m3 volume.
  properties: dry mass 2190 kg, wet mass 2380 kg, water content 0.086758
- gravel, round: 369.84 kg; lognormal variance with pedigree 0.0461216, pedigree (1,2,4,5,1)
  Corresponds to 4'881'888kg for the whole building with 50 years life time, 264 m2 usable space and 1478 m3 volume. After the demolition of the shed, the gravel stays in the ground.
  properties: dry mass 1 kg, wet mass 1 kg
- copper, cathode: 0.62058 kg; lognormal variance with pedigree 0.0461216, pedigree (1,2,4,5,1)
  (same comment as for sheet rolling, copper)
  properties: wet mass 1 kg, dry mass 1 kg
- waste bulk iron, excluding reinforcement: 0 kg; pedigree (1,1,1,1,1)
  Corresponds to 6500.34kg from the whole building with 50 years life time, 264 m2 usable space and 1478 m3 volume.
  production volume 0 kg
    (same comment as for waste concrete, not reinforced)
  properties: wet mass 1 kg, dry mass 1 kg
- polyethylene, high density, granulate: 0.026802 kg; lognormal variance with pedigree 0.0461216, pedigree (1,2,4,5,1)
  properties: carbon content, fossil 0.857143, dry mass 1 kg, wet mass 1 kg, heating value, net 42.47 MJ
- excavation, skid-steer loader: 0.010945 m3; lognormal variance with pedigree 0.0461216, pedigree (1,2,4,5,1)
  Corresponds to 144.47m3 for the whole building with 50 years life time, 264 m2 usable space and 1478 m3 volume.
- waste concrete, not reinforced: -1.01802, -14.529 kg (2 entries); lognormal variance with pedigree 0.0461216, pedigree (1,2,4,5,1)
  (same comment as for waste concrete, not reinforced)
- waste brick: -0.585852, -44.4921 kg (2 entries); lognormal variance with pedigree 0.0461216, pedigree (1,2,4,5,1)
  (same comment as for waste brick)
- electricity, low voltage: 0.0252088, 0.00459003, 0.103614, 0.362005, 0.0739053, 1.13468, 0.183572, 0.527123 kWh (8 entries); lognormal variance with pedigree 0.0571992, pedigree (3,2,4,5,1)
  (same comment as for electricity, low voltage)
- waste polyethylene: -0.0029815, -0.000199213, -1.50661e-5, -8.22819e-5, -3.3241e-5, -7.81344e-5, -0.00254038, -0.0208722 kg (8 entries); lognormal variance with pedigree 0.0461216, pedigree (1,2,4,5,1)
- waste reinforced concrete: -41.8307, -596.998 kg (2 entries); lognormal variance with pedigree 0.0461216, pedigree (1,2,4,5,1)
  (same comment as for waste reinforced concrete)
- waste wood, untreated: -3.44854, -0.428188, -0.0313054, -1.20265, -0.181692, -0.287239, -5.36941, -45.7516 kg (8 entries); lognormal variance with pedigree 0.0461216, pedigree (1,2,4,5,1)
  (same comment as for waste wood, untreated)
- scrap copper: -0.199827, -0.420753 kg (2 entries)
  (same comment as for scrap copper)
- concrete, normal: 0.00599964, 0.000625154, 0.00506106, 0.00284685, 0.0120556, 0.000406628, 0.238275 m3 (7 entries); lognormal variance with pedigree 0.0461216, pedigree (1,2,4,5,1)
  (same comment as for concrete, normal)
- waste bulk iron, excluding reinforcement: -0.159915, -0.332535 kg (2 entries); lognormal variance with pedigree 0.0461216, pedigree (1,2,4,5,1)
  (same comment as for waste bulk iron, excluding reinforcement)

## Emissions to nature
- Heat, waste [air, non-urban air or from high stacks]: 8.6931 MJ; lognormal variance with pedigree 0.0124805, pedigree (1,2,4,5,1)
  Corresponds to 114'748.92MJ from the whole building with 50 years life time, 264 m2 usable space and 1478 m3 volume.

## Sampling procedure
This process is identical with the SALCA-process 'Shed, large, wood, non-insulated, fire-unprotected, at farm/m2/CH/I U' excluding land occupation and transformation processes .

## Extrapolations
The amount of the exchanges are copy from a regional dataset.
