# transport, freight, lorry with reefer, cooling

Dataset: EcoSpold 2, unit process
Geography: GLO
Time period: 2010-01-01 to 2021-12-31
Technology level: current
Classification: ISIC rev.4 ecoinvent: 4923:Freight transport by road
Scenario: Business-as-Usual
System model: Allocation, cut-off by classification
Generated by: Tereza Levova
Database: ecoinvent
isCopyrightProtected: true
accessRestrictedTo: 1

## General comment
This dataset represent transport of reefer (refrigerated container) by a lorry (truck with semi-trailer). The operation mode of the reefer is cooling (temperature between 0°C and 20°C).
The amount of operation of the reefer needed is calculated using the assumption of the average speed of the lorry.
While the small lorries have build-in refrigeration machine the bigger trucks with semi-trailer are able to directly transport whole reefer. This dataset represents exactly this kind of transport.
Truck with semi-trailer transporting a reefer (http://commons.wikimedia.org/wiki/File:Volvo_FH12-Inger_(F)-2003.jpg, accessed 20141216).

## Included activities start
This dataset simply combine several activities - transport, freight, lorry of bigger sizes and operation of reefer, For more information on these two activities please see the datasets representing these two activities.

## Parameters
- speed: 45 km/hour; name speed_lorry; lognormal variance with pedigree 0.0166, pedigree (4,5,1,1,1)
  Estimated value based on an expert judgement. This value represents an average speed of lorry including all stops and breaks.

## Reference product
- transport, freight, lorry with reefer, cooling: 1 metric ton*km; name transport_lorry_RP; By-product classification allocatable product; CPC 65111: Road transport services of freight by refrigerator vehicles
  production volume 1.1826e11 metric ton*km; = 4.38E12*0.05*0.54
    Calculated based on estimates and literature values.
    4.38E+12 tkm is the sum of production volumes of all the transport by lorries of the sizes entering this activity.
    It is estimated, that out of all the cargo 5% was cargo in need of atmosphere control.
    According to literature (Drawry, 2008, published in http://www.hamburg-sued.com/group/media/sharedmedia/dokumente/brochures/Reefer_guide.pdf, accessed 20141216) the type of food transported in reefers is following;
    31% fresh fruits and vegetables (excl. bananas)
    20% bananas
    24% meat and poultry
    19% fish and seafood
    6% various (medicine, flowers, etc.)
    The fruits and vegetables (54%) in general need to be cooled during its storage and transport and the meat and seafood (46%) need to be frozen. The various is divided half/half between cooling and freezing.
  property price 0.0219756 EUR2005; name transport_lorry_RP_price_EUR2005
    Calculated based on inputs: The price of the product has been calculated as a sum of the values of the material and energy inputs for this product. This value is therefore a rough estimation. It may underestimate the real price since there are additional expenses when producing any product. These expences can include for example labour costs, treatment of waste materials and profit for the producer. Please consider carefully whether this level of data quality is acceptable for your application.

## Inputs from technosphere
- transport, freight, lorry 16-32 metric ton, EURO5: 0 metric ton*km; name transport_in_2; pedigree (1,1,1,1,1)
  Calculated.
  The shares of the different types of transport, freight, lorry are calculated from the production volumes (year 2010) of the supplying activities.
- transport, freight, lorry 16-32 metric ton, EURO3: 0 metric ton*km; name transport_in_4; pedigree (1,1,1,1,1)
  (same comment as for transport, freight, lorry 16-32 metric ton, EURO5)
- transport, freight, lorry >32 metric ton, EURO4: 0 metric ton*km; name transport_in_6; pedigree (1,1,1,1,1)
  (same comment as for transport, freight, lorry 16-32 metric ton, EURO5)
- transport, freight, lorry 16-32 metric ton, EURO6: 0 metric ton*km; name transport_in_1; pedigree (1,1,1,1,1)
  (same comment as for transport, freight, lorry 16-32 metric ton, EURO5)
- transport, freight, lorry >32 metric ton, EURO5: 0 metric ton*km; name transport_in_5; pedigree (1,1,1,1,1)
  (same comment as for transport, freight, lorry 16-32 metric ton, EURO5)
- transport, freight, lorry >32 metric ton, EURO3: 0 metric ton*km; name transport_in_7; pedigree (1,1,1,1,1)
  (same comment as for transport, freight, lorry 16-32 metric ton, EURO5)
- transport, freight, lorry >32 metric ton, EURO6: 0 metric ton*km; name transport_in_8; pedigree (1,1,1,1,1)
  (same comment as for transport, freight, lorry 16-32 metric ton, EURO5)
- operation, reefer, cooling: 0.925926 kg*day; = 1000*( transport_lorry_RP/speed_lorry/24); lognormal variance with pedigree 0.0186, pedigree (4,5,3,1,1)
  Calculated value based on estimated speed of the lorry.
- transport, freight, lorry 16-32 metric ton, EURO4: 0 metric ton*km; name transport_in_3; pedigree (1,1,1,1,1)
  (same comment as for transport, freight, lorry 16-32 metric ton, EURO5)
- transport, freight, lorry 16-32 metric ton, EURO5: 0.00250296, 0.00618725, 0.0356098 metric ton*km (3 entries); lognormal variance with pedigree 0.0566, pedigree (4,5,5,1,1)
  (same comment as for transport, freight, lorry 16-32 metric ton, EURO5)
- transport, freight, lorry 16-32 metric ton, EURO3: 0.0167209, 0.0140754, 0.130504 metric ton*km (3 entries); lognormal variance with pedigree 0.0566, pedigree (4,5,5,1,1)
  (same comment as for transport, freight, lorry 16-32 metric ton, EURO5)
- transport, freight, lorry >32 metric ton, EURO4: 0.0272243, 0.233676 metric ton*km (2 entries); lognormal variance with pedigree 0.0566, pedigree (4,5,5,1,1)
  (same comment as for transport, freight, lorry 16-32 metric ton, EURO5)
- transport, freight, lorry 16-32 metric ton, EURO6: 0.000824346, 0.00707565 metric ton*km (2 entries); lognormal variance with pedigree 0.0566, pedigree (4,5,5,1,1)
  (same comment as for transport, freight, lorry 16-32 metric ton, EURO5)
- transport, freight, lorry >32 metric ton, EURO5: 0.00472088, 0.0139663, 0.0762129 metric ton*km (3 entries); lognormal variance with pedigree 0.0566, pedigree (4,5,5,1,1)
  (same comment as for transport, freight, lorry 16-32 metric ton, EURO5)
- transport, freight, lorry >32 metric ton, EURO3: 0.0245835, 0.029794, 0.227722 metric ton*km (3 entries); lognormal variance with pedigree 0.0566, pedigree (4,5,5,1,1)
  (same comment as for transport, freight, lorry 16-32 metric ton, EURO5)
- transport, freight, lorry >32 metric ton, EURO6: 0.00164869, 0.0141513 metric ton*km (2 entries); lognormal variance with pedigree 0.0566, pedigree (4,5,5,1,1)
  (same comment as for transport, freight, lorry 16-32 metric ton, EURO5)
- transport, freight, lorry 16-32 metric ton, EURO4: 0.0138574, 0.118943 metric ton*km (2 entries); lognormal variance with pedigree 0.0566, pedigree (4,5,5,1,1)
  (same comment as for transport, freight, lorry 16-32 metric ton, EURO5)

## Extrapolations
This dataset has been extrapolated from year 2014 to the year of the calculation (2021). The uncertainty has been adjusted accordingly.
