# borehole heat exchanger production, 150m

Dataset: EcoSpold 2, unit process
Geography: CH
Time period: 1990-01-01 to 2021-12-31
Technology level: current
Classification: ISIC rev.4 ecoinvent: 2819:Manufacture of other general-purpose machinery
Classification: EcoSpold01Categories: heat pumps/production of components
Tags: ConvertedDataset
Scenario: Business-as-Usual
System model: Allocation, cut-off by classification
Share of production covered: 0 %
Generated by: Thomas Heck
Published in: Heck, T. 2007
Database: ecoinvent
isCopyrightProtected: true
accessRestrictedTo: 1

## General comment
This dataset represents the installation of a borehole heat exchanger for an average one family house in the Swiss midland. For this, two U-shaped polyethylene tubes are installed in a borehole in the ground with a diameter of about 12 cm and a depth of 150 meters. Life time is assumed to be 50 years. This dataset is dimensioned for a heat pump system with the following reference values: for the average one family house a heating requirement of 10 kW, a heat distribution system (low-temperature system) of 50/40°C and a heat supply of approximately 20.000 kWh with 2.000 operating hours were assumed. Furthermore, a system with a heating output of 10,25 kW (at a supply temperature of 40°C), a mean cooling capacity of 8,25 kW (to dimension the borehole heat exchanger) and a extraction performance of 55 W/m were chosen. The heat pump system is assumed to be operated without an auxiliary heating system. Switzerland is assumed to represent an average climatological and geological location in Europe.
[This dataset was already contained in the ecoinvent database version 2. It was not individually updated during the transfer to ecoinvent version 3. Life Cycle Impact Assessment results may still have changed, as they are affected by changes in the supply chain, i.e. in other datasets. This dataset was generated following the ecoinvent quality guidelines for version 2. It may have been subject to central changes described in the ecoinvent version 3 change report (http://www.ecoinvent.org/database/ecoinvent-version-3/reports-of-changes/), and the results of the central updates were reviewed extensively. The changes added e.g. consistent water flows and other information throughout the database. The documentation of this dataset can be found in the ecoinvent reports of version 2, which are still available via the ecoinvent website. The change report linked above covers all central changes that were made during the conversion process.]

## Included activities start
From reception of the various construction and drilling materials (reinforcing steel, cement, activated bentonite, ethylene glycol, polyethylene) at the drilling company.

## Included activities end
This activity ends with a borehole heat exchanger unit with a life time of 50 years.This dataset includes emissions during drilling phase. The dataset doesn´t include the recycling process of bentonite, nor operation of the borehole heat exchanger.

## Technology
Borehole heat exchangers basically consist of coaxial or U-shaped polyethylene tubes and are installed vertically in the soil, usually at a depth of 50 up to 250 meters.Up to a depth of 75 meters a tube with a diameter of 25 mm (0,172 kg/m) is inserted, for deeper probes a tube with a diameter of 32 mm (0,273 kg/m) is used. If a borehole heat exchanger with a length of 150 meters should be installed, 30 % use two probes with a length of 75 meters and in 70 % of the cases one probe with a length of 150 meters is installed.

For brine-water heat pumps with a borehole heat exchanger soil serves as heat source. The heat is withdrawn from the soil through a closed-loop system situated in the tube and is fed to the heat pump. As heat-conveying fluid, i.e. brine, in the majority of cases water is used compounded with 25 % to 35% of antifreezing agent. Borehole heat exchangers are backfilled with a bentonite-cement suspension to ensure good thermal contact between the probe and the ground, i.e. to increase heat transfer.

Through the operation of borehole heat exchangers heat is extracted constantly from the soil. Due to the fact that the soil is not able to compensate the thermal deficit, a funnel-shaped low-temperature area is formed round the borehole heat exchanger with a temperature difference (located 2,5 meters away from the tube) between soil temperature without operation of a borehole heat exchanger and with operation of below 1 degree C. During heating period heat pumps are in operation most of the time so the soil cools down. Hence the abstraction capacity must not be higher than 40 to 60 Watt per meter of tube length. Over several years of operation a new state of equilibrium can be detected where the soil temperature is lower than if no borehole heat exchanger were in operation.

The heat flowing towards the tube does not derive from variations in temperature but from earth’s interior. These heat flows, which have an intensity of 60 to 80 W/m2 derive by 80 % from the decay of radioactive isotopes in rocks and by 20 % from heat arising by reason of the origin of Earth.
References:
M.Heckenberger, K.O. Luik, N.Scheirle, K.Wachter "Erdwärme in Oberschwaben", En¬ergiewirt¬schaftliche Tagesfragen 39(3), 116, 1989.
Persönliche Mitteilung einer Mitarbeiterin, Firma: HAKA, Gossau, Juli 1993.
Persönliche Mitteilung Herr Schlander, Firma: Grundag AG, Gossau, August 1993.

## Parameters
- fraction, process water, to air: 0.15 dimensionless; name fraction_PW_to_air; lognormal variance with pedigree 0.092025, pedigree (4,4,3,2,4)
  Literature value. In case when no industry/process specific data are available, default evaporation fraction value is used. This value is 15% and is based on literature (Statistics Canada, 2007 & Shaffer, K.H., 2008, Consumptive water use in the Great Lakes Basin, USGS & Shiklomanov, 2003, World Water Resources at the Beginning of the 21st Century) and has been approved by an expert.

## Reference product
- borehole heat exchanger, 150m: 1 unit; source Rohner sen. 1993; By-product classification allocatable product; CPC 43911: Producer gas or water gas generators; acetylene gas generators and similar water process gas generators; disti[…]
  EcoSpold01Location=CH
  Estimation.The estimation of a borehole heat exchanger unit is based on the reference values for a one family house. To estimate the necessary probe length, 15 meters of probe per 1 kW of required thermal output are assumed. Based on the average cooling capacity and the extract performance a length of 150 meters can be estimated (two borehole heat exchangers with a length of 75 meters each are also possible).
  Life time of the borehole heat exchanger ranges between 30 and 100 years. In the dataset a life time of 50 years is assumed with an uncertainty of SDg2=2.
  Further references:
  Luder F.: Materialien für Erdwärmesonden. http://www.geothermie.de/. Retrieved 04 Mar 2003.
  Arbeitsgemeinschaft Wärmepumpen, "Allgemeine Information über Wärmepumpenheizungsanla-gen - Merkblatt A 1 und A 8", 1991.
  production volume 0.0336675 unit
    This is a placeholder value that does not reflect real-world production volumes. This dataset does not currently require a real-world production volume to work in the database framework, and no actual data were collected yet. This has no negative effect on the results of the ecoinvent database. The placeholder value of this activity was scaled according to the nominal GDP of 2005 (source: United Nations, http://data.un.org/Glossary.aspx?q=GDP+%28current+US%24%29, accessed 20130726) to reflect an appropriate share of the global production volume, which is also a placeholder value.
  property price 1420 EUR2005
    EU27 I/O database-68 Electronic machinery (4.02 EURO2003/kg dry soilds) in the 'EU & DK Input Output Database' (available in SimaPro); 356 kg

## Inputs from technosphere
- inert waste, for final disposal: -2500 kg; lognormal variance with pedigree 0.186, pedigree (4,5,5,1,1)
  Estimation. During drilling phase (hydraulic-circulating drilling) waste of 1 m3 of stones and bentonite suspension is generated with an average mass density of 2500 kg/m3. The waste is deposited at a landfill for inert matter. After operation the probe is left in situ.
  EcoSpold01Location=CH
  production volume 2500 kg
    Calculated from the production volume of borehole heat exchanger, 150m in proportion to the respective output amounts.
  properties: water content 0.00502513, wet mass 1 kg, dry mass 0.995 kg
- ethylene glycol: 102 kg; lognormal variance with pedigree 0.186, pedigree (4,5,5,1,1)
  Calculated value. The calculation of brine content and the associated amount of ethylene glycol is based on the percentage weighting of installed probe sizes (diameter) of 25 mm (wall thickness 2,3 mm) respectively 32 mm (wall thickness 3 mm). 30 % of probes have 25 mm of diameter (brine content: 3.27 dl/m tube), 70 % have 32 mm (brine content: 5.31 dl/m tube). Based on this weighting a brine content of 300 liters can be calculated. With an assumed antifreeze ratio of 30 % this corresponds to 90 l (i.e. 102 kg) ethylene glycol per probe. The mass density of ethylene glycol is 1,14 kg/dm3; the water amount of the brine is 210 kg.
  EcoSpold01Location=RER
  properties: dry mass 1 kg, wet mass 1 kg, carbon content, fossil 0.387097, heating value, net 23.44 MJ
- heat carrier liquid, 40% C3H8O2: -0.3 m3; lognormal variance with pedigree 0.186, pedigree (4,5,5,1,1)
  Estimation. After operation the heat carrier liquid is returned to the provider and is then brought to a wastewater treatment plant.
  EcoSpold01Location=CH
  production volume 0.3 m3
    (same comment as for inert waste, for final disposal)
  properties: price 1.08656 EUR2005, water content 157.387, carbon content, fossil 3, dry mass 6.31366 kg, wet mass 1000 kg
  note on carbon content, fossil: The composition of the product was used to estimate its carbon content: 40% (w/v) C3H8O2.
- reinforcing steel: 33 kg; lognormal variance with pedigree 0.186, pedigree (4,5,5,1,1)
  Estimation. Abrasion of drilling scaffolds, drill pipes, drilling heads and temporary pipeworks is included. For this, in most cases unalloyed construction steel 52/2 (DIN 17100) is used.
  EcoSpold01Location=RER
  properties: wet mass 1 kg, dry mass 1 kg, carbon content, fossil 0.004
- activated bentonite: 8 kg; source Frischknecht R. 1999; lognormal variance with pedigree 0.186, pedigree (4,5,5,1,1)
  Estimation. Calcium bentonite is mined in the South of Germany. On average 10 m3 of bentonite are added to the drilling water during drilling phase. Furthermore bentonite is used for backfilling the probe. The bentonite drilling fluid prevents the collapsing of the drill wall and gives the borehole cuttings a boost. For one probe 250 kg of bentonite are used for the drilling phase and 80 kg for backfilling the probe.Due to the fact that large amounts of bentonite are recycled, in total only 8 kg of bentonite are consumed. Recycling process of bentonite is not included.
  EcoSpold01Location=DE
  properties: dry mass 1 kg, wet mass 1 kg
- cement, unspecified: 33 kg; lognormal variance with pedigree 0.186, pedigree (4,5,5,1,1)
  Estimation.
  EcoSpold01Location=CH
  properties: wet mass 1 kg, dry mass 1 kg
- polyethylene, low density, granulate: 180 kg; lognormal variance with pedigree 0.186, pedigree (4,5,5,1,1)
  Estimation. Two U-shaped probe tubes are installed. In the cross section this amounts to four tubes, i.e. 600 meters of polyethylene tubes at a probe length of 150 meters. Assuming material amount of 0,3 kg/m (incl. losses) this amounts to 180 kg of polyethylene.
  EcoSpold01Location=RER
  properties: dry mass 1 kg, heating value, net 42.47 MJ, wet mass 1 kg, carbon content, fossil 0.857143
  note on carbon content, fossil: Polyethylene is formed out of a huge amount of ethylene monomers (C2H4) (ecoinvent v2.2 report 11_II). MW=28 g/mol
- diesel, burned in building machine: 17700 MJ; source Rohner jun. 1996; lognormal variance with pedigree 0.1227, pedigree (3,3,5,3,4)
  Estimation. The drilling scaffold is transported by a Unimog 1300 and is positioned at the drilling site by a lorry. The drill pipes are operated hydraulically by the Unimog engine. In the same way the pump is operated, which is used for rinsing during drilling phase and for pumping down the bentonite-cement suspension. Data regarding diesel consumption is derived from Rohner. According to this information, 2,5 liters of diesel per meter probe are used in case of hydraulic-circulation drilling; 3,5 liters per meter of probe are used in case of hammer drilling. (40 % of probes are installed with hydraulic-circulation drilling, 60 % with hammer drilling). On average approximately 2.5*0.4+3.5*0.6=3.1 liters of diesel per meter are used.
  Based on these estimations average diesel consumption for a probe with a length of 150 meters amounts to 465 l (i.e. 17700 MJ). Emissions during drilling phase are included.
  EcoSpold01Location=GLO
  properties: heating value, net 1 MJ

## Inputs from nature
- Water, unspecified natural origin [natural resource, in water]: 10.2 m3; name water_UNO_input; lognormal variance with pedigree 0.186, pedigree (4,5,5,1,1)
  Estimation.

## Emissions to nature
- Water [water, unspecified]: 8.67 m3; name water_to_water_unspecified; = water_UNO_input*(1-fraction_PW_to_air); lognormal variance with pedigree 0.0807, pedigree (2,2,5,1,1)
  Calculated value based on literature values and expert opinion. See comments in the parametres' comment field.
  property fraction, origin: fresh water 0; name fraction_origin_fresh_water_Ww
  property fraction, origin: salt water 0; name fraction_origin_salt_water_Ww
  property fraction, origin: unspecified 1; name fraction_origin_unspecified_Ww
  property dry mass 0 kg; name DM
  property carbon content, fossil 0; name C_content_fossil
  property water in wet mass 1000 kg; name WWM
  property carbon content, non-fossil 0; name C_content_non_fossil
  property wet mass 1000 kg; name WM
- Water [air, unspecified]: 1.53 m3; name water_to_air_unspecified; = (water_UNO_input*fraction_PW_to_air); lognormal variance with pedigree 0.0807, pedigree (2,2,5,1,1)
  (same comment as for Water)
  property fraction, origin: unspecified 1; name fraction_origin_unspecified
  property fraction, origin: salt water 0; name fraction_origin_salt_water
  property fraction, origin: fresh water 0; name fraction_origin_fresh_water

## Sampling procedure
Literature, manufacturer information

## Extrapolations
This dataset has been extrapolated from year 2000 to the year of the calculation (2021). The uncertainty has been adjusted accordingly.

## Review by Roland Hischier 2011-09-22
Transfer of documentation done.

## Review by Gerald Rebitzer (obsolete) 2004-06-09
prepared
