# ion-exchanger production for water treatment

Dataset: EcoSpold 2, unit process
Geography: RoW
Time period: 1992-01-01 to 2021-12-31
Technology level: current
Classification: ISIC rev.4 ecoinvent: 4220:Construction of utility projects
Classification: EcoSpold01Categories: water supply/production
Tags: ConvertedDataset
Scenario: Business-as-Usual
System model: Allocation, cut-off by classification
Generated by: Alex Primas
Published in: Althaus H.-J. 2007
Database: ecoinvent
isCopyrightProtected: true
accessRestrictedTo: 1

## General comment
Data for infrastructure based on weak data and various assumtions. Therfore process has a large uncertainty for the equipment used.
[This dataset was already contained in the ecoinvent database version 2. It was not individually updated during the transfer to ecoinvent version 3. Life Cycle Impact Assessment results may still have changed, as they are affected by changes in the supply chain, i.e. in other datasets. This dataset was generated following the ecoinvent quality guidelines for version 2. It may have been subject to central changes described in the ecoinvent version 3 change report (http://www.ecoinvent.org/database/ecoinvent-version-3/reports-of-changes/), and the results of the central updates were reviewed extensively. The changes added e.g. consistent water flows and other information throughout the database. The documentation of this dataset can be found in the ecoinvent reports of version 2, which are still available via the ecoinvent website. The change report linked above covers all central changes that were made during the conversion process.]

## Included activities end
strong acidic cation and strong base anion resin, material used for plant, transport of materials , land use of pant, no menergy for the manufacturing included.

## Geography
Raw water data from Switzerland (design calculations).

## Technology
Plant with a production of 100 m3/h. Two-bed system with a strong acidic cation resin volume of 5.3 m3 and a strong base anion resin volume of 2.8 m3. Unit is operated with counterflow regeneration, a defgasser and without lime decarbonation. Life time of the unit 15 y and of the resin 5 y. 7500 h/a operating time. Tank material stainless steel, lining PP.

## Time period
Time of literature publication. Measurements took place partly before this period.

## Reference product
- ion-exchanger for water treatment: 1 unit; name RP_amount; By-product classification allocatable product; CPC 34790: Other plastics in primary forms; ion exchangers
  EcoSpold01Location=CH
  Uncertainty not applicable for output
  production volume 705.398 unit; name RP_PV
    0.9E-10 unit/kg water, deionised
  property price 51811.6 EUR2005
    Calculated based on inputs: The price of the product has been calculated as a sum of the values of the material and energy inputs for this product. This value is therefore a rough estimation. It may underestimate the real price since there are additional expenses when producing any product. These expences can include for example labour costs, treatment of waste materials and profit for the producer. Please consider carefully whether this level of data quality is acceptable for your application.

## Inputs from technosphere
- spent anion exchange resin from potable water production: -9240 kg; name spent_anion_amount; lognormal variance with pedigree 0.068, pedigree (4,5,5,5,1)
  Data from calculations with a design software
  EcoSpold01Location=CH
  Uncertainty: Data from calculations with a design software
  production volume 6.51787e6 kg; = RP_PV * spent_anion_amount / RP_amount
    Calculated from the production volume of ion-exchanger for water treatment in proportion to the respective output amounts.
  property price 0 EUR2005; name spent_anion_amount_price_EUR2005
  properties: dry mass 0.5 kg, carbon content, fossil 0.654, water content 1, wet mass 1 kg, heating value, net 6.08 MJ
  note on carbon content, fossil: Tab A.12, ecoinvent v2.2 report 13_I, c content is referred to 1 kg DM
  note on heating value, net: Value taken from the general comment of the treatment dataset.
- cationic resin: 20400 kg; lognormal variance with pedigree 0.068, pedigree (4,5,5,5,1)
  (same comment as for spent anion exchange resin from potable water production)
  properties: wet mass 1 kg, water content 1, carbon content, fossil 0.521606, dry mass 0.5 kg, heating value, net 6.68 MJ
  note on carbon content, fossil: Chemically inert polystyrene beads are treated with concentrated sulfuric or chlorosulfonic acid to give cross-linked polystyrene 3-sulfonic acid (Cation exchange resins, Ullmann). The resine was approximated as C8H8O3S (from Ullmann, Cation exchange resins). The resine is hydrated (ecoinvent v2.2 report 8, part II, Tab 93.5)
- steel, low-alloyed, hot rolled: 3000 kg; lognormal variance with pedigree 0.21, pedigree (5,5,5,5,4)
  EcoSpold01Location=RER
  Estimated with data from a decarbonisation unit
  Uncertainty: Estimated with data from a decarbonisation unit
  properties: carbon content, fossil 0.005, dry mass 1 kg, wet mass 1 kg
  note on carbon content, fossil: Low alloyed steel composition given in Tab. 3.2 ecoinvent v2.2 report 10_partII. Steel assumed to have a C content of 0.5%
- polypropylene, granulate: 1000 kg; name polypropylene_amount; lognormal variance with pedigree 0.21, pedigree (5,5,5,5,4)
  (same comment as for steel, low-alloyed, hot rolled)
  properties: heating value, net 32.78 MJ, dry mass 1 kg, wet mass 1 kg, carbon content, fossil 0.857143
  note on heating value, net: Value extracted from "treatment of waste polypropylene, open burning"
  note on carbon content, fossil: Polypropylene is formed by the polymerisation of propylene, C3H6 (ecoinvent v2.2 report 11_II)
- scrap steel: 0 kg; name scrap_steel_amount; pedigree (1,1,1,1,1)
  production volume 0 kg
    Calculated from production volume of reference product using the relative outputs.
  property price 0 EUR2005; name scrap_steel_amount_price_EUR2005
  properties: dry mass 1 kg, wet mass 1 kg
- spent cation exchange resin from potable water production: -20400 kg; name spent_cation_amount; lognormal variance with pedigree 0.068, pedigree (4,5,5,5,1)
  (same comment as for spent anion exchange resin from potable water production)
  production volume 1.43901e7 kg; = RP_PV * spent_cation_amount / RP_amount
    (same comment as for spent anion exchange resin from potable water production)
  property price 0 EUR2005; name spent_cation_amount_price_EUR2005
  properties: carbon content, fossil 0.512, water content 1, dry mass 0.5 kg, wet mass 1 kg, heating value, net 1.47 MJ
- anionic resin: 9240 kg; lognormal variance with pedigree 0.068, pedigree (4,5,5,5,1)
  EcoSpold01Location=CH
  Data from calculations with a design software
  Uncertainty: Data from calculations with a design software
  properties: dry mass 0.5 kg, heating value, net 9.09 MJ, carbon content, fossil 0.680721, water content 1, wet mass 1 kg
  note on carbon content, fossil: Cross-linked polystyrene beads are treated with chloromethyl methyl ether under anhydrous conditions, with either aluminum chloride or tin(IV) chloride as catalyst. Chloromethylated polystyrene is obtained. In a second stage, the chlorine in the chloromethylated group can be replaced by an amine (Anion exchange resins, in Ullmann). In this case, Trimethylamine, C3H9N, is used (ecoinvent v2.2 report 8-part 93). That is, the resine can be formulated as C12H18NCl (after Ullmann, Anion exchange resins). The resine is hydrated (ecoinvent v2.2 report 8, part II, Tab 93.7)
- waste polypropylene: 0 kg; name waste_polypropylene_amount; pedigree (1,1,1,1,1)
  Estimated with data from a decarbonisation unit
  EcoSpold01Location=CH
  Uncertainty: Estimated with data from a decarbonisation unit
  production volume 0 kg
    (same comment as for spent anion exchange resin from potable water production)
  property price 0 EUR2005; name waste_polypropylene_amount_price_EUR2005
  properties: dry mass 0.841 kg, water content 0.189061, wet mass 1 kg, heating value, net 32.78 MJ, carbon content, fossil 0.825208
  note on heating value, net: Value assumed for all polypropylene products. Source: Phyllis2, database for (treated) biomass, algae, feedstocks for biogas production and biochar, https://phyllis.nl/Biomass/View/1186, ECN.TNO
  note on carbon content, fossil: C content in 1 kg DM was calculated using data in Tab A.1, ecoinvent v2.2 report 13_I
- tap water: 0 kg; pedigree (1,1,1,1,1)
  Accounts for the water that is absorbs in the polypropylene
  properties: water content 2962.17, dry mass 0.000337476 kg, carbon content, fossil 0.00178991, wet mass 1 kg
  note on carbon content, fossil: Bicarbonate content is 2.93 mol/m3. CO2 content is 0.1 mol/m3 (ecoinvent v2.2 report 8, Tab 93.1).
- steel, chromium steel 18/8, hot rolled: 5900 kg; lognormal variance with pedigree 0.21, pedigree (5,5,5,5,4)
  (same comment as for steel, low-alloyed, hot rolled)
  properties: dry mass 1 kg, carbon content, fossil 0.0008, wet mass 1 kg
  note on carbon content, fossil: Stainless steel model is the grade 304 steel (18/8 stainless, 18% chromium 8% nickel; max. 0.08% C)
- scrap steel: -2167.78, -6732.22 kg (2 entries); lognormal variance with pedigree 0.2106, pedigree (5,5,5,5,5)
  production volume 6.27804e6 kg
- waste polypropylene: -132.378, -8.84498, -0.668931, -3.65329, -1.47589, -3.46914, -112.792, -926.718 kg (8 entries); lognormal variance with pedigree 0.21, pedigree (5,5,5,5,4)
  (same comment as for waste polypropylene)
  production volume 839423 kg
- tap water: 1.77539, 0.213709, 0.353189, 75.9446, 8.90604, 0.231688, 0.659034, 101.916 kg (8 entries); lognormal variance with pedigree 0.2106, pedigree (5,5,5,5,5)
  Accounts for the water that is absorbs in the polypropylene

## Inputs from nature
- Transformation, to industrial area [natural resource, land]: 100 m2; lognormal variance with pedigree 0.194, pedigree (3,4,5,5,3)
  Data from one plant out of literature
  Uncertainty: Data from one plant out of literature
- Occupation, industrial area [natural resource, land]: 1500 m2*year; lognormal variance with pedigree 0.114, pedigree (3,4,5,5,3)
  Data from one plant out of literature
  Uncertainty: Data from one plant out of literature
- Transformation, from unspecified [natural resource, land]: 100 m2; lognormal variance with pedigree 0.194, pedigree (3,4,5,5,3)
  Data from one plant out of literature
  Uncertainty: Data from one plant out of literature

## Sampling procedure
Data for resin volume based on design calculations for the specified water quality. Material demand estimated based on very weak data (one source). Land use estimated from literature data (one source). Standard distances used for transports.

## Extrapolations
none This dataset has been copied from an original dataset covering the geography CH. The uncertainty has been adjusted accordingly.

## Review by Roland Hischier 2003-08-26
Passed.
