# dimethyl sulfate production

Dataset: EcoSpold 2, unit process
Geography: RoW
Time period: 2000-01-01 to 2021-12-31
Technology level: current
Classification: EcoSpold01Categories: chemicals/organics
Classification: ISIC rev.4 ecoinvent: 2011:Manufacture of basic chemicals
Tags: ConvertedDataset
Scenario: Business-as-Usual
System model: Allocation, cut-off by classification
Generated by: Roland Hischier
Published in: Althaus H.-J. 2007
Database: ecoinvent
isCopyrightProtected: true
accessRestrictedTo: 1

## General comment
The functional unit represent 1 kg of liquid dimethyl sulphate. Large uncertainty of the process data due to weak data on the production process and missing data on process emissions.
[This dataset was already contained in the ecoinvent database version 2. It was not individually updated during the transfer to ecoinvent version 3. Life Cycle Impact Assessment results may still have changed, as they are affected by changes in the supply chain, i.e. in other datasets. This dataset was generated following the ecoinvent quality guidelines for version 2. It may have been subject to central changes described in the ecoinvent version 3 change report (http://www.ecoinvent.org/database/ecoinvent-version-3/reports-of-changes/), and the results of the central updates were reviewed extensively. The changes added e.g. consistent water flows and other information throughout the database. The documentation of this dataset can be found in the ecoinvent reports of version 2, which are still available via the ecoinvent website. The change report linked above covers all central changes that were made during the conversion process.]

## Included activities end
Raw materials and chemicals used for production, transport of materials to manufacturing plant, estimated emissions to air and water from production (incomplete), estimation of energy demand and infrastructure of the plant (approximation). Solid wastes omitted.

## Geography
Data used has no specific geographical origin (stoechiometry). Average europenan processes for raw materials, transport requirements and electricity mix used.

## Technology
Production from dimethyl ether and sulphur trioxide with a process yield of 95%. Inventory bases on stoechiometric calculations. The emissions to air (0.2 wt.% of raw material input) and water were estimated using mass balance. Treatment of the waste water in a internal waste water treatment plant assumed (elimination efficiency of 90% for C).

## Time period
date of published literature

## Parameters
- fraction, cooling water, once-through system, to air: 0.004 dimensionless; name fraction_CW_OT_to_air; lognormal variance with pedigree 0.0413, pedigree (2,3,1,3,1)
  Calculated based on literature value (Scown, C.D., 2011, Water Footprint of U.S. Transportation Fuels and supplying information of the article) (Vionnet, S., Quantis Water Database - Technical Report, 2012).
- fraction, process water, to air: 0.205 dimensionless; name fraction_PW_to_air; lognormal variance with pedigree 0.092025, pedigree (4,4,3,2,4)
- fraction, cooling water, recirculating system, to air: 0.771 dimensionless; name fraction_CW_R_to_air; lognormal variance with pedigree 0.0413, pedigree (2,3,1,3,1)
  (same comment as for fraction, cooling water, once-through system, to air)
- fraction, cooling water, cooling pond system, to air: 0.032 dimensionless; name fraction_CW_CP_to_air; lognormal variance with pedigree 0.0413, pedigree (2,3,1,3,1)
  (same comment as for fraction, cooling water, once-through system, to air)
- fraction, cooling water, to air: 0.3875 dimensionless; name fraction_CW_to_air; = (0.5*fraction_CW_OT_to_air)+(0.5*fraction_CW_R_to_air); lognormal variance with pedigree 0.092025, pedigree (4,4,3,2,4)
  Calculated value based on literature value (see comments of the other parametres present in this dataset) and expert opinion. In the case when no industry/literature data are available about the type of cooling or directly fraction, cooling water, to air specific for the process a default assumption is applied. It is assumed that the once-through cooling system is used in 50% of all cases and recirculating system is used in another 50% of all cases.

## Reference product
- dimethyl sulfate: 1 kg; CPC 34: Basic chemicals; By-product classification allocatable product; CAS 77-78-1
  EcoSpold01Location=RER
  production volume 2.67763 kg
    This is a placeholder value that does not reflect real-world production volumes. This dataset does not currently require a real-world production volume to work in the database framework, and no actual data were collected yet. This has no negative effect on the results of the ecoinvent database.
  property heating value, net 11.54 MJ
    LHV is calculated based on the elemental composition of the substance. Based on the CAS number of the substance (000077-78-1), the chemical formula of the substance is found to be: C2H6O4S, (PubChem 2020).
    Reference: Kim, S., Chen, J., Cheng, T., Gindulyte, A., He, J., He, S., Li, Q., Shoemaker, B. A., Thiessen, P. A., Yu, B., Zaslavsky, L., Zhang, J., & Bolton, E. E. (2019). PubChem 2019 update: improved access to chemical data. Nucleic acids research, 47(D1), D1102–D1109. https://doi.org/10.1093/nar/gky1033
  property price 0.718312 EUR2005
    Calculated based on inputs: The price of the product has been calculated as a sum of the values of the material and energy inputs for this product. This value is therefore a rough estimation. It may underestimate the real price since there are additional expenses when producing any product. These expences can include for example labour costs, treatment of waste materials and profit for the producer. Please consider carefully whether this level of data quality is acceptable for your application.
  property carbon content 0.190476
    carbon content on a dry matter basis (reserved; not for manual entry)
  properties: carbon content, fossil 0.190476, water in wet mass 0 kg, water content 0, wet mass 1 kg, carbon content, non-fossil 0, dry mass 1 kg, carbon allocation 0.190476 kg

## Inputs from technosphere
- dimethyl ether: 0.386 kg; lognormal variance with pedigree 0.1786, pedigree (4,5,5,5,5)
  EcoSpold01Location=RER
  Estimation based on process yield 90-99.8%
  Uncertainty: estimation based on process yield 90-99.8%
  properties: carbon content, fossil 0.521739, dry mass 1 kg, heating value, net 31.58 MJ, wet mass 1 kg
- chemical factory, organics: 4e-10 unit; lognormal variance with pedigree 0.588, pedigree (4,5,5,5,5)
  EcoSpold01Location=RER
  Estimation
  Uncertainty: estimation
- sulfur trioxide: 0.668 kg; lognormal variance with pedigree 0.1786, pedigree (4,5,5,5,5)
  Estimation based on process yield 90-99.8%
  EcoSpold01Location=RER
  Uncertainty: estimation based on process yield 90-99.8%
  properties: wet mass 1 kg, dry mass 1 kg
- heat, district or industrial, natural gas: 0 MJ; pedigree (1,1,1,1,1)
  EcoSpold01Location=RER
  Estimated with data from a large chem. plant
  Uncertainty: estimated with data from a large chem. plant
  properties: heating value, net 1 MJ
- electricity, medium voltage: 0 kWh; pedigree (1,1,1,1,1)
  EcoSpold01Location=UCTE
  Estimated with data from a large chem. plant
  Uncertainty: estimated with data from a large chem. plant
- heat, district or industrial, natural gas: 0.0303564, 1.96964 MJ (2 entries); lognormal variance with pedigree 0.21, pedigree (5,5,5,5,4)
  (same comment as for heat, district or industrial, natural gas)
- electricity, medium voltage: 0.00419753, 0.000804905, 0.0135127, 0.19653, 0.027701, 0.090254 kWh (6 entries); lognormal variance with pedigree 0.21, pedigree (5,5,5,5,4)
  (same comment as for electricity, medium voltage)

## Inputs from nature
- Water, unspecified natural origin [natural resource, in water]: 0.006 m3; name water_UNO_input; lognormal variance with pedigree 0.188, pedigree (4,5,5,5,5)
  Estimation based on process yield 90-99.8%
  Uncertainty: estimation based on process yield 90-99.8%
- Water, cooling, unspecified natural origin [natural resource, in water]: 0.024 m3; name water_cooling_UNO_input; lognormal variance with pedigree 0.21, pedigree (5,5,5,5,4)
  Estimated with data from a large chem. plant
  Uncertainty: estimated with data from a large chem. plant

## Emissions to nature
- Sulfate [water, surface water]: 0.0369 kg; lognormal variance with pedigree 0.23, pedigree (5,5,5,5,4)
  Estimated from mass balance and WWTP effic.
  Uncertainty: estimated from mass balance and WWTP effic.
- Water [air, unspecified]: 0.01053 m3; name water_to_air_unspecified; lognormal variance with pedigree 0.0827, pedigree (2,2,5,5,1)
  Calculated value based on literature values and expert opinion. See comments in the parametres' comment field.
  property fraction, origin: fresh water 0; name fraction_origin_fresh_water
  property fraction, origin: unspecified 1; name fraction_origin_unspecified
  property fraction, origin: salt water 0; name fraction_origin_salt_water
- COD, Chemical Oxygen Demand [water, surface water]: 0.0428 kg; lognormal variance with pedigree 0.23, pedigree (5,5,5,5,4)
  (same comment as for Sulfate)
- Water [water, unspecified]: 0.01947 m3; name water_to_water_unspecified; lognormal variance with pedigree 0.0827, pedigree (2,2,5,5,1)
  (same comment as for Water)
  property fraction, origin: unspecified 1; name fraction_origin_unspecified_Ww
  property fraction, origin: fresh water 0; name fraction_origin_fresh_water_Ww
  property fraction, origin: salt water 0; name fraction_origin_salt_water_Ww
  property carbon content, non-fossil 0; name C_content_non_fossil
  property water in wet mass 1000 kg; name WWM
  property carbon content, fossil 0; name C_content_fossil
  property wet mass 1000 kg; name WM
  property dry mass 0 kg; name DM
- DOC, Dissolved Organic Carbon [water, surface water]: 0.00962 kg; lognormal variance with pedigree 0.23, pedigree (5,5,5,5,4)
  (same comment as for Sulfate)
- Carbon dioxide, fossil [air, urban air close to ground]: 0.0317 kg; lognormal variance with pedigree 0.2, pedigree (5,5,5,5,4)
  (same comment as for Sulfate)
- Sulfate [air, urban air close to ground]: 0.0032 kg; lognormal variance with pedigree 0.33, pedigree (5,5,5,5,5)
  Estimation
  Uncertainty: estimation
- BOD5, Biological Oxygen Demand [water, surface water]: 0.0428 kg; lognormal variance with pedigree 0.23, pedigree (5,5,5,5,4)
  (same comment as for Sulfate)
- Hydrocarbons, aliphatic, unsaturated [air, urban air close to ground]: 0.00077 kg; lognormal variance with pedigree 0.33, pedigree (5,5,5,5,5)
  Estimation
  Uncertainty: estimation
- Hydrocarbons, aliphatic, unsaturated [water, surface water]: 0.00185 kg; lognormal variance with pedigree 0.24, pedigree (5,5,5,5,4)
  (same comment as for Sulfate)
- TOC, Total Organic Carbon [water, surface water]: 0.00962 kg; lognormal variance with pedigree 0.23, pedigree (5,5,5,5,4)
  (same comment as for Sulfate)

## Sampling procedure
Process data based on stoechiometric calculations of few literature sources. Energy demand based on approximation from large chemical plant. Process emissions based on estimations only.

## Extrapolations
This dataset has been copied from an original dataset covering the geography RER. The uncertainty has been adjusted accordingly.

## Review by Heiko Kunst 2003-08-14
Passed
Passed
