# natural gas production

Dataset: EcoSpold 2, unit process
Geography: DE
Time period: 1996-01-01 to 2021-12-31
Technology level: current
Classification: EcoSpold01Categories: natural gas/production
Classification: ISIC rev.4 ecoinvent: 0620:Extraction of natural gas
Tags: ConvertedDataset
Scenario: Business-as-Usual
System model: Allocation, cut-off by classification
Share of production covered: 50 %
Generated by: Mireille Faist Emmenegger (obsolete)
Published in: Faist Emmenegger, M. 2007
Database: ecoinvent
isCopyrightProtected: true
accessRestrictedTo: 1

## General comment
The average amount of gas flared in Germany in the past three years was 0.0013 m3/m3 according to WEG. NMVOC are broken down according to the parts of ethane, butane etc. in gas as in Frischknecht et al. 1996, Tab. V.3.3.
[This dataset was already contained in the ecoinvent database version 2. It was not individually updated during the transfer to ecoinvent version 3. Life Cycle Impact Assessment results may still have changed, as they are affected by changes in the supply chain, i.e. in other datasets. This dataset was generated following the ecoinvent quality guidelines for version 2. It may have been subject to central changes described in the ecoinvent version 3 change report (http://www.ecoinvent.org/database/ecoinvent-version-3/reports-of-changes/), and the results of the central updates were reviewed extensively. The changes added e.g. consistent water flows and other information throughout the database. The documentation of this dataset can be found in the ecoinvent reports of version 2, which are still available via the ecoinvent website. The change report linked above covers all central changes that were made during the conversion process.]

## Included activities end
exploration and production of gas onshore in Germany. Data doesn't include combusted fuels for turbines, motors etc. It includes well testing (fuel requirements and emissions).

## Technology
Data in environmental report contains no information on technology.

## Time period
Figures are an average of the past five years (1996-2000). Emissions per m3 were stable. Only production volumes were updated to data for 2012.

## Reference product
- natural gas, high pressure: 0 m3; name RP_amount_1; CPC 12020: Natural gas, liquefied or in the gaseous state; By-product classification allocatable product; CAS 14493-06-2
  EcoSpold01Location=DE
  production volume 8.72308e9 m3; name PV_Ref; = 9*1000000000*0.9*42/39
    German production volume of 2012 was 9 billion cubic meters according to BP statistical review, June 2014 (retreived online: http://www.bp.com/content/dam/bp-country/de_de/PDFs/brochures/BP-statistical-review-of-world-energy-2014-full-report.pdf, acessed 17 July 2017). Converted from BP LHV (1 cubic meter natural gas in (BP Amoco 2014) corresponds to 0.9 kg oil equivalent. 1 kg oil equivalent corresponds to 42 MJ. The source does not specify if the cubic meters are standard or norm cubic meters. See 2015, Faist Emmenegger, Mireille, Del Duce, Andrea; Zah, Rainer, Update and extension of the inventory data for energy gases, 3 - SeparatePublication.) to ecoinvent standard LHV.
  property price 0.166 EUR2005
    Temporary price data. Calculated as 90% of purchasers price based on: 2005 price for Europe-27 Import (US$ and kg) in UN Commodity Trade Statistics Database - Natural gas in gaseous state (http://data.un.org/Data.aspx?q=natural+gas&d=ComTrade&f=_l1Code%3a28%3bcmdCode%3a271121; accessed 4 January 2011), using density of natural gas of 0.8 kg/m3 for unit conversion.
  property heating value, net 39 MJ
    Literature value, Source: United Nations Statistics Division (2018) International Recommendations for Energy Statistics (IRES). Available at: http://unstats.un.org/unsd/statcom/doc11/BG-IRES.pdf.
  property carbon content 0.533
    carbon content on a dry matter basis (reserved; not for manual entry)
  property true value 0.166; name RP_amount_1_true_value
    allocation property applied in "true value" allocation // value calculated from revenue
  properties: dry mass 1 kg, water in wet mass 0 kg, water content 0, carbon content, fossil 0.533, wet mass 1 kg, carbon content, non-fossil 0, carbon allocation 0.533 kg
- sulfur: 1 kg; name BP_amount_1; = 798257000/PV_Ref; CPC 34520: Sulphur, except sublimed sulphur, precipitated sulphur and colloidal sulphur; By-product classification allocatable product; CAS 7704-34-9
  The amount of sulfur produced as a byproduct from natural gas processing in Germany was 798257 metric tonnes in 2012 (Bundesverband Ergas, Erdöl und Geoenergie e.V., 2016, Die E&P-Industrie in Zahlen, Statistischer Bericht 2016, p. 11). The amount of sulfur produced per m3 of NG depends on the gas composition and process parameters which may vary locally and over time. Here the total sulfur production is averaged over the total NG production, i.e. both sweet and sour gas. The separation of sulfur from natural gas actually happens during the sweetening process. For modelling reasons the sulfur output is included in the natural gas production dataset, not in the separate sweetening dataset.
  production volume 7.98257e8 kg; = PV_Ref * (BP_amount_1 / RP_amount_1)
    Calculated from production volume of reference product using the relative outputs.
  property price 0.0551778 EUR2005
    Price calculated based on price of elemental sulfur (f.o.b. mine or plant) reported in the USGS Minerals Yearbook for Sulfur from 2010 to 2019 (https://www.usgs.gov/centers/nmic/sulfur-statistics-and-information). The prices given in USD were converted to EUR based on the annual exchange rates published by the European Central Bank (https://sdw.ecb.europa.eu/quickview.do?SERIES_KEY=120.EXR.A.USD.EUR.SP00.A), and then adjusted for inflation relative to 2005 by using the Harmonised Index of Consumer Prices (HICP) of the euro area, published by eurostat (https://ec.europa.eu/eurostat/databrowser/view/PRC_HICP_AIND/default/table).
  property carbon content 0
    carbon content on a dry matter basis (reserved; not for manual entry)
  property true value 0.00504937; name BP_amount_1_true_value
    allocation property applied in "true value" allocation // value calculated from revenue
  properties: carbon content, fossil 0, wet mass 1 kg, water content 0, dry mass 1 kg, water in wet mass 0 kg, carbon content, non-fossil 0, carbon allocation 0 kg

## Inputs from technosphere
- onshore natural gas field infrastructure: 2.15163e-10 unit; lognormal variance with pedigree 0.4227, pedigree (2,4,5,3,4)
  EcoSpold01Location=GLO
  Environmental report for 50% market share in Germany, standard module
  Uncertainty: environmental report for 50% market share in Germany, standard module
- sweetening, natural gas: 0.161292 m3; lognormal variance with pedigree 0.0401, pedigree (1,2,5,1,1)
  EcoSpold01Location=DE
  Environmental report for 50% market share in Germany, standard module for Germany
  Uncertainty: environmental report for 50% market share in Germany, standard module for Germany
- onshore well, oil/gas: 6.51619e-7 m; lognormal variance with pedigree 0.04, pedigree (1,1,5,1,1)
  EcoSpold01Location=GLO
  Environmental report for whole Germany
  Uncertainty: environmental report for whole Germany
- waste mineral oil: -1.02259e-5 kg; name amount_mineral_oil; lognormal variance with pedigree 0.0587, pedigree (2,1,5,3,3)
  EcoSpold01Location=CH
  Norwegian environmental report
  Uncertainty: Norwegian environmental report
  production volume 276522 kg; = PV_Ref* amount_mineral_oil
    Calculated from the production volume of natural gas, high pressure in proportion to the respective output amounts.
  property price 0 EUR2005; name amount_mineral_oil_price_EUR2005
  properties: wet mass 1 kg, carbon content, fossil 0.864444, heating value, net 34.7 MJ, water content 0.111111, dry mass 0.9 kg
  note on carbon content, fossil: Tab A.6, ecoinvent v2.2 report 13_I. C content has been calculated after data in the tables, and then referred to 1 kg DM
  note on heating value, net: Value taken from the general comment of the treatment dataset.
- methanol: 1.15162e-5 kg; lognormal variance with pedigree 0.0582, pedigree (1,2,5,3,3)
  Dutch environmental report
  EcoSpold01Location=CH
  Uncertainty: Dutch environmental report
  properties: heating value, net 26.49 MJ, dry mass 1 kg, wet mass 1 kg, carbon content, fossil 0.375
- waste emulsion paint: -1.22904e-7 kg; name amount_emulsion_paint; lognormal variance with pedigree 0.0587, pedigree (2,1,5,3,3)
  (same comment as for waste mineral oil)
  production volume 3323.49 kg; = PV_Ref* amount_emulsion_paint
    (same comment as for waste mineral oil)
  property price 0 EUR2005; name amount_emulsion_paint_price_EUR2005
  properties: carbon content, fossil 0.27, dry mass 1 kg, wet mass 1 kg, heating value, net 8.18 MJ
  note on carbon content, fossil: Tab A.4, ecoinvent v2.2 report 13_I. C content has been calculated after data in the tables, and then referred to 1 kg DM
- spent antifreezer liquid: -2.78712e-8 kg; name amount_antifreezer; lognormal variance with pedigree 0.0587, pedigree (2,1,5,3,3)
  (same comment as for waste mineral oil)
  production volume 753.674 kg; = PV_Ref* amount_antifreezer
    (same comment as for waste mineral oil)
  property price 0 EUR2005; name amount_antifreezer_price_EUR2005
  properties: carbon content, fossil 0.431328, wet mass 1 kg, heating value, net 0.56 MJ, dry mass 0.482 kg, water content 1.07469
  note on carbon content, fossil: Tab A.7, ecoinvent v2.2 report 13_I. C content has been calculated after data in the tables, and then referred to 1 kg DM
- hazardous waste, for underground deposit: -1.23227e-5 kg; name amount_hazardous; lognormal variance with pedigree 0.0587, pedigree (2,1,5,3,3)
  EcoSpold01Location=DE
  Norwegian environmental report
  Uncertainty: Norwegian environmental report
  production volume 333222 kg; = PV_Ref* amount_hazardous
    (same comment as for waste mineral oil)
  property price 0 EUR2005; name amount_hazardous_price_EUR2005
  properties: dry mass 1 kg, carbon content, fossil 0.554667, wet mass 1 kg
  note on carbon content, fossil: Tab A.6, ecoinvent v2.2 report 13_I, average hazardous waste composition was used, and referred to 0% water mass. No waste-specific emission are currently inventoried for underground deposits. Accordingly, no waste composition must be specified. For generic, average waste to underground deposit deposition in a 200 liter steel drum without cement solidification is assumed (ecoinvent v2.2 report 13_I).
- ethylene glycol: 7.19362e-6 kg; lognormal variance with pedigree 0.0582, pedigree (1,2,5,3,3)
  Dutch environmental report
  EcoSpold01Location=RER
  Uncertainty: Dutch environmental report
  properties: dry mass 1 kg, carbon content, fossil 0.387097, wet mass 1 kg, heating value, net 23.44 MJ
- waste wood, untreated: -1.98066e-6 kg; name amount_wood; lognormal variance with pedigree 0.0587, pedigree (2,1,5,3,3)
  Norwegian environmental report
  EcoSpold01Location=CH
  Uncertainty: Norwegian environmental report
  production volume 53559.7 kg; = PV_Ref *amount_wood
    (same comment as for waste mineral oil)
  property price 0 EUR2005; name amount_wood_price_EUR2005
  properties: heating value, net 13.99 MJ, carbon content, non-fossil 0.48632, dry mass 0.8 kg, water content 0.25, wet mass 1 kg
  note on carbon content, non-fossil: Tab A.4, ecoinvent v2.2 report 13_I. C content has been referred to 1 kg DM,
- municipal solid waste: -9.09686e-6 kg; name amount_MSW; lognormal variance with pedigree 0.0587, pedigree (2,1,5,3,3)
  (same comment as for waste wood, untreated)
  production volume 245991 kg; = PV_Ref *amount_MSW
    (same comment as for waste mineral oil)
  properties: water content 0.297017, carbon content, fossil 0.171549, carbon content, non-fossil 0.261655, dry mass 0.771 kg, wet mass 1 kg, heating value, net 11.74 MJ
  note on carbon content, fossil: MSW composition in tab 4.1, ecoinvent v2.2 report 13_I. C content referred to 1 kg DM
- electricity, medium voltage: 0.00315164 kWh; lognormal variance with pedigree 0.0407, pedigree (2,2,5,1,1)
  Environmental report for 50% market share in Germany, standard energy type
  EcoSpold01Location=DE
  Uncertainty: environmental report for 50% market share in Germany, standard energy type

## Inputs from nature
- Gas, natural, in ground [natural resource, in ground]: 0.32581 m3; lognormal variance with pedigree 0.0401, pedigree (1,2,5,1,1)
  Environmental report for 50% market share in Germany.
  Uncertainty: environmental report for 50% market share in Germany.

## Emissions to nature
- Nitrogen oxides [air, non-urban air or from high stacks]: 4.12907e-6 kg; lognormal variance with pedigree 0.0807, pedigree (2,2,5,1,1)
  Environmental report for 50% market share in Germany
  Uncertainty: environmental report for 50% market share in Germany
- NMVOC, non-methane volatile organic compounds, unspecified origin [air, non-urban air or from high stacks]: 9.29041e-7 kg; lognormal variance with pedigree 0.1607, pedigree (2,2,5,1,1)
  Environmental report for 50% market share in Germany, standard break down of NMVOC in different types
  Uncertainty: environmental report for 50% market share in Germany, standard break down of NMVOC in different types
- Ethane [air, non-urban air or from high stacks]: 2.55486e-6 kg; lognormal variance with pedigree 0.0807, pedigree (2,2,5,1,1)
  (same comment as for NMVOC, non-methane volatile organic compounds, unspecified origin)
- Mercury [air, non-urban air or from high stacks]: 5.38715e-11 kg; lognormal variance with pedigree 0.1161, pedigree (4,1,5,3,3)
  Data calculated on the basis of losses and gas composition
  Uncertainty: data calculated on the basis of losses and gas composition
- Propane [air, non-urban air or from high stacks]: 2.3226e-6 kg; lognormal variance with pedigree 0.0807, pedigree (2,2,5,1,1)
  (same comment as for NMVOC, non-methane volatile organic compounds, unspecified origin)
- Radon-222 [air, non-urban air or from high stacks]: 0.000107743 kBq; lognormal variance with pedigree 0.3761, pedigree (4,1,5,3,3)
  (same comment as for Mercury)
- Sulfur dioxide [air, non-urban air or from high stacks]: 3.22584e-5 kg; lognormal variance with pedigree 0.0401, pedigree (1,2,5,1,1)
  (same comment as for Nitrogen oxides)
- Methane, fossil [air, non-urban air or from high stacks]: 8.51621e-5 kg; lognormal variance with pedigree 0.0801, pedigree (1,2,5,1,1)
  (same comment as for Nitrogen oxides)
- Carbon monoxide, fossil [air, non-urban air or from high stacks]: 2.58067e-5 kg; lognormal variance with pedigree 0.6901, pedigree (1,2,5,1,1)
  (same comment as for Nitrogen oxides)
- Carbon dioxide, fossil [air, non-urban air or from high stacks]: 0.00367746 kg; lognormal variance with pedigree 0.0401, pedigree (1,2,5,1,1)
  (same comment as for Nitrogen oxides)

## Sampling procedure
Data is based on environmental report. No information about the sampling procedure.

## Extrapolations
Data of BEB is extrapolated for Germany. BEB produces about 50% of the German natural gas. BEB produces as well oil and sulphur out of sour gas. The data in the environmental report is already allocated on gas. About 50% of the produced gas is sour. The processing of gas is already included. Emissions due to the use of natural gas as energy source and of the flares are included. Based on the environmental report of the company RWE, which also produces gas in Germany, the part of electricity in energy used is assumed to be 20%.

## Review by Michael Spielmann (obsolete) 2003-09-22
Passed.
