# natural gas production

Dataset: EcoSpold 2, unit process
Geography: RoW
Time period: 1989-01-01 to 2021-12-31
Technology level: current
Classification: ISIC rev.4 ecoinvent: 0620:Extraction of natural gas
Classification: EcoSpold01Categories: natural gas/production
Tags: ConvertedDataset
Scenario: Business-as-Usual
System model: Allocation, cut-off by classification
Generated by: Mireille Faist Emmenegger (obsolete)
Published in: Faist Emmenegger, M. 2007
Database: ecoinvent
isCopyrightProtected: true
accessRestrictedTo: 1

## General comment
Data for RU is mostly based on standard data, as only few information on the Russian production is available.
[This dataset was already contained in the ecoinvent database version 2. It was not individually updated during the transfer to ecoinvent version 3. Life Cycle Impact Assessment results may still have changed, as they are affected by changes in the supply chain, i.e. in other datasets. This dataset was generated following the ecoinvent quality guidelines for version 2. It may have been subject to central changes described in the ecoinvent version 3 change report (http://www.ecoinvent.org/database/ecoinvent-version-3/reports-of-changes/), and the results of the central updates were reviewed extensively. The changes added e.g. consistent water flows and other information throughout the database. The documentation of this dataset can be found in the ecoinvent reports of version 2, which are still available via the ecoinvent website. The change report linked above covers all central changes that were made during the conversion process.]

## Included activities end
Exploration and production of gas onshore. Data doesn"t include combusted fuels for turbines, motors etc. It includes well testing (fuel requirements and emissions).

## Geography
Data is based on average data and therefore not specific for the country, except for leakage data.

## Technology
The data describes an average onshore technology for natural gas to 13% out of combined oil gas production. Natural gas is assumed to 20% sour. Leakage in exploitation is estimated at 0.38% and production 0.12%. It is further assumed that about 30% of the produced water is discharged in surface water. Water emissions are differentiated between combined oil and gas production and gas production.

## Time period
Energy demand is based on 2000 Norwegian data, quantity of flared gas on 1991 German data, leakages on 2000 data, quantity of discharged water and water emissions on 1991 German data.

## Parameters
- production volume country 01: 1.0731e11 dimensionless; name PV_01
  Production volume of Alberta. Used to calculate flows specific to this region (sulfur, gases)

## Reference product
- propane: 1 kg; name propane_amount; CPC 33410: Propane and butanes, liquefied; By-product classification allocatable product; CAS 74-98-6
  This flow is considered as a regional specificity of Quebec. The flow is scaled using the production volumes (Quebec and GLO) to avoid its accounting of this specificity in the other regions.
  production volume 3.77029e6 kg; = apv_natural_gas * propane_amount / natural_gas_amount
    Calculated from the production volume of natural gas, high pressure in proportion to the respective output amounts.
  property price 0.267 EUR2005; name incinerationResidue_price_EUR2005
    Average import and export prices (total trades (USD) divided by total weight (kg) in EU27, USA, China, Japan and India) from UN data - Average of Propane and butane (http://data.un.org/Data.aspx?q=Butanes+&d=ComTrade&f=_l1Code%3a28%3bcmdCode%3a271113 and http://data.un.org/Data.aspx?q=propane&d=ComTrade&f=_l1Code%3a28%3bcmdCode%3a271112; accessed 1 June 10).
  property heating value, net 46.4 MJ
    Indicative value. Reference: Fuels - Higher and Lower Calorific Values, available at: https://www.engineeringtoolbox.com/fuels-higher-calorific-values-d_169.html
  property carbon content 0.817139
    carbon content on a dry matter basis (reserved; not for manual entry)
  property true value 8.44222e-7; name propane_amount_true_value
    allocation property applied in "true value" allocation // value calculated from revenue
  properties: water in wet mass 0 kg, dry mass 1 kg, water content 0, carbon content, fossil 0.817139, carbon content, non-fossil 0, wet mass 1 kg, carbon allocation 0.817139 kg
- natural gas, high pressure: 0 m3; name natural_gas_amount; CPC 12020: Natural gas, liquefied or in the gaseous state; By-product classification allocatable product; CAS 14493-06-2
  production volume 1.04911e12 m3; name apv_natural_gas; = 3343.3*10^9*0.7*(37.8/39)
    Total amount of m3 natural gas produced worldwide in 2012 was 3343.3 bn m3 according to BP (2014) minus the amount (30%) co-produced with oil. It is estimated that approximately 70% of natural gas is produced in stand alone production activities and the rest is produced in activities where both natural gas and petroleum are produced. Value converted from BP LHV (1 cubic meter natural gas in (BP, 2014) corresponds to 0.9 kg oil equivalent. 1 kg oil equivalent corresponds to 42 MJ) to ecoinvent standard LHV of 39MJ/m3. The source does not specify if the cubic meters are standard or norm cubic meters. See 2015, Faist Emmenegger, Mireille, Del Duce, Andrea; Zah, Rainer, Update and extension of the inventory data for energy gases, 3 - SeparatePublication.) Refrence(s): BP (2014). Statistical Review of World Energy, June 2014. Retrieved online from http://www.bp.com/content/dam/bp/excel/energy-economics/statistical-review-2015/bp-statistical-review-of-world-energy-2015-workbook.xlsx, 30 August, 2017
  property price 0.166 EUR2005
    Temporary price data. Calculated as 90% of purchasers price based on: 2005 price for Europe-27 Import (US$ and kg) in UN Commodity Trade Statistics Database - Natural gas in gaseous state (http://data.un.org/Data.aspx?q=natural+gas&d=ComTrade&f=_l1Code%3a28%3bcmdCode%3a271121; accessed 4 January 2011), using density of natural gas of 0.8 kg/m3 for unit conversion.
  property heating value, net 39 MJ
    Literature value, Source: United Nations Statistics Division (2018) International Recommendations for Energy Statistics (IRES). Available at: http://unstats.un.org/unsd/statcom/doc11/BG-IRES.pdf.
  property carbon content, fossil 0.602381
    An average C content of 0.506 kg C/ m3 has been assumed (this average has been calculated using data in Tab 3.5, ecoinvent v2.2 report 6_V
  property carbon content 0.602381
    carbon content on a dry matter basis (reserved; not for manual entry)
  property true value 0.166; name natural_gas_amount_true_value
    allocation property applied in "true value" allocation // value calculated from revenue
  properties: water content 0, water in wet mass 0 kg, carbon content, non-fossil 0, wet mass 0.84 kg, dry mass 0.84 kg, carbon allocation 0.506 kg

## By-products
All rows: By-product classification allocatable product
- sulfur: 0 kg; name sulfur_amount; CPC 34520: Sulphur, except sublimed sulphur, precipitated sulphur and colloidal sulphur; CAS 7704-34-9
  This is a weighted average amount of elemental sulfur produced as by-product per m3 of natural over the US, German, Russian and Canadian natural gas productiond datasets. (Other regional datasets do not have sulfur as by-product due to the sweet composition of natural gas in those geographies.)
  production volume 1.35577e10 kg; = apv_natural_gas * sulfur_amount / natural_gas_amount
    (same comment as for propane)
  property price 0.0551778 EUR2005; name sulfur_price_EUR2005
    Price calculated based on price of elemental sulfur (f.o.b. mine or plant) reported in the USGS Minerals Yearbook for Sulfur from 2010 to 2019 (https://www.usgs.gov/centers/nmic/sulfur-statistics-and-information). The prices given in USD were converted to EUR based on the annual exchange rates published by the European Central Bank (https://sdw.ecb.europa.eu/quickview.do?SERIES_KEY=120.EXR.A.USD.EUR.SP00.A), and then adjusted for inflation relative to 2005 by using the Harmonised Index of Consumer Prices (HICP) of the euro area, published by eurostat (https://ec.europa.eu/eurostat/databrowser/view/PRC_HICP_AIND/default/table).
  property carbon content 0
    carbon content on a dry matter basis (reserved; not for manual entry)
  property true value 0.000597324; name sulfur_amount_true_value
    allocation property applied in "true value" allocation // value calculated from revenue
  properties: wet mass 1 kg, water content 0, dry mass 1 kg, carbon content, fossil 0, carbon content, non-fossil 0, water in wet mass 0 kg, carbon allocation 0 kg
- isobutane: 0 kg; name isobutane_amount; CPC 33410: Propane and butanes, liquefied; CAS 75-28-5
  (same comment as for propane)
  production volume 2.56275e6 kg; = apv_natural_gas * ( isobutane_amount / natural_gas_amount)
    Calculated from production volume of reference product using the relative outputs.
  property heating value, net 45.89 MJ
    LHV is calculated based on the elemental composition of the substance. The chemical formula of the substance is found to be: C4H10, (PubChem 2020).
    Reference: Kim, S., Chen, J., Cheng, T., Gindulyte, A., He, J., He, S., Li, Q., Shoemaker, B. A., Thiessen, P. A., Yu, B., Zaslavsky, L., Zhang, J., & Bolton, E. E. (2019). PubChem 2019 update: improved access to chemical data. Nucleic acids research, 47(D1), D1102–D1109. https://doi.org/10.1093/nar/gky1033
  property price 0.45 EUR2005; name isobutane_amount_price_EUR2005
    According to freely accessible market study from ICIS (Independent Commodity Intelligence Services), accessible at https://www.icis.com/explore/resources/news/2011/11/08/9506547/isobutane-and-retail-gasoline-prices-jump-on-strong-alkylate/
  property carbon content 0.827586
    carbon content on a dry matter basis (reserved; not for manual entry)
  property true value 9.675e-7; name isobutane_amount_true_value
    allocation property applied in "true value" allocation // value calculated from revenue
  properties: carbon content, fossil 0.827586, carbon content, non-fossil 0, wet mass 1 kg, dry mass 1 kg, water content 0, water in wet mass 0 kg, carbon allocation 0.827586 kg
- butane: 0 kg; name butane_amount; CPC 341: Basic organic chemicals; CAS 106-97-8
  (same comment as for propane)
  production volume 2.56275e6 kg; = apv_natural_gas * butane_amount / natural_gas_amount
    (same comment as for propane)
  property price 0.26 EUR2005; name butane_price_EUR2005
    Temporary price data. Calculated as 90% of purchasers price based on: 2004 import and export prices (total trades (USD) divided by total weight (kg) in EU27, USA, China, Japan and India) from UN Commodity Trade Statistics Database (http://data.un.org/Explorer.aspxDatabase [Accessed 2 July 2010]). Commodity: Butanes, liquefied
  property heating value, net 45.89 MJ
    LHV is calculated based on the elemental composition of the substance. Based on the CAS number of the substance (000106-97-8 ), which is found manually, the chemical formula of the substance is found to be: C4H10, (PubChem 2020).
    Reference: Kim, S., Chen, J., Cheng, T., Gindulyte, A., He, J., He, S., Li, Q., Shoemaker, B. A., Thiessen, P. A., Yu, B., Zaslavsky, L., Zhang, J., & Bolton, E. E. (2019). PubChem 2019 update: improved access to chemical data. Nucleic acids research, 47(D1), D1102–D1109. https://doi.org/10.1093/nar/gky1033
  property carbon content 0.827586
    carbon content on a dry matter basis (reserved; not for manual entry)
  property true value 5.59e-7; name butane_amount_true_value
    allocation property applied in "true value" allocation // value calculated from revenue
  properties: carbon content, non-fossil 0, water content 0, water in wet mass 0 kg, wet mass 1 kg, dry mass 1 kg, carbon content, fossil 0.827586, carbon allocation 0.827586 kg
- ethane: 0 kg; name ethane_amount; CPC 34: Basic chemicals; CAS 74-84-0
  (same comment as for propane)
  production volume 1.03562e7 kg; = apv_natural_gas * ethane_amount / natural_gas_amount
    (same comment as for propane)
  property price 0.3 EUR2005; name spentSolvent_price_EUR2005
    Estimated price based on freely available market reports (http://www.platts.com/news-feature/2013/petrochemicals/global-margins/ethane_rejection) (http://www.growthstockwire.com/3255/a-big-trend-change-is-coming-in-this-beaten-down-commodity) [Accessed 20140424].
  property heating value, net 48.38 MJ
    LHV is calculated based on the elemental composition of the substance. Based on the CAS number of the substance (000074-84-0), the chemical formula of the substance is found to be: C2H6, (PubChem 2020).
    Reference: Kim, S., Chen, J., Cheng, T., Gindulyte, A., He, J., He, S., Li, Q., Shoemaker, B. A., Thiessen, P. A., Yu, B., Zaslavsky, L., Zhang, J., & Bolton, E. E. (2019). PubChem 2019 update: improved access to chemical data. Nucleic acids research, 47(D1), D1102–D1109. https://doi.org/10.1093/nar/gky1033
  property carbon content 0.798875
    carbon content on a dry matter basis (reserved; not for manual entry)
  property true value 2.6055e-6; name ethane_amount_true_value
    allocation property applied in "true value" allocation // value calculated from revenue
  properties: water content 0, water in wet mass 0 kg, carbon content, fossil 0.798875, wet mass 1 kg, carbon content, non-fossil 0, dry mass 1 kg, carbon allocation 0.798875 kg
- pentane: 0 kg; name pentane_amount; CPC 333: Petroleum oils and oils obtained from bituminous materials, other than crude; preparations n.e.c. containing by […]; CAS 109-66-0
  (same comment as for propane)
  production volume 2.76704e6 kg; = apv_natural_gas * pentane_amount / natural_gas_amount
    (same comment as for propane)
  property price 1.1 EUR2005; name wasteTextile_price_EUR2005
    Assumed equal to EU price.
  property heating value, net 45.37 MJ
    LHV is calculated based on the elemental composition of the substance. Based on the CAS number of the substance (000109-66-0), the chemical formula of the substance is found to be: C5H12, (PubChem 2020).
    Reference: Kim, S., Chen, J., Cheng, T., Gindulyte, A., He, J., He, S., Li, Q., Shoemaker, B. A., Thiessen, P. A., Yu, B., Zaslavsky, L., Zhang, J., & Bolton, E. E. (2019). PubChem 2019 update: improved access to chemical data. Nucleic acids research, 47(D1), D1102–D1109. https://doi.org/10.1093/nar/gky1033
  property carbon content 0.833333
    carbon content on a dry matter basis (reserved; not for manual entry)
  property true value 2.55257e-6; name pentane_amount_true_value
    allocation property applied in "true value" allocation // value calculated from revenue
  properties: water content 0, carbon content, fossil 0.833333, wet mass 1 kg, carbon content, non-fossil 0, dry mass 1 kg, water in wet mass 0 kg, carbon allocation 0.833333 kg

## Inputs from technosphere
- onshore well, oil/gas: 2.75818e-6 m; lognormal variance with pedigree 0.0527, pedigree (2,2,5,5,1)
  Data for Russia
  Uncertainty: d
- methanol: 8.50659e-7 kg; lognormal variance with pedigree 0.0601, pedigree (1,2,5,5,3)
  Dutch environmental report
  Uncertainty: D
  properties: dry mass 1 kg, carbon content, fossil 0.375, heating value, net 26.49 MJ, wet mass 1 kg
- municipal solid waste: 0 kg; name municipal_solid_waste_amount; pedigree (1,1,1,1,1)
  Norwegian environmental report
  Uncertainty: N
  production volume 0 kg
    (same comment as for propane)
  properties: dry mass 0.771 kg, wet mass 1 kg, carbon content, non-fossil 0.261655, water content 0.297017, carbon content, fossil 0.171549, heating value, net 11.74 MJ
  note on carbon content, non-fossil: MSW composition in tab 4.1, ecoinvent v2.2 report 13_I. C content referred to 1 kg DM
  note on heating value, net: Value taken from the general comment of the treatment dataset.
- sweet gas, burned in gas turbine: 0.251904 MJ; lognormal variance with pedigree 0.0527, pedigree (2,2,5,5,1)
  Data from other countries
  Uncertainty: d
  properties: heating value, gross 1 MJ, heating value, net 1 MJ, carbon content, fossil 0.589286, dry mass 0.0247059 kg, wet mass 0.0247059 kg
- ethylene glycol: 5.31364e-7 kg; lognormal variance with pedigree 0.0601, pedigree (1,2,5,5,3)
  Dutch environmental report
  Uncertainty: D
  properties: carbon content, fossil 0.387097, dry mass 1 kg, wet mass 1 kg, heating value, net 23.44 MJ
- hazardous waste, for underground deposit: -7.0747e-5 kg; name haz_waste_undergr_dep_amount; lognormal variance with pedigree 0.0606, pedigree (2,1,5,5,3)
  Norwegian environmental report
  Uncertainty: N
  production volume 5.45694e7 kg; = apv_natural_gas * haz_waste_undergr_dep_amount / natural_gas_amount
    (same comment as for propane)
  property price 0 EUR2005; name haz_waste_undergr_dep_amou_price_EUR2005
  properties: wet mass 1 kg, carbon content, fossil 0.554667, dry mass 1 kg
  note on carbon content, fossil: Tab A.6, ecoinvent v2.2 report 13_I, average hazardous waste composition was used, and referred to 0% water mass. No waste-specific emission are currently inventoried for underground deposits. Accordingly, no waste composition must be specified. For generic, average waste to underground deposit deposition in a 200 liter steel drum without cement solidification is assumed (ecoinvent v2.2 report 13_I).
- waste natural gas, sweet: -0.103728 MJ; name waste_natural_gas_sweet_amount; lognormal variance with pedigree 0.0527, pedigree (2,2,5,5,1)
  Data from other countries
  Uncertainty: d
  production volume 7.80891e10 MJ; = apv_natural_gas * waste_natural_gas_sweet_amount / natural_gas_amount
    (same comment as for propane)
  property price 0 EUR2005; name waste_natural_gas_sweet_am_price_EUR2005
  properties: dry mass 0.0247059 kg, heating value, gross 1 MJ, carbon content, fossil 0.589286, wet mass 0.0247059 kg, heating value, net 1 MJ
- drying, natural gas: 0.846889 m3; lognormal variance with pedigree 0.0527, pedigree (2,2,5,5,1)
  Data from other countries
  Uncertainty: d
- sweetening, natural gas: 0.159069 m3; lognormal variance with pedigree 0.0527, pedigree (2,2,5,5,1)
  Data from other countries
  Uncertainty: d
- sour gas, burned in gas turbine: 0.0544473 MJ; lognormal variance with pedigree 0.0527, pedigree (2,2,5,5,1)
  Data from other countries
  Uncertainty: d
  properties: wet mass 0.027027 kg, carbon content, fossil 0.571, dry mass 0.027027 kg, heating value, gross 1 MJ, heating value, net 1 MJ
  note on heating value, net: Heating value 37 MJ/kg. Density is 1 kg/m3 (ecoinvent v2.2 report 6_V, Tab 3.4)
- waste textile, soiled: -2.22185e-8 kg; name waste_textile_soiled_amount
  (same comment as for propane)
  production volume 20705 kg; = apv_natural_gas * waste_textile_soiled_amount / natural_gas_amount
    (same comment as for propane)
  property price 0 EUR2005; name waste_textile_soiled_amoun_price_EUR2005
  properties: carbon content, non-fossil 0.570519, dry mass 0.75 kg, heating value, net 14.45 MJ, wet mass 1 kg, water content 0.333333
- diesel, burned in diesel-electric generating set, 10MW: 0.0338756 MJ; lognormal variance with pedigree 0.0707, pedigree (2,2,5,5,3)
  Data from other countries
  Uncertainty: d
  properties: heating value, net 1 MJ
- waste natural gas, sour: -0.0229458 MJ; name waste_natural_gas_sour_amount; lognormal variance with pedigree 0.0527, pedigree (2,2,5,5,1)
  Data from other countries
  Uncertainty: d
  production volume 1.70729e10 MJ; = apv_natural_gas * waste_natural_gas_sour_amount / natural_gas_amount
    (same comment as for propane)
  property price 0 EUR2005; name waste_natural_gas_sour_amo_price_EUR2005
  properties: wet mass 0.027027 kg, heating value, gross 1 MJ, heating value, net 1 MJ, carbon content, fossil 0.571226, dry mass 0.027027 kg
  note on heating value, net: Waste products are assigned a price of zero as they are assumed to require further treatment.
  note on carbon content, fossil: Calculated out of data in Tab 3.4, ecoinvent v2.2 report 6_V.
- natural gas, unprocessed, at extraction: 0.768471 m3; lognormal variance with pedigree 0.052, pedigree (1,1,5,5,1)
  NREL 2007
  properties: wet mass 0.84 kg, heating value, net 39 MJ, dry mass 0.84 kg, carbon content, fossil 0.602381
  note on heating value, net: Literature value, Source: United Nations Statistics Division (2018) International Recommendations for Energy Statistics (IRES). Available at: http://unstats.un.org/unsd/statcom/doc11/BG-IRES.pdf.
  note on carbon content, fossil: An average C content of 0.506 kg C/ m3 has been assumed (this average has been calculated using data in Tab 3.5, ecoinvent v2.2 report 6_V
- electricity, medium voltage: 0 kWh; pedigree (1,1,1,1,1)
  Environmental report for 50% market share in Germany, standard energy type
  Uncertainty: e
- water discharge from petroleum/natural gas extraction, onshore: -0.00070685 kg; name water_dis_png_ext_onshore_amount; lognormal variance with pedigree 0.0426, pedigree (2,1,5,5,1)
  Data from other countries
  Uncertainty: d
  production volume 6.87379e8 kg; = apv_natural_gas * water_dis_png_ext_onshore_amount / natural_gas_amount
    (same comment as for propane)
  property price 0 EUR2005; name water_dis_png_ext_onshore__price_EUR2005
  properties: carbon content, non-fossil 0.00101223, wet mass 1 kg, dry mass 0.0848608 kg, carbon content, fossil 0.00168491, water content 10.784
- spent solvent mixture: -1.1333e-7 kg; name spent_solvent_mix_amount
  (same comment as for propane)
  production volume 105610 kg; = apv_natural_gas * spent_solvent_mix_amount / natural_gas_amount
    (same comment as for propane)
  property price 0 EUR2005; name spent_solvent_mix_amount_price_EUR2005
  properties: carbon content, fossil 0.571257, water content 0.197605, wet mass 1 kg, dry mass 0.835 kg, heating value, net 21.7 MJ
  note on carbon content, fossil: Tab A.7, ecoinvent v2.2 report 13_I. C content has been calculated after data in the tables, and then referred to 1 kg DM
- spent antifreezer liquid: -2.77367e-8 kg; name spent_antifreezer_liquid_amount; lognormal variance with pedigree 0.0606, pedigree (2,1,5,5,3)
  Norwegian environmental report
  Uncertainty: N
  production volume 25002.1 kg; = apv_natural_gas * spent_antifreezer_liquid_amount / natural_gas_amount
    (same comment as for propane)
  property price 0 EUR2005; name spent_antifreezer_liquid_a_price_EUR2005
  properties: wet mass 1 kg, dry mass 0.482 kg, water content 1.07469, carbon content, fossil 0.431328, heating value, net 0.56 MJ
- waste emulsion paint: -1.28961e-7 kg; name waste_emulsion_paint_amount; lognormal variance with pedigree 0.0606, pedigree (2,1,5,5,3)
  Norwegian environmental report
  Uncertainty: N
  production volume 116449 kg; = apv_natural_gas * waste_emulsion_paint_amount / natural_gas_amount
    (same comment as for propane)
  property price 0 EUR2005; name waste_emulsion_paint_amoun_price_EUR2005
  properties: carbon content, fossil 0.27, dry mass 1 kg, heating value, net 8.18 MJ, wet mass 1 kg
  note on carbon content, fossil: Tab A.4, ecoinvent v2.2 report 13_I. C content has been calculated after data in the tables, and then referred to 1 kg DM
- average incineration residue: -3.46864e-9 kg; name av_incineration_res_amount
  (same comment as for propane)
  production volume 3232.34 kg; = apv_natural_gas * av_incineration_res_amount / natural_gas_amount
    (same comment as for propane)
  property price 0 EUR2005; name av_incineration_res_amount_price_EUR2005
  properties: carbon content, fossil 0.0325466, carbon content, non-fossil 0.0511208, dry mass 1 kg, wet mass 1 kg
- waste mineral oil: -1.08767e-5 kg; name waste_mineral_oil_amount; lognormal variance with pedigree 0.0606, pedigree (2,1,5,5,3)
  Norwegian environmental report
  Uncertainty: N
  production volume 9.82566e6 kg; = apv_natural_gas * waste_mineral_oil_amount / natural_gas_amount
    (same comment as for propane)
  property price 0 EUR2005; name waste_mineral_oil_amount_price_EUR2005
  properties: heating value, net 34.7 MJ, carbon content, fossil 0.864444, dry mass 0.9 kg, water content 0.111111, wet mass 1 kg
  note on carbon content, fossil: Tab A.6, ecoinvent v2.2 report 13_I. C content has been calculated after data in the tables, and then referred to 1 kg DM
- waste wood, untreated: 0 kg; name waste_wood_untreated_amount; pedigree (1,1,1,1,1)
  Norwegian environmental report
  Uncertainty: N
  production volume 0 kg
    (same comment as for propane)
  property price 0 EUR2005; name waste_wood_untreated_amoun_price_EUR2005
  properties: heating value, net 13.99 MJ, carbon content, non-fossil 0.48632, wet mass 1 kg, water content 0.25, dry mass 0.8 kg
  note on carbon content, non-fossil: Tab A.4, ecoinvent v2.2 report 13_I. C content has been referred to 1 kg DM,
- onshore natural gas field infrastructure: 5.80768e-10 unit; lognormal variance with pedigree 0.3541, pedigree (3,2,5,5,1)
  Data from other countries
  Uncertainty: d
- municipal solid waste: -2.97299e-6, -8.72129e-6, -5.36775e-6, -9.43093e-6, -9.52225e-6, -1.00345e-5, -1.11654e-5, -2.52845e-6, -9.11693e-6, -8.91366e-6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 kg (38 entries); lognormal variance with pedigree 0.0606, pedigree (2,1,5,5,3)
  Norwegian environmental report
  Uncertainty: N
  production volume 4.00044e8 kg
- electricity, medium voltage: 0.000464889, 2.00735e-5, 0.000169014, 0.000530655, 3.18162e-5, 0.000191611, 8.34946e-5, 7.68422e-5, 0.000137363, 6.40319e-5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 kWh (54 entries); lognormal variance with pedigree 0.0427, pedigree (2,2,5,5,1)
  Environmental report for 50% market share in Germany, standard energy type
  Uncertainty: e
- waste wood, untreated: -4.65339e-9, -1.52546e-8, -8.42577e-9, -1.42196e-8, -1.62707e-8, -6.84668e-7, -1.44905e-8, -8.50118e-8, -6.21532e-9, -3.09849e-9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 kg (41 entries); lognormal variance with pedigree 0.0606, pedigree (2,1,5,5,3)
  Norwegian environmental report
  Uncertainty: N
  production volume 1.83412e6 kg

## Inputs from nature
- Gas, natural, in ground [natural resource, in ground]: 0.870955 m3; lognormal variance with pedigree 0.0527, pedigree (2,2,5,5,1)
  Data from other countries
  Uncertainty: d

## Emissions to nature
- NMVOC, non-methane volatile organic compounds, unspecified origin [air, unspecified]: 0.000425221 kg; lognormal variance with pedigree 0.342, pedigree (1,1,5,5,1)
  NREL 2007
- NMVOC, non-methane volatile organic compounds, unspecified origin [air, non-urban air or from high stacks]: 0.000115309 kg; lognormal variance with pedigree 0.1627, pedigree (2,2,5,5,1)
  Leakage rate specific for RU, data 2000
  Uncertainty: l
- Mercury [air, non-urban air or from high stacks]: 5.86775e-10 kg; lognormal variance with pedigree 0.0827, pedigree (2,2,5,5,1)
  Leakage rate specific for RU, data 2000
  Uncertainty: l
- Hydrocarbons, aromatic [air, unspecified]: 0.000190288 kg; lognormal variance with pedigree 0.342, pedigree (1,1,5,5,1)
  NREL 2007
- Ethane [air, non-urban air or from high stacks]: 0.000173285 kg; lognormal variance with pedigree 0.0827, pedigree (2,2,5,5,1)
  Leakage rate specific for RU, data 2000
  Uncertainty: l
- Methane, fossil [air, non-urban air or from high stacks]: 0.00241539 kg; lognormal variance with pedigree 0.0827, pedigree (2,2,5,5,1)
  Leakage rate specific for RU, data 2000
  Uncertainty: l
- Propane [air, non-urban air or from high stacks]: 6.01786e-5 kg; lognormal variance with pedigree 0.0827, pedigree (2,2,5,5,1)
  Leakage rate specific for RU, data 2000
  Uncertainty: l
- Radon-222 [air, non-urban air or from high stacks]: 0.001153 kBq; lognormal variance with pedigree 0.3427, pedigree (2,2,5,5,1)
  Leakage rate specific for RU, data 2000
  Uncertainty: l
- Methane, fossil [air, unspecified]: 0.00103927 kg; lognormal variance with pedigree 0.342, pedigree (1,1,5,5,1)
  NREL 2007
- Carbon monoxide, fossil [air, non-urban air or from high stacks]: 1.90624e-6 kg; lognormal variance with pedigree 0.6921, pedigree (1,2,5,5,1)
  Environmental report for 50% market share in Germany
  Uncertainty: e
- Chloride [water, surface water]: 4.67217e-6 kg; lognormal variance with pedigree 0.1227, pedigree (2,2,5,5,1)
  Data from other countries, assumptions
  Uncertainty: d
- Sulfur dioxide [air, non-urban air or from high stacks]: 2.3828e-6 kg; lognormal variance with pedigree 0.0421, pedigree (1,2,5,5,1)
  Environmental report for 50% market share in Germany
  Uncertainty: e
- Arsenic, ion [water, surface water]: 1.28025e-11 kg; lognormal variance with pedigree 0.1227, pedigree (2,2,5,5,1)
  Data from other countries, assumptions
  Uncertainty: d
- Benzene [water, surface water]: 3.00932e-10 kg; lognormal variance with pedigree 0.3827, pedigree (2,2,5,5,1)
  Data from other countries, assumptions
  Uncertainty: d
- Carbon dioxide, fossil [air, non-urban air or from high stacks]: 0.000374509 kg; lognormal variance with pedigree 0.0427, pedigree (2,2,5,5,1)
  Leakage rate specific for RU, data 2000
  Uncertainty: l
- Nitrogen oxides [air, non-urban air or from high stacks]: 3.04998e-7 kg; lognormal variance with pedigree 0.0827, pedigree (2,2,5,5,1)
  Environmental report for 50% market share in Germany
  Uncertainty: e
- Butane [air, non-urban air or from high stacks]: 1.27405e-6 kg; lognormal variance with pedigree 0.0827, pedigree (2,2,5,5,1)
  Leakage rate specific for RU, data 2000
  Uncertainty: l
- Hydrogen sulfide [air, non-urban air or from high stacks]: 5.03273e-5 kg; lognormal variance with pedigree 0.0827, pedigree (2,2,5,5,1)
  Leakage rate specific for RU, data 2000
  Uncertainty: l
- Sulfur dioxide [air, unspecified]: 0.000687822 kg; lognormal variance with pedigree 0.342, pedigree (1,1,5,5,1)
  This exchange accounts for the sulfur dioxide emissions of natural gas production in Canada and the US, where sweetening (which is the major source of SO2 emissions) is included in the natural gas production datasets. Therefore, the amount is the weighted average of the respective amounts in the natural gas production datasets in the US and CA-AB. A separate flow of sulfur dioxide emissions represents the average emissions in geographies where sweetening is not necessary or covered in a separate process.

## Sampling procedure
Leakage of Russian gas production is based on 3D regional transport model of Siberian gas fields and on field studies. Rest is based on average data without information on sampling procedure.

## Extrapolations
Data is extrapolated from European data. This dataset has been copied from an original dataset covering the geography RU. The uncertainty has been adjusted accordingly.

## Review by Emilia Moreno Ruiz 2017-09-06
PV adjusted

## Review by Michael Spielmann (obsolete) 2003-07-09
Passed.

## Review by Emilia Moreno Ruiz 2015-09-17
broken formula fixed
